# soybean production

Dataset: EcoSpold 2, unit process
Geography: BR-PR
Time period: 2012-01-01 to 2021-12-31
Technology level: current
Classification: ISIC rev.4 ecoinvent: 0111:Growing of cereals (except rice), leguminous crops and oil seeds
Synonyms: soya; soybean cultivation; soy production
Scenario: Business-as-Usual
System model: Allocation, cut-off by classification
Share of production covered: 100 %
Generated by: Marília I. S. Folegatti Matsuura
Published in: Folegatti-Matsuura M. 2018
Database: ecoinvent
isCopyrightProtected: true
accessRestrictedTo: 1

## General comment
This dataset represents the production of 1 kg of soybeans (fresh matter).
The yield is 3300 kg/ha at a moisture content at storage of 13%.
This activity represents the weighted average of soybean production systems: 30.4% of monoculture plus 69.6% of cropping systems (e.g. crop rotation with other grain in the agricultural cycle, mainly winter maize). Therefore, land occupation and liming are related to the weighted averages of time occupation of both soybean production systems.
The total amount of mineral fertilizers (N-P-K) and pesticides applied (active ingredients) are 5 kg N/ha; 50 kg P2O5/ha; 135 kg K2O/ha and 5.11 kg/ha, respectively.
[This dataset is meant to replace the following datasets:]
[This dataset is meant to replace the following datasets:
- soybean production, BR, 2001 - 2006]
[This dataset is meant to replace the following datasets:
- soybean production, BR, 2001 - 2006]

## Included activities start
This activity starts after the harvest of the previous crop.

## Included activities end
The dataset includes the inputs of seeds, mineral fertilisers and pesticides.It is assumed that no organic fertilisers are applied.
The dataset includes all machine operations and corresponding machine infrastructure and sheds. Operations are: limestone and gypsum application, application of plant protection product, planting with starter fertiliser, fertilising, combine harvesting and drying of grains.
The dataset also includes the transportation of products inside the farm: water and fertilisers from sheds to field and grain from harvester to truck.
Furthermore, direct field emissions and land use change emissions are included, with important regionalizations added.
The dataset doesn't include: seed treatment (electrical operation for inoculatin seeds) and bacterial seed inoculant (Rhyzobium sp. for nitrogen fixation from air), cleaning and storage of harvested grains.
The activity ends after harvest at the farm gate.

## Allocation
Users of this dataset must decide the allocation criteria for land occupation, land-use changes and liming suitable for their needs, considering that the soybean production can be part of a crop system, i.e., rotation or succession with other grains in the agricultural cycle, mainly winter maize. Authors suggested an allocation by occupation time of soybean plus fallow time.

## Geography
The inventory is modelled for the state of Paraná, in Brazil.

## Technology
Cultivation of soybeans.

## Time period
Time period of the most of the data collected for this dataset.

## Parameters
- rooting depth: 0.49 m; name root_depth; lognormal variance with pedigree 0.001325, pedigree (2,2,1,2,1)
  This value represents the rooting depth of the crop (m).
- precipitation, annual: 1450 mm/year; name precipitation; lognormal variance with pedigree 0.0027, pedigree (1,3,1,3,1)
  This value represents the average annual precipitation in Paraná, Brazil. Used in the SQCB-NO3 model for the calculation of leaching of NO3. See http://campomourao.pr.gov.br/cidade/clima.php, visited in Feb, 19th, 2015: "average between 1,400 mm and 1,500 mm per year. "
- LUC_crop_specific: 1 dimensionless
  This parameter allows to switch between a 'crop specific' and a 'country specific' approach when calculating the LUC of a crop. By default, the chosen approach is 'crop specific', so the value of the parameter is 1. If you want to apply a 'country specific' approach, turn the parameter to 0.
- total nitrogen: 5 kg/ha; name N_total; lognormal variance with pedigree 0.002, pedigree (1,1,1,1,1)
  This value represents the total nitrogen in mineral and organic fertilisers (kg N/ha).
  From Folegatti et al. (2015).
- clay content into soil: 60 % (obsolete); name Clay_content
  This value represents the fraction of clay content into soil (%).
  Used in the SQCB-NO3 model for the calculation of leaching of NO3.
  From Folegatti et al. (2015).
- occupation time: 0.771178 dimensionless; name occupation_time; = ((115+250) / 365)*(1- cropping_system_ratio) + cropping_system_ratio* ((115+130) / 365)
  Liming is proportional to the weighted averages of time occupation of both soybean production systems (monoculture and cropping system).
  The time occupation for monoculture system is: 115 days of soybean production plus 250 days of fallow time.
  The time occupation for cropping system is: 115 days of soybean production plus 130 days of fallow time.
- soil eroded: 800 kg/ha.yr; name soil_eroded
  This value represents the quantity of soil eroded (kg/(ha*yr)).
  Used for the calculation of P emissions through water erosion to surface water.
  From Silva et al. (1994).
- ratio of cropping system production: 0.696 dimensionless; name cropping_system_ratio
  In PR, 69.6% of soybean is produced in cropping systems.
- nitrogen uptake by plant: 78 kg N/ha; name Nuptake_plant
  This value represents the N taken by plant during its growth (kg N/ha). Used in the SQCB-NO3 model for the calculation of leaching of NO3.
  From Nemececk & Schnetzer (2011),
- nitrogen in crop residues: 108 kg N/ha; name Ncrop_residues
  This value represents the nitrogen contained in the crop residues (kg N/ha). Used for the calculation of emissions of N2O to the air.
  From Duarte & Cantarella (2007).
- organic nitrogen into soil: 9000 kg N/ha; name Norg_soil
  Norg is the mass of organic nitrogen contained in the upper 50 cm of soil per ha (kg N/ha).
  Used in the SQCB-NO3 model for the calculation of leaching of NO3.
  From Folegatti et al. (2015).
- land transformation to: 3.0303 m2/kg; name T_t; = (1/3300)*10000; lognormal variance with pedigree 0.212, pedigree (5,5,5,5,5)
  From Folegatti et al. (2015).
  Uncertainty: Variance of log-transformed data as recommended by Ecoinvent for "Land use, transformation" for agriculture.

## Reference product
- soybean: 1 kg; name REF_PRODUCT; CPC 01412: Soya beans, other; By-product classification allocatable product
  1 Kg of soybean used as reference. The yield is 3300 kg/ha at a moisture content at storage of 13%.
  production volume 1.72294e10 kg; = 17229378*1000
    Production Volume of soybeans in the state of Paraná in Brazil, 2015 harvest, according to the Municipal Agricultural Production Data of the Brazilian Institute of Geography and Statistics (SIDRA - IBGE). See more in: http://www.sidra.ibge.gov.br/.
  property price 0.239 EUR2005; name REF_PRODUCT_price_EUR2005
    Calculated value based on data from United Nations Commodity Trade Statistics Database (comtrade.un.org). UN comtrade category: 1201 Soya beans. Using exchange rate of 1EURO = 1.209 USD. Average of price of import into 5 main markets (EU, US, JP, IN and CN).
  property dry mass 0.87 kg; name REF_PRODUCT_DM; = REF_PRODUCT_WM- REF_PRODUCT_WWM
  property carbon content, non-fossil 0.43596; name REF_PRODUCT_C_content
  property wet mass 1 kg; name REF_PRODUCT_WM
  property water content 0.149425; = REF_PRODUCT_WWM/ ( REF_PRODUCT_WM - REF_PRODUCT_WWM)
  property water in wet mass 0.13 kg; name REF_PRODUCT_WWM
  property carbon content 0.43596
    carbon content on a dry matter basis (reserved; not for manual entry)
  properties: carbon content, fossil 0, carbon allocation 0.379285 kg

## Inputs from technosphere
- lime: 0.0385589 kg; = 0.05*occupation_time; source Folegatti Matsuura M. 2017; lognormal variance with pedigree 0.0033, pedigree (2,2,3,1,1)
  Amount for typical system from Folegatti et al. (2015).
  Uncertainty: Variance of log-transformed data as recommended by Ecoinvent for "Primary energy carriers, metals, salts" for agriculture.
  properties: carbon content, fossil 0.120005, wet mass 1 kg, dry mass 1 kg
- drying of maize grain: 0.0411585 l; name water_drying; = 0.675*REF_PRODUCT*(REF_PRODUCT_WWM - 0.18)/( 0.18-1); source Folegatti Matsuura M. 2017; lognormal variance with pedigree 0.0033, pedigree (2,2,3,1,1)
  It represents the drying of soybeans. Calculated value considering that 67.5% of the soybean production is harvested with 18% moisture and needs to be dried to reach 13% at storage.
- pesticide, unspecified: 0.000624 kg; source Folegatti Matsuura M. 2017; lognormal variance with pedigree 0.0033, pedigree (2,2,3,1,1)
  Amount for typical system from Folegatti et al. (2015). This exchange represents the input of Mineral oil (41.6%); Thiamethoxam (2.1%); Lambda-cyhalothrin (1.5%); Azoxystrobin (2.9%); Cyproconazole (2.3%); Chlorantraniliprole (0.5%); Teflubenzuron (0.6%); Acephate (29.1%); Picoxystrobin (2.9%); Fipronil (1.2%); Pyraclostrobin (0.1%); Carbendazim (12.1%); Triflumuron (1.2%); Propylene glycol (0.7%) and Thiophanat-methyl (1.1%).
  Uncertainty: Variance of log-transformed data as recommended by Ecoinvent for "Primary energy carriers, metals, salts" for agriculture.
  properties: carbon content, fossil 0.486978, dry mass 1 kg, wet mass 1 kg
- land use change, annual crop: 0.000163636 ha; = 0.000163636363636364*LUC_crop_specific+(0*(1-LUC_crop_specific))
  Calculated value. Land use change (LUC) from Novaes et al. (2017).
- inorganic nitrogen fertiliser, as N: 0.00151515 kg; name N_fert; = N_total * T_t * 1E-04; source Folegatti Matsuura M. 2017; lognormal variance with pedigree 0.0033, pedigree (2,2,3,1,1)
  Monoammonium Phosphate Fertiliser (MAP) as Nitrogen fertiliser. Amount for typical system from Folegatti et al. (2015).
  Uncertainty: Variance of log-transformed data as recommended by Ecoinvent for "Primary energy carriers, metals, salts" for agriculture.
  properties: dry mass 1 kg, wet mass 1 kg
- combine harvesting: 0.00030303 ha; = 1*T_t*1E-04; source Folegatti Matsuura M. 2017; lognormal variance with pedigree 0.0033, pedigree (2,2,3,1,1)
  Agricultural operation. Amount for typical system from Folegatti et al. (2015).
- potassium chloride: 0.0647405 kg; source Folegatti Matsuura M. 2017; lognormal variance with pedigree 0.0033, pedigree (2,2,3,1,1)
  The exchange has been updated from 'potassium chloride, as K2O' into 'potassium chloride' and therefore its amount has been scaled (multiplied) from 0.0409 kg by 1.5829 kg of 'potassium chloride' per kg of 'potassium chloride, as K2O'. Original comment of the exchange is: Amount for typical system from Folegatti et al. (2015).
  Uncertainty: Variance of log-transformed data as recommended by Ecoinvent for "Primary energy carriers, metals, salts" for agriculture.
  properties: dry mass 1 kg, wet mass 1 kg
- transport, tractor and trailer, agricultural: 0.000143545 metric ton*km; = (0.380+0.067)* T_t*1E-04 + 2.67E-02* T_t*1E-04; source Folegatti Matsuura M. 2017; lognormal variance with pedigree 0.1227, pedigree (2,2,3,1,1)
  Average transport of grains (0.380 tkm/ha) and fertilisers (0.067 tkm/ha) in a truck with 140 HP plus average transport of water (0,0267 tkm/ha) in a tanker truck with 184 HP.
  Uncertainty: Variance of log-transformed data as recommended by Ecoinvent for "Transport Services" for agriculture.
- molybdenum: 6.06e-6 kg; source Folegatti Matsuura M. 2017; lognormal variance with pedigree 0.0033, pedigree (2,2,3,1,1)
  Micronutrient fertiliser. Amount for typical system from Folegatti et al. (2015).
  Uncertainty: Variance of log-transformed data as recommended by Ecoinvent for "Primary energy carriers, metals, salts" for agriculture.
  properties: wet mass 1 kg, dry mass 1 kg
- inorganic phosphorus fertiliser, as P2O5: 0.0152 kg; source Folegatti Matsuura M. 2017; lognormal variance with pedigree 0.0033, pedigree (2,2,3,1,1)
  (same comment as for lime)
  properties: dry mass 1 kg, wet mass 1 kg
- soybean seed, for sowing: 0.0152 kg; name SEED; source Folegatti Matsuura M. 2017; lognormal variance with pedigree 0.0026, pedigree (1,1,3,1,1)
  (same comment as for lime)
  property water in wet mass 0.11 kg; name SEED_WWM
  property carbon content, non-fossil 0.43596; name SEED_C_content
  property wet mass 1 kg; name SEED_WM
  property dry mass 0.89 kg; name SEED_DM; = SEED_WM- SEED_WWM
  properties: water content 0.123596
- limestone and gypsum application, by spreader: 7.78968e-5 ha; = 1/3*T_t*1E-04*occupation_time; source Folegatti Matsuura M. 2017; lognormal variance with pedigree 0.0033, pedigree (2,2,3,1,1)
  Agricultural operation. Amount for typical system from Folegatti et al. (2015).
- packaging, for pesticides: 0.00310973 kg; lognormal variance with pedigree 0.0532, pedigree (4,3,3,5,4)
  Total amount of active substance/s of pesticides needed for the production of soybean is calculated to be circa 1.55E-03 kg. Pesticide/s used in this dataset is/are: '2,4-dichlorophenol', 'cobalt', 'glyphosate', 'molybdenum', 'pesticide, unspecified'. The total amount of active substance/s is doubled in order to account for the packaging of the dilluted product of pesticide/s that is/are applied. Therefore, 3.11E-03 kg of packaging for pesticides is justified with this exchange.
  properties: carbon content, fossil 0.85714, dry mass 1 kg, price 0.0642 EUR2005, wet mass 1 kg, heating value, net 25.97 MJ
- 2,4-dichlorophenol: 0.000244 kg; source Folegatti Matsuura M. 2017; lognormal variance with pedigree 0.0033, pedigree (2,2,3,1,1)
  (same comment as for lime)
  properties: dry mass 1 kg, carbon content, fossil 0.442116, wet mass 1 kg, heating value, net 16.37 MJ
- packaging, for fertilisers: 0.192348 kg; lognormal variance with pedigree 0.0532, pedigree (4,3,3,5,4)
  Total amount of active substance/s of fertilisers needed for the production of 'soybean' is calculated to be circa 9.62E-02 kg. Fertiliser/s used in this dataset is/are: 'lime', 'nitrogen fertiliser, as N', 'phosphate fertiliser, as P2O5', 'potassium chloride, as K2O'. The total amount of active substance/s is doubled in order to account for the packaging of the dilluted product of fertiliser/s that is/are applied. Therefore, 1.92E-01 kg of packaging for fertilisers is justified with this exchange.
  properties: heating value, net 25.01 MJ, price 0.0642 EUR2005, wet mass 1 kg, dry mass 1 kg, carbon content, fossil 0.825301
  note on carbon content, fossil: Considering a chemical formula (C2H4)n for polyethylene, carbon content-fossil is calculated to be 0.856286 kg of Carbon per kg of dry mass.
- cobalt: 6.06e-7 kg; source Folegatti Matsuura M. 2017; lognormal variance with pedigree 0.0033, pedigree (2,2,3,1,1)
  (same comment as for molybdenum)
  properties: wet mass 1 kg, dry mass 1 kg
- tap water: 0.424242 kg; name water_dilution; = 7*T_t*1E-04*200; source Folegatti Matsuura M. 2017; lognormal variance with pedigree 0.0033, pedigree (2,2,3,1,1)
  Water is used to dilute pesticides in a rate of 200 liters per application per ha. Amount for typical system from Folegatti et al. (2015).
  properties: water content 2962.17, carbon content, fossil 0.00178991, wet mass 1 kg, dry mass 0.000337476 kg
  note on carbon content, fossil: Bicarbonate content is 2.93 mol/m3. CO2 content is 0.1 mol/m3 (ecoinvent v2.2 report 8, Tab 93.1).
- fertilising, by broadcaster: 0.000606061 ha; = 2*T_t*1E-04; source Folegatti Matsuura M. 2017; lognormal variance with pedigree 0.0033, pedigree (2,2,3,1,1)
  Agricultural operation. Amount for typical system from Folegatti et al. (2015).
- glyphosate: 0.0006802 kg; source Folegatti Matsuura M. 2017; lognormal variance with pedigree 0.0033, pedigree (2,2,3,1,1)
  (same comment as for lime)
  properties: carbon content, fossil 0.214286, wet mass 1 kg, dry mass 1 kg
- planting with starter fertiliser, by no till planter: 0.00030303 ha; = 1*T_t*1E-04; source Folegatti Matsuura M. 2017; lognormal variance with pedigree 0.0033, pedigree (2,2,3,1,1)
  Agricultural operation. Amount for typical system from Folegatti et al. (2015).
- application of plant protection product, by field sprayer: 0.00212121 ha; = 7*T_t*1E-04; source Folegatti Matsuura M. 2017; lognormal variance with pedigree 0.0033, pedigree (2,2,3,1,1)
  Agricultural operation. Amount for typical system from Folegatti et al. (2015).

## Inputs from nature
- Occupation, annual crop, non-irrigated, intensive [natural resource, land]: 2.3369 m2*year; = T_t*occupation_time; source Folegatti Matsuura M. 2017; lognormal variance with pedigree 0.004, pedigree (1,1,3,1,1)
  Occupation may range from 90 to 140 days per year, as seen on Folegatti et al. (2015). Users must adjust this mathematical relation to their needs. The fallow period considered was 130 days.
  Uncertainty: Variance of log-transformed data as recommended by Ecoinvent for "Land use, occupation" for agriculture.
- Carbon dioxide, in air [natural resource, in air]: 1.36909 kg; = 44/12 * (REF_PRODUCT_C_content * REF_PRODUCT * REF_PRODUCT_DM - SEED_C_content* SEED * SEED_DM); source Nemecek, T. 2011; lognormal variance with pedigree 0.0033, pedigree (2,2,3,1,1)
  CO2 absorbed during photosyntesis and present at the product. See "3.1 CO2 from the Atmosphere" in Nemececk & Schnetzer (2011).
  Uncertainty: Variance of log-transformed data as recommended by Ecoinvent for "Primary energy carriers, metals, salts" for agriculture.
- Transformation, to annual crop, non-irrigated [natural resource, land]: 3.0303 m2; = T_t; lognormal variance with pedigree 0.01, pedigree (1,1,3,1,1)
  Amount for typical system from Folegatti et al. (2015).
- Transformation, from annual crop, non-irrigated [natural resource, land]: 3.0303 m2; = T_t; lognormal variance with pedigree 0.01, pedigree (1,1,3,1,1)
  Amount for typical system from Folegatti et al. (2015).
- Energy, gross calorific value, in biomass [natural resource, biotic]: 20.5 MJ; lognormal variance with pedigree 0.0033, pedigree (2,2,3,1,1)
  Calorific value present in soybeans. Based on Ecoinvent database.
  Uncertainty: Variance of log-transformed data as recommended by Ecoinvent for "Primary energy carriers, metals, salts" for agriculture.

## Emissions to nature
- Acephate [soil, agricultural]: 0.000182 kg; source Nemecek, T. 2011; lognormal variance with pedigree 0.0436, pedigree (4,3,3,1,1)
  "All pesticides applied for crop production were assumed to end up as emissions to the soil. The amounts of pesticides used as inputs were thus simultaneously calculated as outputs (emissions to agricultural soil)", as recomended by Nemecek and Schnetzer (2011), "2.9 EMISSIONS OF PESTICIDES TO AGRICULTURAL SOIL" (pg. 21).
  Uncertainty: Variance of log-transformed data as recommended by Ecoinvent for "Pesticides" for agriculture.
- Lead [soil, agricultural]: 3.66e-6 kg; source Milà i Canals L. 2003; lognormal variance with pedigree 0.0506, pedigree (4,3,3,1,1)
  Emissions of heavy metals to soil and surface water estimated from mineral fertilisers and liming as recommended by Canals (2003) and regionalized following Folegatti et al. (2015).
  Uncertainty: Variance of log-transformed data as recommended by Ecoinvent for "Heavy metals" for agriculture.
- Azoxystrobin [soil, agricultural]: 1.82e-5 kg; source Nemecek, T. 2011; lognormal variance with pedigree 0.0436, pedigree (4,3,3,1,1)
  (same comment as for Acephate)
- Phosphorus [water, surface water]: 8.56727e-5 kg; = soil_eroded * 0.00095 * 1.86 * 0.2 * T_t*1E-04; source Nemecek, T. 2011; lognormal variance with pedigree 0.0507, pedigree (4,3,3,3,1)
  Due to phosphorus low mobility in Brazilian soils, its emissions through leaching and run-off were disregarded (Novais & Smyth, 1999). Only P emission by water erosion through surface water was considered, as in "2.3.3 Phorsphorous Emissions Through Water Erosion to Surface Water" Nemecek and Schnetzer (2011).
  Uncertainty: Variance of log-transformed data as recommended by Ecoinvent for "NO3, PO4" for agriculture.
- Fipronil [soil, agricultural]: 7.58e-6 kg; source Nemecek, T. 2011; lognormal variance with pedigree 0.0436, pedigree (4,3,3,1,1)
  (same comment as for Acephate)
- Thiophanate-methyl [soil, agricultural]: 6.82e-6 kg; source Nemecek, T. 2011; lognormal variance with pedigree 0.0436, pedigree (4,3,3,1,1)
  (same comment as for Acephate)
- Nickel [soil, agricultural]: -9.5e-7 kg; source Milà i Canals L. 2003
  Emissions of heavy metals to soil and surface water estimated from mineral fertilisers and liming as recommended by Canals (2003) and regionalized following Folegatti et al. (2015).
- Nitrogen oxides [air, non-urban air or from high stacks]: 0.00013974 kg; = N2O*0.21; source Nemecek, T. 2011; lognormal variance with pedigree 0.0407, pedigree (4,3,3,3,1)
  Emissions of NOx to the air. See "2.5 EMISSIONS OF NOX TO THE AIR" in Nemecek and Schnetzer (2011).
  Uncertainty: Variance of log-transformed data as recommended by Ecoinvent for "NOX, N2O" for agriculture.
- Cyproconazole [soil, agricultural]: 1.45e-5 kg; source Nemecek, T. 2011; lognormal variance with pedigree 0.0436, pedigree (4,3,3,1,1)
  This exchange represents the sum of amouns applied in more than one operation. "All pesticides applied for crop production were assumed to end up as emissions to the soil. The amounts of pesticides used as inputs were thus simultaneously calculated as outputs (emissions to agricultural soil)", as recomended by Nemecek and Schnetzer (2011), "2.9 EMISSIONS OF PESTICIDES TO AGRICULTURAL SOIL" (pg. 21).
  Uncertainty: Variance of log-transformed data as recommended by Ecoinvent for "Pesticides" for agriculture.
- Pesticides, unspecified [soil, agricultural]: 1.48e-5 kg; source Nemecek, T. 2011; lognormal variance with pedigree 0.0436, pedigree (4,3,3,1,1)
  "All pesticides applied for crop production were assumed to end up as emissions to the soil. The amounts of pesticides used as inputs were thus simultaneously calculated as outputs (emissions to agricultural soil)", as recomended by Nemecek and Schnetzer (2011), "2.9 EMISSIONS OF PESTICIDES TO AGRICULTURAL SOIL" (pg. 21). This exchange represents the emissions of Triflumuron (49%) + Chlorantraniliprole (20%) + Propylene glycol (31%).
  Uncertainty: Variance of log-transformed data as recommended by Ecoinvent for "Pesticides" for agriculture.
- Mineral oil [soil, agricultural]: 0.000259 kg; source Nemecek, T. 2011; lognormal variance with pedigree 0.0436, pedigree (4,3,3,1,1)
  (same comment as for Acephate)
- Pyraclostrobin (prop) [soil, agricultural]: 7.58e-7 kg; source Nemecek, T. 2011; lognormal variance with pedigree 0.0436, pedigree (4,3,3,1,1)
  (same comment as for Acephate)
- Dinitrogen monoxide [air, non-urban air or from high stacks]: 0.000665429 kg; name N2O; = 44/28*(0.01*((N_total+ Ncrop_residues)*T_t*1E-04)+ 0.01*14/17*NH3 + 0.0075*14/62*NO3); source Nemecek, T. 2011; lognormal variance with pedigree 0.1987, pedigree (4,3,5,3,5)
  Emissions of N2O to the air. See "2.4 EMISSIONS OF N2O TO THE AIR" in Nemecek and Schnetzer (2011), with "nitrogen contained in the crop residues" Ncr = 108 kg N/ha from Folegatti et al. (2015).
  Uncertainty: Variance of log-transformed data as recommended by Ecoinvent for "NOX, N2O" for agriculture.
- Picoxystrobin [soil, agricultural]: 1.82e-5 kg; source Nemecek, T. 2011; lognormal variance with pedigree 0.0436, pedigree (4,3,3,1,1)
  (same comment as for Acephate)
- Copper [soil, agricultural]: -7.68e-6 kg; source Milà i Canals L. 2003
  (same comment as for Nickel)
- Glyphosate [soil, agricultural]: 0.00068 kg; source Nemecek, T. 2011; lognormal variance with pedigree 0.0436, pedigree (4,3,3,1,1)
  (same comment as for Acephate)
- Zinc [soil, agricultural]: -2.9e-5 kg; source Milà i Canals L. 2003
  (same comment as for Nickel)
- Nitrate [water, ground-]: 0.0470147 kg; name NO3; = 62/14*((21.37 + precipitation/(Clay_content*root_depth) * (0.0037*N_total + 0.0000601*Norg_soil - 0.00362*Nuptake_plant)) * T_t * 1E-04); source Nemecek, T. 2011; lognormal variance with pedigree 0.0507, pedigree (4,3,3,3,1)
  See "2.2.2 The SQCB-NO3 model" in Nemececk & Schnetzer (2011), as "SALCA-NO3 model" has "Geographic scope of application: Europe". U= 78 Kg N/ha for Nitrogen uptake also from Nemececk & Schnetzer (2011), table 2.16. Norg = 9 t/ha for typical system from Folegatti et al. (2015).
  Uncertainty: Variance of log-transformed data as recommended by Ecoinvent for "NO3, PO4" for agriculture.
- Molybdenum [water, surface water]: 1.61e-10 kg; source Milà i Canals L. 2003; lognormal variance with pedigree 0.1007, pedigree (4,3,3,3,1)
  (same comment as for Lead)
- Nickel, ion [water, surface water]: -9.5e-11 kg; source Milà i Canals L. 2003
  (same comment as for Nickel)
- Cadmium [soil, agricultural]: 3.19e-7 kg; source Milà i Canals L. 2003; lognormal variance with pedigree 0.0506, pedigree (4,3,3,1,1)
  (same comment as for Lead)
- Cobalt [water, surface water]: 6.06e-11 kg; source Milà i Canals L. 2003; lognormal variance with pedigree 0.1007, pedigree (4,3,3,3,1)
  Emissions of heavy metals to soil and surface water estimated from mineral fertilisers and liming as recommended by Canals (2003) and regionalized following Folegatti et al. (2015). For cobalt, the uptake by plant was not discounted, due to lack of information.
  Uncertainty: Variance of log-transformed data as recommended by Ecoinvent for "Heavy metals" for agriculture.
- Chromium [soil, agricultural]: 4.51e-6 kg; source Milà i Canals L. 2003; lognormal variance with pedigree 0.0506, pedigree (4,3,3,1,1)
  (same comment as for Lead)
- Carbon dioxide, fossil [air, non-urban air or from high stacks]: 0.0183797 kg; = 44/12*0.13*lime; source IPCC 2006; lognormal variance with pedigree 0.0113, pedigree (4,3,3,3,1)
  Emissions of CO2 to the air from lime application. Based on IPCC (2006).
  Uncertainty: Variance of log-transformed data as recommended by Ecoinvent for "CO2" for combustion emissions.
- Copper, ion [water, surface water]: -7.68e-10 kg; source Milà i Canals L. 2003
  (same comment as for Nickel)
- 2,4-D [soil, agricultural]: 0.000244 kg; source Nemecek, T. 2011; lognormal variance with pedigree 0.0436, pedigree (4,3,3,1,1)
  (same comment as for Acephate)
- Lead [water, surface water]: 3.66e-10 kg; source Milà i Canals L. 2003; lognormal variance with pedigree 0.1007, pedigree (4,3,3,3,1)
  (same comment as for Lead)
- Cobalt [soil, agricultural]: 6.06e-7 kg; source Milà i Canals L. 2003; lognormal variance with pedigree 0.0507, pedigree (4,3,3,3,1)
  (same comment as for Cobalt)
- Lambda-cyhalothrin [soil, agricultural]: 9.64e-6 kg; source Nemecek, T. 2011; lognormal variance with pedigree 0.0436, pedigree (4,3,3,1,1)
  (same comment as for Acephate)
- Zinc, ion [water, surface water]: -2.9e-9 kg; source Milà i Canals L. 2003
  (same comment as for Nickel)
- Carbendazim [soil, agricultural]: 7.58e-5 kg; source Nemecek, T. 2011; lognormal variance with pedigree 0.0436, pedigree (4,3,3,1,1)
  (same comment as for Acephate)
- Molybdenum [soil, agricultural]: 1.61e-6 kg; source Milà i Canals L. 2003; lognormal variance with pedigree 0.0507, pedigree (4,3,3,3,1)
  (same comment as for Lead)
- Cadmium, ion [water, surface water]: 3.19e-11 kg; source Milà i Canals L. 2003; lognormal variance with pedigree 0.1007, pedigree (4,3,3,3,1)
  (same comment as for Lead)
- Water [air, non-urban air or from high stacks]: 4.11585e-5 m3; = water_drying/1000; lognormal variance with pedigree 0.0532, pedigree (4,3,3,5,4)
  Evaporated water related to the service dataset "drying of maize grain".
- Chromium, ion [water, surface water]: 4.51e-10 kg; source Milà i Canals L. 2003; lognormal variance with pedigree 0.1007, pedigree (4,3,3,3,1)
  (same comment as for Lead)
- Teflubenzuron [soil, agricultural]: 3.64e-6 kg; source Nemecek, T. 2011; lognormal variance with pedigree 0.0436, pedigree (4,3,3,1,1)
  (same comment as for Acephate)
- Water [water, surface water]: 0.000424242 m3; = water_dilution/1000; lognormal variance with pedigree 0.0532, pedigree (4,3,3,5,4)
  Emissions of water related to pesticide dilution.
- Thiamethoxam [soil, agricultural]: 1.28e-5 kg; source Nemecek, T. 2011; lognormal variance with pedigree 0.0436, pedigree (4,3,3,1,1)
  (same comment as for Acephate)
- Ammonia [air, non-urban air or from high stacks]: 0.000171104 kg; name NH3; = 17/14*N_fert*0.093; source Nemecek T. 2015; lognormal variance with pedigree 0.0187, pedigree (4,3,3,3,1)
  NH3 emissions from applied mineral fertilisers are calculated according Nemecek et al (2015), considering only soils with pH<7 due to brazilian conditions. Constant emissions factor for Monoammonium Phosphate (MAP) is 0.093. See Nemecek et al. (2015), pag. 36.
  Uncertainty: Variance of log-transformed data as recommended by Ecoinvent for "CH4, NH3" for agriculture.

## Sampling procedure
The main source of data for agricultural inputs and operations is the annual soybean production cost survey conducted by Embrapa Soja (CNPSO). Data are also provided by the ProspecSoy project, as well as consultation with relevant experts. Emissions from the agricultural process are estimated according to Nemecek and Schnetzer (2011) and Canals (2003).

## Extrapolations
This dataset has been extrapolated from year 2014 to the year of the calculation (2021). The uncertainty has been adjusted accordingly.
