# limestone quarry operation

Dataset: EcoSpold 2, unit process
Geography: CA-QC
Time period: 2012-01-01 to 2021-12-31
Technology level: current
Classification: EcoSpold01Categories: construction materials/additives
Classification: ISIC rev.4 ecoinvent: 0810:Quarrying of stone, sand and clay
Tags: single enterprise data
Scenario: Business-as-Usual
System model: Allocation, cut-off by classification
Share of production covered: 80 %
Generated by: Geneviève Martineau
Published in: Kellenberger D. 2007
Database: ecoinvent
isCopyrightProtected: true
accessRestrictedTo: 1

## General comment
This dataset represents the extraction of unprocessed limestone from a quarry in Quebec.

Diesel and explosive consumption, and emissions to air provided by three (3) important limestone extraction sites was used. CO, SO2 and NOx emissions reported by the company were excluded from the dataset, since related to diesel and explosive combustion (and included in the "diesel, burned in building machine" and "blasting" datasets). Similarly, particulates emissions related to diesel and explosive combustion were substracted from the air emissions reported by the company, to avoid double counting.

Land occupation, land transformation, land-use for recultivation were estimated from a weighted average of three Quebec limestone quarries extracting 990'000, 88'000 and 480'000 tons of limestone per year (780'000 tons average), and an estimated lifetime of the deposits of 140 years.

Water use, quarry infrastructure and office heating has been included, based on "limestone quarry operation, GLO 2002" ecoinvent dataset.

## Included activities start
From the calcite, in ground

## Included activities end
This activity ends with the unprocessed limestone, at the quarry gate.

This dataset includes blasting, all transports within the quarry (for extraction and recultivation), a part of the heating energy for "administration" buildings and the infrastructure. The land-use of the quarry is included, the land-use of the paved roads and buildings within the quarry are included in the module "limestone quarry construction".

The dataset doesn't include output of overburden material: neglected as it is only about 0.26% of mined limestone.

## Geography
Quebec data are from the only comany that extracts limestone on the territory. Unavalable data were extrapolated based on the GLO dataset exchanges.

## Technology
Building machines operates with diesel. Extrapolation: In Quebec, 65% of the extraction is made using Ammonia explosive, and 35% using gelatin explosive. The tovex explosive was used as a proxy in this module. CO, SO2 and NOx emissions reported by the company were excluded from the dataset, since related to diesel and explosive combustion (and included in the "diesel, burned in building machine" and "blasting" datasets).

## Parameters
- fraction, process water, to air: 1 dimensionless; name fraction_PW_to_air; lognormal variance with pedigree 0.1, pedigree (4,4,4,5,4)
  Extrapolated data, based on "limestone quarry operation, GLO 2002" dataset.
- lifetime: 140 year; name lifetime_quarry; lognormal variance with pedigree 0.0407, pedigree (2,2,1,1,1)
  Estimated value provided by Quebec limestone quarries. This value corresponds to a weighted average over three (3) sites.

## Reference product
- limestone, unprocessed: 1 kg; name limestone; By-product classification allocatable product; CPC 15200: Gypsum; anhydrite; limestone flux; limestone and other calcareous stone, of a kind used for the manufacture of[…]; CAS 1317-65-3
  EcoSpold01Location=CH
  production volume 1.6e9 kg
    Source: questionnaire. Primary data for 2012 limestone production in Quebec.
  property carbon content, fossil 0.117257
    Table 3.1, ecoinvent v2.2 report 7, part VII, pg 3. MW CaCO3=100, MW MgCO3=84. C content of limestone is 0.117257 kg/kg DM
  property price 0.014 EUR2005; name limestone_price_EUR2005
    Calculated value based on data from United Nations Commodity Trade Statistics Database (comtrade.un.org). UN comtrade category: 252100 Limestone materials for manufacture of lime or cement. Year 2005. Using exchange rate of 1EURO = 1.209 USD. Average of price of import into 5 main markets (EU, US, JP, IN and CN).
  property carbon content 0.117257
    carbon content on a dry matter basis (reserved; not for manual entry)
  properties: water content 0.00200401, water in wet mass 0.002 kg, heating value, net 0 MJ, carbon content, non-fossil 0, dry mass 0.998 kg, wet mass 1 kg, carbon allocation 0.117023 kg

## Inputs from technosphere
- heat, central or small-scale, other than natural gas: 0.00055836 MJ; source Kellenberger D. 2007; lognormal variance with pedigree 0.0433, pedigree (1,2,5,5,2)
  EcoSpold01Location=CH
  Extrapolated data, based on "limestone quarry operation, GLO 2002" dataset.
  Uncertainty: ;
  properties: heating value, net 1 MJ
- electricity, medium voltage: 2.73e-5 kWh; lognormal variance with pedigree 0.0087, pedigree (1,2,4,1,1)
  Measured value. Energy for pumping water from the quarry. Source: questionnaire.
- recultivation, limestone mine: 9.56e-6 m2; = surface; lognormal variance with pedigree 0.008, pedigree (1,1,4,1,1)
  EcoSpold01Location=CH
  Calculated value.
  Uncertainty: Calculated variable. Uncertainty will be determined from propagation of uncertainty factors of underlying variables. Uncertainty of actual relation between variables not accounted at this time.
- blasting: 1.81788e-5 kg; lognormal variance with pedigree 0.0173, pedigree (2,2,4,1,3)
  EcoSpold01Location=RER
  Measured value. However the use of blasting process using tovex explosive is an extrapolation. In Quebec, 65% of the extraction is made using Ammonia explosive, and 35% using gelatin explosive.
  Uncertainty: ;
- limestone quarry infrastructure: 8.20428e-12 unit; lognormal variance with pedigree 0.3101, pedigree (3,2,4,1,1)
  Calculated value (weighted average over 3 limestone quarries in Quebec). Source: questionnaire. A constant extraction rate was assumed over the complete estimated lifetime of the sites.
  EcoSpold01Location=CH
  Uncertainty: ;
- diesel, burned in building machine: 0.0333297 MJ; = diesel_consumption/building_machine_yield; lognormal variance with pedigree 0.008, pedigree (1,1,4,1,1)
  Calculated value. See Exchange properties.
  EcoSpold01Location=GLO
  Uncertainty: Calculated variable. Uncertainty will be determined from propagation of uncertainty factors of underlying variables. Uncertainty of actual relation between variables not accounted at this time.
  property kgFuel_Input 0.0234 kg; name building_machine_yield
  property fuel input in physical units, kg 0.000779916 kg; name diesel_consumption
  properties: heating value, net 1 MJ
  note on kgFuel_Input: Amount of diesel burned in building machine per MJ. Source: "diesel, burned in building machine, GLO 2001" dataset, ecoinvent v 3.01
  note on fuel input in physical units, kg: Amount of diesel for extraction of 1 kg of limestone unprocessed. Source: questionnaire. Considering diesel density of 0,84 kg/l (ecoinvent report 1, Table 4.6)

## Inputs from nature
- Transformation, from forest, unspecified [natural resource, land]: 9.56e-6 m2; = surface; lognormal variance with pedigree 0.008, pedigree (1,1,4,1,1)
  Measured value (weighted average over 3 limestone quarries in Quebec). Source: questionnaire. A constant extraction rate was assumed over the complete estimated lifetime of the sites.
  Uncertainty: Calculated variable. Uncertainty will be determined from propagation of uncertainty factors of underlying variables. Uncertainty of actual relation between variables not accounted at this time.
- Transformation, to mineral extraction site [natural resource, land]: 9.56e-6 m2; name surface; lognormal variance with pedigree 0.1286, pedigree (2,1,4,1,1)
  Measured value (weighted average over 3 limestone quarries in Quebec). Source: questionnaire. A constant extraction rate was assumed over the complete estimated lifetime of the sites.
  Uncertainty: ;
- Occupation, mineral extraction site [natural resource, land]: 0.0013384 m2*year; = surface*lifetime_quarry; lognormal variance with pedigree 0.008, pedigree (1,1,4,1,1)
  Calculated value. See parameters.
  Uncertainty: Calculated variable. Uncertainty will be determined from propagation of uncertainty factors of underlying variables. Uncertainty of actual relation between variables not accounted at this time.
- Water, unspecified natural origin [natural resource, in water]: 2.14425e-5 m3; name water_in; source Kellenberger D. 2007; lognormal variance with pedigree 0.0552, pedigree (3,3,5,5,2)
  Extrapolated data, based on "limestone quarry operation, GLO 2002" dataset.
  property carbon content, non-fossil 0; name C_content_non_fossil
  property carbon content, fossil 0.0104329; name C_content_fossil
  property wet mass 1000 kg; name WM
  property dry mass 0.1101 kg; name DM
  property water in wet mass 999.89 kg; name WWM
  property water content 9081.65; name water_content
- Calcite, in ground [natural resource, in ground]: 1 kg; = limestone; lognormal variance with pedigree 0.008, pedigree (1,1,4,1,1)
  All extracted calcite is used as limestone. Source: questionnaire.
  Uncertainty: Calculated variable. Uncertainty will be determined from propagation of uncertainty factors of underlying variables. Uncertainty of actual relation between variables not accounted at this time.

## Emissions to nature
- Water [air, unspecified]: 2.14425e-5 m3; = water_in*fraction_PW_to_air; source Kellenberger D. 2007; lognormal variance with pedigree 0.008, pedigree (1,1,4,1,1)
  Extrapolated data, based on "limestone quarry operation, GLO 2002" dataset.
  Uncertainty: Calculated variable. Uncertainty will be determined from propagation of uncertainty factors of underlying variables. Uncertainty of actual relation between variables not accounted at this time.
- Particulates, < 2.5 um [air, non-urban air or from high stacks]: 6.08e-6 kg; lognormal variance with pedigree 0.3081, pedigree (1,2,4,1,1)
  Measured value. Source: questionnaire. Emissions included in the "diesel, burned in building machine" dataset were substracted from the emissions reported by the quarries, to avoid double counting,
  Uncertainty: ;
- Water [water, unspecified]: 0 m3; = water_in*(1-fraction_PW_to_air); source Kellenberger D. 2007; pedigree (1,1,4,1,1)
  (same comment as for Water)
- Particulates, > 2.5 um, and < 10um [air, non-urban air or from high stacks]: 5.89e-5 kg; lognormal variance with pedigree 0.1281, pedigree (1,2,4,1,1)
  (same comment as for Particulates, < 2.5 um)
- Particulates, > 10 um [air, non-urban air or from high stacks]: 0.000159 kg; lognormal variance with pedigree 0.0481, pedigree (1,2,4,1,1)
  (same comment as for Particulates, < 2.5 um)

## Sampling procedure
The only limstone producer in Quebec provided information regarding its quarry operations.

## Extrapolations
This dataset has been extrapolated from year 2012 to the year of the calculation (2021). The uncertainty has been adjusted accordingly.
