# natural gas, burned in gas turbine, for compressor station

Dataset: EcoSpold 2, unit process
Geography: RoW
Time period: 2010-01-01 to 2021-12-31
Technology level: current
Classification: EcoSpold01Categories: natural gas/power plants
Classification: ISIC rev.4 ecoinvent: 3510:Electric power generation, transmission and distribution
Scenario: Business-as-Usual
System model: Allocation, cut-off by classification
Generated by: Pablo Tirado
Published in: Faist Emmenegger, M. 2007
Database: ecoinvent
isCopyrightProtected: true
accessRestrictedTo: 1

## General comment
This dataset describes the global production of electricity from natural gas for a compressor station in 2010. A part of the natural gas transported by pipeline is used in gas turbines located in compressor stations (along the pipeline route) to produce electricity that compress the gas and enable its transport.The electricity generated in by this gas turbine is only used by the corresponding natural market activity (through a direct link), so it does not contribute to the electricity market.
The dataset is an adaptation of the dataset describing the average burning of gas for a compressor station in Germany in 1990-2000 period.

## Included activities start
This activity starts at the reception of the natural gas in the turbine

## Included activities end
The activity ends with the production of electricity.
The activity includes fuel input, infrastructure, and emissions to air.

## Geography
Infrastructure, amount of gas and some emissions derived from german dataset.
The uncertainty has been adjusted accordingly.

## Technology
For infrastructure, a 10MWe gas turbine was assumed. Technology and emissions data corresponding to 2000 technologies. Uncertainty has been adjusted accordingly.

## Reference product
- electricity, medium voltage: 1 kWh; CPC 17100: Electrical energy; By-product classification allocatable product
  EcoSpold01Location=DE
  production volume 1.88044e8 kWh; = 1.8804E+08+2055500+188040000+0.092*5
    Calculated value. Sum of all the production volumes of regional datasets
  property price 0.1 EUR2005
    Calculated to be between the price of electricity, high voltage and electricity, low voltage.
  properties: Corresponding fuel use 1 MJ

## Inputs from technosphere
- natural gas, high pressure: 0 m3; name amountGas; pedigree (1,1,1,1,1)
  EcoSpold01Location=DE
  property heating value, net 36.3 MJ; name NHVNaturalGas
- gas turbine, 10MW electrical: 1.25e-9 unit; lognormal variance with pedigree 0.18, pedigree (3,5,5,5,3)
  EcoSpold01Location=RER
  uncertainty of lifetime
  property Corresponding fuel use 3.01404 MJ; name FuelUseTurbine; = (amountGas* NHVNaturalGas)/(3.6*0.092)
- natural gas, high pressure: 0.00382183, 0.000777093, 0.003375, 0.000380505, 0.00125793, 0.000159716, 0.00179632, 0.000398801, 0.00347207, 0.00863241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 m3 (20 entries); lognormal variance with pedigree 0.0606, pedigree (3,5,5,5,3)
  EcoSpold01Location=DE
  properties: heating value, net 36.3 MJ

## Emissions to nature
- Methane, fossil [air, urban air close to ground]: 4.8913e-5 kg; lognormal variance with pedigree 0.7021, pedigree (3,2,5,5,3)
  rough estimate
- Dinitrogen monoxide [air, urban air close to ground]: 1.08696e-5 kg; lognormal variance with pedigree 0.3521, pedigree (3,2,5,5,3)
  rough estimate
  Uncertainty: DQP adapted considering the original source of data
- Carbon dioxide, fossil [air, urban air close to ground]: 0.623913 kg; lognormal variance with pedigree 0.0527, pedigree (3,2,5,5,3)
  composition of natural gas
  Uncertainty: Variance from default table. DQP adapted considering the original source of data
- NMVOC, non-methane volatile organic compounds, unspecified origin [air, urban air close to ground]: 1.08696e-5 kg; lognormal variance with pedigree 0.7021, pedigree (3,2,5,5,3)
  rough estimate
  Uncertainty: DQP adapted considering the original source of data
- Nitrogen oxides [air, urban air close to ground]: 0.00211957 kg; lognormal variance with pedigree 0.3521, pedigree (3,2,5,5,3)
  rough estimate
  Uncertainty: DQP adapted considering the original source of data
- Mercury [air, urban air close to ground]: 1.63043e-9 kg; lognormal variance with pedigree 0.71, pedigree (3,5,5,5,3)
  basic uncertainty for heavy metal; trace element in natural gas
  Uncertainty: DQP adapted considering the original source of data
- Sulfur dioxide [air, urban air close to ground]: 5.97826e-6 kg; lognormal variance with pedigree 0.1, pedigree (3,5,5,5,3)
  (same comment as for Carbon dioxide, fossil)
- Carbon monoxide, fossil [air, urban air close to ground]: 0.000434783 kg; lognormal variance with pedigree 0.3521, pedigree (3,2,5,5,3)
  rough estimate
  Uncertainty: DQP adapted considering the original source of data
- Dioxins, measured as 2,3,7,8-tetrachlorodibenzo-p-dioxin [air, urban air close to ground]: 0 kg; pedigree (1,1,1,1,1)
  rough estimate, high uncertainty
  Uncertainty: DQP adapted considering the original source of data

## Sampling procedure
Literature

## Extrapolations
Extrapolations for infrastructure and some emissions extrapolated from german data of mid-1990. Uncertainty has been adjusted accordingly

## Review by Christian Bauer 2014-02-28
These datasets were thoroughfully reviewed and comply with the Data Quality Guidelines.

## Review by Emilia Moreno Ruiz 2015-09-17
broken formula fixed
