# treatment of wastewater, from residence, capacity 1.1E10l/year

Dataset: EcoSpold 2, unit process
Geography: RoW
Time period: 1994-01-01 to 2021-12-31
Technology level: current
Classification: EcoSpold01Categories: waste management/wastewater treatment
Classification: ISIC rev.4 ecoinvent: 3700:Sewerage
Tags: Treatment
Scenario: Business-as-Usual
System model: Allocation, cut-off by classification
Generated by: Tereza Levova
Published in: Doka G. 2008
Database: ecoinvent
isCopyrightProtected: true
accessRestrictedTo: 1

## General comment
Wastewater purified in a moderatly large municipal wastewater treatment plant (capacity class 2), with an average capacity size of 71100 per-captia-equivalents PCE.
Wastewater contains (in kg/m3): COD: 0.1556 (GSD=122.5%); BOD: 0.1036 (GSD=122.5%); DOC: 0.04575 (GSD=122.5%); TOC: 0.0673 (GSD=122.5%); SO4-S: 0.044 (GSD=122.5%); S part.: 0.002 (GSD=122.5%); NH4-N: 0.01495 (GSD=122.5%); NO3-N: 0.00105 (GSD=122.5%); NO2-N: 0.0004 (GSD=122.5%); N part.: 0.003279 (GSD=122.5%); N org. solv.: 0.008392 (GSD=122.5%); PO4-P: 0.002459 (GSD=122.5%); P part.: 0.0006147 (GSD=122.5%); Cl: 0.03003 (GSD=224.1%); F: 0.00003277 (GSD=224.1%); As: 0.0000009 (GSD=224.1%); Cd: 0.0000002806 (GSD=223.8%); Co: 0.000001618 (GSD=223.8%); Cr: 0.00001223 (GSD=223.8%); Cu: 0.00003744 (GSD=223.8%); Hg: 0.0000002 (GSD=223.8%); Mn: 0.000053 (GSD=224.1%); Mo: 0.0000009574 (GSD=223.8%); Ni: 0.000006589 (GSD=223.8%); Pb: 0.000008631 (GSD=223.8%); Sn: 0.0000034 (GSD=224.1%); Zn: 0.0001094 (GSD=223.8%); Si: 0.003126 (GSD=224.1%); Fe: 0.007093 (GSD=224.1%); Ca: 0.05083 (GSD=224.1%); Al: 0.001038 (GSD=224.1%); K: 0.0003989 (GSD=224.1%); Mg: 0.005707 (GSD=224.1%); Na: 0.002186 (GSD=224.1%);

## Included activities end
Infrastructure materials for municipal wastewater treatment plant, transports, dismantling. Land use burdens.

## Geography
This dataset is a weighted average of local datasets. Specific to the technology mix encountered in Switzerland in 2000. Well applicable to modern treatment practices in Europe, North America or Japan.

## Technology
Three stage wastewater treatment (mechanical, biological, chemical) including sludge digestion (fermentation) according to the average technology in Switzerland

## Parameters
- fraction, process water, to air: 0.1 dimensionless; name fraction_PW_to_air; lognormal variance with pedigree 0.092025, pedigree (4,4,3,2,4)
  Literature value (Statistics Canada, 2007 & Shaffer, K.H., 2008, Consumptive water use in the Great Lakes Basin, USGS) (Vionnet, S., Quantis Water Database - Technical Report, 2012).

## Reference product
- wastewater, from residence: -1 m3; name sewage_refidence_RP; By-product classification Waste; CPC 39920: Sewage sludge
  EcoSpold01Location=CH
  production volume 0.992 m3; name sewage_refidence_RP_PV
    This activity is included for information only. Production volume set to 1 in order for the dataset to be available.
  property price 0 EUR2005; name sewage_refidence_RP_price_EUR2005
    Waste products are assigned a price of zero as they are assumed to require further treatment.
  property carbon content, non-fossil 0.199421
    0.0673 kg TOC/m3 (Tab A.17, ecoinvent v2.2 report 13_I). TOC was considered as Total Carbon.
  property carbon content 0.199421
    carbon content on a dry matter basis (reserved; not for manual entry)
  properties: carbon content, fossil 0, water in wet mass 999.663 kg, wet mass 1000 kg, water content 2962.17, dry mass 0.337476 kg, carbon allocation 0.0673 kg

## Inputs from technosphere
- waste plastic, mixture: 0 kg; name waste_plastic_out; pedigree (1,1,1,1,1)
  direct wastewater treatment plant burden. Uncertainty calculated from wastewater composition and treatment model
  EcoSpold01Location=CH
  production volume 0 kg
    Calculated from the production volume of sewage, from residence in proportion to the respective output amounts.
  property price 0 EUR2005; name waste_plastic_out_price_EUR2005
  properties: carbon content, fossil 0.747344, heating value, net 30.79 MJ, dry mass 0.847 kg, water content 0.180638, wet mass 1 kg
  note on carbon content, fossil: C content in 1 kg DM was calculated using data in Tab A.2, ecoinvent v2.2 report 13_I
  note on heating value, net: Value taken from the general comment of the treatment dataset.
- chemical, organic: 5.2547e-7 kg; lognormal variance with pedigree 0.432, pedigree (1,1,5,5,1)
  burden from sludge incineration. Uncertainty calculated from wastewater composition and treatment model
  EcoSpold01Location=GLO
  properties: dry mass 1 kg, wet mass 1 kg, carbon content, fossil 0.628, heating value, net 19.03 MJ
  note on carbon content, fossil: This dataset is an unweighted average of 20 organic substances (listed in Tab 88.1, ecoinvent v2.2 report 8, part II), being part of the top100 chemicals included in this database. The C-content has also been calculated as an unweighted average of the C content of the substances composing this dataset.
- process-specific burdens, slag landfill: 0 kg; pedigree (1,1,1,1,1)
  EcoSpold01Location=CH
  burden from sludge incineration. Uncertainty calculated from wastewater composition and treatment model
- residual material landfill: 7.7129e-12 unit; lognormal variance with pedigree 0.072, pedigree (1,1,5,5,1)
  burden from sludge incineration. Uncertainty calculated from wastewater composition and treatment model
  EcoSpold01Location=CH
- process-specific burdens, municipal waste incineration: 0 kg; pedigree (1,1,1,1,1)
  (same comment as for process-specific burdens, slag landfill)
- hydrochloric acid, without water, in 30% solution state: 3.9503e-7 kg; lognormal variance with pedigree 0.082, pedigree (1,1,5,5,1)
  EcoSpold01Location=RER
  burden from sludge incineration. Uncertainty calculated from wastewater composition and treatment model
  properties: wet mass 1 kg, dry mass 1 kg, heating value, net 3.32 MJ
- iron (III) chloride, without water, in 40% solution state: 0.015947 kg; lognormal variance with pedigree 0.102, pedigree (1,1,5,5,1)
  EcoSpold01Location=CH
  direct wastewater treatment plant burden plus burden from sludge incineration. Uncertainty calculated from wastewater composition and treatment model
  properties: wet mass 1 kg, dry mass 1 kg
- titanium dioxide: 2.0626e-6 kg; lognormal variance with pedigree 0.542, pedigree (1,1,5,5,1)
  (same comment as for hydrochloric acid, without water, in 30% solution state)
  properties: wet mass 1 kg, dry mass 1 kg
- slag landfill: 4.1979e-11 unit; lognormal variance with pedigree 0.072, pedigree (1,1,5,5,1)
  (same comment as for process-specific burdens, slag landfill)
- aluminium sulfate, powder: 0.0031512 kg; lognormal variance with pedigree 0.102, pedigree (1,1,5,5,1)
  direct wastewater treatment plant burden. Uncertainty calculated from wastewater composition and treatment model
  EcoSpold01Location=RER
  properties: wet mass 1 kg, dry mass 1 kg
- liquid manure spreading, by vacuum tanker: 0.00032716 m3; lognormal variance with pedigree 0.042, pedigree (1,1,5,5,1)
  burden from sludge spreading. Uncertainty calculated from wastewater composition and treatment model
  EcoSpold01Location=CH
- sewer grid, 1.1E10l/year, 242 km: 1.6832e-7 km; lognormal variance with pedigree 0.042, pedigree (1,1,5,5,1)
  uncertainty heeded in exchanges of the module
  EcoSpold01Location=CH
- residential sewer grid, 0.087 km: 2.8713e-7 km; lognormal variance with pedigree 0.042, pedigree (1,1,5,5,1)
  uncertainty heeded in exchanges of the module
  EcoSpold01Location=CH
- ammonia, anhydrous, liquid: 0 kg; pedigree (1,1,1,1,1)
  (same comment as for process-specific burdens, slag landfill)
  properties: wet mass 1 kg, dry mass 1 kg
- waste cement, hydrated: 0 kg; name waste_cement_out; pedigree (1,1,1,1,1)
  (same comment as for process-specific burdens, slag landfill)
  production volume 0 kg
    (same comment as for waste plastic, mixture)
  property price 0 EUR2005; name waste_cement_out_price_EUR2005
  properties: wet mass 1 kg, dry mass 1 kg
- electricity, low voltage: 0 kWh; pedigree (1,1,1,1,1)
  EcoSpold01Location=CH
  direct wastewater treatment plant burden. Uncertainty calculated from wastewater composition and treatment model
- chromium oxide, flakes: 4.2095e-8 kg; lognormal variance with pedigree 0.542, pedigree (1,1,5,5,1)
  (same comment as for hydrochloric acid, without water, in 30% solution state)
  properties: wet mass 1 kg, dry mass 1 kg
- municipal waste incineration facility: 3.2417e-11 unit; lognormal variance with pedigree 0.042, pedigree (1,1,5,5,1)
  (same comment as for process-specific burdens, slag landfill)
- waste graphical paper: -0.0155 kg; name waste_grafpaper_ot; lognormal variance with pedigree 0.04, pedigree (1,1,5,1,1)
  (same comment as for electricity, low voltage)
  production volume 0.0155 kg; = ABS(waste_grafpaper_ot/sewage_refidence_RP)*sewage_refidence_RP_PV
    (same comment as for waste plastic, mixture)
  property price 0 EUR2005; name waste_grafpaper_ot_price_EUR2005
  properties: heating value, net 14.12 MJ, water content 0.126126, carbon content, non-fossil 0.454955, dry mass 0.888 kg, wet mass 1 kg
- wastewater treatment facility, capacity 1.1E10l/year: 1.9883e-9 unit; lognormal variance with pedigree 0.042, pedigree (1,1,5,5,1)
  uncertainty heeded in exchanges of the module
  EcoSpold01Location=CH
- quicklime, milled, packed: 1.2537e-6 kg; lognormal variance with pedigree 0.082, pedigree (1,1,5,5,1)
  (same comment as for residual material landfill)
  properties: dry mass 0.99 kg, water content 0.010101, wet mass 1 kg
- heat, district or industrial, other than natural gas: 0 MJ; pedigree (1,1,1,1,1)
  (same comment as for residual material landfill)
  properties: heating value, net 1 MJ
- chemical, inorganic: 6.5839e-7 kg; lognormal variance with pedigree 0.082, pedigree (1,1,5,5,1)
  (same comment as for chemical, organic)
  properties: dry mass 1 kg, wet mass 1 kg, carbon content, fossil 0.003
  note on carbon content, fossil: This dataset is an unweighted average of 20 inorganic substances (listed in Tab 88.1, ecoinvent v2.2 report 8, part II), being part of the top100 chemicals included in this database. The C-content has also been calculated as an unweighted average of the C content of the substances composing this dataset.
- electricity, high voltage: 0 kWh; pedigree (1,1,1,1,1)
  (same comment as for process-specific burdens, slag landfill)
- heat, district or industrial, natural gas: 0 MJ; pedigree (1,1,1,1,1)
  (same comment as for hydrochloric acid, without water, in 30% solution state)
  properties: heating value, net 1 MJ
- sodium hydroxide, without water, in 50% solution state: 0.00035213 kg; lognormal variance with pedigree 0.092, pedigree (1,1,5,5,1)
  (same comment as for hydrochloric acid, without water, in 30% solution state)
  properties: dry mass 1 kg, heating value, net 3.03 MJ, wet mass 1 kg
- cement, unspecified: 0 kg; pedigree (1,1,1,1,1)
  (same comment as for process-specific burdens, slag landfill)
  properties: wet mass 1 kg, dry mass 1 kg
- process-specific burdens, residual material landfill: 0 kg; pedigree (1,1,1,1,1)
  (same comment as for residual material landfill)
- iron sulfate: 0.01166 kg; lognormal variance with pedigree 0.102, pedigree (1,1,5,5,1)
  EcoSpold01Location=RER
  direct wastewater treatment plant burden. Uncertainty calculated from wastewater composition and treatment model
  properties: dry mass 1 kg, wet mass 1 kg
- waste plastic, mixture: -0.00172425, -0.000115208, -8.71297e-6, -4.75849e-5, -1.92238e-5, -4.51863e-5, -0.00146914, -0.0120707 kg (8 entries); lognormal variance with pedigree 0.04, pedigree (1,1,5,1,1)
  (same comment as for waste plastic, mixture)
- process-specific burdens, slag landfill: 0.00667951, 0.0169335 kg (2 entries); lognormal variance with pedigree 0.072, pedigree (1,1,5,5,1)
  (same comment as for process-specific burdens, slag landfill)
- process-specific burdens, municipal waste incineration: 0.0366803, 0.0929897 kg (2 entries); lognormal variance with pedigree 0.042, pedigree (1,1,5,5,1)
  (same comment as for process-specific burdens, slag landfill)
- ammonia, anhydrous, liquid: 1.51043e-5, 1.2984e-6, 2.01997e-6, 4.00227e-6, 3.92117e-6, 4.10981e-7, 1.83724e-6, 4.34637e-5 kg (8 entries); lognormal variance with pedigree 0.222, pedigree (1,1,5,5,1)
  (same comment as for process-specific burdens, slag landfill)
- waste cement, hydrated: -0.00104726, -0.00265494 kg (2 entries); lognormal variance with pedigree 0.08, pedigree (1,1,5,1,1)
  (same comment as for process-specific burdens, slag landfill)
- electricity, low voltage: 0.00214755, 0.000391028, 0.00882699, 0.0308395, 0.00629604, 0.0966643, 0.0156386, 0.044906 kWh (8 entries); lognormal variance with pedigree 0.062, pedigree (1,1,5,5,1)
  (same comment as for electricity, low voltage)
- heat, district or industrial, other than natural gas: 4.30281e-5, 0.00259824, 0.106109 MJ (3 entries); lognormal variance with pedigree 0.052, pedigree (1,1,5,5,1)
  (same comment as for residual material landfill)
- electricity, high voltage: 0.000188389, 3.61159e-5, 0.00083188, 0.00272622, 0.000612345, 0.00881753, 0.00139838, 0.00403114 kWh (8 entries); lognormal variance with pedigree 0.492, pedigree (1,1,5,5,1)
  (same comment as for process-specific burdens, slag landfill)
- heat, district or industrial, natural gas: 7.03924e-5, 0.00168674, 0.00456735 MJ (3 entries); lognormal variance with pedigree 0.222, pedigree (1,1,5,5,1)
  (same comment as for hydrochloric acid, without water, in 30% solution state)
- cement, unspecified: 0.000213836, 4.44929e-5, 3.2588e-6, 9.28863e-6, 0.000210066, 6.18284e-6, 6.79059e-5, 8.21585e-6, 0.000917654 kg (9 entries); lognormal variance with pedigree 0.082, pedigree (1,1,5,5,1)
  (same comment as for process-specific burdens, slag landfill)
- process-specific burdens, residual material landfill: 0.00104726, 0.00265494 kg (2 entries); lognormal variance with pedigree 0.072, pedigree (1,1,5,5,1)
  (same comment as for residual material landfill)

## Emissions to nature
- Phosphate [water, ground-, long-term]: 0.00015578 kg; lognormal variance with pedigree 4.252, pedigree (1,1,5,5,1)
  emission from sludge incineration. Uncertainty calculated from wastewater composition and treatment model
- Chromium [soil, agricultural]: 2.3299e-6 kg; lognormal variance with pedigree 0.712, pedigree (1,1,5,5,1)
  emission from sludge spreading. Uncertainty calculated from wastewater composition and treatment model
- Mercury [water, ground-, long-term]: 4.4099e-9 kg; lognormal variance with pedigree 2.972, pedigree (1,1,5,5,1)
  (same comment as for Phosphate)
- Zinc, ion [water, ground-, long-term]: 7.1834e-7 kg; lognormal variance with pedigree 5.512, pedigree (1,1,5,5,1)
  (same comment as for Phosphate)
- Aluminium [water, surface water]: 6.232e-5 kg; lognormal variance with pedigree 0.552, pedigree (1,1,5,5,1)
  sewer overload discharge plus direct wastewater treatment plant emission plus emission from sludge incineration. Uncertainty calculated from wastewater composition and treatment model
- Arsenic, ion [water, ground-, long-term]: 6.5411e-8 kg; lognormal variance with pedigree 0.712, pedigree (1,1,5,5,1)
  (same comment as for Phosphate)
- Magnesium [water, surface water]: 0.0051484 kg; lognormal variance with pedigree 0.672, pedigree (1,1,5,5,1)
  (same comment as for Aluminium)
- Silicon [air, urban air close to ground]: 4.1957e-6 kg; lognormal variance with pedigree 0.732, pedigree (1,1,5,5,1)
  direct digester gas emission plus emission from sludge incineration. Uncertainty calculated from wastewater composition and treatment model
- Ammonia [air, urban air close to ground]: 0.00035613 kg; lognormal variance with pedigree 0.282, pedigree (1,1,5,5,1)
  direct digester gas emission plus emission from sludge incineration plus emission from sludge spreading. Uncertainty calculated from wastewater composition and treatment model
- Chromium [air, urban air close to ground]: 2.7317e-13 kg; lognormal variance with pedigree 0.802, pedigree (1,1,5,5,1)
  (same comment as for Silicon)
- Cadmium, ion [water, ground-, long-term]: 8.5046e-10 kg; lognormal variance with pedigree 6.902, pedigree (1,1,5,5,1)
  (same comment as for Phosphate)
- Calcium, ion [water, ground-, long-term]: 0.0026613 kg; lognormal variance with pedigree 0.712, pedigree (1,1,5,5,1)
  (same comment as for Phosphate)
- Methane, non-fossil [air, urban air close to ground]: 0.0005024 kg; lognormal variance with pedigree 0.142, pedigree (1,1,5,5,1)
  (same comment as for Silicon)
- Aluminium [soil, agricultural]: 0.00056973 kg; lognormal variance with pedigree 0.462, pedigree (1,1,5,5,1)
  (same comment as for Chromium)
- Water [water, unspecified]: 0.9 m3; name water_to_water_unspecified; lognormal variance with pedigree 0.0827, pedigree (2,2,5,5,1)
  Calculated value based on water balance.
  property fraction, origin: unspecified 0; name fraction_origin_unspecified_Ww
  property fraction, origin: fresh water 1; name fraction_origin_fresh_water_Ww
  property fraction, origin: salt water 0; name fraction_origin_salt_water_Ww
- BOD5, Biological Oxygen Demand [water, ground-, long-term]: 8.5596e-5 kg; lognormal variance with pedigree 0.112, pedigree (1,1,5,5,1)
  (same comment as for Phosphate)
- Manganese [soil, agricultural]: 1.0095e-5 kg; lognormal variance with pedigree 0.712, pedigree (1,1,5,5,1)
  (same comment as for Chromium)
- Water [air, unspecified]: 0.1 m3; name water_to_air_unspecified; lognormal variance with pedigree 0.0827, pedigree (2,2,5,5,1)
  Calculated value based on water balance.
  property fraction, origin: fresh water 0; name fraction_origin_fresh_water
  property fraction, origin: salt water 0; name fraction_origin_salt_water
  property fraction, origin: unspecified 1; name fraction_origin_unspecified
- Magnesium [water, ground-, long-term]: 0.00031695 kg; lognormal variance with pedigree 0.712, pedigree (1,1,5,5,1)
  (same comment as for Phosphate)
- Copper [soil, agricultural]: 1.0725e-5 kg; lognormal variance with pedigree 0.712, pedigree (1,1,5,5,1)
  (same comment as for Chromium)
- Sodium, ion [water, surface water]: 0.002186 kg; lognormal variance with pedigree 0.672, pedigree (1,1,5,5,1)
  (same comment as for Aluminium)
- Arsenic [air, urban air close to ground]: 2.5337e-10 kg; lognormal variance with pedigree 0.732, pedigree (1,1,5,5,1)
  (same comment as for Silicon)
- Zinc [soil, agricultural]: 2.9219e-5 kg; lognormal variance with pedigree 0.712, pedigree (1,1,5,5,1)
  (same comment as for Chromium)
- Phosphate [water, ground-]: 1.4652e-5 kg; lognormal variance with pedigree 0.132, pedigree (1,1,5,5,1)
  (same comment as for Chromium)
- Nitrogen oxides [air, urban air close to ground]: 0.00069993 kg; lognormal variance with pedigree 0.082, pedigree (1,1,5,5,1)
  (same comment as for Silicon)
- Cobalt [air, urban air close to ground]: 1.5513e-14 kg; lognormal variance with pedigree 0.812, pedigree (1,1,5,5,1)
  (same comment as for Silicon)
- Lead [water, surface water]: 9.4873e-7 kg; lognormal variance with pedigree 0.602, pedigree (1,1,5,5,1)
  (same comment as for Aluminium)
- Phosphate [water, surface water]: 0.0027041 kg; lognormal variance with pedigree 0.082, pedigree (1,1,5,5,1)
  sewer overload discharge plus direct wastewater treatment plant emission plus emission from sludge incineration plus emission from sludge spreading. Uncertainty calculated from wastewater composition and treatment model
- Copper, ion [water, surface water]: 9.7125e-6 kg; lognormal variance with pedigree 0.652, pedigree (1,1,5,5,1)
  (same comment as for Aluminium)
- Zinc, ion [water, surface water]: 3.381e-5 kg; lognormal variance with pedigree 0.652, pedigree (1,1,5,5,1)
  (same comment as for Aluminium)
- DOC, Dissolved Organic Carbon [water, ground-, long-term]: 0.00010355 kg; lognormal variance with pedigree 0.112, pedigree (1,1,5,5,1)
  (same comment as for Phosphate)
- Copper [air, urban air close to ground]: 1.2554e-10 kg; lognormal variance with pedigree 0.762, pedigree (1,1,5,5,1)
  (same comment as for Silicon)
- Dinitrogen monoxide [air, urban air close to ground]: 0.00010363 kg; lognormal variance with pedigree 0.072, pedigree (1,1,5,5,1)
  direct wastewater treatment plant emission plus direct digester gas emission plus emission from sludge incineration plus emission from sludge spreading. Uncertainty calculated from wastewater composition and treatment model
- Calcium [soil, agricultural]: 0.0019286 kg; lognormal variance with pedigree 0.712, pedigree (1,1,5,5,1)
  (same comment as for Chromium)
- Nickel, ion [water, ground-, long-term]: 1.4891e-6 kg; lognormal variance with pedigree 0.712, pedigree (1,1,5,5,1)
  (same comment as for Phosphate)
- Cyanide [air, urban air close to ground]: 1.2855e-6 kg; lognormal variance with pedigree 0.242, pedigree (1,1,5,5,1)
  (same comment as for Phosphate)
- Mercury [soil, agricultural]: 5.3452e-8 kg; lognormal variance with pedigree 0.712, pedigree (1,1,5,5,1)
  (same comment as for Chromium)
- Magnesium [soil, agricultural]: 0.00021652 kg; lognormal variance with pedigree 0.712, pedigree (1,1,5,5,1)
  (same comment as for Chromium)
- Iron [soil, agricultural]: 0.0051323 kg; lognormal variance with pedigree 0.162, pedigree (1,1,5,5,1)
  (same comment as for Chromium)
- Carbon dioxide, non-fossil [air, urban air close to ground]: 0.19253 kg; lognormal variance with pedigree 0.062, pedigree (1,1,5,5,1)
  direct wastewater treatment plant emission plus direct digester gas emission plus emission from sludge incineration. Uncertainty calculated from wastewater composition and treatment model
- Mercury [water, surface water]: 6.274e-8 kg; lognormal variance with pedigree 0.642, pedigree (1,1,5,5,1)
  (same comment as for Aluminium)
- Cobalt [soil, agricultural]: 3.0813e-7 kg; lognormal variance with pedigree 0.712, pedigree (1,1,5,5,1)
  (same comment as for Chromium)
- Silicon [soil, agricultural]: 0.0011366 kg; lognormal variance with pedigree 0.712, pedigree (1,1,5,5,1)
  (same comment as for Chromium)
- Zinc [air, urban air close to ground]: 7.5692e-10 kg; lognormal variance with pedigree 0.762, pedigree (1,1,5,5,1)
  (same comment as for Silicon)
- Copper, ion [water, ground-, long-term]: 1.3747e-5 kg; lognormal variance with pedigree 0.732, pedigree (1,1,5,5,1)
  (same comment as for Phosphate)
- Fluoride [water, surface water]: 3.2769e-5 kg; lognormal variance with pedigree 0.672, pedigree (1,1,5,5,1)
  (same comment as for Aluminium)
- Nickel [soil, agricultural]: 1.003e-6 kg; lognormal variance with pedigree 0.712, pedigree (1,1,5,5,1)
  (same comment as for Chromium)
- Iron [air, urban air close to ground]: 2.7169e-7 kg; lognormal variance with pedigree 0.202, pedigree (1,1,5,5,1)
  (same comment as for Silicon)
- Tin, ion [water, ground-, long-term]: 6.0968e-7 kg; lognormal variance with pedigree 1.262, pedigree (1,1,5,5,1)
  (same comment as for Phosphate)
- Nitrate [water, ground-, long-term]: 5.1309e-5 kg; lognormal variance with pedigree 0.082, pedigree (1,1,5,5,1)
  (same comment as for Phosphate)
- Manganese [water, ground-, long-term]: 1.3784e-5 kg; lognormal variance with pedigree 0.872, pedigree (1,1,5,5,1)
  (same comment as for Phosphate)
- Cadmium [air, urban air close to ground]: 4.7295e-12 kg; lognormal variance with pedigree 0.742, pedigree (1,1,5,5,1)
  (same comment as for Silicon)
- Sulfate [water, ground-, long-term]: 0.002367 kg; lognormal variance with pedigree 0.102, pedigree (1,1,5,5,1)
  (same comment as for Phosphate)
- BOD5, Biological Oxygen Demand [water, surface water]: 0.0098229 kg; lognormal variance with pedigree 0.072, pedigree (1,1,5,5,1)
  (same comment as for Aluminium)
- Chloride [water, surface water]: 0.040484 kg; lognormal variance with pedigree 0.482, pedigree (1,1,5,5,1)
  (same comment as for Aluminium)
- Arsenic, ion [water, surface water]: 7.5922e-7 kg; lognormal variance with pedigree 0.612, pedigree (1,1,5,5,1)
  (same comment as for Aluminium)
- Nitrate [water, surface water]: 0.048305 kg; lognormal variance with pedigree 0.062, pedigree (1,1,5,5,1)
  (same comment as for Aluminium)
- Molybdenum [air, urban air close to ground]: 5.7835e-10 kg; lognormal variance with pedigree 0.732, pedigree (1,1,5,5,1)
  (same comment as for Silicon)
- Calcium [air, urban air close to ground]: 5.0981e-6 kg; lognormal variance with pedigree 0.732, pedigree (1,1,5,5,1)
  (same comment as for Silicon)
- Nitrite [water, surface water]: 0.000644 kg; lognormal variance with pedigree 0.082, pedigree (1,1,5,5,1)
  direct wastewater treatment plant emission. Uncertainty calculated from wastewater composition and treatment model
- Molybdenum [water, ground-, long-term]: 2.392e-7 kg; lognormal variance with pedigree 0.712, pedigree (1,1,5,5,1)
  (same comment as for Phosphate)
- Chromium VI [water, ground-, long-term]: 3.911e-7 kg; lognormal variance with pedigree 1.092, pedigree (1,1,5,5,1)
  (same comment as for Phosphate)
- Tin, ion [water, surface water]: 1.4223e-6 kg; lognormal variance with pedigree 0.662, pedigree (1,1,5,5,1)
  (same comment as for Aluminium)
- Manganese [air, urban air close to ground]: 8.7161e-14 kg; lognormal variance with pedigree 0.832, pedigree (1,1,5,5,1)
  (same comment as for Silicon)
- Chromium VI [water, surface water]: 6.3282e-6 kg; lognormal variance with pedigree 0.642, pedigree (1,1,5,5,1)
  (same comment as for Aluminium)
- Nickel [air, urban air close to ground]: 6.8642e-14 kg; lognormal variance with pedigree 0.812, pedigree (1,1,5,5,1)
  (same comment as for Silicon)
- Molybdenum [water, surface water]: 5.3529e-7 kg; lognormal variance with pedigree 0.582, pedigree (1,1,5,5,1)
  (same comment as for Aluminium)
- Tin [soil, agricultural]: 7.6487e-7 kg; lognormal variance with pedigree 0.712, pedigree (1,1,5,5,1)
  (same comment as for Chromium)
- NMVOC, non-methane volatile organic compounds, unspecified origin [air, urban air close to ground]: 2.2813e-6 kg; lognormal variance with pedigree 0.262, pedigree (1,1,5,5,1)
  direct digester gas emission. Uncertainty calculated from wastewater composition and treatment model
- Lead [water, ground-, long-term]: 3.3568e-7 kg; lognormal variance with pedigree 6.922, pedigree (1,1,5,5,1)
  (same comment as for Phosphate)
- Nitrogen [water, surface water]: 0.00049 kg; lognormal variance with pedigree 0.082, pedigree (1,1,5,5,1)
  (same comment as for Nitrite)
- Magnesium [air, urban air close to ground]: 4.7278e-7 kg; lognormal variance with pedigree 0.732, pedigree (1,1,5,5,1)
  (same comment as for Silicon)
- Potassium, ion [water, surface water]: 0.0003989 kg; lognormal variance with pedigree 0.672, pedigree (1,1,5,5,1)
  (same comment as for Aluminium)
- Carbon [soil, agricultural]: 0.0066874 kg; lognormal variance with pedigree 0.102, pedigree (1,1,5,5,1)
  (same comment as for Chromium)
- Sulfate [water, surface water]: 0.1449 kg; lognormal variance with pedigree 0.082, pedigree (1,1,5,5,1)
  (same comment as for Aluminium)
- Lead [air, urban air close to ground]: 1.7517e-10 kg; lognormal variance with pedigree 0.752, pedigree (1,1,5,5,1)
  (same comment as for Silicon)
- Cobalt [water, ground-, long-term]: 4.2779e-7 kg; lognormal variance with pedigree 0.712, pedigree (1,1,5,5,1)
  (same comment as for Phosphate)
- Cobalt [water, surface water]: 8.2109e-7 kg; lognormal variance with pedigree 0.662, pedigree (1,1,5,5,1)
  (same comment as for Aluminium)
- Aluminium [water, ground-, long-term]: 0.00066857 kg; lognormal variance with pedigree 0.462, pedigree (1,1,5,5,1)
  (same comment as for Phosphate)
- TOC, Total Organic Carbon [water, surface water]: 0.0072994 kg; lognormal variance with pedigree 0.082, pedigree (1,1,5,5,1)
  (same comment as for Aluminium)
- Cadmium, ion [water, surface water]: 1.4246e-7 kg; lognormal variance with pedigree 0.662, pedigree (1,1,5,5,1)
  (same comment as for Aluminium)
- COD, Chemical Oxygen Demand [water, ground-, long-term]: 0.00026168 kg; lognormal variance with pedigree 0.112, pedigree (1,1,5,5,1)
  (same comment as for Phosphate)
- TOC, Total Organic Carbon [water, ground-, long-term]: 0.00010355 kg; lognormal variance with pedigree 0.112, pedigree (1,1,5,5,1)
  (same comment as for Phosphate)
- Arsenic [soil, agricultural]: 7.5114e-8 kg; lognormal variance with pedigree 0.712, pedigree (1,1,5,5,1)
  (same comment as for Chromium)
- DOC, Dissolved Organic Carbon [water, surface water]: 0.0075378 kg; lognormal variance with pedigree 0.082, pedigree (1,1,5,5,1)
  (same comment as for Aluminium)
- Ammonium, ion [water, surface water]: 0.011027 kg; lognormal variance with pedigree 0.062, pedigree (1,1,5,5,1)
  (same comment as for Nitrite)
- Calcium, ion [water, surface water]: 0.045858 kg; lognormal variance with pedigree 0.672, pedigree (1,1,5,5,1)
  (same comment as for Aluminium)
- Sulfur [soil, agricultural]: 0.00059517 kg; lognormal variance with pedigree 0.112, pedigree (1,1,5,5,1)
  (same comment as for Chromium)
- Aluminium [air, urban air close to ground]: 1.4113e-6 kg; lognormal variance with pedigree 0.472, pedigree (1,1,5,5,1)
  (same comment as for Silicon)
- Sulfur dioxide [air, urban air close to ground]: 0.00088615 kg; lognormal variance with pedigree 0.102, pedigree (1,1,5,5,1)
  (same comment as for Silicon)
- Molybdenum [soil, agricultural]: 1.8236e-7 kg; lognormal variance with pedigree 0.712, pedigree (1,1,5,5,1)
  (same comment as for Chromium)
- Chromium, ion [water, surface water]: 1.1775e-8 kg; lognormal variance with pedigree 0.722, pedigree (1,1,5,5,1)
  (same comment as for Phosphate)
- Carbon monoxide, non-fossil [air, urban air close to ground]: 0.00017096 kg; lognormal variance with pedigree 0.152, pedigree (1,1,5,5,1)
  (same comment as for Silicon)
- COD, Chemical Oxygen Demand [water, surface water]: 0.030152 kg; lognormal variance with pedigree 0.082, pedigree (1,1,5,5,1)
  (same comment as for Aluminium)
- Manganese [water, surface water]: 2.6898e-5 kg; lognormal variance with pedigree 0.662, pedigree (1,1,5,5,1)
  (same comment as for Aluminium)
- Mercury [air, urban air close to ground]: 3.3683e-13 kg; lognormal variance with pedigree 0.742, pedigree (1,1,5,5,1)
  (same comment as for Silicon)
- Nickel, ion [water, surface water]: 3.9966e-6 kg; lognormal variance with pedigree 0.662, pedigree (1,1,5,5,1)
  (same comment as for Aluminium)
- Iron, ion [water, surface water]: 0.0036024 kg; lognormal variance with pedigree 0.662, pedigree (1,1,5,5,1)
  (same comment as for Aluminium)
- Cadmium [soil, agricultural]: 5.3452e-8 kg; lognormal variance with pedigree 0.712, pedigree (1,1,5,5,1)
  (same comment as for Chromium)
- Phosphorus [air, urban air close to ground]: 1.3301e-6 kg; lognormal variance with pedigree 0.102, pedigree (1,1,5,5,1)
  (same comment as for Silicon)
- Silicon [water, ground-, long-term]: 0.0001565 kg; lognormal variance with pedigree 5.462, pedigree (1,1,5,5,1)
  (same comment as for Phosphate)
- Lead [soil, agricultural]: 2.9713e-6 kg; lognormal variance with pedigree 0.712, pedigree (1,1,5,5,1)
  (same comment as for Chromium)
- Iron, ion [water, ground-, long-term]: 0.003812 kg; lognormal variance with pedigree 0.992, pedigree (1,1,5,5,1)
  (same comment as for Phosphate)
- Tin [air, urban air close to ground]: 1.6092e-9 kg; lognormal variance with pedigree 0.732, pedigree (1,1,5,5,1)
  (same comment as for Silicon)
- Silicon [water, surface water]: 0.00018788 kg; lognormal variance with pedigree 0.572, pedigree (1,1,5,5,1)
  (same comment as for Aluminium)

## Extrapolations
This dataset is based on swiss data. The uncertainty is adjusted accordingly. Wastewater compositions from literature and/or estimates.

## Review by Bo Weidema 2012-07-04
This activity is included for information only. Production volume set to 1 in order for the dataset to be available.
