# bleaching, textile

Dataset: EcoSpold 2, unit process
Geography: IN
Time period: 2015-04-01 to 2021-03-31
Technology level: current
Classification: ISIC rev.4 ecoinvent: 1313:Finishing of textiles
Scenario: Business-as-Usual
System model: Allocation, cut-off by classification
Generated by: Madhuri Nigam
Published in: Faist Emmenegger, M. 2018
Database: ecoinvent
isCopyrightProtected: true
accessRestrictedTo: 1

## General comment
This inventory dataset represents the process of bleaching 1 kg of cotton fabric in India.
This activity is modelled as a service, so no inputs of Fabric are considered.
All raw textile materials, in natural state are known as 'greige' material. This greige material has its natural color, odor and impurities due to which the textiles are not suitable for clothing purposes. In this state the textile contains natural impurities as well as the add-ons that were incorporated during cultivation, growth and manufacture, such as pesticides, fungicides, herbicides, sing agents, lubricants, etc. These natural colouring matters and add-ons are removed by scouring and bleaching. This data set represents the process of bleaching which could be followed by mercerizing.
The process involves immersing fabric in bleach bath and the bath circulates around the fabric. Bath is heated by electricity generated steam. This is followed by water extraction, drying and compacting. The fabric is then folded and sent for further processing such as mercerising, dyeing/printing etc. the inventory is mainly based on industry data and is supplemented, where necessary, with secondary processing energy data from machinery manufacturers. Data were collected from representative mills in India and were chosen based on their technical representation of the current state of business and their willingness to participate.

## Included activities start
This activity applies to scoured fabric. As it is a service, no inputs of fabric are included; this activity should be used with 1 kg fabric.

## Included activities end
This process delivers the service of bleaching 1 kg fabric. Drying is included.

## Geography
Dataset is based on data collected from a representative processing plant in Sonepat, in state of Haryana (North India)

## Technology
The process involves immersing fabric in bleach bath and the bath circulates around the fabric. Bath is heated by electricity generated steam. This is followed by water extraction, drying and compacting. The fabric is then folded and sent for further processing such asmercerising, dyeing/printing etc. (no packaging).

## Reference product
- bleaching, textile: 1 kg; By-product classification allocatable product; CPC 88213: Textile finishing services
  production volume 4.433e7 kg; name PV_RP
    India produces about 22165 million sqm of cotton textile in a year. Considering that the fabric has an average weight of 0.002 kg/sqm. Annual production of cotton fabric is dyed fabric is 44330000 kg. It is assumed that 100% of this is bleached.
  property price 0.301769 EUR2005
    Calculated based on inputs: The price of the product has been calculated as a sum of the values of the material and energy inputs for this product. This value is therefore a rough estimation. It may underestimate the real price since there are additional expenses when producing any product. These expences can include for example labour costs, treatment of waste materials and profit for the producer. Please consider carefully whether this level of data quality is acceptable for your application.

## Inputs from technosphere
- diesel, burned in diesel-electric generating set, 18.5kW: 7.7 MJ; lognormal variance with pedigree 0.0126, pedigree (4,4,3,1,1)
  Diesel used for power backup. Forumula includes diesel consumption in liters multiplied density of fule and its calorific value
- building, hall: 1.55665e-5 m2; = 8000/(10278500*50); lognormal variance with pedigree 0.3026, pedigree (2,1,3,1,1)
  total building area (square meters) divided by production per year and life time of the plant
- wastewater from textile production: -0.0224 m3; name wastewater; = ((Water)*80/100)*-1; lognormal variance with pedigree 0.0126, pedigree (4,4,3,1,1)
  considering 80% default wastewater generation
  production volume 992992 m3; = PV_RP*wastewater
    Calculated from production volume of reference product using the relative outputs.
  property price 0 EUR2005; name wastewater_price_EUR2005
- sodium hydroxide, without water, in 50% solution state: 0.02 kg; lognormal variance with pedigree 0.0126, pedigree (4,4,3,1,1)
  For preparing Ready For Dyeing (RFD) solution
  properties: heating value, net 3.03 MJ, dry mass 1 kg, wet mass 1 kg
- chemical, inorganic: 0.015 kg; lognormal variance with pedigree 0.0126, pedigree (4,4,3,1,1)
  sum of unspecified chemicals used in dyeing process. These are wetting agent, anticreasing agent and optical whitener
  properties: wet mass 1 kg, carbon content, fossil 0.003, dry mass 1 kg
  note on carbon content, fossil: This dataset is an unweighted average of 20 inorganic substances (listed in Tab 88.1, ecoinvent v2.2 report 8, part II), being part of the top100 chemicals included in this database. The C-content has also been calculated as an unweighted average of the C content of the substances composing this dataset.
- electricity, low voltage: 0.32 kWh; lognormal variance with pedigree 0.0046, pedigree (1,4,3,1,1)
  sum of electricity used for:
  dyeing machine
  boiler
  hydro extractor
  dryer
  compactor
- hydrogen peroxide, without water, in 50% solution state: 0.04 kg; lognormal variance with pedigree 0.0126, pedigree (4,4,3,1,1)
  For preparing Ready For Dyeing (RFD) solution
  properties: heating value, net 7.13 MJ, dry mass 1 kg, wet mass 1 kg

## Inputs from nature
- Water, well, in ground [natural resource, in water]: 0.028 m3; name water
  used during the process

## Emissions to nature
- Water [air, urban air close to ground]: 0.0056 m3; = (Water)- (wastewater*-1); lognormal variance with pedigree 0.0126, pedigree (4,4,3,1,1)
  Considering 20% evaporation rate

## Sampling procedure
Field visit and interview. Data has been obtained from a dyeing plant located in NCR, North India based on the representativeness of currently used technology, and the company’s willingness to share the data.

## Extrapolations
This dataset has been extrapolated from year 2016 to the year of the calculation (2021). The uncertainty has been adjusted accordingly.
