# aluminium around steel bi-metal wire production, 3.67 mm external diameter

Dataset: EcoSpold 2, unit process
Geography: CA-QC
Time period: 2012-01-01 to 2021-12-31
Technology level: current
Classification: ISIC rev.4 ecoinvent: 2599:Manufacture of other fabricated metal products n.e.c.
Classification: EcoSpold01Categories: metals/processing
Scenario: Business-as-Usual
System model: Allocation, cut-off by classification
Share of production covered: 100 %
Generated by: Jean-Francois Menard
Database: ecoinvent
isCopyrightProtected: true
accessRestrictedTo: 1

## General comment
This dataset represents the production of aluminium and steel bi-metal wire, which consists of the co-extrusion of aluminium and steel. The final product is usually a cast aluminium alloy layer around a carbon steel wire. The data providing manufacturing company supplies a range of wire sizes, from 2.05 to 5.19 mm of exrternal diameter. The aluminum layer thickness is at least 10% of the wire radius and approximately 25% of the cross-sectional area. The modelled product is compliant with ASTM B415 and ASTM B502 standards. This dataset represents a 3.67 mm wire since it is the size for which data were provided on a per kg basis but the dataset is parameterized to the wire external diamteter so new instances can be created for other diameters.

## Included activities start
From the reception of the material and energy inputs at the factory gate.

## Included activities end
This activity ends with the bi-metal wire ready for shipping or to be used in the manufacturing of standed cable.
This dataset includes: pre-treatment process steps for both the steel wire and the aluminium rod (cleaning, rinse and drying) ; heating of the steel wire ; co-extrusion of aluminium around the steel wire with lubricant ; water cooling ; air drying ; eddy currents inspection ; drawing of the wire and winding on coils.
This dataset excludes: secondary packaging crate (4.75E-4 kg of sawnwood per kg of 3.67 mm diameter cable).

## Technology
Most used technology. Alternate technology (aluminium in powder form instead of rod) is estimatred to represent less than 10% of market.

## Parameters
- alkaline solution for bi-metal cable extrusion: 1.85517e-5 kg; name alkaline_solution_per_m; lognormal variance with pedigree 0.0012, pedigree (2,1,1,1,1)
  Calculated value. Per meter value calculated from per kg data for 3.67 mm diameter wire (assumed to be diameter or mass independent) from data providing manufacturing comapny.
- pure aluminium loss rate: 0.0664 dimensionless; name alu_loss; lognormal variance with pedigree 0.0012, pedigree (2,1,1,1,1)
  Calculated value. Pure aluminium loss rate. Calculated from per kg data for 3.67 mm diameter wire (assumed to be diameter or mass independent) from data providing manufacturing comapny.
- wire linear mass density: 0.069663 kg/m; name wire_linear_mass_density; = (5.1964e-3 * wire_diameter^1.9964); lognormal variance with pedigree 0.04, pedigree (5,1,1,1,1)
  Calculated value. Power function relationship between the linear mass density (in kg/m) of the bi-metal wire and its diameter (in mm) derived from the mass-to-length data for the different diameters of wires manfuctured by the data providing company. The R² value of the regression is of 1,00.
  Uncertainty: Calculated variable. Uncertainty should be determined from propagation of uncertainty factors of underlying variables, however no uncertainty could be generated for the terms of the power function. Uncertainty of actual relation between variables not accounted at this time, although this could be included in a future update.
- bi-metal cable loss rate: 0.0436 dimensionless; name cable_loss; lognormal variance with pedigree 0.0012, pedigree (2,1,1,1,1)
  Calculated value. Finished bi-metal cable loss rate. Calculated from per kg data for 3.67 mm diameter wire (assumed to be diameter or mass independent) from data providing manufacturing comapny.
- wire diameter: 3.67 mm; name wire_diameter
  Basic parameter used in the calculation of the exchanges.
- steel mass fraction: 0.9 dimensionless; name steel_mass_fraction; lognormal variance with pedigree 0.0012, pedigree (2,1,1,1,1)
  Calculated value. Mass fraction of carbon steel in bi-metal wire, derived from the mass-to-length (in kg/m) data for the different diameters of wires manfuctured by the data providing company and aluminium (2700 kg/m3, source: http://en.wikipedia.org/wiki/Aluminium) and carbon steek (7850 kg/m3, source: http://en.wikipedia.org/wiki/Carbon_steel) densities. The aluminium thickness was determined to be 13.1% of the wire radius, to obtained the mass-to-length data (within about 0.1%), which then gives the calculated steel mass fraction.

## Reference product
- aluminium around steel bi-metal wire, 3.67mm external diameter: 1 m; name bimetal; CPC 4153: Semi-finished products of aluminium or aluminium alloys; By-product classification allocatable product
  ACS (Aluminium clad steel) wire.
  production volume 6.3305e7 m; name PV_bimetal
    Calculated value. Value calculated from the data providing manufacturing company's production volume (in kg, the mass-to-length data for the different diameters of wires manfuctured, the un-weighted average mass per m was used).
  property price 0.0676 EUR2005; name bimetal_price_EUR2005
    Temporary price data. Calculated as 90% of purchasers price based on: estimated at 85% of sorted scrap
  property wet mass 0.069663 kg; name bimetal_WM; = bimetal_DM
  property water content 0; name bimetal_water_content
  property water in wet mass 0 kg; name bimetal_WWM
  property carbon content, fossil 0.00225; name bimetal_C_content_fossil
    Based on fossil carbon content (0.0025) indicated in ecoinvent v3.1 dataset "steel production, converter, unalloyed, GLO 2000" ("Unalloyed steels or carbon steels are those in which the level of an individual element in no case reaches or exceeds the limiting concentration given in Tab. 3.1 ecoinvent v2.2 report 10_partII. Assumed to have a C content of 0.25%") and carbon steel mass fraction in wire (0.9).
  property carbon content, non-fossil 0; name bimetal_C_content_non_fossil
    biogene carbon content on a dry matter basis
  property dry mass 0.069663 kg; name bimetal_DM; = wire_linear_mass_density
  property carbon content 0.00225
    carbon content on a dry matter basis (reserved; not for manual entry)
  properties: carbon allocation 0.000156742 kg

## By-products
- aluminium scrap, new: 0 kg; By-product classification Recyclable; CPC 39363: Waste and scrap of aluminium; pedigree (1,1,1,1,1)
  Reported as new aluminium scrap, generated during co-extrusion of aluminium over steel core. Plus aluminium part of scrap (off-specifications) bi-metal wire. Calculated value (see Parameters).
  Uncertainty: Calculated variable. Uncertainty will be determined from propagation of uncertainty factors of underlying variables. Uncertainty of actual relation between variables not accounted at this time, although this could be included in a future update.
  production volume 0 kg; name PV_aluScrap; = PV_bimetal * aluScrap / bimetal
    Calculated from production volume of reference product using the relative outputs.
  property price 0.806 EUR2005; name aluScrap_price_EUR2005
    Temporary price data. Calculated as 90% of purchasers price based on: 2005 import and export prices (total trades (USD) divided by total weight (kg) in biggest economies of the world: EU27, USA, Brasil, China, India, Japan and Russia) from UN Commodity Trade Statistics Database (http://data.un.org/Explorer.aspxDatabase [Accessed 2011.06.17]). Commodity: Waste or scrap, aluminium
  property carbon content 0
    carbon content on a dry matter basis (reserved; not for manual entry)
  properties: dry mass 1 kg, wet mass 1 kg, carbon content, fossil 0, water content 0, carbon content, non-fossil 0, water in wet mass 0 kg, carbon allocation 0 kg
- iron scrap, unsorted: 0 kg; CPC 39310: Slag, dross, scalings and other waste from the manufacture of iron or steel; By-product classification Recyclable; pedigree (1,1,1,1,1)
  Reported as scrap (off-specifications) bi-metal wire (aluminium part was removed). Calculated value (see Parameters).
  Uncertainty: Calculated variable. Uncertainty will be determined from propagation of uncertainty factors of underlying variables. Uncertainty of actual relation between variables not accounted at this time, although this could be included in a future update.
  production volume 0 kg; name PV_steelScrap_1; = PV_bimetal * (steelScrap / bimetal)
    Calculated from production volume of reference product using the relative outputs.
  property price 0.149 EUR2005; name steelScrap_price_EUR2005
    (same comment as for aluminium around steel bi-metal wire, 3.67mm external diameter)
  property carbon content 0
    carbon content on a dry matter basis (reserved; not for manual entry)
  properties: water content 0, carbon content, fossil 0, carbon content, non-fossil 0, wet mass 1 kg, water in wet mass 0 kg, dry mass 1 kg, carbon allocation 0 kg

## Inputs from technosphere
- aluminium, primary, ingot: 0.00777933 kg; name aluminium; = ((wire_linear_mass_density*(1-steel_mass_fraction))/(1-alu_loss))+((wire_linear_mass_density*steel_mass_fraction)*(cable_loss/(1-cable_loss))*((1-steel_mass_fraction)/steel_mass_fraction)); lognormal variance with pedigree 0.008, pedigree (1,1,4,1,1)
  Reported as primary aluminium cast alloy 9.5 mm diameter rods. Calculated value (see Parameters).
  Uncertainty: Calculated variable. Uncertainty will be determined from propagation of uncertainty factors of underlying variables. Uncertainty of actual relation between variables not accounted at this time, although this could be included in a future update.
  properties: dry mass 1 kg, wet mass 1 kg
- sodium sulfate, anhydrite: 3.34208e-5 kg; lognormal variance with pedigree 0.0092, pedigree (2,1,4,1,1)
  Calculated value. Per meter value (in kg) calculated from per kg data for 3.67 mm diameter wire (assumed to be diameter or mass independent) from data providing manufacturing company.
  properties: wet mass 1 kg, dry mass 1 kg
- propane, burned in building machine: 6.13325e-6 MJ; = propane_per_kg*propane_net_heating_value*46.46*wire_linear_mass_density; lognormal variance with pedigree 0.008, pedigree (1,1,4,1,1)
  Reported as for forklift truck. Calculated value (see Exchange Properties).
  Uncertainty: Calculated variable. Uncertainty will be determined from propagation of uncertainty factors of underlying variables. Uncertainty of actual relation between variables not accounted at this time, although this could be included in a future update.
  property heating value, net 1 MJ; name propane_net_heating_value
  property fuel input in physical units, m3 1.895e-6 m3; name propane_per_kg
  note on heating value, net: net (lower) heating (calorific) value. Taken directly from ecoinvent v3.0 dataset "propane, burned in building machine, GLO 2013".
  note on fuel input in physical units, m3: Calculated value. Per kg data for 3.67 mm diameter wire (assumed to be diameter or mass dependent) from data providing manufacturing company.
- wastewater, average: -2.39864e-7 m3; name wasteWater; = ((tapWater + waterDeionized)/1000)*-1; lognormal variance with pedigree 0.008, pedigree (1,1,4,1,1)
  Calculated value. Amount calculated from water inputs. Some effluent characterization data were reported, the calculated per meter values (in kg) calculated from per kg data for 3.67 mm diameter wire (assumed to be diameter or mass independent) from data providing manufacturing comapny: BOD5 = 3.6617E-6 kg/m, COD = 7.504E-6 kg/m, suspended solids = 8.852E-6 kg/m, and hydrocarbons, unspecified = 6,038E-9 kg/m.
  Uncertainty: Calculated variable. Uncertainty will be determined from propagation of uncertainty factors of underlying variables. Uncertainty of actual relation between variables not accounted at this time, although this could be included in a future update.
  production volume 15.1846 m3; name PV_wasteWater; = PV_bimetal * wasteWater / bimetal
    Calculated from production volume of reference product using the relative outputs.
  property price 0 EUR2005; name wasteWater_price_EUR2005
  properties: dry mass 0.346837 kg, carbon content, non-fossil 0.194039, wet mass 1000 kg, water content 2882.2
  note on carbon content, non-fossil: 0.0673 kg TOC/m3 (Tab A.17, ecoinvent v2.2 report 13_I). TOC was considered as Total Carbon.
- inert waste: -0.0011326 kg; name wasteInert; lognormal variance with pedigree 0.0092, pedigree (2,1,4,1,1)
  Reported as solid waste to inert material landfill. Calculated value. Per meter value (in kg) calculated from per kg data for 3.67 mm diameter wire (assumed to be diameter or mass independent) from data providing manufacturing company.
  production volume 71699.2 kg; name PV_wasteInert; = PV_bimetal * wasteInert / bimetal
    Calculated from production volume of reference product using the relative outputs.
  property price 0 EUR2005; name wasteInert_price_EUR2005
  properties: dry mass 1 kg, wet mass 1 kg
- tap water: 0.00022929 kg; name tapWater; lognormal variance with pedigree 0.0086, pedigree (1,1,4,1,1)
  Measured value. Per meter value (in kg) calculated from per kg data for 3.67 mm diameter wire (assumed to be diameter or mass independent) from data providing manufacturing company.
  properties: carbon content, fossil 0.00178991, dry mass 0.000337476 kg, wet mass 1 kg, water content 2962.17
  note on carbon content, fossil: Bicarbonate content is 2.93 mol/m3. CO2 content is 0.1 mol/m3 (ecoinvent v2.2 report 8, Tab 93.1).
- water, deionised: 1.05745e-5 kg; name waterDeionized; = alkaline_solution_per_m*water_concentration; lognormal variance with pedigree 0.008, pedigree (1,1,4,1,1)
  Water used in alkaline solution. Calculated value (see Exchange Properties).
  Uncertainty: Calculated variable. Uncertainty will be determined from propagation of uncertainty factors of underlying variables. Uncertainty of actual relation between variables not accounted at this time, although this could be included in a future update.
  property concentration 0.57; name water_concentration
  properties: wet mass 1 kg
  note on concentration: Alkaline solution water (solvent) mass concentration. Value from data providing manufacturing company.
- waste mineral oil: -3.5193e-5 kg; name wasteOil; lognormal variance with pedigree 0.0092, pedigree (2,1,4,1,1)
  EcoSpold01Location=CH
  Reported as used mineral oil, 10% water. Calculated value. Per meter value (in kg) calculated from per kg data for 3.67 mm diameter wire (assumed to be diameter or mass independent) from data providing manufacturing company.
  production volume 2227.89 kg; name PV_wasteOil; = PV_bimetal * wasteOil / bimetal
    Calculated from production volume of reference product using the relative outputs.
  property price 0 EUR2005; name wasteOil_price_EUR2005
  properties: heating value, net 34.7 MJ, wet mass 1 kg, carbon content, fossil 0.864444, dry mass 0.9 kg, water content 0.111111
  note on heating value, net: Value taken from the general comment of the treatment dataset.
  note on carbon content, fossil: Tab A.6, ecoinvent v2.2 report 13_I. C content has been calculated after data in the tables, and then referred to 1 kg DM
- potassium hydroxide: 3.71034e-6 kg; name potassiumHydrox; = alkaline_solution_per_m*KOH_concentration; lognormal variance with pedigree 0.008, pedigree (1,1,4,1,1)
  Potassium hydroxide used in alkaline solution. Calculated value (see Exchange Properties).
  Uncertainty: Calculated variable. Uncertainty will be determined from propagation of uncertainty factors of underlying variables. Uncertainty of actual relation between variables not accounted at this time, although this could be included in a future update.
  property concentration 0.2; name KOH_concentration
  properties: water content 0.168224, wet mass 1 kg, dry mass 0.856 kg
  note on concentration: Alkaline solution potassium hydroxide mass concentration. Value from data providing manufacturing company.
- soap: 0.000616795 kg; = alkaline_solution_per_m*soap_concentration + calcium_stearate_surfactant_per_kg*wire_linear_mass_density; lognormal variance with pedigree 0.008, pedigree (1,1,4,1,1)
  Soap used in alkaline solution and used as proxy for extrusion lubricant (calcium stearate surfactants). Calculated value (see Exchange Properties).
  EcoSpold01Location=RER
  Uncertainty: Calculated variable. Uncertainty will be determined from propagation of uncertainty factors of underlying variables. Uncertainty of actual relation between variables not accounted at this time, although this could be included in a future update.
  property value per kg of bi-metal cable 0.008846; name calcium_stearate_surfactant_per_kg
  property concentration 0.03; name soap_concentration
  properties: dry mass 0.87 kg, water content 0.149425, wet mass 1 kg, carbon content, non-fossil 0.692237, heating value, net 17.93 MJ
  note on value per kg of bi-metal cable: Soap used as proxy for calcium stearate surfactant. Calculated value. Per kg data for 3.67 mm diameter wire (assumed to be diameter or mass dependent) from data providing manufacturing comapny.
  note on carbon content, non-fossil: Soap (CnH2n+1 COO Na) is produced by a combined saponification and neutralisation process performed on a blend of oleochemical feedstocks comprised of short chain (C12-14, derived from coconut or palm kernel oil) and long chain (C16-18, from tallow or palm oil) esters.The ratio of short to long fatty acid chains is 20:80 (ecoinvent v2.2 report 12). Short fatty acid has been estimated as C12.5H(2*12.5+1); MW R=176 g/mol. Long fatty acid has been estimated as C16H(2*16+1); MW R=225 g/mol. MW of COONa=67 g/mol
  note on concentration: Alkaline solution soap mass concentration. Value from data providing manufacturing company.
- steel, unalloyed: 0.0655549 kg; name steel; = (wire_linear_mass_density*steel_mass_fraction)/(1-cable_loss); lognormal variance with pedigree 0.008, pedigree (1,1,4,1,1)
  Reported as 9.5 mm diameter carbon steel cast alloy rods. Calculated value (see Parameters).
  Uncertainty: Calculated variable. Uncertainty will be determined from propagation of uncertainty factors of underlying variables. Uncertainty of actual relation between variables not accounted at this time, although this could be included in a future update.
  properties: wet mass 1 kg, dry mass 1 kg, carbon content, fossil 0.0025
- heat, district or industrial, natural gas: 0.00529842 MJ; = natural_gas_per_kg*natural_gas_net_heating_value*36.3/natural_gas_fuel_use*wire_linear_mass_density; lognormal variance with pedigree 0.008, pedigree (1,1,4,1,1)
  EcoSpold01Location=RER
  Reported as for building heating only. Calculated value (see Exchange Properties).
  Uncertainty: Calculated variable. Uncertainty will be determined from propagation of uncertainty factors of underlying variables. Uncertainty of actual relation between variables not accounted at this time, although this could be included in a future update.
  property Corresponding fuel use 1.0417 MJ; name natural_gas_fuel_use
  property fuel input in physical units, m3 0.00218263 m3; name natural_gas_per_kg
  property heating value, net 1 MJ; name natural_gas_net_heating_value
  note on Corresponding fuel use: Lower heating value of the fuel input related to the heat/electricity output. Assume a 96% energy efficiency based on Section 5.3.6 of report "Life cycle Inventories of Energy Systems, Results for Current Systems in Switzerland and other UCTE Countries" (ecoinvent report No. 5, 2007)
  note on heating value, net: net (lower) heating (calorific) value. Value taken from Table 5.1 of report "Overview and methodology, Data quality guidelines for the ecoinvent database version 3" (ecoinvent report No. 1 (v3), 2011).
- sawnwood, softwood, raw, dried (u=20%): 9.26426e-6 m3; name sawnWood; = wood_per_m/wood_density; lognormal variance with pedigree 0.008, pedigree (1,1,4,1,1)
  Reported as coils for primary packaging. Calculated value (see Exchange Properties).
  Uncertainty: Calculated variable. Uncertainty will be determined from propagation of uncertainty factors of underlying variables. Uncertainty of actual relation between variables not accounted at this time, although this could be included in a future update.
  property value per m of bi-metal cable 0.0050027; name wood_per_m
  property wet mass 540 kg; name wood_density
  properties: water content 0.2, dry mass 450 kg, carbon content, non-fossil 0.494, heating value, net 6514.84 MJ
  note on value per m of bi-metal cable: Calculated value. Per meter value (in kg) calculated from per kg data for 3.67 mm diameter wire (assumed to be diameter or mass independent) from data providing manufacturing comapny.
- electricity, medium voltage: 0.0297461 kWh; = electricity_per_kg*wire_linear_mass_density; lognormal variance with pedigree 0.008, pedigree (1,1,4,1,1)
  Reported as grid electricity. Calculated value (see Exchange Properties).
  Uncertainty: Calculated variable. Uncertainty will be determined from propagation of uncertainty factors of underlying variables. Uncertainty of actual relation between variables not accounted at this time, although this could be included in a future update.
  property value per kg of bi-metal cable 0.427; name electricity_per_kg
  note on value per kg of bi-metal cable: Measured value. Per kg data for 3.67 mm diameter wire (assumed to be diameter or mass dependent) from data providing manufacturing company.
- steel, low-alloyed: 1.2319e-6 kg; lognormal variance with pedigree 0.0092, pedigree (2,1,4,1,1)
  Proxy. Reported as scouring pads. Calculated per meter value (in kg) calculated from per kg data for 3.67 mm diameter wire (assumed to be diameter or mass independent) from data providing manufacturing comapny.
  properties: dry mass 1 kg, carbon content, fossil 0.005, wet mass 1 kg
- chemical, inorganic: 9.07434e-6 kg; = chemical_input + alkaline_solution_per_m*K4P2O7_concentration; lognormal variance with pedigree 0.008, pedigree (1,1,4,1,1)
  Represents an input of chemical reported as inorganic chemicals and an input of tetrapotassium pyrophosphate (K4P2O7, NAS 7320-34-5) used in alkaline solution, calculated based on the solution concentration (see Exchange Properties).
  Uncertainty: Calculated variable. Uncertainty will be determined from propagation of uncertainty factors of underlying variables. Uncertainty of actual relation between variables not accounted at this time, although this could be included in a future update.
  property input_kg 5.364e-6 kg; name chemical_input
  property concentration 0.2; name K4P2O7_concentration
  properties: carbon content, fossil 0.003, wet mass 1 kg, dry mass 1 kg
  note on carbon content, fossil: This dataset is an unweighted average of 20 inorganic substances (listed in Tab 88.1, ecoinvent v2.2 report 8, part II), being part of the top100 chemicals included in this database. The C-content has also been calculated as an unweighted average of the C content of the substances composing this dataset.
  note on input_kg: Calculated value. Per meter value (in kg) calculated from per kg data for 3.67 mm diameter wire (assumed to be diameter or mass independent) from data providing manufacturing company.
  note on concentration: Alkaline solution tetra potassium pyrophosphate mass concentration. Value from data providing manufacturing company.
- rolling mill: 1.6234e-9 unit; lognormal variance with pedigree 0.52, pedigree (5,5,5,5,5)
  Proxy. Value taken directly from ecoinvent v3.0 dataset "wire drawing, steel, GLO 2002".
  Uncertainty: No data collected. The uncertainty has been maximized.
- aluminium scrap, new: -0.000813037 kg; lognormal variance with pedigree 0.008, pedigree (1,1,4,1,1)
  (same comment as for aluminium scrap, new)
  production volume 51469.3 kg
  properties: dry mass 1 kg, wet mass 1 kg
- iron scrap, unsorted: -0.00285819 kg; lognormal variance with pedigree 0.008, pedigree (1,1,4,1,1)
  (same comment as for iron scrap, unsorted)
  production volume 180938 kg
  properties: wet mass 1 kg, dry mass 1 kg

## Sampling procedure
Mostly industry data from one manufacturing company in the region of Québec, and some data from literature.

## Extrapolations
This dataset has been extrapolated from year 2012 to the year of the calculation (2021). The uncertainty has been adjusted accordingly.
