# rare earth oxides production, from rare earth oxide concentrate, 70% REO

Dataset: EcoSpold 2, unit process
Geography: CN-SC
Time period: 2017-01-01 to 2021-12-31
Technology level: current
Classification: ISIC rev.4 ecoinvent: 0729:Mining of other non-ferrous metal ores
Synonyms: REO; REE
Tags: combined production
Scenario: Business-as-Usual
System model: Allocation, cut-off by classification
Generated by: Efstathios Kakkos
Database: ecoinvent
isCopyrightProtected: true
accessRestrictedTo: 1

## General comment
For the separation and refining of rare earth oxides in the Sichuan region of China. This dataset is based on the following publication: Arshi, P. S., Vahidi, E., & Zhao, F. (2018). Behind the Scenes of Clean Energy: The Environmental Footprint of Rare Earth Products. ACS Sustainable Chemistry & Engineering, 6(3), 3311-3320. doi:10.1021/acssuschemeng.7b03484 and the critical materials life cycle assessment tool (CMLCAT) of Arshi et al. (2018), provided by F. Zhao from Purdue University. Specific modifications were made in order to make the dataset more transparent.
Background: Metals are produced as part of a complex, highly interconnected and interdependent system, with many desirable but scarce/critical metals recovered as by-products during the production of one or more ‘host’ metal(s). Currently, mining and processing of rare earth elements is predominantly carried out in China, where they are extracted mainly via open pit mining of bastnäsite and/or monazite deposits or the leaching of ion-adsorption clays.
Modelling approach: This dataset was created using the critical materials life cycle assessment tool (CMLCAT) of Arshi et al. (2018).

## Included activities start
The activity starts with the processing of the rare earth oxide concentrate, 70% beneficiated.

## Included activities end
The activity ends with the production high-purity rare earth metals.

## Allocation
No allocation is applied.

## Geography
This dataset is valid for the whole corresponding region.

## Technology
This dataset refers to the separation (hydrochloric acid leaching) and refining (metallothermic reduction) process used in order to produce high-purity rare earth oxides (REO) from REO concentrate, 70% beneficiated. ''The concentrate is calcined at temperatures up to 600ºC to oxidize carbonaceous material. Then HCl leaching, alkaline treatment, and second HCl leaching is performed to produce a relatively pure rare earth chloride (95% REO). Hydrochloric acid leaching in Sichuan is capable of separating and recovering the majority of cerium oxide (CeO) in a short process. For this dataset, the entire quantity of Ce (50% cerium dioxide [CeO2]/REO) is assumed to be produced here as CeO2 with a grade of 98% REO. Foreground carbon dioxide CO2 emissions were calculated from chemical reactions of calcining beneficiated ores. Then metallothermic reduction produces the purest rare earth metals (99.99%) and is most common for heavy rare earths. The metals volatilize, are collected, and then condensed at temperatures of 300 to 400°C (Chinese Ministryof Environmental Protection 2009).'' Source: Lee, J. C. K., & Wen, Z. (2017). Rare Earths from Mines to Metals: Comparing Environmental Impacts from China's Main Production Pathways. Journal of Industrial Ecology, 21(5), 1277-1290. doi:10.1111/jiec.12491

## Time period
Data are considered representative of current production practices.

## Reference product
All rows: By-product classification allocatable product
- cerium oxide: 0 kg; name CeO2; CPC 3429: Compounds of rare earth metals, of yttrium or of scandium; CAS 1306-38-3
  Value taken from the critical materials life cycle assessment tool (CMLCAT) of Arshi et al. (2018), provided by F. Zhao from Purdue university (more information on the sampling procedure) and adjusted to correspond to the production of individual rare earth metals. Proxy for calcium fluoride.
  production volume 2.00868e6 kg
    The production volume for cerium oxide is expressed in kg. The value is derived from the manual for Critical Materials Life Cycle Assessment Tool (CMLCAT) version 1.1, an Excel-based software that was developed by Purdue University with support from the Critical Materials Institute (CMI), an Energy Innovation Hub funded by the U.S. Department of Energy, Office of Energy Efficiency and Renewable Energy, Advanced Manufacturing Office. The requested production volume per year can be found after the installation of the software at the C folder ''RE_LCA'' -> ''0.Allocation_CFs'' -> AllocationFactors excel file -> Sichuan sheet -> Cell B4.
  property oxygen content 0.185915; name CeO2_O_content
    oxygen content on a dry matter basis
  property cerium content 0.814085; name CeO2_Ce_content
    cerium content on a dry matter basis
  property price 2.23 EUR2005; name CeO2_price_EUR2005
    Temporary price data. Calculated as 90% of purchasers price based on: 2004 import and export prices (total trades (USD) divided by total weight (kg) in EU27, USA, China, Japan and India) from UN data - 'Diethyl ether' (http://data.un.org/Data.aspx; accessed 2 July 10). Commodity: Cerium compounds.
  property carbon content 0
    carbon content on a dry matter basis (reserved; not for manual entry)
  property true value 0.840041; name CeO2_true_value
    allocation property applied in "true value" allocation // value calculated from revenue
  properties: carbon content, non-fossil 0, water in wet mass 0 kg, wet mass 1 kg, water content 0, dry mass 1 kg, carbon content, fossil 0, carbon allocation 0 kg
- yttrium oxide: 0 kg; name Y2O3; CPC 34290: Compounds of rare earth metals, of yttrium or of scandium; CAS 1314-36-9
  (same comment as for cerium oxide)
  production volume 0 kg
    The production volume is expressed in kg. Its calculation is based on the fact that for the production of 0.3767 kg of cerium oxide from monazite REE mineral, 0.0009 kg of yttrium oxide is produced as a coproduct. The annual production of cerium oxide is 2008680 kg (see cerium oxide PV comment).
  property price 2.62387 EUR2005; name Y2O3_price_EUR2005
    Average Chinese domestic prices for selected rare earth oxides as of January 2018, Source: https://www.statista.com/statistics/280038/chinese-domestic-and-export-prices-for-rare-earth-oxides/
  property oxygen content 0.21256; name Y2O3_O_content
    oxygen content on a dry matter basis
  property yttrium content 0.78744; name Y2O3_Y_content
    yttrium content on a dry matter basis
  property carbon content 0
    carbon content on a dry matter basis (reserved; not for manual entry)
  properties: water content 0, dry mass 1 kg, wet mass 1 kg, carbon content, fossil 0, water in wet mass 0 kg, carbon content, non-fossil 0, carbon allocation 0 kg
- praseodymium-neodymium oxide: 0 kg; name PrNd; CPC 34290: Compounds of rare earth metals, of yttrium or of scandium; CAS 84583-64-2
  (same comment as for cerium oxide)
  production volume 0 kg
    The production volume is expressed in kg. Its calculation is based on the fact that for the production of 0.3767 kg of cerium oxide from monazite REE mineral, 0.133 kg of praseodymium-neodymium oxide is produced as a coproduct. The annual production of cerium oxide is 2008680 kg (see cerium oxide PV comment).
  property price 50 EUR2005; name PrNd_price_EUR2005
    Average price calculated from wholesae vendors.
  property carbon content 0
    carbon content on a dry matter basis (reserved; not for manual entry)
  properties: carbon content, fossil 0, dry mass 1 kg, water content 0, carbon content, non-fossil 0, water in wet mass 0 kg, wet mass 1 kg, carbon allocation 0 kg
- terbium-dysprosium oxide: 1 kg; = 0.0025*CeO2/0.9952+0.0025*Eu2O3/0.9952+0.0025*La2O3/0.9952+0.0025*LaCe/0.9952+0.0025*PrNd/0.9952+0.0025*Sm2O3/0.9952+0.0025*Y2O3/0.9952; CPC 34290: Compounds of rare earth metals, of yttrium or of scandium; pedigree (1,1,1,1,1)
  Value taken from the critical materials life cycle assessment tool (CMLCAT) of Arshi et al. (2018), provided by F. Zhao from Purdue university (more information on the sampling procedure) and adjusted to correspond to the production of individual rare earth metals.
  production volume 13330.8 kg; = Ref('7ea35e71-d62a-4f14-9e8b-a7e954675b42', 'ProductionVolume') * (ABS(Ref('15746bbc-5fcf-4519-bf32-251c37a4d169')) / ABS(Ref('7ea35e71-d62a-4f14-9e8b-a7e954675b42'))
    The production volume is expressed in kg. Its calculation is based on the fact that for the production of 0.3767 kg of cerium oxide from monazite REE mineral, 0.0025 kg of terbium-dysprosium oxide is produced as a coproduct. The annual production of cerium oxide is 2008680 kg (see cerium oxide PV comment).
  property carbon content 0
    carbon content on a dry matter basis (reserved; not for manual entry)
  property true value 0.000245696
    allocation property applied in "true value" allocation // value calculated from revenue
  properties: price 0.259641 EUR2005, dry mass 1 kg, wet mass 1 kg, water content 0, carbon content, fossil 0, water in wet mass 0 kg, carbon content, non-fossil 0, carbon allocation 0 kg
- lanthanum-cerium oxide: 0 kg; name LaCe; CPC 34290: Compounds of rare earth metals, of yttrium or of scandium
  (same comment as for cerium oxide)
  production volume 0 kg
    The production volume is expressed in kg. Its calculation is based on the fact that for the production of 0.3767 kg of cerium oxide from monazite REE mineral, 0.1629 kg of lanthanum-cerium oxide is produced as a coproduct. The annual production of cerium oxide is 2008680 kg (see cerium oxide PV comment).
  property price 1.70857 EUR2005; name LaCe_price_EUR2005
    (same comment as for yttrium oxide)
  property carbon content 0
    carbon content on a dry matter basis (reserved; not for manual entry)
  properties: water content 0, carbon content, non-fossil 0, carbon content, fossil 0, water in wet mass 0 kg, wet mass 1 kg, dry mass 1 kg, carbon allocation 0 kg
- europium oxide: 0 kg; name Eu2O3; CPC 34290: Compounds of rare earth metals, of yttrium or of scandium; CAS 1308-96-9
  (same comment as for cerium oxide)
  production volume 0 kg
    The production volume is expressed in kg. Its calculation is based on the fact that for the production of 0.3767 kg of cerium oxide from monazite REE mineral, 0.002 kg of europium oxide is produced as a coproduct. The annual production of cerium oxide is 2008680 kg (see cerium oxide PV comment).
  property price 0.051257 EUR2005; name Eu2O3_price_EUR2005
    (same comment as for yttrium oxide)
  property oxygen content 0.136387; name Eu2O3_O_content
    oxygen content on a dry matter basis
  property europium content 0.863613; name Eu2O3_Eu_content
    europium content on a dry matter basis
  property carbon content 0
    carbon content on a dry matter basis (reserved; not for manual entry)
  properties: water in wet mass 0 kg, carbon content, non-fossil 0, wet mass 1 kg, carbon content, fossil 0, water content 0, dry mass 1 kg, carbon allocation 0 kg
- lanthanum oxide: 0 kg; name La2O3; CPC 3429: Compounds of rare earth metals, of yttrium or of scandium; CAS 1312-81-8
  (same comment as for cerium oxide)
  production volume 0 kg
    The production volume is expressed in kg. Its calculation is based on the fact that for the production of 0.3767 kg of cerium oxide from monazite REE mineral, 0.3132 kg of lanthanum oxide is produced as a coproduct. The annual production of cerium oxide is 2008680 kg (see cerium oxide PV comment).
  property price 6.82 EUR2005; name La2O3_price_EUR2005
    Temporary price data. Calculated as 90% of purchasers price based on: 2005 import and export prices (total trades (USD) divided by total weight (kg) in biggest economies of the world: EU27, USA, Brasil, China, India, Japan and Russia) from UN Commodity Trade Statistics Database (http://data.un.org/Explorer.aspxDatabase [Accessed 2011.06.20]). Commodity: Rare-earth metals, scandium and yttrium
  property oxygen content 0.14732; name La2O3_O_content
    oxygen content on a dry matter basis
  property lanthanum content 0.85268; name La2O3_La_content
    lanthanum content on a dry matter basis
  property carbon content 0
    carbon content on a dry matter basis (reserved; not for manual entry)
  properties: carbon content, fossil 0, water content 0, carbon content, non-fossil 0, water in wet mass 0 kg, wet mass 1 kg, dry mass 1 kg, carbon allocation 0 kg
- samarium oxide: 0 kg; name Sm2O3; CPC 34290: Compounds of rare earth metals, of yttrium or of scandium; CAS 12060-58-1
  (same comment as for cerium oxide)
  production volume 0 kg; name RP_PV
    The production volume is expressed in kg. Its calculation is based on the fact that for the production of 0.3767 kg of cerium oxide from monazite REE mineral, 0.0065 kg of samarium oxide is produced as a coproduct. The annual production of cerium oxide is 2008680 kg (see cerium oxide PV comment).
  property oxygen content 0.137642; name Sm2O3_O_content
    oxygen content on a dry matter basis
  property samarium content 0.862358; name Sm2O3_Sm_content
    samarium content on a dry matter basis
  property price 1.70857 EUR2005; name Sm2O3_price_EUR2005
    (same comment as for yttrium oxide)
  property carbon content 0
    carbon content on a dry matter basis (reserved; not for manual entry)
  properties: wet mass 1 kg, water content 0, water in wet mass 0 kg, carbon content, fossil 0, carbon content, non-fossil 0, dry mass 1 kg, carbon allocation 0 kg

## By-products
All rows: pedigree (1,1,1,1,1)
- calcium carbonate, precipitated: 0 kg; By-product classification allocatable product; CPC 34240: Phosphates of triammonium; salts and peroxysalts of inorganic acids and metals n.e.c.; CAS 471-34-1
  (same comment as for cerium oxide)
  production volume 632093 kg; = Ref('7ea35e71-d62a-4f14-9e8b-a7e954675b42', 'ProductionVolume') * (ABS(Ref('ccbf4fbb-4f5a-4559-950a-3008bfd2471c')) / ABS(Ref('7ea35e71-d62a-4f14-9e8b-a7e954675b42'))
    The production volume is expressed in kg. Its calculation is based on the fact that for the production of 0.3767 kg of cerium oxide from monazite REE mineral, 0.31317041 kg of calcium carbonate, precipitated is produced as a byproduct. The annual production of cerium oxide is 2008680 kg (see cerium oxide PV comment).
  property price 0.452 EUR2005
    Estimated value. This price is averaged from 4 different suppliers available in the commercial webstore of alibaba. The price refers to a bulk quantity purchase. All websites were retrieved on the 19th Sept 2017. THe exchange rate used is from 2010 when 1 USD - 0.755 EUR.
    Price range:
    supplier 1: 230-260 $ per ton, https://www.alibaba.com/product-detail/Hot-calcium-carbonate-light-or-heavy_1677405130.html?spm=a2700.7724838.2017115.20.3c93b095BC0Sce&s=p
    supplier 2: 100-140 $ per ton, https://www.alibaba.com/product-detail/China-manufacturer-precipitated-calcium-carbonate_60613120303.html?spm=a2700.7724838.2017115.10.3c93b095BC0Sce&s=p
    supplier 3: 460-1600 $ per ton, https://www.alibaba.com/product-detail/Professional-AR-grade-precipitated-calcium-carbonate_60713789652.html?spm=a2700.7724838.2017115.1.3c93b095BC0Sce&s=p
    supplier 4: 800-1,200 $ per ton, https://www.alibaba.com/product-detail/Precipitated-Calcium-Carbonate-products_60232652437.html?spm=a2700.7724838.2017115.27.3c93b095BC0Sce&s=p
  property carbon content 0.12001
    carbon content on a dry matter basis (reserved; not for manual entry)
  property true value 0.0535802
    allocation property applied in "true value" allocation // value calculated from revenue
  properties: wet mass 1 kg, dry mass 1 kg, water content 0, carbon content, non-fossil 0, water in wet mass 0 kg, carbon content, fossil 0.12001, carbon allocation 0.12001 kg
- sulfur: 0 kg; CPC 34520: Sulphur, except sublimed sulphur, precipitated sulphur and colloidal sulphur; By-product classification allocatable product; CAS 7704-34-9
  (same comment as for terbium-dysprosium oxide)
  production volume 37849.9 kg; = Ref('7ea35e71-d62a-4f14-9e8b-a7e954675b42', 'ProductionVolume') * (ABS(Ref('a2508429-d089-417a-9582-87139972022b')) / ABS(Ref('7ea35e71-d62a-4f14-9e8b-a7e954675b42'))
    The production volume is expressed in kg. Its calculation is based on the fact that for the production of 0.3767 kg of cerium oxide from monazite REE mineral, 0.018752719 kg of sulfur is produced as a byproduct. The annual production of cerium oxide is 2008680 kg (see cerium oxide PV comment).
  property price 0.0551778 EUR2005
    Price calculated based on price of elemental sulfur (f.o.b. mine or plant) reported in the USGS Minerals Yearbook for Sulfur from 2010 to 2019 (https://www.usgs.gov/centers/nmic/sulfur-statistics-and-information). The prices given in USD were converted to EUR based on the annual exchange rates published by the European Central Bank (https://sdw.ecb.europa.eu/quickview.do?SERIES_KEY=120.EXR.A.USD.EUR.SP00.A), and then adjusted for inflation relative to 2005 by using the Harmonised Index of Consumer Prices (HICP) of the euro area, published by eurostat (https://ec.europa.eu/eurostat/databrowser/view/PRC_HICP_AIND/default/table).
  property carbon content 0
    carbon content on a dry matter basis (reserved; not for manual entry)
  property true value 0.000391664
    allocation property applied in "true value" allocation // value calculated from revenue
  properties: water content 0, dry mass 1 kg, carbon content, non-fossil 0, wet mass 1 kg, water in wet mass 0 kg, carbon content, fossil 0, carbon allocation 0 kg
- sodium chloride, powder: 0 kg; CPC 16200: Salt and pure sodium chloride; sea water; By-product classification allocatable product; CAS 7647-14-5
  (same comment as for terbium-dysprosium oxide)
  production volume 1.82815e6 kg; = Ref('7ea35e71-d62a-4f14-9e8b-a7e954675b42', 'ProductionVolume') * (ABS(Ref('71842ac5-c56c-4fc3-8c7a-f31f8778a728')) / ABS(Ref('7ea35e71-d62a-4f14-9e8b-a7e954675b42'))
    The production volume is expressed in kg. Its calculation is based on the fact that for the production of 0.3767 kg of cerium oxide from monazite REE mineral, 0.905756335 kg of sodium chloride, powder is produced as a byproduct. The annual production of cerium oxide is 2008680 kg (see cerium oxide PV comment).
  property price 0.232508 EUR2005
    Calculated based on inputs: The price of the product has been calculated as a sum of the values of the material and energy inputs for this product. This value is therefore a rough estimation. It may underestimate the real price since there are additional expenses when producing any product. These expences can include for example labour costs, treatment of waste materials and profit for the producer. Please consider carefully whether this level of data quality is acceptable for your application.
  property carbon content 0
    carbon content on a dry matter basis (reserved; not for manual entry)
  property true value 0.0797138
    allocation property applied in "true value" allocation // value calculated from revenue
  properties: carbon content, non-fossil 0, wet mass 1 kg, carbon content, fossil 0, water content 0, dry mass 1 kg, water in wet mass 0 kg, carbon allocation 0 kg
- calcium chloride: 0 kg; By-product classification allocatable product; CPC 34240: Phosphates of triammonium; salts and peroxysalts of inorganic acids and metals n.e.c.; CAS 10043-52-4
  (same comment as for terbium-dysprosium oxide)
  production volume 3.46932e6 kg; = Ref('7ea35e71-d62a-4f14-9e8b-a7e954675b42', 'ProductionVolume') * (ABS(Ref('5e774b47-bc1c-47f8-bed3-b182297e94c0')) / ABS(Ref('7ea35e71-d62a-4f14-9e8b-a7e954675b42'))
    The production volume is expressed in kg. Its calculation is based on the fact that for the production of 0.3767 kg of cerium oxide from monazite REE mineral, 1.718874237 kg of calcium chloride is produced as a byproduct. The annual production of cerium oxide is 2008680 kg (see cerium oxide PV comment).
  property price 0.126 EUR2005
    Temporary price data. Calculated as 90% of purchasers price based on: 2004 import and export prices (total trades (USD) divided by total weight (kg) in EU27, USA, China, Japan and India) from UN data - Calcium chloride (http://data.un.org/Data.aspx?q=calcium+chloride&d=ComTrade&f=_l1Code%3a29%3bcmdCode%3a282720; accessed 1 June 10).
  property carbon content 0
    carbon content on a dry matter basis (reserved; not for manual entry)
  property true value 0.0819785
    allocation property applied in "true value" allocation // value calculated from revenue
  properties: water content 0, dry mass 1 kg, water in wet mass 0 kg, carbon content, fossil 0, carbon content, non-fossil 0, wet mass 1 kg, carbon allocation 0 kg
- gadolinium oxide: 0 kg; By-product classification allocatable product; CPC 34290: Compounds of rare earth metals, of yttrium or of scandium; CAS 12064-62-9
  (same comment as for terbium-dysprosium oxide)
  production volume 4844.08 kg; = Ref('7ea35e71-d62a-4f14-9e8b-a7e954675b42', 'ProductionVolume') * (ABS(Ref('d9dabfe1-2068-435a-8950-a1aa203c5b98')) / ABS(Ref('7ea35e71-d62a-4f14-9e8b-a7e954675b42'))
    The production volume is expressed in kg. Its calculation is based on the fact that for the production of 0.3767 kg of cerium oxide from monazite REE mineral, 0.0024 kg of gadolinium oxide is produced as a coproduct. The annual production of cerium oxide is 2008680 kg (see cerium oxide PV comment).
  property price 12.2041 EUR2005
    (same comment as for yttrium oxide)
  property carbon content 0
    carbon content on a dry matter basis (reserved; not for manual entry)
  property true value 0.0110867
    allocation property applied in "true value" allocation // value calculated from revenue
  properties: oxygen content 0.132409, water content 0, carbon content, fossil 0, carbon content, non-fossil 0, gadolinium content 0.867591, water in wet mass 0 kg, wet mass 1 kg, dry mass 1 kg, carbon allocation 0 kg
- coal tar: 0 kg; CPC 34530: Roasted iron pyrites; By-product classification allocatable product; CAS 8007-45-2
  (same comment as for terbium-dysprosium oxide)
  production volume 435274 kg; = Ref('7ea35e71-d62a-4f14-9e8b-a7e954675b42', 'ProductionVolume') * (ABS(Ref('545b4b16-1da6-4860-a392-63623eb95a1f')) / ABS(Ref('7ea35e71-d62a-4f14-9e8b-a7e954675b42'))
    The production volume is expressed in kg. Its calculation is based on the fact that for the production of 0.3767 kg of cerium oxide from monazite REE mineral, 0.21565627 kg of coal tar is produced as a byproduct. The annual production of cerium oxide is 2008680 kg (see cerium oxide PV comment).
  property price 0.196 EUR2005
    Temporary price data. Calculated as 90% of purchasers price based on: 2004 prices calculated from Import/Export data (total trades (USD) divided by total weight (kg) in EU27, USA, China, Japan and India) from UN Trade data statistics (http://data.un.org/Explorer.aspx, Accessed 6 July 2010).
  property heating value, net 28 MJ
    Literature value, Source: IPCC 2006, 2006 IPCC Guidelines for National Greenhouse Gas Inventories, Prepared by the National Greenhouse Gas Inventories Programme, Eggleston H.S., Buendia L., Miwa K., Ngara T. and Tanabe K. (eds). Published: IGES, Japan
  property carbon content 0.83
    carbon content on a dry matter basis (reserved; not for manual entry)
  property true value 0.0159994
    allocation property applied in "true value" allocation // value calculated from revenue
  properties: dry mass 1 kg, water content 0, carbon content, fossil 0.83, wet mass 1 kg, water in wet mass 0 kg, carbon content, non-fossil 0, carbon allocation 0.83 kg
- iron ore concentrate: 0 kg; By-product classification allocatable product; CPC 14100: Iron ores and concentrates, other than roasted iron pyrites
  (same comment as for terbium-dysprosium oxide)
  production volume 56774.8 kg; = Ref('7ea35e71-d62a-4f14-9e8b-a7e954675b42', 'ProductionVolume') * (ABS(Ref('f0eb5f8f-5078-4c39-bec4-7442acc1c6f1')) / ABS(Ref('7ea35e71-d62a-4f14-9e8b-a7e954675b42'))
    The production volume is expressed in kg. Its calculation is based on the fact that for the production of 0.3767 kg of cerium oxide from monazite REE mineral, 0.028129079 kg of iron ore concentrate is produced as a byproduct. The annual production of cerium oxide is 2008680 kg (see cerium oxide PV comment).
  property price 0.0467 EUR2005
    Calculated based on literature value (UN Commodity Trade Statistics Database) using data on trade value and net weight (kg) for 5 reference countries/regions (EU-27, USA, JP, CN and IN) which weighted (by net weight) average is assumed to be a good approximation of the global price. The UN classification; 2601 Iron ores and concentrates, roasted iron pyrites (accessed 20140508). Data for the year 2005.
  property carbon content 0
    carbon content on a dry matter basis (reserved; not for manual entry)
  property true value 0.00049723
    allocation property applied in "true value" allocation // value calculated from revenue
  properties: input 0 l, iron content 0.65, water content 0, water in wet mass 0 kg, dry mass 1 kg, carbon content, non-fossil 0, carbon content, fossil 0, wet mass 1 kg, carbon allocation 0 kg
- metalliferous hydroxide sludge: 0 kg; By-product classification Recyclable; CPC 1429: Other non-ferrous metal ores and concentrates (other than uranium or thorium ores and concentrates)
  (same comment as for terbium-dysprosium oxide)
  production volume 0 kg; = Ref('7ea35e71-d62a-4f14-9e8b-a7e954675b42', 'ProductionVolume') * (ABS(Ref('7fe2dfef-b8dc-44af-ba67-8adf54d6d6df')) / ABS(Ref('7ea35e71-d62a-4f14-9e8b-a7e954675b42'))
    The production volume is expressed in kg. Its calculation is based on the fact that for the production of 0.3767 kg of cerium oxide from monazite REE mineral, 0.00937636 kg of metalliferous hydroxide sludge is produced as a byproduct. The annual production of cerium oxide is 2008680 kg (see cerium oxide PV comment).
  property heating value, net 0 MJ
    Non combustible products are assumed to have an LHV equal to zero (0).
  property price 0.0042 EUR2005
    World market value of manure, deflated with barley world market price and consumer price index, based on [http://www.gov.pe.ca/photos/original/af_NM_manconv.pdf].
  property carbon content 0.0194
    carbon content on a dry matter basis (reserved; not for manual entry)
  properties: antimony content 0.000521, water in wet mass 0.75 kg, zinc content 0.132, phosphorus content 0.01557, manganese content 4.46e-5, aluminium content 0.0005054, magnesium content 0.0032735, water content 3, iodine content 3.57e-7, beryllium content 0.0027, carbon content, fossil 0.0082, chlorine content 0.17609, carbon content, non-fossil 0.0112, lead content 0.003555, mercury content 8.31e-7, silver content 3.84e-7, potassium content 0.0122, dry mass 0.25 kg, cobalt content 9.787e-5, fluorine content 0.005, vanadium content 0.000574, sulfur content 0.1053, selenium content 9.68e-6, copper content 0.00017, nickel content 2.082e-5, cadmium content 0.00377, iron content 0.00059, wet mass 1 kg, bromine content 0.0026, calcium content 0.1045, molybdenum content 7.774e-5, strontium content 2.185e-7, tin content 5.35e-5, boron content 0.00013285, sodium content 0.0163, titanium content 8.116e-5, chromium content 0.000122, barium content 1.646e-5, arsenic content 1.3087e-5, oxygen content 0.394, silicon content 0.00096, thallium content 2.91e-6, carbon allocation 0.00485 kg

## Inputs from technosphere
- soda ash, light, crystalline, heptahydrate: 0.0271046 kg; = 0.412559821*CeO2/0.9952+0.412559821*Eu2O3/0.9952+0.412559821*La2O3/0.9952+0.412559821*LaCe/0.9952+0.412559821*PrNd/0.9952+0.412559821*Sm2O3/0.9952+0.412559821*Y2O3/0.9952; lognormal variance with pedigree 0.001425, pedigree (2,1,2,2,1)
  (same comment as for terbium-dysprosium oxide)
  properties: carbon content, fossil 0.0517241, heating value, net 3.43 MJ, wet mass 1 kg, dry mass 1 kg
- soda ash, dense: 0.0271046 kg; = 0.412559821*CeO2/0.9952+0.412559821*Eu2O3/0.9952+0.412559821*La2O3/0.9952+0.412559821*LaCe/0.9952+0.412559821*PrNd/0.9952+0.412559821*Sm2O3/0.9952+0.412559821*Y2O3/0.9952; lognormal variance with pedigree 0.001425, pedigree (2,1,2,2,1)
  (same comment as for terbium-dysprosium oxide)
  properties: dry mass 1 kg, carbon content, fossil 0.113208, heating value, net 3.43 MJ, wet mass 1 kg
- hydrochloric acid, without water, in 30% solution state: 0.119162 kg; = 1.813762996*CeO2/0.9952+1.813762996*Eu2O3/0.9952+1.813762996*La2O3/0.9952+1.813762996*LaCe/0.9952+1.813762996*PrNd/0.9952+1.813762996*Sm2O3/0.9952+1.813762996*Y2O3/0.9952; lognormal variance with pedigree 0.001425, pedigree (2,1,2,2,1)
  (same comment as for terbium-dysprosium oxide)
  properties: wet mass 1 kg, heating value, net 3.32 MJ, dry mass 1 kg
- sodium sulfide: 8.53794e-5 kg; = 0.001299563*CeO2/0.9952+0.001299563*Eu2O3/0.9952+0.001299563*La2O3/0.9952+0.001299563*LaCe/0.9952+0.001299563*PrNd/0.9952+0.001299563*Sm2O3/0.9952+0.001299563*Y2O3/0.9952; lognormal variance with pedigree 0.001425, pedigree (2,1,2,2,1)
  (same comment as for terbium-dysprosium oxide)
  properties: dry mass 1 kg, wet mass 1 kg
- citric acid: 0.0314167 kg; = 0.478194338*CeO2/0.9952+0.478194338*Eu2O3/0.9952+0.478194338*La2O3/0.9952+0.478194338*LaCe/0.9952+0.478194338*PrNd/0.9952+0.478194338*Sm2O3/0.9952+0.478194338*Y2O3/0.9952; lognormal variance with pedigree 0.001425, pedigree (2,1,2,2,1)
  (same comment as for terbium-dysprosium oxide)
  properties: heating value, net 16.41 MJ, wet mass 1 kg, dry mass 1 kg, carbon content, fossil 0.375099
- hazardous waste, for incineration: -0.000332647 kg; = (0.005063234*CeO2/0.9952+0.005063234*Eu2O3/0.9952+0.005063234*La2O3/0.9952+0.005063234*LaCe/0.9952+0.005063234*PrNd/0.9952+0.005063234*Sm2O3/0.9952+0.005063234*Y2O3/0.9952)*-1; lognormal variance with pedigree 0.001425, pedigree (2,1,2,2,1)
  (same comment as for terbium-dysprosium oxide)
  production volume 26998.7 kg
    The production volume is expressed in kg. Its calculation is based on the fact that for the production of 0.3767 kg of cerium oxide from monazite REE mineral, 0.005063234 kg of hazardous waste for incineration produced as a byproduct.The annual production of cerium oxide is 2008680 kg (see cerium oxide PV comment).
  properties: dry mass 0.75 kg, carbon content, fossil 0.554667, heating value, net 17 MJ, wet mass 1 kg, water content 0.333333
  note on carbon content, fossil: Tab A.6, ecoinvent v2.2 report 13_I. C content has been calculated after data in the tables, and then referred to 1 kg DM
  note on heating value, net: Value taken from the general comment of the treatment dataset.
- electricity, medium voltage: 0.283366 kWh; = 4.31312540277777*CeO2/0.9952+4.31312540277777*Eu2O3/0.9952+4.31312540277777*La2O3/0.9952+4.31312540277777*LaCe/0.9952+4.31312540277777*PrNd/0.9952+4.31312540277777*Sm2O3/0.9952+4.31312540277777*Y2O3/0.9952; lognormal variance with pedigree 0.001425, pedigree (2,1,2,2,1)
  (same comment as for terbium-dysprosium oxide)
- hard coal ash: -0.0745376 kg; = (1.134539508*CeO2/0.9952+1.134539508*Eu2O3/0.9952+1.134539508*La2O3/0.9952+1.134539508*LaCe/0.9952+1.134539508*PrNd/0.9952+1.134539508*Sm2O3/0.9952+1.134539508*Y2O3/0.9952)*-1; lognormal variance with pedigree 0.001425, pedigree (2,1,2,2,1)
  (same comment as for terbium-dysprosium oxide)
  production volume 6.04971e6 kg
    The production volume is expressed in kg. Its calculation is based on the fact that for the production of 0.3767 kg of cerium oxide from monazite REE mineral, 1.134539508 kg of hard coal ash is produced as a byproduct. The annual production of cerium oxide is 2008680 kg (see cerium oxide PV comment).
  properties: wet mass 1 kg, dry mass 1 kg
- low level radioactive waste for final repository: -2.85132e-6 m3; name LLRW_amount; = (4.34E-05*CeO2/0.9952+4.34E-05*Eu2O3/0.9952+4.34E-05*La2O3/0.9952+4.34E-05*LaCe/0.9952+4.34E-05*PrNd/0.9952+4.34E-05*Sm2O3/0.9952+4.34E-05*Y2O3/0.9952)*-1; lognormal variance with pedigree 0.001425, pedigree (2,1,2,2,1)
  (same comment as for terbium-dysprosium oxide)
  production volume 231.422 m3; = ABS( LLRW_amount/ Sm2O3)* RP_PV
    The production volume is expressed in m3. Its calculation is based on the fact that for the production of 0.3767 kg of cerium oxide from monazite REE mineral, 0.108390717 m3 of low level radioactive waste for final repository is produced as a byproduct. The annual production of cerium oxide is 2008680 kg (see cerium oxide PV comment).
  property price 0 EUR2005; name LLRW_amount_price_EUR2005
  properties: dry mass 2500 kg, wet mass 2500 kg
- sulfidic tailings, generic: -0.26805 kg; = (4.08*CeO2/0.9952+4.08*Eu2O3/0.9952+4.08*La2O3/0.9952+4.08*LaCe/0.9952+4.08*PrNd/0.9952+4.08*Sm2O3/0.9952+4.08*Y2O3/0.9952)*-1; lognormal variance with pedigree 0.001425, pedigree (2,1,2,2,1)
  Value calculated from simplified mass balance and assumed here for completeness purposes. The value was not contained originally in the critical materials life cycle assessment tool (CMLCAT) of Arshi et al. (2018), provided by F. Zhao from Purdue university.
  production volume 2.17558e7 kg
    The production volume is expressed in kg. Its calculation is based on the fact that for the production of 0.3767 kg of cerium oxide from monazite REE mineral, 4.08 kg of sulfidic tailings are produced as a byproduct.The annual production of cerium oxide is 2008680 kg (see cerium oxide PV comment).
  properties: calcium content 0.0045972, silicon content 0.053273, potassium content 0.0025181, sodium content 0.0014472, wet mass 1 kg, aluminium content 0.014738, carbon content, fossil 0.0087785, iron content 0.015374, dry mass 0.7 kg, magnesium content 0.0022359, water content 0.42857, oxygen content 0.89157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
- zinc: 6.16013e-5 kg; = 0.000937636*CeO2/0.9952+0.000937636*Eu2O3/0.9952+0.000937636*La2O3/0.9952+0.000937636*LaCe/0.9952+0.000937636*PrNd/0.9952+0.000937636*Sm2O3/0.9952+0.000937636*Y2O3/0.9952; lognormal variance with pedigree 0.001425, pedigree (2,1,2,2,1)
  (same comment as for terbium-dysprosium oxide)
  properties: wet mass 1 kg, dry mass 1 kg
- hard coal: 0.283366 kg; = 4.313125403*CeO2/0.9952+4.313125403*Eu2O3/0.9952+4.313125403*La2O3/0.9952+4.313125403*LaCe/0.9952+4.313125403*PrNd/0.9952+4.313125403*Sm2O3/0.9952+4.313125403*Y2O3/0.9952; lognormal variance with pedigree 0.001425, pedigree (2,1,2,2,1)
  (same comment as for terbium-dysprosium oxide)
  properties: carbon content, fossil 0.845, heating value, net 27.91 MJ, dry mass 0.94 kg, wet mass 1 kg, water content 0.0638298
  note on carbon content, fossil: C content 75-94% (specified in Tab 1.1, report 6, part VI). A mean content of 0.845 kg C/ kg dry hard coal was considered
  note on heating value, net: Based on the Characterization factor of Hard coal in the CED method
- rare earth oxide concentrate, 70% REO: 0.0985621 kg; = 1.500217532*CeO2/0.9952+1.500217532*Eu2O3/0.9952+1.500217532*La2O3/0.9952+1.500217532*LaCe/0.9952+1.500217532*PrNd/0.9952+1.500217532*Sm2O3/0.9952+1.500217532*Y2O3/0.9952; lognormal variance with pedigree 0.001425, pedigree (2,1,2,2,1)
  (same comment as for terbium-dysprosium oxide)
  properties: praseodymium content 0.0320972, dysprosium content 0.00105237, cerium content 0.320516, gadolinium content 0.00410424, lanthanum content 0.228434, samarium content 0.00862942, wet mass 1 kg, europium content 0.00161363, neodymium content 0.0990629, yttrium content 0.00385868, terbium content 0.000631421, dry mass 1 kg
  note on praseodymium content: The individual rare earth element (REE) content of the concentrate is calculated by multipling REO concentrate content (70%) with the individual REE input excavated from ground (as shown in the inputs from environments - check dataset rare earth element mine operation and beneficiation, bastnaesite ore, CN-SC) and then dividing divided by the total amount of REE excavated from ground (.0.87253 kg).
- DTPA, diethylenetriaminepentaacetic acid: 8.13137e-5 kg; = 0.001237679*CeO2/0.9952+0.001237679*Eu2O3/0.9952+0.001237679*La2O3/0.9952+0.001237679*LaCe/0.9952+0.001237679*PrNd/0.9952+0.001237679*Sm2O3/0.9952+0.001237679*Y2O3/0.9952; lognormal variance with pedigree 0.001425, pedigree (2,1,2,2,1)
  Value taken from the critical materials life cycle assessment tool (CMLCAT) of Arshi et al. (2018), provided by F. Zhao from Purdue university (more information on the sampling procedure) and adjusted to correspond to the production of individual rare earth metals. Proxy for D2EHPA.
  properties: carbon content, fossil 0.427481, dry mass 1 kg, heating value, net 12.95 MJ, wet mass 1 kg
- chemical factory, organics: 4.5332e-10 unit; = 6.90E-09*CeO2/0.9952+6.90E-09*Eu2O3/0.9952+6.90E-09*La2O3/0.9952+6.90E-09*LaCe/0.9952+6.90E-09*PrNd/0.9952+6.90E-09*Sm2O3/0.9952+6.90E-09*Y2O3/0.9952; lognormal variance with pedigree 0.330825, pedigree (2,1,2,2,1)
  Input assumed for completeness purposes. Value taken from the existing dataset ''rare earth oxides production from bastnäsite concentrate'' from the 3.6 version of the Ecoinvent database.
- sodium hydroxide, without water, in 50% solution state: 0.0141929 kg; = 0.216031325*CeO2/0.9952+0.216031325*Eu2O3/0.9952+0.216031325*La2O3/0.9952+0.216031325*LaCe/0.9952+0.216031325*PrNd/0.9952+0.216031325*Sm2O3/0.9952+0.216031325*Y2O3/0.9952; lognormal variance with pedigree 0.001425, pedigree (2,1,2,2,1)
  (same comment as for terbium-dysprosium oxide)
  properties: wet mass 1 kg, heating value, net 3.03 MJ, dry mass 1 kg
- esters of versatic acid: 0.000554412 kg; = 0.008438724*CeO2/0.9952+0.008438724*Eu2O3/0.9952+0.008438724*La2O3/0.9952+0.008438724*LaCe/0.9952+0.008438724*PrNd/0.9952+0.008438724*Sm2O3/0.9952+0.008438724*Y2O3/0.9952; lognormal variance with pedigree 0.001425, pedigree (2,1,2,2,1)
  Value taken from the critical materials life cycle assessment tool (CMLCAT) of Arshi et al. (2018), provided by F. Zhao from Purdue university (more information on the sampling procedure) and adjusted to correspond to the production of individual rare earth metals. Proxy for sulfonated kerosene.
  properties: carbon content, fossil 0.727273, dry mass 1 kg, wet mass 1 kg, heating value, net 22.04 MJ
- limestone, crushed, for mill: 0.0739216 kg; = 1.125163149*CeO2/0.9952+1.125163149*Eu2O3/0.9952+1.125163149*La2O3/0.9952+1.125163149*LaCe/0.9952+1.125163149*PrNd/0.9952+1.125163149*Sm2O3/0.9952+1.125163149*Y2O3/0.9952; lognormal variance with pedigree 0.001425, pedigree (2,1,2,2,1)
  (same comment as for terbium-dysprosium oxide)
  properties: wet mass 1 kg, dry mass 0.998 kg, carbon content, fossil 0.117492, water content 0.00200401
- quicklime, milled, packed: 0.00616013 kg; = 0.093763596*CeO2/0.9952+0.093763596*Eu2O3/0.9952+0.093763596*La2O3/0.9952+0.093763596*LaCe/0.9952+0.093763596*PrNd/0.9952+0.093763596*Sm2O3/0.9952+0.093763596*Y2O3/0.9952; lognormal variance with pedigree 0.001425, pedigree (2,1,2,2,1)
  (same comment as for terbium-dysprosium oxide)
  properties: dry mass 0.99 kg, wet mass 1 kg, water content 0.010101
- spent solvent mixture: -0.197096 kg; = (3*CeO2/0.9952+3*Eu2O3/0.9952+3*La2O3/0.9952+3*LaCe/0.9952+3*PrNd/0.9952+3*Sm2O3/0.9952+3*Y2O3/0.9952)*-1; lognormal variance with pedigree 0.006825, pedigree (2,1,2,2,1)
  (same comment as for sulfidic tailings, generic)
  production volume 1.59969e7 kg
    The production volume is expressed in kg. Its calculation is based on the fact that for the production of 0.3767 kg of cerium oxide from monazite REE mineral, 3 kg of spent solvent mixture is produced as a byproduct. The annual production of cerium oxide is 2008680 kg (see cerium oxide PV comment).
  properties: heating value, net 21.7 MJ, water content 0.197605, dry mass 0.835 kg, wet mass 1 kg, carbon content, fossil 0.265355
  note on carbon content, fossil: Tab A.7, ecoinvent v2.2 report 13_I. C content has been calculated after data in the tables, and then referred to 1 kg DM
- wastewater, average: -0.00315301 m3; = (0.047992025*CeO2/0.9952+0.047992025*Eu2O3/0.9952+0.047992025*La2O3/0.9952+0.047992025*LaCe/0.9952+0.047992025*PrNd/0.9952+0.047992025*Sm2O3/0.9952+0.047992025*Y2O3/0.9952)*-1; lognormal variance with pedigree 0.001425, pedigree (2,1,2,2,1)
  (same comment as for sulfidic tailings, generic)
  production volume 255908 m3
    The production volume is expressed in m3. Its calculation is based on the fact that for the production of 0.3767 kg of cerium oxide from monazite REE mineral, 0.047992025 m3 of low level radioactive waste for final repository is produced as a byproduct. The annual production of cerium oxide is 2008680 kg (see cerium oxide PV comment).
  properties: dry mass 0.346837 kg, carbon content, non-fossil 0.194039, wet mass 1000 kg, water content 2882.2
  note on carbon content, non-fossil: 0.0673 kg TOC/m3 (Tab A.17, ecoinvent v2.2 report 13_I). TOC was considered as Total Carbon.
- sulfuric acid: 9.0554e-5 kg; = 0.001378325*CeO2/0.9952+0.001378325*Eu2O3/0.9952+0.001378325*La2O3/0.9952+0.001378325*LaCe/0.9952+0.001378325*PrNd/0.9952+0.001378325*Sm2O3/0.9952+0.001378325*Y2O3/0.9952; lognormal variance with pedigree 0.001425, pedigree (2,1,2,2,1)
  (same comment as for terbium-dysprosium oxide)
  properties: wet mass 1 kg, dry mass 1 kg
- metalliferous hydroxide sludge: -0.000616013 kg; lognormal variance with pedigree 0.001425, pedigree (2,1,2,2,1)
  (same comment as for terbium-dysprosium oxide)
  production volume 18924.9 kg
  properties: zinc content 0.132, phosphorus content 0.01557, water content 3, chlorine content 0.17609, carbon content, non-fossil 0.0112, potassium content 0.0122, dry mass 0.25 kg, sulfur content 0.1053, wet mass 1 kg, calcium content 0.1045, sodium content 0.0163, oxygen content 0.394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

## Inputs from nature
- Water, unspecified natural origin [natural resource, in water]: 0.00325011 m3; = 0.04947*CeO2/0.9952+0.04947*Eu2O3/0.9952+0.04947*La2O3/0.9952+0.04947*LaCe/0.9952+0.04947*PrNd/0.9952+0.04947*Sm2O3/0.9952+0.04947*Y2O3/0.9952; lognormal variance with pedigree 0.001425, pedigree (2,1,2,2,1)
  (same comment as for terbium-dysprosium oxide)
- Oxygen [natural resource, in air]: 0.746292 kg; = 11.3593346*CeO2/0.9952+11.3593346*Eu2O3/0.9952+11.3593346*La2O3/0.9952+11.3593346*LaCe/0.9952+11.3593346*PrNd/0.9952+11.3593346*Sm2O3/0.9952+11.3593346*Y2O3/0.9952; lognormal variance with pedigree 0.040825, pedigree (2,1,2,2,1)
  Elemental composition of coal (wt%): C: 84.4, H: 5.40, N: 1.70, S: 1.80 and O: 6.70. Source: Reid, William (1973). "Chapter 9: Heat Generation, Transport, and Storage". In Robert Perry; Cecil Chilton (eds.). Chemical Engineers' Handbook (5 ed.).The theoretical oxygen demand for combustion of hard coal was calculated based on the equation: 0.08*(C/3+H)+0.01*S-0.01*O . Source of Equation:
  Mazumdar, B. K. (2000). Theoretical oxygen requirement for coal combustion: relationship with its calorific value. Fuel, 79(11), 1413-1419. doi:<https://doi.org/10.1016/S0016-2361(99)00272-0>

## Emissions to nature
- Suspended solids, unspecified [water, unspecified]: 4.81816e-5 kg; = 0.000733374*CeO2/0.9952+0.000733374*Eu2O3/0.9952+0.000733374*La2O3/0.9952+0.000733374*LaCe/0.9952+0.000733374*PrNd/0.9952+0.000733374*Sm2O3/0.9952+0.000733374*Y2O3/0.9952; lognormal variance with pedigree 0.040825, pedigree (2,1,2,2,1)
  (same comment as for terbium-dysprosium oxide)
- Carbon dioxide, fossil [air, low population density, long-term]: 0.698682 kg; = 10.63465739*CeO2/0.9952+10.63465739*Eu2O3/0.9952+10.63465739*La2O3/0.9952+10.63465739*LaCe/0.9952+10.63465739*PrNd/0.9952+10.63465739*Sm2O3/0.9952+10.63465739*Y2O3/0.9952; lognormal variance with pedigree 0.001425, pedigree (2,1,2,2,1)
  (same comment as for terbium-dysprosium oxide)
- Particulates, > 2.5 um, and < 10um [air, low population density, long-term]: 6.63555e-5 kg; = 0.00101*CeO2/0.9952+0.00101*Eu2O3/0.9952+0.00101*La2O3/0.9952+0.00101*LaCe/0.9952+0.00101*PrNd/0.9952+0.00101*Sm2O3/0.9952+0.00101*Y2O3/0.9952; lognormal variance with pedigree 0.120825, pedigree (2,1,2,2,1)
  (same comment as for terbium-dysprosium oxide)
- Nitrogen [water, unspecified]: 1.77386e-5 kg; = 0.00027*CeO2/0.9952+0.00027*Eu2O3/0.9952+0.00027*La2O3/0.9952+0.00027*LaCe/0.9952+0.00027*PrNd/0.9952+0.00027*Sm2O3/0.9952+0.00027*Y2O3/0.9952; lognormal variance with pedigree 0.040825, pedigree (2,1,2,2,1)
  (same comment as for terbium-dysprosium oxide)
- Fluoride [water, unspecified]: 8.63614e-7 kg; = 0.0000131451*CeO2/0.9952+0.0000131451*Eu2O3/0.9952+0.0000131451*La2O3/0.9952+0.0000131451*LaCe/0.9952+0.0000131451*PrNd/0.9952+0.0000131451*Sm2O3/0.9952+0.0000131451*Y2O3/0.9952; lognormal variance with pedigree 0.040825, pedigree (2,1,2,2,1)
  (same comment as for terbium-dysprosium oxide)
- Nitrogen oxides [air, low population density, long-term]: 0.0004147 kg; = 0.006312165*CeO2/0.9952+0.006312165*Eu2O3/0.9952+0.006312165*La2O3/0.9952+0.006312165*LaCe/0.9952+0.006312165*PrNd/0.9952+0.006312165*Sm2O3/0.9952+0.006312165*Y2O3/0.9952; lognormal variance with pedigree 0.040825, pedigree (2,1,2,2,1)
  (same comment as for terbium-dysprosium oxide)
- BOD5, Biological Oxygen Demand [water, unspecified]: 6.14281e-5 kg; name BOD; = 0.000935*CeO2/0.9952+0.000935*Eu2O3/0.9952+0.000935*La2O3/0.9952+0.000935*LaCe/0.9952+0.000935*PrNd/0.9952+0.000935*Sm2O3/0.9952+0.000935*Y2O3/0.9952; lognormal variance with pedigree 0.040825, pedigree (2,1,2,2,1)
  Mathematical relation based on section 5.9.7 of the data quality guideline for the ecoinvent. (BOD5 = 0.5 * COD). The value was not contained originally in the critical materials life cycle assessment tool (CMLCAT) of Arshi et al. (2018), provided by F. Zhao from Purdue university.
- Hydrogen sulfide [air, low population density, long-term]: 7.09649e-7 kg; = 0.0000108016*CeO2/0.9952+0.0000108016*Eu2O3/0.9952+0.0000108016*La2O3/0.9952+0.0000108016*LaCe/0.9952+0.0000108016*PrNd/0.9952+0.0000108016*Sm2O3/0.9952+0.0000108016*Y2O3/0.9952; lognormal variance with pedigree 0.040825, pedigree (2,1,2,2,1)
  (same comment as for terbium-dysprosium oxide)
- Oils, unspecified [water, unspecified]: 6.56985e-7 kg; = 0.00001*CeO2/0.9952+0.00001*Eu2O3/0.9952+0.00001*La2O3/0.9952+0.00001*LaCe/0.9952+0.00001*PrNd/0.9952+0.00001*Sm2O3/0.9952+0.00001*Y2O3/0.9952; lognormal variance with pedigree 0.040825, pedigree (2,1,2,2,1)
  (same comment as for terbium-dysprosium oxide)
- DOC, Dissolved Organic Carbon [water, unspecified]: 4.55023e-5 kg; name DOC; = 0.000692592592592593*CeO2/0.9952+0.000692592592592593*Eu2O3/0.9952+0.000692592592592593*La2O3/0.9952+0.000692592592592593*LaCe/0.9952+0.000692592592592593*PrNd/0.9952+0.000692592592592593*Sm2O3/0.9952+0.000692592592592593*Y2O3/0.9952; lognormal variance with pedigree 0.040825, pedigree (2,1,2,2,1)
  Mathematical relation based on section 5.9.7 of the data quality guideline for the ecoinvent. (DOC = TOC). The value was not contained originally in the critical materials life cycle assessment tool (CMLCAT) of Arshi et al. (2018), provided by F. Zhao from Purdue university.
- COD, Chemical Oxygen Demand [water, unspecified]: 0.000122856 kg; name COD; = 0.00187*CeO2/0.9952+0.00187*Eu2O3/0.9952+0.00187*La2O3/0.9952+0.00187*LaCe/0.9952+0.00187*PrNd/0.9952+0.00187*Sm2O3/0.9952+0.00187*Y2O3/0.9952; lognormal variance with pedigree 0.040825, pedigree (2,1,2,2,1)
  (same comment as for terbium-dysprosium oxide)
- Carbon monoxide, fossil [air, low population density, long-term]: 2.25461e-5 kg; = 0.000343175*CeO2/0.9952+0.000343175*Eu2O3/0.9952+0.000343175*La2O3/0.9952+0.000343175*LaCe/0.9952+0.000343175*PrNd/0.9952+0.000343175*Sm2O3/0.9952+0.000343175*Y2O3/0.9952; lognormal variance with pedigree 0.650825, pedigree (2,1,2,2,1)
  (same comment as for terbium-dysprosium oxide)
- Chlorine [air, low population density, long-term]: 2.66118e-6 kg; = 0.0000405059*CeO2/0.9952+0.0000405059*Eu2O3/0.9952+0.0000405059*La2O3/0.9952+0.0000405059*LaCe/0.9952+0.0000405059*PrNd/0.9952+0.0000405059*Sm2O3/0.9952+0.0000405059*Y2O3/0.9952; lognormal variance with pedigree 0.040825, pedigree (2,1,2,2,1)
  (same comment as for terbium-dysprosium oxide)
- Hydrogen chloride [air, low population density, long-term]: 6.16013e-6 kg; = 0.0000937636*CeO2/0.9952+0.0000937636*Eu2O3/0.9952+0.0000937636*La2O3/0.9952+0.0000937636*LaCe/0.9952+0.0000937636*PrNd/0.9952+0.0000937636*Sm2O3/0.9952+0.0000937636*Y2O3/0.9952; lognormal variance with pedigree 0.040825, pedigree (2,1,2,2,1)
  (same comment as for terbium-dysprosium oxide)
- Paraffins [air, low population density, long-term]: 3.20327e-6 kg; = 0.0000487571*CeO2/0.9952+0.0000487571*Eu2O3/0.9952+0.0000487571*La2O3/0.9952+0.0000487571*LaCe/0.9952+0.0000487571*PrNd/0.9952+0.0000487571*Sm2O3/0.9952+0.0000487571*Y2O3/0.9952; lognormal variance with pedigree 0.120825, pedigree (2,1,2,2,1)
  (same comment as for terbium-dysprosium oxide)
- Sulfur dioxide [air, low population density, long-term]: 0.000184613 kg; = 0.00281*CeO2/0.9952+0.00281*Eu2O3/0.9952+0.00281*La2O3/0.9952+0.00281*LaCe/0.9952+0.00281*PrNd/0.9952+0.00281*Sm2O3/0.9952+0.00281*Y2O3/0.9952; lognormal variance with pedigree 0.001425, pedigree (2,1,2,2,1)
  (same comment as for terbium-dysprosium oxide)
- Lead [water, unspecified]: 1.6657e-7 kg; = 0.00000253537*CeO2/0.9952+0.00000253537*Eu2O3/0.9952+0.00000253537*La2O3/0.9952+0.00000253537*LaCe/0.9952+0.00000253537*PrNd/0.9952+0.00000253537*Sm2O3/0.9952+0.00000253537*Y2O3/0.9952; lognormal variance with pedigree 0.650825, pedigree (2,1,2,2,1)
  (same comment as for terbium-dysprosium oxide)
- TOC, Total Organic Carbon [water, unspecified]: 4.55023e-5 kg; name TOC; = 0.000692592592592593*CeO2/0.9952+0.000692592592592593*Eu2O3/0.9952+0.000692592592592593*La2O3/0.9952+0.000692592592592593*LaCe/0.9952+0.000692592592592593*PrNd/0.9952+0.000692592592592593*Sm2O3/0.9952+0.000692592592592593*Y2O3/0.9952; lognormal variance with pedigree 0.040825, pedigree (2,1,2,2,1)
  Mathematical relation based on section 5.9.7 of the data quality guideline for the ecoinvent. (TOC = COD /2.7). The value was not contained originally in the critical materials life cycle assessment tool (CMLCAT) of Arshi et al. (2018), provided by F. Zhao from Purdue university.
- Chlorine [water, unspecified]: 0.000512143 kg; = 0.00779535*CeO2/0.9952+0.00779535*Eu2O3/0.9952+0.00779535*La2O3/0.9952+0.00779535*LaCe/0.9952+0.00779535*PrNd/0.9952+0.00779535*Sm2O3/0.9952+0.00779535*Y2O3/0.9952; lognormal variance with pedigree 0.040825, pedigree (2,1,2,2,1)
  (same comment as for terbium-dysprosium oxide)

## Sampling procedure
All exchanges to the environment and from the technosphere calculated using the critical materials life cycle assessment tool (CMLCAT) of Arshi et al. (2018), provided by F. Zhao from Purdue University.
