# dishwasher production

Dataset: EcoSpold 2, unit process
Geography: GLO
Time period: 2007-01-01 to 2021-12-31
Technology level: current
Classification: ISIC rev.4 ecoinvent: 2750:Manufacture of domestic appliances
Synonyms: dishwashing machine
Scenario: Business-as-Usual
System model: Allocation, cut-off by classification
Generated by: Viachaslau Filimonau
Published in: Fulvio, A. 2015
Database: ecoinvent
isCopyrightProtected: true
accessRestrictedTo: 1

## General comment
This activity represents the production and disposal of an average dishwasher.The dishwasher is circa 50 kg in mass, has the envisaged lifetime of 12.5 years and is manufactured in Europe.The figures on material inputs from technosphere and energy required to produce an average dishwasher are taken from Fulvio and Peiro 2015. The figure on the annual production volume is from Euromonitor International 2012.

## Included activities start
This activity starts with the reception of materials at the factory.

## Included activities end
The activity includes the processes of material and energy use in manufacturing of an average dishwasher. The inventory additionally accounts for disposal of all materials. Packaging is not included.

## Geography
Geography GLO was chosen because the dataset aims to represent the production of an average dishwasher. The literature sources used refer to manufacturing in Europe.

## Time period
The literature sources used refer to the underpinning technology as being current.

## Reference product
- dishwasher: 1 unit; name RP_amount_1; By-product classification allocatable product; CPC 44812: Dishwashing machines and clothes or linen washing or drying machines, household type, electric or non-electric
  production volume 2.4e7 unit; name RP_PV_1
    Data are from Euromonitor International 2012 and represent year 2011. Source: Euromonitor International 2012. Dishwasher production: no outlet for US volumes and tough times ahead in Europe. July 10th, 2012. Available from: https://blog.euromonitor.com/2012/07/dishwasher-production-no-outlet-for-us-volumes-and-tough-times-ahead-in-europe.html Accessed 14 January 2018.
  property price 400 EUR2005; name RP_amount_1_price_EUR2005
    Estimated value. The price is taken from UniEuro, a shop for electronics, website (retrieved from: https://www.unieuro.it/online/Piccoli-e-Grandi-Elettrodomestici/Grandi-Elettrodomestici/Lavastoviglie, accessed 13Feb2018). The range of prices varies greatly from 200 to over 1000 euros. A representative price of 400 was chosen. The choice is based on the most common price for an average appliance, and accounting for profit margins. According to an article from Blokhin "What profit margin is average for a company in the electronics sector?" (Source: Investopedia, retrieved from: https://www.investopedia.com/ask/answers/051215/what-profit-margin-average-company-electronics-sector.asp, 13Feb2018) the average profit margin made in the electronics sector in 2015 was of 9%.
  property lifetime 12.5 year
    Source: Fulvio and Peiro 2015, 2015, Fulvio, A., Peiro, L.T., Environmental footprint and material efficiency support for product policy, 3 - SeparatePublication, Fulvio, A., and Peiro, L.T., 2015. Environmental footprint and material efficiency support for product policy. JRC Science and Policy Report EUR27200EN. European Commission, March 2015. Available from: http://publications.jrc.ec.europa.eu/repository/bitstream/JRC95187/lb-na-27200-en-n.pdf Accessed 14 January 2018
  property lifetime capacity [h] 8960 hour; = (160/60)*280*12
    Literature source. The source reports that each cycle of the machine lasts 160 minutes, the yeraly frequency of cycles is 280 cycle/year, and the lifetime is 12 years. Source: Fulvio and Peiro 2015, 2015, Fulvio, A., Peiro, L.T., Environmental footprint and material efficiency support for product policy, 3 - SeparatePublication, Fulvio, A., and Peiro, L.T., 2015. Environmental footprint and material efficiency support for product policy. JRC Science and Policy Report EUR27200EN. European Commission, March 2015. Available from: http://publications.jrc.ec.europa.eu/repository/bitstream/JRC95187/lb-na-27200-en-n.pdf Accessed 14 January 2018
  property weight 50 kg; name weight
    (same comment as for dishwasher)

## Inputs from technosphere
- energy and auxilliary inputs, metal working factory: 0 kg; pedigree (1,1,1,1,1)
  Estimated value.The input of infrastructure is approximated with the exchange 'metal working factory', this was chosen as metal is the main material constituting the final product. The general comment for the activity 'metal working faculty, GLO' [accessed 19.01.2018] specifies: '4.58E-10 units of this process are needed to produce 1 kg of final product. Additionally, the dataset for 'metal working factory' needs to be used together with the 'energy and auxilliary inputs, metal working factory', 1 kg of this exchange is required per 1 kg of final product.
- polyvinylchloride, bulk polymerised: 6.3 kg; name PVC; lognormal variance with pedigree 0.0438, pedigree (1,4,5,4,2)
  Used here to describe 'plastics' as provided in the original literature source. Data are from Fulvio and Peiro 2015.
  properties: dry mass 1 kg, carbon content, fossil 0.387097, wet mass 1 kg, heating value, net 21.5 MJ
  note on carbon content, fossil: Monomer is vynyl chloride, C2H3Cl (ecoinvent v2.2 report 11_II). MW=62 g/mol
- brass: 0 kg; pedigree (1,1,1,1,1)
  Data are from Fulvio and Peiro 2015. In terms of outputs assumed to have gone to waste copper.
  properties: wet mass 1 kg, dry mass 1 kg
- metal working factory: 2.29e-8 unit; = 4.58E-10*50; lognormal variance with pedigree 0.3432, pedigree (1,4,5,4,2)
  (same comment as for energy and auxilliary inputs, metal working factory)
- used printed wiring boards: -0.05 kg; name BP_amount_6; = (wiring_board)*-1; lognormal variance with pedigree 0.0438, pedigree (1,4,5,4,2)
  The amount is set equal to the input amount for the respective material. Data are from Fulvio and Peiro 2015.
  production volume 1.2e6 kg; = RP_PV_1 * (BP_amount_6 / RP_amount_1)
    Calculated from production volume of reference product using the relative outputs.
  property price 0 EUR2005; name BP_amount_6_price_EUR2005
  properties: carbon content, fossil 0.193742, carbon content, non-fossil 0.000960142, dry mass 1 kg, wet mass 1 kg
- waste concrete: 0 kg; name BP_amount_7; pedigree (1,1,1,1,1)
  Contains 'concrete' and 'other inert material' as decribed in the original literature source. The amount is set equal to the input amount for the respective material. Data are from Fulvio and Peiro 2015.
  production volume 0 kg
    Calculated from production volume of reference product using the relative outputs.
  property price 0 EUR2005; name BP_amount_7_price_EUR2005
  properties: dry mass 0.5 kg, wet mass 1 kg, water content 1
- scrap copper: 0 kg; name BP_amount_3; pedigree (1,1,1,1,1)
  The amount is set equal to the input amount for the respective material. Contains scrap brass. Data are from Fulvio and Peiro 2015.
  production volume 0 kg
    Calculated from production volume of reference product using the relative outputs.
  property price 0 EUR2005; name BP_amount_3_price_EUR2005
  properties: wet mass 1 kg, dry mass 1 kg
- synthetic rubber: 0.8 kg; name rubber; lognormal variance with pedigree 0.0438, pedigree (1,4,5,4,2)
  Data are from Fulvio and Peiro 2015.
  properties: wet mass 1 kg, heating value, net 26.42 MJ, dry mass 1 kg, carbon content, fossil 0.871949
  note on carbon content, fossil: EPDM (Ethylene-propene-diene terpolymer) rubber is a terpolymer of ethylene, propene, and a diene with the residual unsaturated portion of the diene in the side chain (ecoinvent v2.2 report 7-part XX & Ullmann). Chemical formula (deduced from Evidences of Solvent-Induced Miscibility in Polychloroprene-co-Ethylene-Propene Diene Terpolymer Blends, Dubey et al., Journal of Applied Polymer Science, 2009, 111:1884–1891): C20H35
- scrap steel: 0 kg; name BP_amount_4; pedigree (1,1,1,1,1)
  The amount is set equal to the input amount for the respective material. Contains regular steel and stainless steel. Data are from Fulvio and Peiro 2015.
  production volume 0 kg
    Calculated from production volume of reference product using the relative outputs.
  property price 0 EUR2005; name BP_amount_4_price_EUR2005
  properties: wet mass 1 kg, dry mass 1 kg
- scrap aluminium: 0 kg; name BP_amount_2; pedigree (1,1,1,1,1)
  (same comment as for used printed wiring boards)
  production volume 0 kg
    Calculated from production volume of reference product using the relative outputs.
  property price 0 EUR2005; name BP_amount_2_price_EUR2005
  properties: dry mass 1 kg, wet mass 1 kg
- used cable: -0.75 kg; name BP_amount_5; = (cable)*-1; lognormal variance with pedigree 0.0438, pedigree (1,4,5,4,2)
  (same comment as for used printed wiring boards)
  production volume 1.8e7 kg; = RP_PV_1 * (BP_amount_5 / RP_amount_1)
    Calculated from production volume of reference product using the relative outputs.
  property price 0 EUR2005; name BP_amount_5_price_EUR2005
  properties: wet mass 1 kg, dry mass 1 kg, carbon content, fossil 0.27472
  note on carbon content, fossil: According to the European company, 1 kg cable is split up into 0.66 kg of copper and 0.34 kg of plastics (ecoinvent v2.2 report 18_V, pg 97). Plastic C content (0.808) was calculated using data in Tab A.2, ecoinvent v2.2 report 13_I.
- electricity, medium voltage: 17.31 kWh; lognormal variance with pedigree 0.0438, pedigree (1,4,5,4,2)
  Data are from Fulvio and Peiro 2015.
- aluminium, cast alloy: 0.4 kg; name aluminium; lognormal variance with pedigree 0.0438, pedigree (1,4,5,4,2)
  Data are from Fulvio and Peiro 2015.
  properties: dry mass 1 kg, wet mass 1 kg
- waste polyvinylchloride: 0 kg; name BP_amount_1; pedigree (1,1,1,1,1)
  Used here in place of waste 'plastics' as provided in the original literature source. The amount is set equal to the input amount for the respective material. Data are from Fulvio and Peiro 2015.
  production volume 0 kg
    Calculated from production volume of reference product using the relative outputs.
  property price 0 EUR2005; name BP_amount_1_price_EUR2005
  properties: dry mass 0.998 kg, wet mass 1 kg, water content 0.00200401, heating value, net 21.51 MJ, carbon content, fossil 0.440882
  note on heating value, net: Value taken from the general comment of the treatment dataset.
- printed wiring board, surface mounted, unspecified, Pb free: 0.05 kg; name wiring_board; lognormal variance with pedigree 0.0438, pedigree (1,4,5,4,2)
  Data are from Fulvio and Peiro 2015.
  properties: carbon content, fossil 0.132522, wet mass 1 kg, dry mass 1 kg
- waste wood, untreated: 0 kg; name BP_amount_9; pedigree (1,1,1,1,1)
  Used here to describe all waste from 'wood' and 'other organic materials' as presented in the original literature source. The amount is set equal to the input amount for the respective material. Data are from Fulvio and Peiro 2015.
  production volume 0 kg
    Calculated from production volume of reference product using the relative outputs.
  property price 0 EUR2005; name BP_amount_9_price_EUR2005
  properties: dry mass 0.8 kg, carbon content, non-fossil 0.48632, heating value, net 13.99 MJ, water content 0.25, wet mass 1 kg
- concrete, normal: 0.000590468 m3; name concrete; = 1.4/2371; lognormal variance with pedigree 0.0438, pedigree (1,4,5,4,2)
  Contains 'concrete' and 'other inert material' as decribed in the original literature source. Converted from kg (1.4 kg). Assumed density is 2371 kg/m3. Data are from Fulvio and Peiro 2015.
  properties: water content 0.086758, dry mass 2190 kg, wet mass 2380 kg
- heat, district or industrial, natural gas: 33.12 MJ; lognormal variance with pedigree 0.0438, pedigree (1,4,5,4,2)
  Converted from kWh. Data are from Fulvio and Peiro 2015.
  properties: heating value, net 1 MJ
- steel, low-alloyed: 34.2 kg; name steel; lognormal variance with pedigree 0.0438, pedigree (1,4,5,4,2)
  Contains regular steel and stainless steel. Data from Fulvio and Peiro 2015. Data are from Fulvio and Peiro 2015.
  properties: dry mass 1 kg, wet mass 1 kg, carbon content, fossil 0.005
- waste rubber, unspecified: 0 kg; name BP_amount_8; pedigree (1,1,1,1,1)
  (same comment as for used printed wiring boards)
  production volume 0 kg
    Calculated from production volume of reference product using the relative outputs.
  property price 0 EUR2005; name BP_amount_8_price_EUR2005
  properties: heating value, net 27.19 MJ, dry mass 1 kg, wet mass 1 kg, carbon content, fossil 0.853
- plywood: 0 m3; pedigree (1,1,1,1,1)
  Data are from Fulvio and Peiro 2015. Used here to describe all 'wood' and 'other organic materials' as presented in the original literature source as presented in the original literature source. Convertion to volume from mass (3.7 kg) assuming wood density 600 kg/m3.
  properties: water content 0.070778, heating value, net 11688.9 MJ, wet mass 823 kg, carbon content, non-fossil 0.409818, price 400 EUR2005, dry mass 768.6 kg, carbon content, fossil 0.09783
- cable, unspecified: 0.75 kg; name cable; lognormal variance with pedigree 0.0438, pedigree (1,4,5,4,2)
  This product represents average, unspecified cable. Data are from Fulvio and Peiro 2015.
  properties: wet mass 1 kg, dry mass 1 kg, carbon content, fossil 0.28196, heating value, net 8.54 MJ
- copper, cathode: 0.75 kg; name copper; lognormal variance with pedigree 0.0438, pedigree (1,4,5,4,2)
  Data are from Fulvio and Peiro 2015.
  properties: dry mass 1 kg, wet mass 1 kg
- energy and auxilliary inputs, metal working factory: 4.17552e-9, 1.87245e-8 kg (2 entries); lognormal variance with pedigree 0.0438, pedigree (1,4,5,4,2)
  (same comment as for energy and auxilliary inputs, metal working factory)
- brass: 0.0005, 0.0995 kg (2 entries); lognormal variance with pedigree 0.0438, pedigree (1,4,5,4,2)
  (same comment as for brass)
- waste concrete: -0.0956585, -0.000338211, -1.304 kg (3 entries); lognormal variance with pedigree 0.0438, pedigree (1,4,5,4,2)
  (same comment as for waste concrete)
  production volume 3.36e7 kg
- scrap copper: -0.269627, -0.0126503, -0.567723 kg (3 entries); lognormal variance with pedigree 0.0438, pedigree (1,4,5,4,2)
  (same comment as for scrap copper)
  production volume 2.04e7 kg
- scrap steel: -8.32754, -0.0105507, -25.8619 kg (3 entries); lognormal variance with pedigree 0.0438, pedigree (1,4,5,4,2)
  (same comment as for scrap steel)
  production volume 8.208e8 kg
- scrap aluminium: -0.126883, -0.00595306, -0.267164 kg (3 entries); lognormal variance with pedigree 0.0438, pedigree (1,4,5,4,2)
  (same comment as for used printed wiring boards)
  production volume 9.6e6 kg
- waste polyvinylchloride: -0.606404, -0.0467502, -0.0193095, -0.0183362, -0.699685, -0.00780082, -0.00353564, -4.89818 kg (8 entries); lognormal variance with pedigree 0.0438, pedigree (1,4,5,4,2)
  (same comment as for waste polyvinylchloride)
  production volume 1.512e8 kg
- waste wood, untreated: -0.354687, -0.0279055, -0.0783781, -0.0187197, -0.224745, -0.011841, -0.00204021, -2.98168 kg (8 entries); lognormal variance with pedigree 0.0438, pedigree (1,4,5,4,2)
  (same comment as for waste wood, untreated)
  production volume 8.88e7 kg
- waste rubber, unspecified: -0.391777, -0.0164467, -0.391777 kg (3 entries); lognormal variance with pedigree 0.0438, pedigree (1,4,5,4,2)
  (same comment as for used printed wiring boards)
  production volume 1.92e7 kg
- plywood: 0.000277561, 0.00588911 m3 (2 entries); lognormal variance with pedigree 0.0438, pedigree (1,4,5,4,2)
  (same comment as for plywood)

## Sampling procedure
Manufacturing data are taken from Fulvio and Peiro 2015. Source: Fulvio, A., and Peiro, L.T., 2015. Environmental footprint and material efficiency support for product policy. JRC Science and Policy Report EUR27200EN. European Commission, March 2015. Available from: http://publications.jrc.ec.europa.eu/repository/bitstream/JRC95187/lb-na-27200-en-n.pdf (Accessed 14 January 2018). Data on the annual production volume are from Euromonitor International 2012. Source: Euromonitor International 2012. Dishwasher production: no outlet for US volumes and tough times ahead in Europe. July 10th, 2012. Available from: https://blog.euromonitor.com/2012/07/dishwasher-production-no-outlet-for-us-volumes-and-tough-times-ahead-in-europe.html (Accessed 14 January 2018).

## Extrapolations
This dataset has been extrapolated from year 2018 to the year of the calculation (2021). The uncertainty has been adjusted accordingly.
