# cladding production, crossbar-pole, aluminium

Dataset: EcoSpold 2, unit process
Geography: RER
Time period: 2005-01-01 to 2021-12-31
Technology level: current
Classification: ISIC rev.4 ecoinvent: 2511:Manufacture of structural metal products
Classification: EcoSpold01Categories: building components/cladding
Tags: ConvertedDataset
Scenario: Business-as-Usual
System model: Allocation, cut-off by classification
Generated by: Martin Lehmann
Published in: Kellenberger D. 2007
Database: ecoinvent
isCopyrightProtected: true
accessRestrictedTo: 1

## General comment
The data is calculated per 1 m2 of cladding. The aluminium cladding weighs 86.7 kg per m2.
[This dataset was already contained in the ecoinvent database version 2. It was not individually updated during the transfer to ecoinvent version 3. Life Cycle Impact Assessment results may still have changed, as they are affected by changes in the supply chain, i.e. in other datasets. This dataset was generated following the ecoinvent quality guidelines for version 2. It may have been subject to central changes described in the ecoinvent version 3 change report (http://www.ecoinvent.org/database/ecoinvent-version-3/reports-of-changes/), and the results of the central updates were reviewed extensively. The changes added e.g. consistent water flows and other information throughout the database. The documentation of this dataset can be found in the ecoinvent reports of version 2, which are still available via the ecoinvent website. The change report linked above covers all central changes that were made during the conversion process.]

## Included activities end
This dataset describes the processes and materials required to build 1m2 (visible area) of an aluminium cladding, type crossbar-pole. No transport activities between production and construction site are taken into account.

## Geography
Data based on a recently built official building in Switzerland.

## Technology
The technology represented in this dataset is mainly related to the production of the various parts integrated in the cladding construction.

## Reference product
- cladding, crossbar-pole, aluminium: 1 m2; By-product classification allocatable product; CPC 42190: Other structures (except prefabricated buildings) and parts of structures, of iron, steel or aluminium; plates[…]
  EcoSpold01Location=RER
  production volume 1.32237 m2
    This is a placeholder value that does not reflect real-world production volumes. This dataset does not currently require a real-world production volume to work in the database framework, and no actual data were collected yet. This has no negative effect on the results of the ecoinvent database. The placeholder value of this activity was scaled according to the nominal GDP of 2005 (source: United Nations, http://data.un.org/Glossary.aspx?q=GDP+%28current+US%24%29, accessed 20130726) to reflect an appropriate share of the global production volume, which is also a placeholder value.
  property carbon content, fossil 0.0220902
    Calculated as an addition of C content in the product, then referred to 1 kg DM.
  property carbon content 0.0284811
    carbon content on a dry matter basis (reserved; not for manual entry)
  properties: price 257 EUR2005, water in wet mass 0 kg, water content 0, carbon content, non-fossil 0.00639084, dry mass 86.7 kg, wet mass 86.7 kg, carbon allocation 2.46931 kg

## Inputs from technosphere
- reinforcing steel: 24.1 kg; lognormal variance with pedigree 0.0521, pedigree (1,4,5,3,1)
  EcoSpold01Location=RER
  properties: dry mass 1 kg, wet mass 1 kg, carbon content, fossil 0.004
- synthetic rubber: 1.37 kg; lognormal variance with pedigree 0.05, pedigree (1,1,5,1,1)
  composite
  EcoSpold01Location=RER
  properties: carbon content, fossil 0.871949, dry mass 1 kg, wet mass 1 kg, heating value, net 26.42 MJ
  note on carbon content, fossil: EPDM (Ethylene-propene-diene terpolymer) rubber is a terpolymer of ethylene, propene, and a diene with the residual unsaturated portion of the diene in the side chain (ecoinvent v2.2 report 7-part XX & Ullmann). Chemical formula (deduced from Evidences of Solvent-Induced Miscibility in Polychloroprene-co-Ethylene-Propene Diene Terpolymer Blends, Dubey et al., Journal of Applied Polymer Science, 2009, 111:1884–1891): C20H35
- stone wool: 0.72 kg; lognormal variance with pedigree 0.0521, pedigree (1,4,5,3,1)
  EcoSpold01Location=CH
  properties: carbon content, fossil 0.015401, dry mass 1 kg, wet mass 1 kg
  note on carbon content, fossil: The chemical composition of the glass fibres used in the rock wool production is similar to the composition of naturally cooled volcano basalt and has a composition listed in Tab. 3.1 and 3.2 in ecoinvent v2.2 report 16, part XIV. Rock wool contains: a minimum of 96% mineral fibres,between 0.5 and 3.0 weight percent of phenolic resin depending on the specific product characteristics, and about 0.2 percent mineral oil (ecoinvent v2.2 report 16, part XIV). An average composition of 1.8% phenolic resin, 0.2% mineral oil, and 98% mineral fibres has been assumed and used to calculate C content of the rock wool
- used triple glazing, U<0.5W/m2K: -0.0135 m2; lognormal variance with pedigree 0.0521, pedigree (1,4,5,3,1)
  EcoSpold01Location=CH
  production volume 0.0135 m2
    Calculated from the production volume of cladding, crossbar-pole, aluminium in proportion to the respective output amounts.
  properties: wet mass 31.9272 kg, dry mass 31.9272 kg, carbon content, fossil 0.00372354
- section bar extrusion, aluminium: 3.82 kg; lognormal variance with pedigree 0.05, pedigree (1,1,5,1,1)
  composite
  EcoSpold01Location=RER
- plywood: 0.00136 m3; lognormal variance with pedigree 0.0521, pedigree (1,4,5,3,1)
  EcoSpold01Location=RER
  properties: wet mass 823 kg, water content 0.070778, carbon content, non-fossil 0.409818, heating value, net 11688.9 MJ, dry mass 768.6 kg, price 400 EUR2005, carbon content, fossil 0.09783
- polystyrene, extruded: 0.0202 kg; lognormal variance with pedigree 0.0521, pedigree (1,4,5,3,1)
  EcoSpold01Location=RER
  properties: heating value, net 38.67 MJ, dry mass 1 kg, carbon content, fossil 0.873427, wet mass 1 kg
  note on carbon content, fossil: XPS consists in 91% of polystyrene, 7% of blowing agent and the remaining 2% are flame retardants (bromine compounds) and other additives (ecoinvent v2.2 report 16_part XIV). The chemical formula of polystyrene is (C8H8)n. Here, the blowing agent is CO2 (3.55% w/w), and co-blowing agent is acetone -C3H6O- (3.45% w/w). Process emissions are 25% (w/w) for aceton (Tab 4.24, ecoinvent v2.2 report 16, part XIV), that means that contribution to the C content of the final product are 3.55% for CO2 and 2.6% for acetone
- adhesive, for metal: 0.0198 kg; lognormal variance with pedigree 0.0521, pedigree (1,4,5,3,1)
  EcoSpold01Location=DE
  properties: heating value, net 8.68 MJ, carbon content, fossil 0.286533, dry mass 1 kg, wet mass 1 kg
  note on carbon content, fossil: C content was calculated as an addition of C content in the raw materials. Basic materials going into the production are organic chemicals, liquid epoxy resin, hydrated lime and silica sand (ecoinvent v2.2 report 7_part XXVI)
- glass wool mat: 0.472 kg; lognormal variance with pedigree 0.0521, pedigree (1,4,5,3,1)
  EcoSpold01Location=CH
  properties: dry mass 1 kg, carbon content, fossil 0.0107327, wet mass 1 kg
  note on carbon content, fossil: A share of 16 w-% for the binders is taken into account. The binder used in this study is a mixture of phenol, formaldehyde and urea resins (ecoinvent v2.2 report 16_part XIV), and the C content was calculated as a weigthed average of phenol, formaldehyde and urea C content.
- powder coat, aluminium sheet: 0.808 m2; lognormal variance with pedigree 0.05, pedigree (1,1,5,1,1)
  EcoSpold01Location=RER
  composite
- sheet rolling, steel: 1.22 kg; lognormal variance with pedigree 0.0521, pedigree (1,4,5,3,1)
  EcoSpold01Location=RER
  activityLink introduced to establish a direct link to the corresponding regional supply of this product
- zinc coat, coils: 0.156 m2; lognormal variance with pedigree 0.0521, pedigree (1,4,5,3,1)
  activityLink introduced to establish a direct link to the corresponding regional supply of this product
  EcoSpold01Location=RER
- polyvinylchloride, suspension polymerised: 0.630702 kg; lognormal variance with pedigree 0.0521, pedigree (1,4,5,3,1)
  EcoSpold01Location=RER
  properties: carbon content, fossil 0.387097, wet mass 1 kg, dry mass 1 kg, heating value, net 21.5 MJ
  note on carbon content, fossil: Monomer is vynyl chloride, C2H3Cl (ecoinvent v2.2 report 11_II). MW=62 g/mol
- electricity, medium voltage: 7.92 kWh; lognormal variance with pedigree 0.05, pedigree (1,1,5,1,1)
  EcoSpold01Location=UCTE
  composite
- steel, low-alloyed, hot rolled: 1.22 kg; lognormal variance with pedigree 0.0521, pedigree (1,4,5,3,1)
  EcoSpold01Location=RER
  properties: wet mass 1 kg, dry mass 1 kg, carbon content, fossil 0.005
  note on carbon content, fossil: Low alloyed steel composition given in Tab. 3.2 ecoinvent v2.2 report 10_partII. Steel assumed to have a C content of 0.5%
- steel, chromium steel 18/8, hot rolled: 1.09 kg; lognormal variance with pedigree 0.05, pedigree (1,1,5,1,1)
  composite
  EcoSpold01Location=RER
  properties: carbon content, fossil 0.0008, wet mass 1 kg, dry mass 1 kg
  note on carbon content, fossil: Stainless steel model is the grade 304 steel (18/8 stainless, 18% chromium 8% nickel; max. 0.08% C)
- sawnwood, hardwood, dried (u=20%), planed: 0.000279 m3; lognormal variance with pedigree 0.0521, pedigree (1,4,5,3,1)
  EcoSpold01Location=RER
  properties: water content 0.1, dry mass 650 kg, wet mass 715 kg, heating value, net 8626.13 MJ, carbon content, non-fossil 0.494
  note on heating value, net: Assumed equal to "sawnwood, hardwood, raw, dried (u=20%)".The property is based on a value of 12.06MJ/kg
  note on carbon content, non-fossil: C content of dry mass is 0.494 kgC/kg dry wood (ecoinvent v2.2 report 9)
- metal working factory: 3.96e-8 unit; lognormal variance with pedigree 0.3527, pedigree (2,4,5,3,1)
  (same comment as for sheet rolling, steel)
- aluminium, wrought alloy: 3.82 kg; lognormal variance with pedigree 0.05, pedigree (1,1,5,1,1)
  EcoSpold01Location=RER
  composite
  properties: dry mass 1 kg, wet mass 1 kg
- waste mineral wool, for final disposal: 0 kg; pedigree (1,1,1,1,1)
  EcoSpold01Location=CH
  production volume 0 kg
    (same comment as for used triple glazing, U<0.5W/m2K)
  properties: dry mass 1 kg, wet mass 1 kg
- polyvinylchloride, emulsion polymerised: 0.0922982 kg; lognormal variance with pedigree 0.0521, pedigree (1,4,5,3,1)
  EcoSpold01Location=RER
  properties: wet mass 1 kg, dry mass 1 kg, carbon content, fossil 0.387097, heating value, net 21.5 MJ
- polyurethane, rigid foam: 0.148 kg; lognormal variance with pedigree 0.05, pedigree (1,1,5,1,1)
  EcoSpold01Location=RER
  composite
  properties: carbon content, fossil 0.69089, wet mass 1 kg, dry mass 1 kg, heating value, net 30.67 MJ
  note on carbon content, fossil: Polyurethanes (PUR) is the collective name for an extensive group of polymers with very different compositions and correspondingly varied property profiles, though their molecule chain contains all a urethane group (-NH-CO-O-). All PURs are built on a common principle : they are produced by the diisocyanate polyaddition process, that links polyols and (di)isocyanates. In this dataset, an example of typical polyurethane mixture is described (Ullmann, Polyurethanes, Dieterich et al. & ecoinvent v2 report 11_II). C content was calculated as an addition of C contents in its components.
- waste plastic, mixture: -0.0363 kg; lognormal variance with pedigree 0.0521, pedigree (1,4,5,3,1)
  EcoSpold01Location=CH
  production volume 0.0363 kg
    (same comment as for used triple glazing, U<0.5W/m2K)
  properties: wet mass 1 kg, heating value, net 30.79 MJ, carbon content, fossil 0.747344, water content 0.180638, dry mass 0.847 kg
  note on heating value, net: Value taken from the general comment of the treatment dataset.
  note on carbon content, fossil: C content in 1 kg DM was calculated using data in Tab A.2, ecoinvent v2.2 report 13_I
- glass fibre reinforced plastic, polyamide, injection moulded: 0.152 kg; lognormal variance with pedigree 0.05, pedigree (1,1,5,1,1)
  composite
  EcoSpold01Location=RER
  properties: carbon content, fossil 0.446018, wet mass 1 kg, dry mass 1 kg
  note on carbon content, fossil: Polyamide resin assimilate to Nylon 66 (ecoinvent v2.2 report 7_XIII). Nylon 66 is derived from hexamethylene diamine and adipic acid and has the following structure: -(HN-(CH2)6-NH-CO-(CH2)4-CO)n- (ecoinvent v2.2 report 11_II), C12H22N2O2. MW=226 g/mol. Here Nylon 66 is – mainly for improved stiffness and stability – modified with glass fibres. The glass fibre content in the product is assumed of 30%. (ecoinvent v2.2 report 11_II)
- section bar rolling, steel: 25 kg; lognormal variance with pedigree 0.05, pedigree (1,1,5,1,1)
  composite
  EcoSpold01Location=RER
- seal, natural rubber based: 0.141 kg; lognormal variance with pedigree 0.05, pedigree (1,1,5,1,1)
  composite
  EcoSpold01Location=DE
  properties: carbon content, non-fossil 0.881625, dry mass 1 kg, wet mass 1 kg, heating value, net 26.71 MJ
  note on carbon content, non-fossil: Isoprene (C5H8) is the monomer of natural rubber (Wikipedia, accessed 2011/02/14)
- extrusion, plastic film: 0.723 kg; lognormal variance with pedigree 0.0521, pedigree (1,4,5,3,1)
  (same comment as for sheet rolling, steel)
- glazing, triple, U<0.5 W/m2K: 0.688 m2; lognormal variance with pedigree 0.0521, pedigree (1,4,5,3,1)
  EcoSpold01Location=RER
  properties: carbon content, fossil 0.00372354, wet mass 31.9272 kg, dry mass 31.9272 kg
  note on carbon content, fossil: Calculated as an addition of C content in the product, then referred to 1 kg DM.
- waste wood, untreated: -0.0203 kg; lognormal variance with pedigree 0.0521, pedigree (1,4,5,3,1)
  EcoSpold01Location=CH
  production volume 0.0203 kg
    (same comment as for used triple glazing, U<0.5W/m2K)
  properties: wet mass 1 kg, heating value, net 13.99 MJ, dry mass 0.8 kg, carbon content, non-fossil 0.48632, water content 0.25
  note on carbon content, non-fossil: Tab A.4, ecoinvent v2.2 report 13_I. C content has been referred to 1 kg DM,
- powder coat, steel: 0.886 m2; lognormal variance with pedigree 0.0521, pedigree (1,4,5,3,1)
  (same comment as for sheet rolling, steel)
- waste mineral wool, for final disposal: -0.0232729, -0.000127141 kg (2 entries); lognormal variance with pedigree 0.0521, pedigree (1,4,5,3,1)
  EcoSpold01Location=CH
  production volume 0.0234 kg

## Sampling procedure
Company documentation

## Extrapolations
This dataset has been extrapolated from year 2005 to the year of the calculation (2021). The uncertainty has been adjusted accordingly.

## Review by Rolf Frischknecht 2007-11-07
passed
