# dimethylaminopropylamine production

Dataset: EcoSpold 2, unit process
Geography: RER
Time period: 2015-01-01 to 2021-12-31
Technology level: current
Classification: ISIC rev.4 ecoinvent: 2011:Manufacture of basic chemicals
Synonyms: 3-Dimethylaminopropylamine; DMAPA; 1,3-Propanediamine, N,N-dimethyl-; N,N-DIMETHYL-1,3-PROPANEDIAMINE; 109-55-7; N,N-Dimethyltrimethylenediamine; 3-(Dimethylamino)propylamine
Scenario: Business-as-Usual
System model: Allocation, cut-off by classification
Generated by: Lucia Valsasina
Database: ecoinvent
isCopyrightProtected: true
accessRestrictedTo: 1

## General comment
This activity represents the production of 1 kg of dimethylaminopropylamine. Dimethylaminopropylamine is a colorless liquid which, according to Technical Resources International, Inc. (n.d.), product is more and more used in the production of personal care products, leather, paper, rubber, fabric softeners, polymers, agrochemicals, flocculating agents, liquid soaps, and dye intermediates. This product falls in the EPA list of toxic compounds and it is reported as a high production volume chemical (US production volume in the year 1998 was of 4-22 million kg) (Technical Resources International, Inc. n.d.).
Reference(s):
Technical Resources International, Inc. (n.d.) 3-Dimethylaminopropylamine. Retrieved from: https://ntp.niehs.nih.gov/ntp/htdocs/chem_background/exsumpdf/dimethylaminopropylamine_508.pdf, accessed 17 June 2017
For more information on the model please refer to the dedicate ecoinvent report, access it in the Report section of ecoQuery (http://www.ecoinvent.org/login-databases.html)

## Included activities start
The activity starts when the raw materials enter the process.

## Included activities end
Materials entering the process are included as well as energy uses, infrastructure and emissions.

## Geography
The inputs to the process are calculated based on stoichiometry and literature data, they are therefore considered to be valid for the chosen geography. The inputs of heat, electricity, water, factory and nitrogen are mostly taken as average of industry data. Industry data values are a 5-year average of data (2011 - 2015) published by the Gendorf factory (Gendorf, 2016, Umwelterklärung, www.gendorf.de), (Gendorf, 2015, Umwelterklärung, www.gendorf.de), (Gendorf, 2014, Umwelterklärung, www.gendorf.de). The Gendorf factory is based in Germany, it produces a wide range of chemical substances. The factory produced 1657400 tonnes of chemical substances in the year 2015 (Gendorf, 2016, Umwelterklärung, www.gendorf.de) and 740000 tonnes of intermediate products. As, according to Cefic Report of the chemical industry (Cefic 2016. Facts and figures 2016 of the European chemical industry. Accessible at: http://www.cefic.org/Facts-and-Figures/Chemicals-Industry-Profile/, accessed 30/06/2017), Germany covers 28.5% of EU chemical generated sales in 2015, we assumed these values to be representative of the RER geography.

## Technology
Dimethylaminopropylamine is produced with the reaction of acrylonitrile and dimethyl amine. Dimethylaminopropylamine is produces in a two-step reaction. In the second step hydrogen is added to the process. The final product purity is greater than 99.5% (OECD 2004)
Chemical reaction:
C3H3N + C2H7N + 2H2 -> C5H14N2
This inventory representing production of a particular chemical compound is at least partially based on a generic model on the production of chemicals. The data generated by this model have been improved by compound-specific data when available.
The model on production of chemicals is using specific industry or literature data wherever possible and more generic data on chemical production processes to fill compound-specific data gaps when necessary. The basic principles of the model have been published in literature (Hischier 2005, Establishing Life Cycle Inventories of Chemicals Based on Differing Data Availability). The model has been updated and extended with newly available data from the chemical industry.
In the model, unreacted fractions are treated in a waste treatment process, and emissions reported are after a waste treatment process that is included in the scope of this dataset. For volatile reactants, a small level of evaporation is assumed. Solvents and catalysts are mostly recycled in closed-loop systems within the scope of the dataset and reported flows are for losses from this system.
The main source of information for the values for heat, electricity, water (process and cooling), nitrogen, chemical factory is industry data from Gendorf. The values are a 5-year average of data (2011 - 2015) published by the Gendorf factory (Gendorf, 2016, Umwelterklärung, www.gendorf.de), (Gendorf, 2015, Umwelterklärung, www.gendorf.de), (Gendorf, 2014, Umwelterklärung, www.gendorf.de). The Gendorf factory is based in Germany, it produces a wide range of chemical substances. The factory produced 1657400 tonnes of chemical substances in the year 2015 (Gendorf, 2016, Umwelterklärung, www.gendorf.de) and 740000 tonnes of intermediate products.
Reference(s):
Hischier, R. (2005) Establishing Life Cycle Inventories of Chemicals Based on Differing Data Availability (9 pp). The International Journal of Life Cycle Assessment, Volume 10, Issue 1, pp 59–67. 10.1065/lca2004.10.181.7
Gendorf (2016) Umwelterklärung 2015, Werk Gendorf Industriepark, www.gendorf.de
OECD (2004) 3-Aminopropyldimethylamine. In 3-Dimethylaminopropylamine, Technical Resources International, Inc. for the National Cancer Institute (NCI). Retrieved from: https://ntp.niehs.nih.gov/ntp/htdocs/chem_background/exsumpdf/dimethylaminopropylamine_508.pdf, accessed 17 June 2017
For more information on the model please refer to the dedicate ecoinvent report, access it in the Report section of ecoQuery (http://www.ecoinvent.org/login-databases.html)

## Time period
The activity is based on stoichiometry and literature data, it is therefore considered not to change significantly over time in terms of inputs. The inputs of heat, electricity, water, factory and nitrogen are mostly taken as average of industry data. Industry data values are a 5-year average of data (2011 - 2015) published by the Gendorf factory (Gendorf, 2016, Umwelterklärung, www.gendorf.de), (Gendorf, 2015, Umwelterklärung, www.gendorf.de), (Gendorf, 2014, Umwelterklärung, www.gendorf.de). The Gendorf factory is based in Germany, it produces a wide range of chemical substances. The factory produced 1657400 tonnes of chemical substances in the year 2015 (Gendorf, 2016, Umwelterklärung, www.gendorf.de) and 740000 tonnes of intermediate products. The time period is therefore set based on the years from Gendorf reference.

## Reference product
- dimethylaminopropylamine: 1 kg; name RP; CPC 34150: Amine-function compounds; oxygen-function amino-compounds, except lysine and its esters and salts thereof and […]; By-product classification allocatable product; CAS 109-55-7
  Dimethylaminopropylamine is a diamine. Dimethylaminopropylamine is a colorless liquid which, according to Technical Resources International, Inc. (n.d.), product is more and more used in the production of personal care products, leather, paper, rubber, fabric softeners, polymers, agrochemicals, flocculating agents, liquid soaps, and dye intermediates. This product falls in the EPA list of toxic compounds and it is reported as a high production volume chemical.
  Reference(s):
  Technical Resources International, Inc. (n.d.) 3-Dimethylaminopropylamine. Retrieved from: https://ntp.niehs.nih.gov/ntp/htdocs/chem_background/exsumpdf/dimethylaminopropylamine_508.pdf, accessed 17 June 2017
  production volume 2.61e9 kg; name RP_PV
    Estimated value. The European production volume is estimated based on information from Cefic (European Chemical Industry Council) and the American Chemistry Council.
    According to Cefic (2016) the Global sales of chemicals in the year 2015 was 3,534 billion euros. The reported share of sales per regions are: EU28 14.7%; Other Europe (Switzerland, Norway, Turkey, Russia and Ukraine) 2.7%; NAFTA (USA, Canada and Mexico) 16.5%; Latin America 3.8%; China 39.9%; Japan 3.9%; Republic of Korea 3.2%; India 2.2%; Rest of Asia 11.9%; Rest of the World 1.3%. Cefic also reports the USA total sales, 518.7 billion euros of the global 3534 billion euros (14.7%). The same share is reported from the American Chemistry Council (2016), according to this source the USA sales account for 15% of global sales for the year 2016.
    The Global production volume is calculated based on the sales share from RER, which is here defined as EU28 plus Other Europe, share of sales (14.7% + 2.7% = 17.4%), and the USA share of sales 14.7%.
    The glaobel production volume of dimethylaminopropylamine in 1994 was about 15000 metric tonnes (OECD, n.d.). For Europe no specific data on production volumes is available, OECD (n.d.) indicates a production capacity of 1000 to 5000 metric tonnes per year in 1994. Assuming an average of 2500 tonnes/a confirms the scaled production volume of 2610 tonnes.
    Reference(s):
    Cefic 2016. Facts and figures 2016 of the European chemical industry. Accessible at: http://www.cefic.org/Facts-and-Figures/Chemicals-Industry-Profile/
    American Chemistry Council 2016. Outlook: U.S. Chemical Industry Continues to Outpace Industrial Output; Accounts for More Than One-Half of Construction Spending by Manufacturing Sector. Accessible at: https://www.americanchemistry.com/Media/PressReleasesTranscripts/ACC-news-releases/US-Chemical-Industry-Continues-to-Outpace-Industrial-Output.html
    OECD, n.d, Screening Information Dataset (SIDS) Initial Assessment Report (SIAR) for 3-Aminopropyldimethylamine, CAS N°: 109-55-7. Refreived from http://www.inchem.org/documents/sids/sids/109557.pdf, accessed 18 July 2017
  property heating value, net 34.41 MJ
    LHV is calculated based on the elemental composition of the substance. Based on the CAS number of the substance (000109-55-7), the chemical formula of the substance is found to be: C5H14N2, (PubChem 2020).
    Reference: Kim, S., Chen, J., Cheng, T., Gindulyte, A., He, J., He, S., Li, Q., Shoemaker, B. A., Thiessen, P. A., Yu, B., Zaslavsky, L., Zhang, J., & Bolton, E. E. (2019). PubChem 2019 update: improved access to chemical data. Nucleic acids research, 47(D1), D1102–D1109. https://doi.org/10.1093/nar/gky1033
  property price 2.756 EUR2005; name RP_price_EUR2005
    Estimated value. This price is averaged from 3 different suppliers available in the commercial webstore of alibaba. The price refers to a bulk quantity purchase. All websites were retrieved on the 19th Sept 2017. THe exchange rate used is from 2010 when 1 USD - 0.755 EUR.
    Price range:
    supplier 1: 100-10000 $ per ton, https://www.alibaba.com/product-detail/DIMETHYLAMINOPROPYLAMINE-109-55-7_60592726351.html?spm=a2700.7724838.2017115.9.3c93b095RPVo9m
    supplier 2: 2700-3200 $ per ton, https://www.alibaba.com/product-detail/dmapa-99-3-dimethylaminopropylamine_1659308236.html?spm=a2700.7724838.2017115.40.3c93b095RPVo9m
    supplier 3: 2700-3200 $ per ton, https://www.alibaba.com/product-detail/dimethylaminopropylamine-technica-grade_1659354394.html?spm=a2700.7724838.2017115.49.3c93b095RPVo9m
  property carbon content 0.587739
    carbon content on a dry matter basis (reserved; not for manual entry)
  properties: water content 0, carbon content, non-fossil 0, carbon content, fossil 0.587739, dry mass 1 kg, wet mass 1 kg, water in wet mass 0 kg, carbon allocation 0.587739 kg

## Inputs from technosphere
- tap water: 0.052 kg; lognormal variance with pedigree 0.010025, pedigree (2,3,2,2,3)
  Calculated value based on stoichiometric calculations and literature data.
  18.01528g/mol is the molar mass of tap water (H2O).
  102.17964g/mol is the molar mass of dimethylaminopropylamine (C5H14N2 ).
  Dimethylaminopropylamine is produced with the reaction of acrylonitrile and dimethyl amine. Dimethylaminopropylamine is produces in a two-step reaction. In the second step hydrogen is added to the process. The final product purity is greater than 99.5% (OECD 2004)
  Chemical reaction:
  C3H3N + C2H7N + 2H2 -> C5H14N2
  properties: dry mass 0.000337476 kg, wet mass 1 kg, water content 2962.17, carbon content, fossil 0.00178991
  note on carbon content, fossil: Bicarbonate content is 2.93 mol/m3. CO2 content is 0.1 mol/m3 (ecoinvent v2.2 report 8, Tab 93.1).
- dimethylamine: 0.464448 kg; lognormal variance with pedigree 0.010025, pedigree (2,3,2,2,3)
  Calculated value based on stoichiometric calculations and literature data.
  45.08432g/mol is the molar mass of dimethylamine (C2H7N).
  102.17964g/mol is the molar mass of dimethylaminopropylamine (C5H14N2 ).
  Dimethylaminopropylamine is produced with the reaction of acrylonitrile and dimethyl amine. Dimethylaminopropylamine is produces in a two-step reaction. In the second step hydrogen is added to the process. The final product purity is greater than 99.5% (OECD 2004)
  Chemical reaction:
  C3H3N + C2H7N + 2H2 -> C5H14N2
  properties: heating value, net 13.47 MJ, wet mass 1 kg, carbon content, fossil 0.533333, dry mass 1 kg
- heat, district or industrial, natural gas: 4.3 MJ; lognormal variance with pedigree 0.010025, pedigree (2,3,2,2,3)
  Estimated value. The reaction to produce dimethylaminopropylamine requires two steps it is therefore assumed that it requires double input of the calculated standard industry average. The standard industry average is calculated as:
  Calculated based on literature data published by the industry. This value is a 5-year average of data (2011 - 2015) published by the Gendorf factory (Gendorf, 2016, Umwelterklärung, www.gendorf.de), (Gendorf, 2015, Umwelterklärung, www.gendorf.de), (Gendorf, 2014, Umwelterklärung, www.gendorf.de). The amount of heat used per kg of chemical substance produced is calculated using literature data published by the Gendorf factory based in Germany, which produces a wide range of chemical substances. The factory produced 1657400 tonnes of chemical substances in the year 2015 (Gendorf, 2016, Umwelterklärung, www.gendorf.de) and 740000 tonnes of intermediate products. The amount of heat in the year 2015 was 523500 GJ (Gendorf, 2016, Umwelterklärung, www.gendorf.de) of which 90% was obtained from natural gas and 10% from steam. The resulting amount of heat from natural gas is 2.02 MJ/kg of chemical product produced. The 5-year average (2011 - 2015, weighted by production volume) is 2.15 MJ/kg. Cross-reference: the amount of chemicals produced (excluding intermediate products) in the EU-28 in the year 2011 was 327 million tonnes (Eurostat, http://ec.europa.eu/eurostat/statistics-explained/index.php/Chemicals_production_statistics, accessed 20170126). The chemical and petrochemical industry sector consumed 2.33 EJ of energy in 2011 (European Commission - Joint Research Centre, 2014, BAT on Common Waste water and Waste Gas Treatment/Management Systems in the Chemical Sector). The resulting energy (both heat and electricity) consumed per kg of chemicals produced in 2011 is thus 7.13 MJ/kg. This is higher than the value calculated using data published by Gendorf – 3.85 MJ/kg, but that is to be expected as the intermediate products are not accounted for.
  properties: heating value, net 1 MJ
- nitrogen, liquid: 0.038 kg; lognormal variance with pedigree 0.010025, pedigree (2,3,2,2,3)
  Estimated value. The reaction to produce dimethylaminopropylamine requires two steps it is therefore assumed that it requires double input of the calculated standard industry average. The standard industry average is calculated as:
  Calculated based on literature data published by the industry. This value is a 5-year average of data (2011 - 2015) published by the Gendorf factory (Gendorf, 2016, Umwelterklärung, www.gendorf.de), (Gendorf, 2015, Umwelterklärung, www.gendorf.de), (Gendorf, 2014, Umwelterklärung, www.gendorf.de). The amount of nitrogen used per kg of chemical substance produced is calculated using literature data published by the Gendorf factory based in Germany, which produces a wide range of chemical substances. The factory produced 1657400 tonnes of chemical substances in the year 2015 (Gendorf, 2016, Umwelterklärung, www.gendorf.de) and 740000 tonnes of intermediate products. The reported amount of nitrogen used in 2015 was 33512400 Nm3 (Gendorf, 2016, Umwelterklärung, www.gendorf.de). One Nm3 of nitrogen is equal to 1.2506 kg. The resulting amount of nitrogen - the 5-year average (2011 - 2015, weighted by production volume) is 0.019 kg/kg. Nitrogen is mainly used during the production of chemicals for 'blanketing', which is the process of applying gas to the vapour space of a container or vessel in order to control its composition.
  properties: dry mass 1 kg, wet mass 1 kg
- acrylonitrile: 0.546649 kg; lognormal variance with pedigree 0.010025, pedigree (2,3,2,2,3)
  Calculated value based on stoichiometric calculations and literature data.
  53.06356g/mol is the molar mass of acrylonitrile (C3H3N).
  102.17964g/mol is the molar mass of dimethylaminopropylamine (C5H14N2 ).
  Dimethylaminopropylamine is produced with the reaction of acrylonitrile and dimethyl amine. Dimethylaminopropylamine is produces in a two-step reaction. In the second step hydrogen is added to the process. The final product purity is greater than 99.5% (OECD 2004)
  Chemical reaction:
  C3H3N + C2H7N + 2H2 -> C5H14N2
  properties: dry mass 1 kg, wet mass 1 kg, carbon content, fossil 0.679245, heating value, net 27.43 MJ
- electricity, medium voltage: 0.832 kWh; lognormal variance with pedigree 0.010025, pedigree (2,3,2,2,3)
  Estimated value. The reaction to produce dimethylaminopropylamine requires two steps it is therefore assumed that it requires double input of the calculated standard industry average. The standard industry average is calculated as:
  Calculated based on literature data published by the industry. This value is a 5-year average of data (2011 - 2015) published by the Gendorf factory (Gendorf, 2016, Umwelterklärung, www.gendorf.de), (Gendorf, 2015, Umwelterklärung, www.gendorf.de), (Gendorf, 2014, Umwelterklärung, www.gendorf.de). The amount of electricity per kg of chemical substance produced is calculated using literature data published by the Gendorf factory based in Germany, which produces a wide range of chemical substances. The factory produced 1657400 tonnes of chemical substances in the year 2015 (Gendorf, 2016, Umwelterklärung, www.gendorf.de) and 740000 tonnes of intermediate products. The amount of electricity consumed in the year 2015 was 3498800 GJ (Gendorf, 2016, Umwelterklärung, www.gendorf.de). The resulting amount of electricity is 0.406 kWh/kg (year 2015) of chemical substance produced. The 5-year average (2011 - 2015, weighted by production volume) is 0.416 kWh/kg (1.5 MJ/kg). Cross-reference: the amount of chemicals produced (excluding intermediate products) in the EU-28 in the year 2011 was 327 million tonnes (Eurostat, http://ec.europa.eu/eurostat/statistics-explained/index.php/Chemicals_production_statistics, accessed 20170126). The chemical and petrochemical industry sector consumed 2.33 EJ of energy in 2011 (European Commission - Joint Research Centre, 2014, BAT on Common Waste water and Waste Gas Treatment/Management Systems in the Chemical Sector). The resulting energy (both heat and electricity) consumed per kg of chemicals produced in 2011 is thus 7.13 MJ/kg. This is higher than the value calculated using data published by Gendorf – 3.85 MJ/kg, but that is to be expected as the intermediate products are not accounted for.
- heat, from steam, in chemical industry: 0.4 MJ; lognormal variance with pedigree 0.010025, pedigree (2,3,2,2,3)
  Estimated value. The reaction to produce dimethylaminopropylamine requires two steps it is therefore assumed that it requires double input of the calculated standard industry average. The standard industry average is calculated as:
  Calculated based on literature data published by the industry. This value is a 5-year average of data (2011 - 2015) published by the Gendorf factory (Gendorf, 2016, Umwelterklärung, www.gendorf.de), (Gendorf, 2015, Umwelterklärung, www.gendorf.de), (Gendorf, 2014, Umwelterklärung, www.gendorf.de). The amount of heat used per kg of chemical substance produced is calculated using literature data published by the Gendorf factory based in Germany, which produces a wide range of chemical substances. The factory produced 1657400 tonnes of chemical substances in the year 2015 (Gendorf, 2016, Umwelterklärung, www.gendorf.de) and 740000 tonnes of intermediate products. The amount of heat in the year 2015 was 523500 GJ (Gendorf, 2016, Umwelterklärung, www.gendorf.de) of which 90% was obtained from natural gas and 10% from steam. The resulting amount of heat from steam is 0.22 MJ/kg of chemical product produced. The 5-year average (2011 - 2015, weighted by production volume) is 0.20 MJ/kg. Cross-reference: the amount of chemicals produced (excluding intermediate products) in the EU-28 in the year 2011 was 327 million tonnes (Eurostat, http://ec.europa.eu/eurostat/statistics-explained/index.php/Chemicals_production_statistics, accessed 20170126). The chemical and petrochemical industry sector consumed 2.33 EJ of energy in 2011 (European Commission - Joint Research Centre, 2014, BAT on Common Waste water and Waste Gas Treatment/Management Systems in the Chemical Sector). The resulting energy (both heat and electricity) consumed per kg of chemicals produced in 2011 is thus 7.13 MJ/kg. This is higher than the value calculated using data published by Gendorf – 3.85 MJ/kg, but that is to be expected as the intermediate products are not accounted for.
  properties: heating value, net 1 MJ
- wastewater, average: 0 m3; name BP_wastewater_average; pedigree (1,1,1,1,1)
  Calculated based on literature data published by the industry. This value is a 5-year average of data (2011 - 2015) published by the Gendorf factory (Gendorf, 2016, Umwelterklärung, www.gendorf.de), (Gendorf, 2015, Umwelterklärung, www.gendorf.de), (Gendorf, 2014, Umwelterklärung, www.gendorf.de). The amount of wastewater (which is later on treated in the municipal WWTP) per kg of chemical substance produced is calculated using literature data published by the Gendorf factory based in Germany, which produces a wide range of chemical substances. The factory produced 1657400 tonnes of chemical substances in the year 2015 (Gendorf, 2016, Umwelterklärung, www.gendorf.de) and 740000 tonnes of intermediate products. The amount of wastewater which is later on treated in the municipal WWTP in the year 2015 was 1200 tonnes (Gendorf, 2016, Umwelterklärung, www.gendorf.de). The resulting amount of wastewater is 2.7E-06 m3/kg of chemical product produced.
  production volume 0 m3
    Calculated from the production volume of the reference product in proportion to the respective output amounts.
  property price 0 EUR2005; name BP_wastewater_average_price_EUR2005
  properties: wet mass 1000 kg, water content 2882.2, carbon content, non-fossil 0.194039, dry mass 0.346837 kg
  note on carbon content, non-fossil: 0.0673 kg TOC/m3 (Tab A.17, ecoinvent v2.2 report 13_I). TOC was considered as Total Carbon.
- chemical factory, organics: 4e-10 unit; lognormal variance with pedigree 0.309425, pedigree (2,3,2,2,3)
  Calculated based on literature data published by the industry. For this activity, no information was readily available concerning infrastructure and land-use. Therefore, the infrastructure is estimated based on data from two chemical factories, the BASF site of Ludwigshafen and the chemical factory in Gendorf (which are both located in Germany), which produce a wide range of chemical substances. Based on this data, the following assumptions are made: the built area amounts to about 4.2 ha, the plant has an average output of 50'000 t/a and a lifespan of fifty years. The estimated infrastructure amount is therefore 4.00 E-10 units per kg of produced chemical.
  References:
  Althaus H.-J., Chudacoff M., Hischier R., Jungbluth N., Osses M. and Primas A. (2007) Life Cycle Inventories of Chemicals. ecoinvent report No. 8, v2.0. EMPA Dübendorf, Swiss Centre for Life Cycle Inventories, Dübendorf, CH.
  Gendorf (2000) Umwelterklärung 2000, Werk Gendorf. Werk Gendorf, Burgkirchen.
- hydrogen, liquid: 0.0415343 kg; lognormal variance with pedigree 0.010025, pedigree (2,3,2,2,3)
  Calculated value based on stoichiometric calculations and literature data.
  2.01588g/mol is the molar mass of hydrogen, liquid (H2).
  102.17964g/mol is the molar mass of dimethylaminopropylamine (C5H14N2 ).
  Dimethylaminopropylamine is produced with the reaction of acrylonitrile and dimethyl amine. Dimethylaminopropylamine is produces in a two-step reaction. In the second step hydrogen is added to the process. The final product purity is greater than 99.5% (OECD 2004)
  Chemical reaction:
  C3H3N + C2H7N + 2H2 -> C5H14N2
  properties: wet mass 1 kg, dry mass 1 kg, heating value, net 120.21 MJ
- wastewater, average: -2.43642e-6, -2.63575e-7 m3 (2 entries); lognormal variance with pedigree 0.010025, pedigree (2,3,2,2,3)
  (same comment as for wastewater, average)
  production volume 7047 m3

## Inputs from nature
- Water, well, in ground [natural resource, in water]: 0.00166 m3; lognormal variance with pedigree 0.010025, pedigree (2,3,2,2,3)
  Estimated value. The reaction to produce dimethylaminopropylamine requires two steps it is therefore assumed that it requires double input of the calculated standard industry average. The standard industry average is calculated as:
  Calculated based on literature data published by the industry. This value is a 5-year average of data (2011 - 2015) published by the Gendorf factory (Gendorf, 2016, Umwelterklärung, www.gendorf.de), (Gendorf, 2015, Umwelterklärung, www.gendorf.de), (Gendorf, 2014, Umwelterklärung, www.gendorf.de). The amount of groundwater and surface water (river) extracted per kg of chemical substance produced is calculated using literature data published by the Gendorf factory based in Germany, which produces a wide range of chemical substances. The factory produced 1657400 tonnes of chemical substances in the year 2015 (Gendorf, 2016, Umwelterklärung, www.gendorf.de) and 740000 tonnes of intermediate products. The amount of groundwater and surface water (river) extracted in the year 2015 was 19950000 tonnes and 21488100 tonnes respectively (Gendorf, 2016, Umwelterklärung, www.gendorf.de).
- Water, river [natural resource, in water]: 0.00172 m3; lognormal variance with pedigree 0.010025, pedigree (2,3,2,2,3)
  (same comment as for Water, well, in ground)
- Water, cooling, unspecified natural origin [natural resource, in water]: 0.0328 m3; lognormal variance with pedigree 0.010025, pedigree (2,3,2,2,3)
  Estimated value. The reaction to produce dimethylaminopropylamine requires two steps it is therefore assumed that it requires double input of the calculated standard industry average. The standard industry average is calculated as:
  Calculated based on literature data published by the industry. This value is a 5-year average of data (2011 - 2015) published by the Gendorf factory (Gendorf, 2016, Umwelterklärung, www.gendorf.de), (Gendorf, 2015, Umwelterklärung, www.gendorf.de), (Gendorf, 2014, Umwelterklärung, www.gendorf.de). The amount of water for cooling extracted per kg of chemical substance produced is calculated using literature data published by the Gendorf factory based in Germany, which produces a wide range of chemical substances. The factory produced 1657400 tonnes of chemical substances in the year 2015 (Gendorf, 2016, Umwelterklärung, www.gendorf.de) and 740000 tonnes of intermediate products. The reported amounts of water extracted as groundwater and surface water (river) are assumed to be used entirely for cooling purposes.

## Emissions to nature
- BOD5, Biological Oxygen Demand [water, unspecified]: 0.000962127 kg; lognormal variance with pedigree 0.218, pedigree (4,5,5,5,5)
  Calculated value. The BOD, COD, TOC and BOD5 are calculated based on the amount and type of emissions released to water in the same activity.
- Hydrogen [air, unspecified]: 0.00207671 kg; lognormal variance with pedigree 0.0106, pedigree (2,3,2,4,3)
  Calculated value. The values is based on a generic model. The basic principles of the model have been published in literature (Hischier 2005, Establishing Life Cycle Inventories of Chemicals Based on Differing Data Availability). The model has been updated and extended with newly available data from the chemical industry. Find more information in the dedicated report on the ecoinvent website.
  Reference(s):
  Hischier, R. (2005) Establishing Life Cycle Inventories of Chemicals Based on Differing Data Availability (9 pp). The International Journal of Life Cycle Assessment, Volume 10, Issue 1, pp 59–67. 10.1065/lca2004.10.181.7
- COD, Chemical Oxygen Demand [water, unspecified]: 0.000962127 kg; lognormal variance with pedigree 0.218, pedigree (4,5,5,5,5)
  (same comment as for BOD5, Biological Oxygen Demand)
- Carbon dioxide, fossil [air, unspecified]: 0.020951 kg; lognormal variance with pedigree 0.0106, pedigree (2,3,2,4,3)
  (same comment as for Hydrogen)
- TOC, Total Organic Carbon [water, unspecified]: 0.000300665 kg; lognormal variance with pedigree 0.218, pedigree (4,5,5,5,5)
  (same comment as for BOD5, Biological Oxygen Demand)
- Acrylonitrile [water, unspecified]: 0.000443176 kg; lognormal variance with pedigree 0.0106, pedigree (2,3,2,4,3)
  (same comment as for Hydrogen)
- Water [water, unspecified]: 0.0334 m3; lognormal variance with pedigree 0.010025, pedigree (2,3,2,2,3)
  Estimated value. The reaction to produce dimethylaminopropylamine requires two steps it is therefore assumed that it requires double input of the calculated standard industry average. The standard industry average is calculated as:
  Calculated based on literature data published by the industry (Gendorf, 2016, Umwelterklärung, www.gendorf.de). The amount of water released back to the environment consists of the amount of process water treated in the internal WWTP and then released back to the environment and the amount of cooling water released back to the environment.
- Acrylonitrile [air, unspecified]: 0.0184689 kg; lognormal variance with pedigree 0.0106, pedigree (2,3,2,4,3)
  (same comment as for Hydrogen)
- Water [air, unspecified]: 0.0028 m3; lognormal variance with pedigree 0.010025, pedigree (2,3,2,2,3)
  Estimated value. The reaction to produce dimethylaminopropylamine requires two steps it is therefore assumed that it requires double input of the calculated standard industry average. The standard industry average is calculated as:
  Calculated to ensure the water balance. In general, in the case of recirculating cooling systems, 77% of the water input evaporates to air. In case of once-through cooling systems, 4% of the water input evaporates to air. The process water has in the chemical industry an average evaporation rate of 20.5%. In the specific case of the Gendorf factory, the calculated evaporation rate based on the data published is 6.3%. This matches the qualitative information, that the majority of the cooling systems in Gendorf are once-through and that the amount of cooling water used is significantly higher than the amount of process water used (Gendorf, 2016, Umwelterklärung, www.gendorf.de).
- Nitrogen [air, unspecified]: 0.038 kg; lognormal variance with pedigree 0.010025, pedigree (2,3,2,2,3)
  Calculated value. The amount of nitrogen released to air is equal to the amount of nitrogen entering the activity.
- Nitrate [water, unspecified]: 0.0098392 kg; lognormal variance with pedigree 0.0106, pedigree (2,3,2,4,3)
  (same comment as for Hydrogen)
- DOC, Dissolved Organic Carbon [water, unspecified]: 0.000300665 kg; lognormal variance with pedigree 0.218, pedigree (4,5,5,5,5)
  (same comment as for BOD5, Biological Oxygen Demand)
- Dimethylamine [air, unspecified]: 0.0232224 kg; lognormal variance with pedigree 0.0106, pedigree (2,3,2,4,3)
  (same comment as for Hydrogen)

## Sampling procedure
Literature data and stochiometric calculation.

## Extrapolations
This dataset has been extrapolated from year 2020 to the year of the calculation (2021). The uncertainty has been adjusted accordingly.

## Review by Emilia Moreno Ruiz 2017-08-10
This dataset was additionally reviewed in a separate review process by Eric Johnson of Atlantic Consulting as well as Emilia Moreno Ruiz and Gregor Wernet of ecoinvent.
