# treatment of kitchen and garden biowaste, home composting in heaps and containers

Dataset: EcoSpold 2, unit process
Geography: FR
Time period: 2014-03-01 to 2021-02-28
Technology level: current
Classification: ISIC rev.4 ecoinvent: 3821:Treatment and disposal of non-hazardous waste
Scenario: Business-as-Usual
System model: Allocation, cut-off by classification
Generated by: Kuch
Published in: ADEME 2015
Database: ecoinvent
isCopyrightProtected: true
accessRestrictedTo: 1

## General comment
This home composting inventory refers to 1 kg of biowaste as input. Data represent an average between home composting in heaps and in closed containers, taking into account the turning over the compost. Biowaste is a mixture of kitchen waste and green waste (balance 2:1 by volume).
Kitchen waste consists of peelings, fruits and vegetables cut into pieces, remains of vegetable meal: rice, pasta, bread, eggshells, paper filters, coffee grounds excluding meat and fish.
Green waste consists of leftover clippings and flowers.
The inventory is based on an experiment using 136,5 kg of biowaste (113,1 kg of kitchen waste and 23,4 kg of green waste). The experience lasted 1 year.
58,8 kg of compost were produced.
According to the ADEME study "Enquête nationale sur la gestion domestique des déchets organiques - 2008" 64% of people practicing home composting performs the process composter in heaps and 36% in closed containers.
The composition of kitchen, garden waste and compost are in the report in french "Impact sanitaire et environnementaux du compostage domestique - rapport, ADEME, 2015"
: https://www.ademe.fr/sites/default/files/assets/documents/impact-sanitaire-environnemental-compostage-domestique-201512-rapport-final-partiea.pdf. This inventory represents a mix of different forms of home composting in heaps and containers
Comment on the dry mass (DM) loss: The dry mass (DM) loss for this inventory is lower than for the inventory for home composting of garden waste. This is for the following reasons:
1/ This inventory has actually a mix of kitchen and green waste (used as structurant) in a 1:2 proportion as input. Indeed, mixed waste (kitchen waste + structurant) is less biodegradable than garden waste, because of:
- A difference in composition: green waste (used as structurant) comes from the maintenance of public gardens. Garden waste was a sample taken from the same source (maintenance of public gardens) but only composed of grass cutting and pruning residues, removing more woody types of residues like branches. The objective was to have a garden waste more representative of the waste from domestic gardens. Because of this difference in composition, while kitchen waste alone was more degradable than garden waste, green waste (used as structurant) was less biodegradable than garden waste.
- A difference in the way the waste streams were treated: garden waste was taken fresh while green waste (used as structurant for the composting of kitchen waste) was stored up to 5 weeks before being shredded. Green waste may have started to degrade before being put in the composters / heaps.
2/ For the composting of garden waste, the heap was bigger than for kitchen waste (kitchen waste is less voluminous), consequently the temperature increase was higher for the garden waste experiment.
3/ The inherent uncertainties of the measurement devices and methodology have to be taken into account. In particular:
- While the DM measurement of the compost is quite robust because the compost is quite homogeneous, the DM measurement of the waste streams is more subject to variability because waste streams are more heterogeneous. Also, the DM measurement was done only at certain points in time during the whole campaign. Consequently, the variability of the composition of the waste depending on the season introduces uncertainty.
- DM measurements were done on fresh matter, and kitchen waste was put in the composters directly after being collected while the garden waste (structurant) was stored before being incorporated in the composters on a weekly basis.
4/ There is a certain influence of the external conditions (weather, humidity, etc.), especially for heaps, which are open systems. Regarding perturbations from animals, for heaps, a grid was put around the experimental set up, but this could not prevent birds and worms from withdrawing matter.

## Included activities start
Activity starts with the inclusion of waste in the composter

## Included activities end
Activity ends with the compost produced in home composter

## Geography
Production of home compost refers to the situation in south west France at Pau.

## Technology
The dataset represents the practice of home composting in heaps and in closed containers with biowaste (kitchen waste and green waste), based on data from a composting experiment. The experiment was performed in the south of France starting March 2014, during 1 year. Several practices of turning over the compost are considered for each type of composter (without turning, quarterly, quaterly on the top half of the tank and turning intake).
The online report (in French only) provides details on the experiment (composting practice, measurements and calculation of inventory data).
According to ADEME study:"Enquête nationale sur la gestion domestique des déchets organiques - 2008" for the composting in heaps, 22% of people turn over the compost and 78% do not turn over.
According to ADEME study:"Enquête nationale sur la gestion domestique des déchets organiques - 2008" for the composting in closed containers, 39% of people turn over the compost and 61% do not turn over.

## Time period
Time period corresponds to the duration of the experiment

## Reference product
- biowaste, kitchen and garden waste: 0 kg; By-product classification Waste; CPC 399: Other wastes and scraps
  Experimental data: 136,5 kg of biowaste produce 58,8 kg of compost.
  production volume 1.1096e9 kg
    According to ADEME study : "Enquête nationale sur la gestion domestique des déchets organiques - 2008", page 81, people practicing home composting produce 3,5 million tons of green waste by year in France and 0,62 milion tons of kitchen waste. In the experiment, we have 113,1 kg of kitchen waste (83 % of the total) and 23.4 kg of vegetal waste (17 % of the total). So we have 1,1096 milion tons of kitchen and green waste for FR Production volume
  property price 0 EUR2005
    Waste products are assigned a price of zero as they are assumed to require further treatment.
  property phosphorus content 0.0064
    % dm (dry mass). Value represents an average between home composting in heaps and in closed containers, taking into account the turning over the compost.
  property sodium content 0.0023
    (same comment as for biowaste, kitchen and garden waste)
  property sulfur content 0.006
    (same comment as for biowaste, kitchen and garden waste)
  property nitrogen content 0.023
    (same comment as for biowaste, kitchen and garden waste)
  property magnesium content 0.0028
    (same comment as for biowaste, kitchen and garden waste)
  property carbon content, non-fossil 0.38
    (same comment as for biowaste, kitchen and garden waste)
  property potassium content 0.022
    (same comment as for biowaste, kitchen and garden waste)
  property calcium content 0.039
    (same comment as for biowaste, kitchen and garden waste)
  property carbon content 0.38
    carbon content on a dry matter basis (reserved; not for manual entry)
  properties: heating value, net 4.29 MJ, carbon content, fossil 0, wet mass 1 kg, dry mass 0.2288 kg, water in wet mass 0.7712 kg, water content 3.37, carbon allocation 0.086944 kg
- compost: 1 kg; CPC 391: Wastes from food and tobacco industry; By-product classification allocatable product
  Compost mass recovered at the end of the experiment
  production volume 4.77702e8 kg
  properties: price 0.03 EUR2005, benzopyrene content 2.27e-8, potassium content 0.012, sodium content 0.0012, copper content 2.94e-5, selenium content 1.18e-7, wet mass 1 kg, chromium content 8.63e-6, nickel content 5.54e-6, sulfur content 0.0057, calcium content 0.1, phosphorus content 0.0079, magnesium content 0.0073, zinc content 7.46e-5, benzofluoranthene content 2.27e-8, mercury content 5.16e-8, cadmium content 3.25e-7, arsenic content 2.03e-6, lead content 1.92e-5, fluoranthene content 2.8e-8, dry mass 0.4535 kg, carbon content, non-fossil 0.25, water in wet mass 0.5465 kg, water content 1.20507, nitrogen content 0.019, carbon content 0.25, carbon allocation 0.113375 kg

## By-products
- compost: 0 kg; CPC 391: Wastes from food and tobacco industry; By-product classification allocatable product
  Compost mass recovered at the end of the experiment
  production volume 0 kg
    No data. We calculate the value with the biowaste as reference
  property price 0.03 EUR2005
    Temporary price data. Calculated as 90% of purchasers price based on: Estimation done using the following sources: <http://www.wmaa.asn.au/uploads/documents/MarkWinser_1May2007.pdf>; <http://www.swlf.ait.ac.th/UpdData/International/Composting%20and%20anaerobic%20digestion_%20comparions%20for%20Europe%20and%20Asia.pdf>; <http://www.epa.gov/osw/conserve/rrr/composting/basic.htm>, accessed 2011.06.16
  property benzopyrene content 2.27e-8
    content in the compost. Value represents an average between home composting in heaps and in closed containers, taking into account the turning over the compost.
  property potassium content 0.012
    % dm. Measured at the end of the experiment. Value represents an average between home composting in heaps and in closed containers, taking into account the turning over the compost.
  property sodium content 0.0012
    (same comment as for compost)
  property copper content 2.94e-5
    (same comment as for compost)
  property selenium content 1.18e-7
    (same comment as for compost)
  property chromium content 8.63e-6
    (same comment as for compost)
  property nickel content 5.54e-6
    (same comment as for compost)
  property sulfur content 0.0057
    (same comment as for compost)
  property calcium content 0.1
    (same comment as for compost)
  property phosphorus content 0.0079
    (same comment as for compost)
  property magnesium content 0.0073
    (same comment as for compost)
  property zinc content 7.46e-5
    (same comment as for compost)
  property benzofluoranthene content 2.27e-8
    (same comment as for compost)
  property mercury content 5.16e-8
    (same comment as for compost)
  property cadmium content 3.25e-7
    (same comment as for compost)
  property arsenic content 2.03e-6
    (same comment as for compost)
  property lead content 1.92e-5
    (same comment as for compost)
  property fluoranthene content 2.8e-8
    (same comment as for compost)
  property carbon content, non-fossil 0.25
    (same comment as for compost)
  property nitrogen content 0.019
    (same comment as for compost)
  property carbon content 0.25
    carbon content on a dry matter basis (reserved; not for manual entry)
  properties: wet mass 1 kg, dry mass 0.4535 kg, water in wet mass 0.5465 kg, water content 1.20507, carbon allocation 0.113375 kg

## Inputs from technosphere
- injection moulding: 0 kg; pedigree (1,1,1,1,1)
  Assumption: process used for the manufacturing of the composter;activityLink introduced to establish a direct link to the corresponding regional supply of this product
- waste polyethylene: 0 kg
  production volume 1.2471e6 kg
    The value is 0,0012kg for 1kg of biowaste. The flow of biowaste is used as a reference
  properties: heating value, net 42.47 MJ
  note on heating value, net: Value taken from the general comment of the treatment dataset.
- polyethylene, high density, granulate: 0 kg; pedigree (1,1,1,1,1)
  The value is a mix of 64 % in heaps and 36 % in closed container. Data is from literature for composter component. Source : Environmental impacts of home composting, 2010, Joan Colón, Julia Martínez-Blanco, Xavier Gabarrell, Adriana Artola,
  Antoni Sánchez , Joan Rieradevall, Xavier Font.
  properties: heating value, net 42.47 MJ

## Inputs from nature
- Oxygen [natural resource, in air]: 0 kg; pedigree (1,1,1,1,1)
  Calculated from total mass balance
- Occupation, urban, green area [natural resource, land]: 0 m2*year

## Emissions to nature
All rows: pedigree (1,1,1,1,1)
- Carbon dioxide, non-fossil [air, urban air close to ground]: 0 kg
  Calculated from mass balance of carbon
- NMVOC, non-methane volatile organic compounds, unspecified origin [air, urban air close to ground]: 0 kg
  Experimental data. Five data from campaigns and one modeled data for one year
- Methane, non-fossil [air, urban air close to ground]: 0 kg
  Experimental data. Five data from campaigns and one modeled data for one year
- Water [air, urban air close to ground]: 0 m3
  Calculated from total mass balance
- Ammonia [air, urban air close to ground]: 0 kg
  Conservative assumption: detection threshold
- Dinitrogen monoxide [air, urban air close to ground]: 0 kg
  Conservative assumption: detection threshold

## Sampling procedure
Data comes from on home composting in heaps and in closed container with garden and kitchen biowaste in France (Pau) during one year
