# concrete production 20MPa

Dataset: EcoSpold 2, unit process
Geography: North America without Quebec
Time period: 2006-01-01 to 2021-12-31
Technology level: current
Classification: EcoSpold01Categories: construction materials/concrete
Classification: ISIC rev.4 ecoinvent: 2395:Manufacture of articles of concrete, cement and plaster
Synonyms: ready mixed concrete; ready-mix concrete
Scenario: Business-as-Usual
System model: Allocation, cut-off by classification
Generated by: Geneviève Martineau
Published in: Marceau 2006
Database: ecoinvent
isCopyrightProtected: true
accessRestrictedTo: 1

## General comment
This dataset represents the production of North American 20 MPa ready-mix concrete. Density: 2"335 kg/m³. Ingredients (for 1 m³): Cement 204 kg, Water 160 kg, Gravel 1009 kg, Sand 925 kg, Fly ash 36 kg, Admixtures (air-entrainers and superplastisizers) 1,2kg.

20 MPa concrete is intended for residential use, such as footings for walls, columns, fireplaces, chimneys, foundations, walls, grade beams, piers, not exposed to freeze-thaw. (following the Canadian CSA specs - http://www.rmcao.org/sites/default/files/CSA%20Quickspec%202012.pdf)

Generic concrete mixes (cement, SCM, aggregate, water) provided by the CPCA (Athena (2005):Cement and Structural Concrete: LCI Update 2005; Table 10.1). Admixtures included in the mixes, as provided by the CPCI (Athena and Morrison Hershfield (2012): Life Cycle Assessment of Precast Concrete Commercial Buildings Cradle-to-Grave; Table 5). The average water consumption (not including batch water) is 65 L/m³ of ready mixed concrete. The average amount of water disposed is 35 L/m³. Water not discarded is recycled back into the process or into other products, and therefore not accounted for in this dataset.

Annual production volume of Ready-Mix concrete for North America estimated based on US production, and GDP ratio.
Distribution by ready-mix strength class estimated as:
- 20 MPa = 20%
- 25 MPa = 40%
- 30-32 MPa = 15%
- 35 MPa = 24%
- 50 MPa = 1%
(coherent with distribution presented in http://www.ermco.eu/documents/ermco-documents/ermco_-statistics2008_091310.pdf (Table 3)
[This dataset is meant to replace the following datasets:
- concrete production 20MPa, RNA only, GLO, 2006 - 2006]

## Included activities start
From reception of raw materials at the ready-mix plant gate.

## Included activities end
This activity ends before the delivery of concrete at the construction site.
The dataset includes the whole manufacturing processes to produce ready-mixed concrete, internal processes (material handling and mixing) and infrastructure.
The dataset does not include:
- the fly ash content of the concrete. This value is specified in the Exchange properties of the reference flow. This flow is currently not included as an input material, due to temporary technical problems (fly ash being a waste, to include it as an input would make concrete production a combined production). When this issue is solved, an input of "fly_ash*(1+Waste/Ref_WM)" of fly ash should be added. This mathematical relation is used in order to take into account the fraction of cement that is never used.
- the transport of concrete in a mixing truck. The combustion of 5.74 litres of diesel should be used to take into account the average transportation of 1m³ of concrete.

## Geography
North American data. For some exchanges RER-modules have been used as proxy. Data quality indicators adjusted accordingly.

## Technology
Typical technology for average North American production. Data quality indicators adjusted accordingly.

## Parameters
- fraction of 20 MPa concrete to overall concrete production: 0.2 dimensionless; name fraction_20MPa_concrete; lognormal variance with pedigree 0.0014, pedigree (2,2,1,3,1)
  For Annual production volume purpose. Extrapolated value. In Quebec, Canada, 20MPa concrete represents 20% of the overall ready-mix concrete production. Source; Personal communication, ABQ (Association Béton Québec), October 2013.
- fraction_02: 0.2 dimensionless; name fraction_acetic_acid; lognormal variance with pedigree 0.0427, pedigree (3,1,1,3,4)
  Literature value. Superplastisizer assumed to be 20% acetic acid. 20 MPa mix admixtures. Source: Athena and morrison Hershfield (2012): Life Cycle Assessment of Precast Concrete Commerical Buildings Cradle-to-Grave
- fraction: 0 dimensionless
- fraction_01: 0.8 dimensionless; name fraction_ethylene_oxide; lognormal variance with pedigree 0.0427, pedigree (3,1,1,3,4)
  Literature value. Superplastisizer assumed to be 80% ehtlyne oxide. 20 MPa mix admixtures. Source: Athena and morrison Hershfield (2012): Life Cycle Assessment of Precast Concrete Commerical Buildings Cradle-to-Grave
- fraction of 25 MPa concrete to overall concrete production: 0 dimensionless
- north america production volume in cubic meter: 1.36778e8 m3; name PV_ready_mix_RNA; = 270E09/2350/0.84; lognormal variance with pedigree 0.0033, pedigree (3,2,1,1,2)
  Based on U.S. Ready-Mix concrete production in 2008 (270 Mt, assuming an average density of 2350 kg/m³), Literature value from: Sakai, K and Noguchi, T. (2012) The Sustainable Use of Concrete. CRC Press, 188 pages. (p.27).
  To esimate the North American production volume, a GDP ratio was used. where US accounts for 84 % of North America (including Canada and Mexico).
  Based on GDP 2012 of United Nations
  US GDP 2012: 1,624 E07 $
  Canada GDP 2012: 1,821 E06 $
  GDP Mexico 2012 : 1,184 E06 $
- quebec production volume in cubic meter: 4.7e6 m3; name PV_ready_mix_Qc; lognormal variance with pedigree 0.0026, pedigree (3,1,1,1,1)
  Estimated value, from Association Béton Québec (2008). Source: http://www.betonabq.org/images/fichiers_documents/rapport%20annuel%202008.pdf
- superplastisizer: 0.109 kg; lognormal variance with pedigree 0.002925, pedigree (3,2,2,2,1)
  Source: Athena and morrison Hershfield (2012): Life Cycle Assessment of Precast Concrete Commerical Buildings Cradle-to-Grave
- fraction, process water, to air: 0.15 dimensionless; name fraction_PW_to_air; lognormal variance with pedigree 0.0226, pedigree (4,4,3,5,3)
  Rough estimation to represent water evaporation of process water. Source: 2007, Kellenberger D et al. (ecoinvent "Concrete production, normal" dataset)

## Reference product
- concrete, 20MPa: 1 m3; name ref; CPC 37510: Non-refractory mortars and concretes; By-product classification allocatable product
  20 MPa concrete is intended for residential use, such as footings for walls, coumns, fireplaces, chimneys, foundations, walls, grade beams, piers, not expposed to freeze-thaw. (following the Canadian CSA specs - http://www.rmcao.org/sites/default/files/CSA%20Quickspec%202012.pdf)
  production volume 2.73556e7 m3; name PV_ref; = fraction_20MPa_concrete* PV_ready_mix_RNA
    Considering North American production only, and a 20% proportion of ready-mix concrete of 20MPa strength class. See parameters and Activity Description for details.
  property water in wet mass 160 kg; name ref_WWM; = batch_water
  property wet mass 2334 kg; name ref_WM; = ref_WWM+ref_DM
  property carbon content, fossil 1e-51; name ref_C_content_fossil
    Estimated value to zero, based on components properties.
  property gravel content 1009 kg; name gravel
    Literature value. Coarse aggregate
  property fly ash content 36 kg; name fly_ash
    Literature value. Fly ash. Admixtures included in the mix, as provided by the CPCI (Athena & Morrison Hershfield 2012, Table 5).
  property dry mass 2174 kg; name ref_DM; = sand+gravel+fly_ash+cement
  property price 185 EUR2005; name ref_price_EUR2005
    Estimated to be the same price as in case of concrete, normal (Data are not easily available. Therefore, an average price of products supplied by the activities in the same ISIC 3 code has been applied.This price is obtained as '_49 Concrete, asphalt and other mineral products, EU27 virgin, EU27' in the 'EU & DK Input Output Database' (available in SimaPro). The price is assumed to be valid for both RER2003, RER 2004, world 2003 and world 2004. Multiplied by density.).
  property water content 0.0735971; name ref_water_content; = ref_WWM/ref_DM
  property cement content 204 kg; name cement
    Literature value
  property sand content 925 kg; name sand
    Litterature value. Fine aggregates
  property carbon content 1e-51
    carbon content on a dry matter basis (reserved; not for manual entry)
  properties: carbon allocation 2.174e-48 kg

## Inputs from technosphere
- electricity, medium voltage: 0 kWh; source Marceau, M.L. 2007; pedigree (1,1,1,1,1)
  Literature value. Energy use in ready-mix plant.
  Uncertainty: T
- lubricating oil: 0.0119 kg; source Kellenberger D. 2007; lognormal variance with pedigree 0.0526, pedigree (2,1,5,5,1)
  Literature value. From ecoinvent dataset "concrete production, normal"
  properties: dry mass 1 kg, carbon content, fossil 0.75, heating value, net 40.2 MJ, wet mass 1 kg
  note on carbon content, fossil: Lubricating oil is produced from diesel. C-content/dry mass of fats and oils considered 75%, from: ecoinvent v2.2 report, n 15a, pg 40
  note on heating value, net: Literature value, Source: IPCC 2006, 2006 IPCC Guidelines for National Greenhouse Gas Inventories, Prepared by the National Greenhouse Gas Inventories Programme, Eggleston H.S., Buendia L., Miwa K., Ngara T. and Tanabe K. (eds). Published: IGES, Japan
- chemical, organic: 0.0213046 kg; = 0.62*PV_ready_mix_Qc/PV_ready_mix_RNA; lognormal variance with pedigree 0.042725, pedigree (3,2,5,2,1)
  Extapolated value. Water reducing admixture (usually based on lignosulphonate), not listed in Athena (2012). However, in Quebec (Canada), some is added to concrete (quantity estimated by Association Béton Québec Technical Committee- Nov 2013)
  properties: wet mass 1 kg, heating value, net 19.03 MJ, carbon content, fossil 0.628, dry mass 1 kg
  note on carbon content, fossil: This dataset is an unweighted average of 20 organic substances (listed in Tab 88.1, ecoinvent v2.2 report 8, part II), being part of the top100 chemicals included in this database. The C-content has also been calculated as an unweighted average of the C content of the substances composing this dataset.
- steel, low-alloyed, hot rolled: 0.0238 kg; source Kellenberger D. 2007; lognormal variance with pedigree 0.0526, pedigree (2,1,5,5,1)
  Literature value. From ecoinvent dataset "concrete production, normal"
  properties: carbon content, fossil 0.005, dry mass 1 kg, wet mass 1 kg
  note on carbon content, fossil: Low alloyed steel composition given in Tab. 3.2 ecoinvent v2.2 report 10_partII. Steel assumed to have a C content of 0.5%
- diesel, burned in building machine: 15.6427 MJ; = diesel_input*1000*density_diesel*NHV_diesel*42.8; lognormal variance with pedigree 0.04, pedigree (1,1,5,1,1)
  See parameters. Energy use in ready-mix plant. Includes air emissions from diesel combustion.
  Uncertainty: C
  property density 0.84 kg/l; name density_diesel
  property heating value, net 1 MJ; name NHV_diesel
  property fuel input in physical units, m3 0.0004351 m3; name diesel_input; = 0.4351/1000
- cement, Portland: 206.141 kg; = cement*(1+(Waste*-1)/Ref_WM); lognormal variance with pedigree 0.04, pedigree (1,1,5,1,1)
  Including waste concrete. See Exchange Properties
  Uncertainty: C
  properties: wet mass 1 kg, dry mass 1 kg
- gravel, round: 1019.59 kg; = gravel*(1+(Waste*-1)/Ref_WM); lognormal variance with pedigree 0.04, pedigree (1,1,5,1,1)
  Including waste concrete. See Exchange Properties
  Uncertainty: C
  properties: wet mass 1 kg, dry mass 1 kg
- heat, district or industrial, natural gas: 10.6323 MJ; = natural_gas_input*NHV_natural_gas*42.8/1.17906336088154; lognormal variance with pedigree 0.04, pedigree (1,1,5,1,1)
  See parameters. Energy use in ready-mix plant. Includes air emissions from natural gas combustion.
  Uncertainty: C
  property fuel input in physical units, m3 0.2929 m3; name natural_gas_input
  property heating value, net 1 MJ; name NHV_natural_gas
- wastewater from concrete production: -0.0348 m3; name WWater; source Marceau, M.L. 2007; lognormal variance with pedigree 0.0507, pedigree (2,1,5,3,1)
  Literature value. Table E1a.
  production volume 951976 m3; = PV_ref*WWater/ref
    Calculated from the production volume of reference product, in proportion to the respective output amounts.
  property price 0 EUR2005; name WWater_price_EUR2005
  properties: carbon content, fossil 0.027074, dry mass 0.449139 kg, wet mass 1000 kg, water content 2225.48
  note on carbon content, fossil: TOC =0.01216 kg/m3 (Tab A.20, ecoinvent v2.2 report 13_I). TOC was considered as Total Carbon.
- ethylene oxide: 0.0872 kg; = fraction_ethylene_oxide*superplastisizer; source Athena and morrison Hershfield 2012; lognormal variance with pedigree 0.04, pedigree (1,1,5,1,1)
  Superplastisizer. Calculated value. See parameters.
  Uncertainty: C
  properties: carbon content, fossil 0.545455, wet mass 1 kg, heating value, net 27.53 MJ, dry mass 1 kg
- waste concrete: -24.5 kg; name Waste; source Marceau, M.L. 2007; lognormal variance with pedigree 0.0507, pedigree (2,1,5,3,1)
  Literature value. Solid waste consists of concrete and small amounts of paste (cement and water after aggregate has been reclaimed)
  production volume 6.70213e8 kg; = PV_ref*Waste/ref
    (same comment as for wastewater from concrete production)
  property price 0 EUR2005; name Waste_price_EUR2005
  properties: water content 0.0735971, dry mass 0.931448 kg, carbon content, fossil 1e-51, wet mass 1 kg
- synthetic rubber: 0.00713 kg; source Kellenberger D. 2007; lognormal variance with pedigree 0.0526, pedigree (2,1,5,5,1)
  Literature value. From ecoinvent dataset "concrete production, normal"
  properties: carbon content, fossil 0.871949, wet mass 1 kg, heating value, net 26.42 MJ, dry mass 1 kg
  note on carbon content, fossil: EPDM (Ethylene-propene-diene terpolymer) rubber is a terpolymer of ethylene, propene, and a diene with the residual unsaturated portion of the diene in the side chain (ecoinvent v2.2 report 7-part XX & Ullmann). Chemical formula (deduced from Evidences of Solvent-Induced Miscibility in Polychloroprene-co-Ethylene-Propene Diene Terpolymer Blends, Dubey et al., Journal of Applied Polymer Science, 2009, 111:1884-1891): C20H35
- concrete mixing factory: 4.57e-7 unit; source Kellenberger D. 2007; lognormal variance with pedigree 0.3626, pedigree (2,1,5,5,1)
  Literature value. From ecoinvent dataset "concrete production, normal"
- acetic acid, without water, in 98% solution state: 0.0218 kg; = fraction_acetic_acid*superplastisizer; source Athena and morrison Hershfield 2012; lognormal variance with pedigree 0.04, pedigree (1,1,5,1,1)
  Superplastisizer. Calculated value. See parameters.
  Uncertainty: C
  property carbon content, fossil 0.400016; name AA_C_content_fossil
  properties: dry mass 1 kg, wet mass 1 kg, heating value, net 14.6 MJ
  note on heating value, net: Based on literature, page 10, Althaus H.-J., Chudacoff M., Hischier R., Jungbluth N., Osses M. and Primas A. (2007) Life Cycle Inventories of Chemicals. Final report ecoinvent data v2.0 No. 8. EMPA, Swiss Centre for Life Cycle Inventories, Dübendorf, CH, Online-Version under: www.ecoinvent.org.
- alkylbenzene sulfonate, linear, petrochemical: 1.1 kg; lognormal variance with pedigree 0.0828, pedigree (3,2,5,3,4)
  Literature value. Air-entrainers. Admixtures included in the mix, as provided by the CPCI (Athena & Morrison Hershfield 2012, Table 5).
  properties: dry mass 1 kg, heating value, net 28.88 MJ, wet mass 1 kg, carbon content, fossil 0.407018
  note on carbon content, fossil: European LAS is a mixture of differ-ent homologues (C10-C13 alkyl chains) including all positional isomers with the exception of 1-alkyl substituted ones. The typical homologue distribution is 15%, 30%, 30% and 25% for C10, C11, C12 and C13 with an average alkyl chain of C11.6 and an average molecular weight of 342 as the sodium salt (ecoinvent v2.2 report 12)
- sand: 934.71 kg; = sand*(1+(Waste*-1)/Ref_WM); lognormal variance with pedigree 0.04, pedigree (1,1,5,1,1)
  Including waste concrete. See Exchange Properties
  Uncertainty: C
  properties: wet mass 1 kg, dry mass 1 kg
- tap water: 200.941 kg; = batch_water+non_process_water; lognormal variance with pedigree 0.04, pedigree (1,1,5,1,1)
  Water use in ready-mix plant, assumed to be sourced from municipal water system. See Exchange properties comment for Sources.
  Uncertainty: C
  property non-process water, net 40.9412 kg; name non_process_water; = (WWater*-1)*1000/(1-fraction_PW_to_air)
  property batch water 160 kg; name batch_water
  properties: carbon content, fossil 0.00178991, water content 2962.17, wet mass 1 kg, dry mass 0.000337476 kg
  note on non-process water, net: The average water consumption (not including batch water) is 65 L/m3 of ready mixed concrete. The average amount of water disposed is 34,8 L/m3. Water not discarded is recycled back into the process or into other products. Source: Athena (2005):Cement and Structural Concrete: LCI Update 2005 An amount of 15% water evaporated to air was assumed, in order to calculate to non-process water input.
  note on carbon content, fossil: Bicarbonate content is 2.93 mol/m3. CO2 content is 0.1 mol/m3 (ecoinvent v2.2 report 8, Tab 93.1).
  note on batch water: Source: Athena (2005):Cement and Structural Concrete: LCI Update 2005
- electricity, medium voltage: 3.80221, 0.311787 kWh (2 entries); source Marceau, M.L. 2007; lognormal variance with pedigree 0.0581, pedigree (4,1,5,3,1)
  Literature value. Energy use in ready-mix plant.
  Uncertainty: T

## Emissions to nature
- Suspended solids, unspecified [water, unspecified]: 4.64e-7 kg; source Marceau, M.L. 2007; lognormal variance with pedigree 0.0413, pedigree (2,1,5,3,1)
  Literature value. Table E1a.
- Chlorides, unspecified [water, unspecified]: 3.09e-9 kg; source Marceau, M.L. 2007; lognormal variance with pedigree 0.0413, pedigree (2,1,5,3,1)
  Literature value. Table E1a.
- Copper, ion [water, unspecified]: 1.55e-8 kg; source Marceau, M.L. 2007; lognormal variance with pedigree 0.0413, pedigree (2,1,5,3,1)
  Literature value. Table E1a.
- Oils, unspecified [water, unspecified]: 2.32e-7 kg; source Marceau, M.L. 2007; lognormal variance with pedigree 0.0413, pedigree (2,1,5,3,1)
  Literature value. Table E1a.
- Iron, ion [water, unspecified]: 1.55e-8 kg; source Marceau, M.L. 2007; lognormal variance with pedigree 0.0413, pedigree (2,1,5,3,1)
  Literature value. Table E1a.
- Water [air, unspecified]: 0.00614118 m3; = non_process_water/1000*fraction_PW_to_air; lognormal variance with pedigree 0.04, pedigree (1,1,5,1,1)
  Calculated value. See exchange propeties.
  Uncertainty: C

## Sampling procedure
Data on process inputs and water use are from Confidential Life Cycle Inventory Survey of Ready-Mix Concrete Plant (Marceau, VanGeem, and Ranchero 2006a). This survey was distributed to a sample of member-plants of the National Ready Mixed Concrete Association. The sample was chosen so that the plants in the sample are representative of climates of the conterminous United States and plant size in terms of production in cubic yards of ready mixed concrete. The sample consists of 47 plants.

## Extrapolations
This dataset has been extrapolated from year 2006 to the year of the calculation (2021). The uncertainty has been adjusted accordingly.
