# sodium chlorate production, powder

Dataset: EcoSpold 2, unit process
Geography: RER
Time period: 1990-01-01 to 2021-12-31
Technology level: current
Classification: ISIC rev.4 ecoinvent: 2011:Manufacture of basic chemicals
Synonyms: Chlorate de sodium; Chlorsaure; Chloric acid sodium salt; 7775-09-9; Asex
Scenario: Business-as-Usual
System model: Allocation, cut-off by classification
Generated by: Maggie Osses
Published in: Althaus H.-J. 2007
Database: ecoinvent
isCopyrightProtected: true
accessRestrictedTo: 1

## General comment
This dataset represents the production of sodium chlorate by means of electrolysis of a sodium chloride solution. Sodium chlorate (NaClO3) is a white, hygroscopic, crystalline solid. It is an efficient oxidising agent. Sodium chlorate is used in the manufacture of chlorine dioxide bleach for the pulp and paper industry. Second in importance is its use as an intermediate in the production of other chlorates, mainly potassium chlorate, and of sodium perchlorate for conversion to ammonium perchlorate, which is used as an oxidiser in solid propellants. Sodium chlorate is further used as an oxidising agent in uranium refining and other metallurgical operations, as an additive in agricultural products and dyes, in textile and fur dyeing, metal etching, and in chemical laboratories and throughout the chemical industry as an oxidising agent. The values in this dataset are literature average values, based on Fawer (2002), and a personal comunication on the background information from Bowsted and Fawer (1996) regarding confidential data of European manufacturing plants. This information allows to disclose the data from Bowsted and Fawer (1996) in a suitable manner for this dataset.
References:
Althaus H.-J., Chudacoff M., Hischier R., Jungbluth N., Osses M. and Primas A. (2007) Life Cycle Inventories of Chemicals. ecoinvent report No. 8, v2.0. EMPA Dübendorf, Swiss Centre for Life Cycle Inventories, Dübendorf, CH.
Bowsted and Fawer (1996) Ecoprofile of sodium chlorate. http://www.cefic.be/sector/naclo3/ecoprofile /tc.htm#tc.

## Included activities start
The activity starts when the raw materials enter the process.

## Included activities end
This activity ends with the production of sodium chlorate. The dataset includes brine purification, final drying of the sodium chlorate crystals, as well as the production of hydrogen gas. It includes the processing of the raw materials, the consumption of auxiliaries and energy, the infrastructure and land use, as well as emissions to air and water. No byproducts or coproducts are considered. Hydrogen is not considered as a byproduct from the process, but as an air emission.

## Geography
Average values of six European manufacturing plants.

## Technology
Sodium chlorate is produced by electrolysis of an aqueous sodium chloride solution. This is achieved according the following overall reaction equation:
NaCl + 3H2O + 6e- → NaClO3 + 3H2
The concentrated chlorate solution is either submitted to crystallisation or it is used directly, particularly in the production of chlorine dioxide. Sodium chlorate, hydrogen gas (H2) and heat are formed in the production process. The solution formed is crystallised and the chlorate crystals are separated, washed and dried. The final product contains mostly 99 to 99.9% sodium chlorate. The hydrogen gas and the heat produced can be exported for different uses. The main raw materials are sodium chloride and water. Energy is provided by electrical power.
References:
Althaus H.-J., Chudacoff M., Hischier R., Jungbluth N., Osses M. and Primas A. (2007) Life Cycle Inventories of Chemicals. ecoinvent report No. 8, v2.0. EMPA Dübendorf, Swiss Centre for Life Cycle Inventories, Dübendorf, CH.

## Time period
The period corresponds to the early nineties, estimated to be from 1990 to 1995.

## Parameters
- fraction, cooling water, to air: 0.3875 dimensionless; name fraction_CW_to_air; lognormal variance with pedigree 0.092025, pedigree (4,4,3,2,4)
- fraction, process water, to air: 0.205 dimensionless; name fraction_PW_to_air; lognormal variance with pedigree 0.092025, pedigree (4,4,3,2,4)
- fraction, cooling water, recirculating system, to air: 0.771 dimensionless; name fraction_CW_R_to_air; lognormal variance with pedigree 0.0413, pedigree (2,3,1,3,1)
- fraction, cooling water, once-through system, to air: 0.004 dimensionless; name fraction_CW_OT_to_air; lognormal variance with pedigree 0.0413, pedigree (2,3,1,3,1)
- fraction, cooling water, cooling pond system, to air: 0.032 dimensionless; name fraction_CW_CP_to_air; lognormal variance with pedigree 0.0413, pedigree (2,3,1,3,1)

## Reference product
- sodium chlorate, powder: 1 kg; name RP; By-product classification allocatable product; CPC 34240: Phosphates of triammonium; salts and peroxysalts of inorganic acids and metals n.e.c.; CAS 7775-09-9
  Sodium chlorate (NaClO3) is a white, hygroscopic, crystalline solid. It is an efficient oxidising agent. Sodium chlorate is used in the manufacture of chlorine dioxide bleach for the pulp and paper industry. Second in importance is its use as an intermediate in the production of other chlorates, mainly potassium chlorate, and of sodium perchlorate for conversion to ammonium perchlorate, which is used as an oxidiser in solid propellants. Sodium chlorate is further used as an oxidising agent in uranium refining and other metallurgical operations, as an additive in agricultural products and dyes, in textile and fur dyeing, metal etching, and in chemical laboratories and throughout the chemical industry as an oxidising agent.
  References:
  Althaus H.-J., Chudacoff M., Hischier R., Jungbluth N., Osses M. and Primas A. (2007) Life Cycle Inventories of Chemicals. ecoinvent report No. 8, v2.0. EMPA Dübendorf, Swiss Centre for Life Cycle Inventories, Dübendorf, CH.
  Bowsted and Fawer (1996) Ecoprofile of sodium chlorate. http://www.cefic.be/sector/naclo3/ecoprofile /tc.htm#tc.
  production volume 8e8 kg; name RP_PV
    According to the OECD the production capacity of sodium chlorate for 2002 in Western and Eastern Europe was about 700 0000 and 100 000 metric tonnes respectively. Hence, the European production volume of sodium chlorate for 2002 was 800 000 metric tonnes.
    Reference(s):
    OECD. 2004. Screening Information Dataset, Initial Assessment Profile for Sodium chlorate. Retrieved from: http://webnet.oecd.org/hpv/ui/handler.axd?id=556a396b-5d91-402a-a056-a84e2d91e5b7, 15 June 2017.
  property price 0.471 EUR2005
    From UN trade database. http://data.un.org/ Calculated as average price for all chemicals in the category 'Trade of goods , US$, HS 1992, 28 Inorganic chemicals, precious metal compound, isotope'. Import data from the largest economies of the world are used (Brazil, India, USA, China, Japan and EU-27).
  property carbon content 0
    carbon content on a dry matter basis (reserved; not for manual entry)
  properties: wet mass 1 kg, water in wet mass 0 kg, carbon content, fossil 0, dry mass 1 kg, water content 0, carbon content, non-fossil 0, carbon allocation 0 kg

## Inputs from technosphere
- hydrogen peroxide, without water, in 50% solution state: 0.00191 kg; lognormal variance with pedigree 0.0701, pedigree (3,5,5,3,1)
  Data from personal communication (Fawer 2002)
  Uncertainty: d
  properties: heating value, net 7.13 MJ, wet mass 1 kg, dry mass 1 kg
- sodium dichromate: 0.00042 kg; lognormal variance with pedigree 0.0701, pedigree (3,5,5,3,1)
  Data from personal communication (Fawer 2002)
  Uncertainty: d
  properties: wet mass 1 kg, dry mass 1 kg
- calcium chloride: 0.000173 kg; lognormal variance with pedigree 0.0701, pedigree (3,5,5,3,1)
  Data from personal communication (Fawer 2002)
  Uncertainty: d
  properties: wet mass 1 kg, dry mass 1 kg
- hydrochloric acid, without water, in 30% solution state: 0.0174 kg; lognormal variance with pedigree 0.0701, pedigree (3,5,5,3,1)
  Data from personal communication (Fawer 2002)
  Uncertainty: d
  properties: dry mass 1 kg, heating value, net 3.32 MJ, wet mass 1 kg
- sodium chloride, powder: 0.566 kg; lognormal variance with pedigree 0.0701, pedigree (3,5,5,3,1)
  Data from personal communication (Fawer 2002)
  Uncertainty: d
  properties: dry mass 1 kg, wet mass 1 kg
- municipal solid waste: -0.107 kg; name BP_municipal_solid_waste; lognormal variance with pedigree 0.0701, pedigree (3,5,5,3,1)
  Data from personal communication (Fawer 2002)
  Uncertainty: d
  production volume 8.56e7 kg; = RP_PV*BP_municipal_solid_waste/ABS(RP)
    Calculated from the production volume of sodium chlorate, powder in proportion to the respective output amounts.
  properties: wet mass 1 kg, carbon content, fossil 0.171549, dry mass 0.771 kg, carbon content, non-fossil 0.261655, water content 0.297017, heating value, net 11.74 MJ
  note on carbon content, fossil: MSW composition in tab 4.1, ecoinvent v2.2 report 13_I. C content referred to 1 kg DM
  note on heating value, net: Value taken from the general comment of the treatment dataset.
- sodium sulfate, anhydrite: 4.07e-5 kg; lognormal variance with pedigree 0.0701, pedigree (3,5,5,3,1)
  Data from personal communication (Fawer 2002)
  Uncertainty: d
  properties: wet mass 1 kg, dry mass 1 kg
- electricity, medium voltage: 5.5 kWh; lognormal variance with pedigree 0.0701, pedigree (3,5,5,3,1)
  Data from personal communication (Fawer 2002)
  Uncertainty: d
- soda ash, light, crystalline, heptahydrate: 0.000438 kg; lognormal variance with pedigree 0.0701, pedigree (3,5,5,3,1)
  Data from personal communication (Fawer 2002)
  Uncertainty: d
  properties: heating value, net 3.43 MJ, wet mass 1 kg, dry mass 1 kg, carbon content, fossil 0.0517241
- sodium hydroxide, without water, in 50% solution state: 0.025 kg; lognormal variance with pedigree 0.0701, pedigree (3,5,5,3,1)
  Data from personal communication (Fawer 2002)
  Uncertainty: d
  properties: heating value, net 3.03 MJ, wet mass 1 kg, dry mass 1 kg
- chemical factory, organics: 4e-10 unit; lognormal variance with pedigree 0.349225, pedigree (2,3,5,2,3)
  Calculated based on literature data published by the industry. For this activity, no information was readily available concerning infrastructure and land-use. Therefore, the infrastructure is estimated based on data from two chemical factories, the BASF site of Ludwigshafen and the chemical factory in Gendorf (which are both located in Germany), which produce a wide range of chemical substances. Based on this data, the following assumptions are made: the built area amounts to about 4.2 ha, the plant has an average output of 50'000 t/a and a lifespan of fifty years. The estimated infrastructure amount is therefore 4.00 E-10 units per kg of produced chemical.
  References:
  Althaus H.-J., Chudacoff M., Hischier R., Jungbluth N., Osses M. and Primas A. (2007) Life Cycle Inventories of Chemicals. ecoinvent report No. 8, v2.0. EMPA Dübendorf, Swiss Centre for Life Cycle Inventories, Dübendorf, CH.
  Gendorf (2000) Umwelterklärung 2000, Werk Gendorf. Werk Gendorf, Burgkirchen.

## Inputs from nature
- Water, cooling, unspecified natural origin [natural resource, in water]: 0.235 m3; name water_cooling_UNO_input; source IPPC - Integrated Pollution Prevention a 2007; lognormal variance with pedigree 0.0507, pedigree (2,2,5,1,1)
  Calculated based on literature, (Vionnet, S., Quantis Water Database - Technical Report, 2012). It includes the processes of sodium chlorate production: brine purification, evaporation, precipitation, electrolysis, crystalization, separation and drying. The process ends when pure sodium chlorate in crystal form leaves the plant.
  property carbon content, fossil 0.0104329; name C_content_fossil
  property dry mass 0.1101 kg; name DM
  property water in wet mass 999.89 kg; name WWM
  property wet mass 1000 kg; name WM
  property carbon content, non-fossil 0; name C_content_non_fossil
  property water content 9081.65; name water_content
- Water, unspecified natural origin [natural resource, in water]: 0.00155 m3; name water_UNO_input; source IPPC - Integrated Pollution Prevention a 2007; lognormal variance with pedigree 0.052625, pedigree (3,3,5,2,1)
  Data from personal communication (Fawer 2002)
  Calculated based on literature, (Vionnet, S., Quantis Water Database - Technical Report, 2012). It includes the processes of sodium chlorate production: brine purification, evaporation, precipitation, electrolysis, crystalization, separation and drying.
  Uncertainty: d

## Emissions to nature
- Chlorate [water, surface water]: 0.00121 kg; lognormal variance with pedigree 0.1101, pedigree (3,5,5,3,1)
  Data from personal communication (Fawer 2002)
  Uncertainty: d
- Chromium VI [water, surface water]: 2.8e-5 kg; lognormal variance with pedigree 0.1101, pedigree (3,5,5,3,1)
  Data from personal communication (Fawer 2002)
  Uncertainty: d
- Sodium chlorate [air, urban air close to ground]: 2.48e-5 kg; lognormal variance with pedigree 0.1101, pedigree (3,5,5,3,1)
  Data from personal communication (Fawer 2002)
  Uncertainty: d
- Water [water, unspecified]: 0.14517 m3; = water_cooling_UNO_input*(1-fraction_CW_to_air)+water_UNO_input*(1-fraction_PW_to_air); lognormal variance with pedigree 0.0807, pedigree (2,2,5,1,1)
  Calculated as a fraction of the input of water. For more details, refer to the mathematical relation and the parameters.
  property fraction, origin: fresh water 0; name fraction_origin_fresh_water_Ww
  property fraction, origin: salt water 0; name fraction_origin_salt_water_Ww
  property fraction, origin: unspecified 1; name fraction_origin_unspecified_Ww
- Chlorine [air, urban air close to ground]: 2.39e-6 kg; lognormal variance with pedigree 0.1101, pedigree (3,5,5,3,1)
  Data from personal communication (Fawer 2002)
  Uncertainty: d
- Iron, ion [water, surface water]: 3.92e-6 kg; lognormal variance with pedigree 0.1101, pedigree (3,5,5,3,1)
  Data from personal communication (Fawer 2002)
  Uncertainty: d
- Water [air, unspecified]: 0.0913802 m3; = (water_cooling_UNO_input*fraction_CW_to_air)+(water_UNO_input*fraction_PW_to_air); lognormal variance with pedigree 0.0807, pedigree (2,2,5,1,1)
  (same comment as for Water)
  property fraction, origin: unspecified 1; name fraction_origin_unspecified
  property fraction, origin: salt water 0; name fraction_origin_salt_water
  property fraction, origin: fresh water 0; name fraction_origin_fresh_water
- Chloride [water, surface water]: 0.000329 kg; lognormal variance with pedigree 0.1101, pedigree (3,5,5,3,1)
  Data from personal communication (Fawer 2002)
  Uncertainty: d
- Hydrogen [air, urban air close to ground]: 0.0556 kg; lognormal variance with pedigree 0.0701, pedigree (3,5,5,3,1)
  Data from personal communication (Fawer 2002)
  Uncertainty: d
- Solids, inorganic [water, surface water]: 0.0225 kg; lognormal variance with pedigree 0.1101, pedigree (3,5,5,3,1)
  Data from personal communication (Fawer 2002)
  Uncertainty: d

## Sampling procedure
All data are from a personal communication (Fawer, 2002), and represent averages of values.

## Extrapolations
This dataset has been extrapolated from year 1995 to the year of the calculation (2021). The uncertainty has been adjusted accordingly.

## Review by Gregor Wernet 2017-08-04
This dataset was additionally reviewed in a separate review process by Eric Johnson of Atlantic Consulting as well as Emilia Moreno Ruiz and Gregor Wernet of ecoinvent.
