# sewer grid construction, 5E9l/year, 110 km

Dataset: EcoSpold 2, unit process
Geography: RoW
Time period: 1996-01-01 to 2021-12-31
Technology level: current
Classification: ISIC rev.4 ecoinvent: 4220:Construction of utility projects
Classification: EcoSpold01Categories: waste management/wastewater treatment
Synonyms: municipal sewer infrastructure for capacity class 3
Tags: ConvertedDataset
Scenario: Business-as-Usual
System model: Allocation, cut-off by classification
Generated by: Gabor Doka (obsolete)
Published in: Doka G. 2007
Database: ecoinvent
isCopyrightProtected: true
accessRestrictedTo: 1

## General comment
Sewer system for municipal wastewater treatment plant capacity class 3 with an average per-captia equivalent PCE (Einwohnergleichwert) of 24'864. Average length 109.4 km. This is the average plant size in Switzerland. The lifetime is 100 years including a renovation after 70 years.
[This dataset was already contained in the ecoinvent database version 2. It was not individually updated during the transfer to ecoinvent version 3. Life Cycle Impact Assessment results may still have changed, as they are affected by changes in the supply chain, i.e. in other datasets. This dataset was generated following the ecoinvent quality guidelines for version 2. It may have been subject to central changes described in the ecoinvent version 3 change report (http://www.ecoinvent.org/database/ecoinvent-version-3/reports-of-changes/), and the results of the central updates were reviewed extensively. The changes added e.g. consistent water flows and other information throughout the database. The documentation of this dataset can be found in the ecoinvent reports of version 2, which are still available via the ecoinvent website. The change report linked above covers all central changes that were made during the conversion process.]

## Included activities end
Infrastructure materials for municipal sewer system, transports, dismantling.

## Geography
Specific to the technology mix and human settlement structure encountered in Switzerland around 1996.

## Technology
Underground sewer system with pipes

## Parameters
- fraction, process water, to air: 0.15 dimensionless; name fraction_PW_to_air; lognormal variance with pedigree 0.092025, pedigree (4,4,3,2,4)
- fraction, tap water, to air: 0.15 dimensionless; name fraction_TW_to_air; lognormal variance with pedigree 0.092025, pedigree (4,4,3,2,4)

## Reference product
- sewer grid, 5E9l/year, 110 km: 1 km; CPC 53253: Sewage and water treatment plants; By-product classification allocatable product
  production volume 3.96633 km
    This is a placeholder value that does not reflect real-world production volumes. This dataset does not currently require a real-world production volume to work in the database framework, and no actual data were collected yet. This has no negative effect on the results of the ecoinvent database.
  property price 210700 EUR2005
    Calculated based on literature value (PE-80 Pipe Systems: 17 Years of Successful Application in teh Public Sewer Network System of Göttingen, Pipeline Technology 2006 Conferece, http://www.pipeline-conference.com/sites/default/files/papers/124%20Fiedler.pdf). In general the costs for construction and maintenance of sewer grid varies significantly from region to region. In Göttingen app. 700 km of sewers are being managed. The annual investments in maintenance, renewal and construction of new sewer grid are 16 mio. Euro. With a lifetime of 100 years the cost of 1km of sewer grid is estimated to be (16000000*100/700=) 2.29E+06 Euro/km.

## Inputs from technosphere
- electricity, medium voltage: 0 kWh; pedigree (1,1,1,1,1)
  Data from one inventory study (Labhardt 1996)
- waste polyvinylchloride: 0 kg; pedigree (1,1,1,1,1)
  Data from one inventory study (Labhardt 1996)
  production volume 0 kg
    Calculated from the production volume of sewer grid, 5E9l/year, 110 km in proportion to the respective output amounts.
  properties: heating value, net 21.51 MJ, wet mass 1 kg, dry mass 0.998 kg, carbon content, fossil 0.440882, water content 0.00200401
  note on heating value, net: Value taken from the general comment of the treatment dataset.
  note on carbon content, fossil: C content in 1 kg DM was calculated using data in Tab A.1, ecoinvent v2.2 report 13_I
- gravel, round: 624890 kg; lognormal variance with pedigree 0.3627, pedigree (2,2,5,5,1)
  Data from one inventory study (Labhardt 1996)
  properties: dry mass 1 kg, wet mass 1 kg
- waste concrete, not reinforced: 0 kg; pedigree (1,1,1,1,1)
  Data from one inventory study (Labhardt 1996)
  production volume 0 kg
    (same comment as for waste polyvinylchloride)
  properties: dry mass 1 kg, wet mass 1 kg
- steel, chromium steel 18/8, hot rolled: 18000 kg; lognormal variance with pedigree 0.3627, pedigree (2,2,5,5,1)
  Data from one inventory study (Labhardt 1996)
  properties: carbon content, fossil 0.0008, wet mass 1 kg, dry mass 1 kg
  note on carbon content, fossil: Stainless steel model is the grade 304 steel (18/8 stainless, 18% chromium 8% nickel; max. 0.08% C)
- concrete, normal: 0 m3; pedigree (1,1,1,1,1)
  Data from one inventory study (Labhardt 1996)
  properties: wet mass 2380 kg, water content 0.086758, dry mass 2190 kg
- polyethylene, high density, granulate: 33300 kg; lognormal variance with pedigree 0.3627, pedigree (2,2,5,5,1)
  Data from one inventory study (Labhardt 1996)
  properties: carbon content, fossil 0.857143, dry mass 1 kg, wet mass 1 kg, heating value, net 42.47 MJ
  note on carbon content, fossil: Polyethylene is formed out of a huge amount of ethylene monomers (C2H4) (ecoinvent v2.2 report 11_II). MW=28 g/mol
- polyvinylchloride, emulsion polymerised: 211.916 kg; lognormal variance with pedigree 0.3627, pedigree (2,2,5,5,1)
  Data from one inventory study (Labhardt 1996)
  properties: heating value, net 21.5 MJ, carbon content, fossil 0.387097, dry mass 1 kg, wet mass 1 kg
  note on carbon content, fossil: Monomer is vynyl chloride, C2H3Cl (ecoinvent v2.2 report 11_II). MW=62 g/mol
- reinforcing steel: 51800 kg; lognormal variance with pedigree 0.3627, pedigree (2,2,5,5,1)
  Data from one inventory study (Labhardt 1996)
  properties: wet mass 1 kg, carbon content, fossil 0.004, dry mass 1 kg
- cement, unspecified: 0 kg; pedigree (1,1,1,1,1)
  Data from one inventory study (Labhardt 1996)
  properties: wet mass 1 kg, dry mass 1 kg
- tap water: 0 kg; name tap_water_input; pedigree (1,1,1,1,1)
  Data from one inventory study (Labhardt 1996)
  properties: carbon content, fossil 0.00178991, wet mass 1 kg, dry mass 0.000337476 kg, water content 2962.17
  note on carbon content, fossil: Bicarbonate content is 2.93 mol/m3. CO2 content is 0.1 mol/m3 (ecoinvent v2.2 report 8, Tab 93.1).
- sand: 0 kg; pedigree (1,1,1,1,1)
  Data from one inventory study (Labhardt 1996)
  properties: dry mass 1 kg, wet mass 1 kg
- excavation, hydraulic digger: 5450 m3; lognormal variance with pedigree 0.3627, pedigree (2,2,5,5,1)
  Data from one inventory study (Labhardt 1996)
- waste rubber, unspecified: 0 kg; pedigree (1,1,1,1,1)
  Data from one inventory study (Labhardt 1996)
  production volume 0 kg
    (same comment as for waste polyvinylchloride)
  properties: carbon content, fossil 0.853, wet mass 1 kg, dry mass 1 kg, heating value, net 27.19 MJ
- polypropylene, granulate: 1890 kg; lognormal variance with pedigree 0.3627, pedigree (2,2,5,5,1)
  Data from one inventory study (Labhardt 1996)
  properties: carbon content, fossil 0.857143, dry mass 1 kg, wet mass 1 kg, heating value, net 32.78 MJ
  note on carbon content, fossil: Polypropylene is formed by the polymerisation of propylene, C3H6 (ecoinvent v2.2 report 11_II)
  note on heating value, net: Value extracted from "treatment of waste polypropylene, open burning"
- cast iron: 8760 kg; lognormal variance with pedigree 0.3627, pedigree (2,2,5,5,1)
  Data from one inventory study (Labhardt 1996)
  properties: carbon content, fossil 0.04, dry mass 1 kg, wet mass 1 kg
  note on carbon content, fossil: Cast iron is made by remelting pig iron in small furnaces (e.g. cupola furnaces or electric arc furnaces) and poured into moulds to make castings. It usually contains 2% to 6% carbon (ecoinvent v2.2 report 10_partII). An average content of 4% was considered
- waste polyethylene: 0 kg; pedigree (1,1,1,1,1)
  Data from one inventory study (Labhardt 1996)
  production volume 0 kg
    (same comment as for waste polyvinylchloride)
  properties: wet mass 1 kg, water content 0.00401606, carbon content, fossil 0.825301, dry mass 0.996 kg, heating value, net 42.47 MJ
- polyvinylchloride, suspension polymerised: 1448.08 kg; lognormal variance with pedigree 0.3627, pedigree (2,2,5,5,1)
  Data from one inventory study (Labhardt 1996)
  properties: carbon content, fossil 0.387097, dry mass 1 kg, heating value, net 21.5 MJ, wet mass 1 kg
- synthetic rubber: 473 kg; lognormal variance with pedigree 0.3627, pedigree (2,2,5,5,1)
  Data from one inventory study (Labhardt 1996)
  properties: dry mass 1 kg, wet mass 1 kg, carbon content, fossil 0.871949, heating value, net 26.42 MJ
  note on carbon content, fossil: EPDM (Ethylene-propene-diene terpolymer) rubber is a terpolymer of ethylene, propene, and a diene with the residual unsaturated portion of the diene in the side chain (ecoinvent v2.2 report 7-part XX & Ullmann). Chemical formula (deduced from Evidences of Solvent-Induced Miscibility in Polychloroprene-co-Ethylene-Propene Diene Terpolymer Blends, Dubey et al., Journal of Applied Polymer Science, 2009, 111:1884–1891): C20H35
- gravel, crushed: 0 kg; pedigree (1,1,1,1,1)
  Data from one inventory study (Labhardt 1996)
  properties: wet mass 1 kg, dry mass 1 kg
- diesel, burned in building machine: 29400 MJ; lognormal variance with pedigree 0.3627, pedigree (2,2,5,5,1)
  Data from one inventory study (Labhardt 1996)
  properties: heating value, net 1 MJ
- electricity, medium voltage: 145.454, 27.8917, 640.438, 2120.38, 468.244, 6810.19, 959.9, 3127.5 kWh (8 entries); lognormal variance with pedigree 0.3627, pedigree (2,2,5,5,1)
  Data from one inventory study (Labhardt 1996)
- waste polyvinylchloride: -184.661, -12.3384, -0.933131, -5.09619, -2.0588, -4.83931, -157.34, -1292.73 kg (8 entries); lognormal variance with pedigree 0.3627, pedigree (2,2,5,5,1)
  Data from one inventory study (Labhardt 1996)
  production volume 4980 kg
- waste concrete, not reinforced: -125722, -1.79428e6 kg (2 entries); lognormal variance with pedigree 0.3627, pedigree (2,2,5,5,1)
  Data from one inventory study (Labhardt 1996)
  production volume 5.76e6 kg
- concrete, normal: 10.1325, 1.05579, 8.54735, 4.80788, 20.36, 0.686732, 402.41 m3 (7 entries); lognormal variance with pedigree 0.3627, pedigree (2,2,5,5,1)
  Data from one inventory study (Labhardt 1996)
- cement, unspecified: 20504.2, 4266.31, 312.478, 890.665, 20142.7, 592.858, 6511.34, 787.799, 87991.7 kg (9 entries); lognormal variance with pedigree 0.3627, pedigree (2,2,5,5,1)
  Data from one inventory study (Labhardt 1996)
- tap water: 147638, 17771.6, 29370.5, 6.31539e6, 740608, 19266.7, 54803.9, 8.47515e6 kg (8 entries); lognormal variance with pedigree 0.3627, pedigree (2,2,5,5,1)
  Data from one inventory study (Labhardt 1996)
- sand: 6734.16, 34.9606, 438231 kg (3 entries); lognormal variance with pedigree 0.3627, pedigree (2,2,5,5,1)
  Data from one inventory study (Labhardt 1996)
- waste rubber, unspecified: -236.5, -236.5 kg (2 entries); lognormal variance with pedigree 0.3627, pedigree (2,2,5,5,1)
  Data from one inventory study (Labhardt 1996)
  production volume 1419 kg
- waste polyethylene: -3915.71, -261.633, -19.7869, -108.064, -43.6565, -102.617, -3336.37, -27412.2 kg (8 entries); lognormal variance with pedigree 0.3627, pedigree (2,2,5,5,1)
  Data from one inventory study (Labhardt 1996)
  production volume 105600 kg
- gravel, crushed: 7147.14, 654.32, 32719.4, 125589 kg (4 entries); lognormal variance with pedigree 0.3627, pedigree (2,2,5,5,1)
  Data from one inventory study (Labhardt 1996)

## Emissions to nature
- Water [air, unspecified]: 2370 m3; name water_to_air_unspecified; lognormal variance with pedigree 0.0827, pedigree (2,2,5,5,1)
  Calculated value based on literature values and expert opinion. See comments in the parametres' comment field.
  property fraction, origin: salt water 0; name fraction_origin_salt_water
  property fraction, origin: unspecified 0; name fraction_origin_unspecified
  property fraction, origin: fresh water 1; name fraction_origin_fresh_water
- Water [water, unspecified]: 13430 m3; name water_to_water_unspecified; lognormal variance with pedigree 0.0827, pedigree (2,2,5,5,1)
  (same comment as for Water)
  property fraction, origin: fresh water 1; name fraction_origin_fresh_water_Ww
  property carbon content, fossil 0; name C_content_fossil
  property fraction, origin: unspecified 0; name fraction_origin_unspecified_Ww
  property water in wet mass 1000 kg; name WWM
  property dry mass 0 kg; name DM
  property carbon content, non-fossil 0; name C_content_non_fossil
  property fraction, origin: salt water 0; name fraction_origin_salt_water_Ww
  property wet mass 1000 kg; name WM

## Sampling procedure
data from literature

## Extrapolations
This dataset has been copied from an original dataset covering the geography CH. The uncertainty has been adjusted accordingly.

## Review by Niels Jungbluth 2003-06-11
Passed.
