# air separation, cryogenic

Dataset: EcoSpold 2, unit process
Geography: RER
Time period: 1997-01-01 to 2021-12-31
Technology level: current
Classification: ISIC rev.4 ecoinvent: 2011:Manufacture of basic chemicals
Synonyms: Dioxygen; Pure oxygen; Liquid oxygen; Oxygen molecule; Molecular oxygen
Scenario: Business-as-Usual
System model: Allocation, cut-off by classification
Generated by: Alex Primas
Published in: Althaus H.-J. 2007
Database: ecoinvent
isCopyrightProtected: true
accessRestrictedTo: 1

## General comment
This dataset represents the production of liquefied nitrogen, oxygen and argon by cryogenic air separation. The liquefaction process of air represents an average cryogenic air separation process. Cryogenic air separation is currently the most efficient and cost-effective technology for producing large quantities of oxygen, nitrogen, and argon as gaseous or liquid products (Smith & Klosek 2001). The fraction of each output is based on the composition of air (1.4% Argon, 23.1% Oxygen and 75.5% Nitrogen).
Nitrogen (N2) constitutes 78.09% by volume of the air. It is colourless, odourless, and tasteless. Nitrogen is often used as an 'inert' gas due to its non-reactive nature with many materials. Commercial nitrogen is produced by different air separation processes, such as cryogenic liquefaction and distillation, pressure swing adsorption (PSA) and membrane separation. Liquid nitrogen, produced by the cryogenic air separation process, finds wide use as a refrigerant in applications such as cryogenic grinding of plastics and food freezing. Gaseous nitrogen is used in the chemical and petroleum industries for storage tank blanketing and vessel inerting applications, in the food industries to pack oxidisable foods and by the electronics and metals industries for the inert properties.
Oxygen (O2) constitutes 20.95% by volume of the air. Liquid oxygen is pale blue. The principal use of oxygen stems from its strong oxidising properties. Oxygen is produced by air separation processes that use either cryogenic liquefaction and distillation or separation with vacuum swing adsorption (VSA). The major commercial uses of oxygen are in metal manufacturing, metal fabricating, and in health services. Oxygen is also used extensively in the chemical industry and in the pulp and paper industry.
Argon (Ar) is a monatomic, chemically inert gas composing slightly less than 0.93% by volume of the air. Argon is colourless, odourless, tasteless, non-corrosive, non-flammable, and non-toxic. Argon is the most abundant and most used of the noble gases. Commercial argon is the product of cryogenic air separation. Argon is the most abundant and most used of the noble gases. Its chief use is in metallurgy, where it provides an inert atmosphere in which hot metals can be worked. Because argon is very un-reactive, it prevents chemical reactions of the very hot metal being welded or forged.
This dataset is based on literature data and estimations.
References:
Althaus H.-J., Chudacoff M., Hischier R., Jungbluth N., Osses M. and Primas A. (2007) Life Cycle Inventories of Chemicals. ecoinvent report No. 8, v2.0. EMPA Dübendorf, Swiss Centre for Life Cycle Inventories, Dübendorf, CH.
Smith A. R. and Klosek J. (2001) A Review of Air Separation Technologies and their Integration with Energy Conversion Processes. In: Fuel Processing Technology, 70(2), pp. 115-134.

## Included activities start
From the input of air into an air separation facility.

## Included activities end
This activity ends with the production of liquefied nitrogen, oxygen and argon by cryogenic air separation. The dataset includes as input the electricity for processing, the cooling water, and the infrastructure for the air separation plant. This dataset does not include the extraction of noble gases from the liquid gases (e.g. Xenon and Krypton from the liquid oxygen). Air, which is the main resource for air liquefaction, is not considered because of its inexhaustibility and the short recycling time of the withdrawn products (especially for argon and nitrogen, less for oxygen). Emissions to the air are already included in the preceding processes, especialy in the electricity production, and are therefore not considered here. The separated CO2 and water vapour from the separation process were not accounted as emissions. The reason is that these components were already contained in the air input, so that they do not represent effective emissions. As wastewater, there is the unevaporated share of the make-up cooling water, but it is not listed because only minor emissions from this source are expected.

## Geography
Data from several producers in Europe, as well as U.S. and Russian producers.

## Technology
The main components of air are nitrogen and oxygen, but it also contains smaller amounts of water vapour, argon, carbon dioxide and very small amounts of other gases (e.g. noble gases). The purification and liquefaction of various components of air, in particular oxygen, nitrogen and argon, is an important industrial process, and it is called cryogenic air separation.
Cryogenic distillation accounts for approximately 85% of nitrogen and over 95% of oxygen production. It is the preferred supply mode for high volume and high purity requirements (Praxair 2002). Cryogenic air separation is currently the most efficient and cost-effective technology for producing large quantities of oxygen, nitrogen, and argon as gaseous or liquid products (Smith & Klosek 2001). Besides the air needed as a resource the major input for the liquefying process is the electricity to compress the inlet air, which normally comprises 95% of the utility costs of a cryogenic air separation plant. In some plants the amount of processed air (in Nm3) can be up to 5 times larger than the derived liquid products (Cryogenmash 2001). In these plants, the waste gas stream is naturally also much larger (in order to obtain the mass balance). As output of the cryogenic air separation there are three products: liquid oxygen, liquid nitrogen and liquid crude argon. The assumed process includes no gaseous co-products. In reality gaseous products are also processed if there is a demand at the production site. The investigated cryogenic air separation process leads to liquid products in the following quality:
- Liquid oxygen: min. 99.6 wt-%
- Liquid nitrogen: min. 99.9995 wt-%
- Liquid argon, crude: 96-98 wt-%
An air pre-treatment section downstream of the air compression (0.7 MPa) and after cooling removes process contaminants, including water, carbon dioxide, and hydrocarbons. The air is then cooled to cryogenic temperatures and distilled into oxygen, nitrogen, and, optionally, argon streams. Alternate compressing and expanding the recycled air can liquefy most of it.
Numerous configurations of heat exchange and distillation equipment can separate air into the required product streams. These process alternatives are selected based on the purity and number of product streams, required trade-offs between capital costs and power consumption, and the degree of integration between the air separate unit and other facility units. This process requires very complicated heat integration techniques because the only heat sink for cooling or condensation is another cryogenic stream in the process.
Since the boiling point of argon is between that of oxygen and nitrogen, it acts as an impurity in the product streams. If argon were collected and separated from the oxygen product, an oxygen purity of less than 95% by volume would result (Barron & Randall 1985). On the other hand, if argon were collected with the nitrogen product, the purity of nitrogen would not exceed 98.7% by volume. To achieve higher purities of oxygen and nitrogen the elimination of argon is necessary.
Commercial argon is the product of cryogenic air separation, where liquefaction and distillation processes are used to produce a low-purity crude argon product.
Praxair (2002) Gases > Nitrogen > Production of Nitrogen. Praxair Technology Inc. 2002. Retrieved 16.01.2002 from http://www.praxair.com
Smith A. R. and Klosek J. (2001) A Review of Air Separation Technologies and their Integration with Energy Conversion Processes. In: Fuel Processing Technology, 70(2), pp. 115-134.
Barron and Randall F. (1985) Cryogenic Systems. 2 Edition. Oxford University Press, New York
Cryogenmash (2001) KxAxApx Type Double-Pressure Air Separation Plants. Gen-eral Data. Cryogenic Industries, Moscow, Russia. Retrieved 16.01.2002 from http://www.cryogenmash.ru/production/vru/vru_kgag2_e.htm

## Parameters
- fraction, cooling water, to air: 0.3875 dimensionless; name fraction_CW_to_air; = (0.5*fraction_CW_OT_to_air)+(0.5*fraction_CW_R_to_air); lognormal variance with pedigree 0.092025, pedigree (4,4,3,2,4)
  Calculated value based on literature value (see comments of the other parametres present in this dataset) and expert opinion. In the case when no industry/literature data are available about the type of cooling or directly fraction, cooling water, to air specific for the process a default assumption is applied. It is assumed that the once-through cooling system is used in 50% of all cases and recirculating system is used in another 50% of all cases.
- fraction, cooling water, recirculating system, to air: 0.771 dimensionless; name fraction_CW_R_to_air; lognormal variance with pedigree 0.0413, pedigree (2,3,1,3,1)
  Calculated based on literature value (Scown, C.D., 2011, Water Footprint of U.S. Transportation Fuels and supplying information of the article) (Vionnet, S., Quantis Water Database - Technical Report, 2012).
- fraction, cooling water, cooling pond system, to air: 0.032 dimensionless; name fraction_CW_CP_to_air; lognormal variance with pedigree 0.0413, pedigree (2,3,1,3,1)
  (same comment as for fraction, cooling water, recirculating system, to air)
- fraction, cooling water, once-through system, to air: 0.004 dimensionless; name fraction_CW_OT_to_air; lognormal variance with pedigree 0.0413, pedigree (2,3,1,3,1)
  (same comment as for fraction, cooling water, recirculating system, to air)

## Reference product
- oxygen, liquid: 1 kg; name oxygen_liquid_RP; By-product classification allocatable product; CPC 34210: Hydrogen, nitrogen, oxygen, carbon dioxide and rare gases; inorganic oxygen compounds of non-metals n.e.c.; CAS 7782-44-7
  Calculated value. This dataset considers 1 kg of air as a functional unit, even though air as resource was neglected, so the main outputs are calculated from the air composition (1,4% Argon; 23,1% Oxygen and 75,5% Nitrogen).
  Oxygen (O2) constitutes 20.95% by volume of the air. Liquid oxygen is pale blue. The principal use of oxygen stems from its strong oxidising properties. Oxygen is produced by air separation processes that use either cryogenic liquefaction and distillation or separation with vacuum swing adsorption (VSA).
  The major commercial uses of oxygen are in metal manufacturing, metal fabricating, and in health services. Oxygen is also used extensively in the chemical industry and in the pulp and paper industry.
  production volume 1.72248e10 kg; name RP_PV; = 1E011*0.8*(13287/61711)
    Calculated value based on literature (Emsley, 2001) and estimates. 100 million tonnes of oxygen is being produced annually in the whole world. Out of two different production technologies air separation is the preferred one (Emsley, 2001). Based on this information it is estimated that 80% of the total production volume of oxygen is produced using this technology. The european production volume is extrapolated from the global production volume using GDP (2005, world: 61711 USD, Europe: 13287 USD).
  property price 0.155 EUR2005
    Temporary price data. Calculated as 90% of purchasers price based on: 2004 prices for World Import/Export data (US$ and tonnes) from UN Commodity Trade Statistics Database (http://data.un.org/Explorer.aspxDatabase [Accessed 2 July 2010]).
  property carbon content 0
    carbon content on a dry matter basis (reserved; not for manual entry)
  property true value 0.035805; name oxygen_liquid_RP_true_value
    allocation property applied in "true value" allocation // value calculated from revenue
  properties: water in wet mass 0 kg, wet mass 1 kg, water content 0, dry mass 1 kg, carbon content, non-fossil 0, carbon content, fossil 0, carbon allocation 0 kg

## By-products
- argon, crude, liquid: 0 kg; name argon_liquid_output; CPC 34210: Hydrogen, nitrogen, oxygen, carbon dioxide and rare gases; inorganic oxygen compounds of non-metals n.e.c.; By-product classification allocatable product; CAS 7440-37-1; pedigree (1,1,1,1,1)
  Calculated value. This dataset considers 1 kg of air as a functional unit, even though air as resource was neglected, so the main outputs are calculated from the air composition (1,4% Argon; 23,1% Oxygen and 75,5% Nitrogen).
  Argon (Ar) is a monatomic, chemically inert gas composing slightly less than 0.93% by volume of the air. Argon is colourless, odourless, tasteless, non-corrosive, non-flammable, and non-toxic. Argon is the most abundant and most used of the noble gases. Commercial argon is the product of cryogenic air separation.
  Argon is the most abundant and most used of the noble gases. Its chief use is in metallurgy, where it provides an inert atmosphere in which hot metals can be worked. Because argon is very un-reactive, it prevents chemical reactions of the very hot metal being welded or forged.
  production volume 1.04393e9 kg; = RP_PV*argon_liquid_output/ABS(oxygen_liquid_RP)
    Calculated from the production volume of oxygen, liquid in proportion to the respective output amounts.
  property price 0.37 EUR2005; name argon_liquid_output_price_EUR2005
    (same comment as for oxygen, liquid)
  property water content 0; name water_content
  property water in wet mass 0 kg; name WWM
  property carbon content, non-fossil 0; name C_content_non_fossil
  property wet mass 1 kg; name WM
  property dry mass 1 kg; name DM
  property carbon content, fossil 0; name C_content_fossil
  property carbon content 0
    carbon content on a dry matter basis (reserved; not for manual entry)
  property true value 0.00518; name argon_liquid_output_true_value
    allocation property applied in "true value" allocation // value calculated from revenue
  properties: carbon allocation 0 kg
- nitrogen, liquid: 0 kg; name nitrogen_liquid_output; CPC 34210: Hydrogen, nitrogen, oxygen, carbon dioxide and rare gases; inorganic oxygen compounds of non-metals n.e.c.; By-product classification allocatable product; CAS 7727-37-9; pedigree (1,1,1,1,1)
  Calculated value. This dataset considers 1 kg of air as a functional unit, even though air as resource was neglected, so the main outputs are calculated from the air composition (1,4% Argon; 23,1% Oxygen and 75,5% Nitrogen).
  Nitrogen (N2) constitutes 78.09% by volume of the air. It is colourless, odourless, and tasteless. Nitrogen is often used as an 'inert' gas due to its non-reactive nature with many materials. Commercial nitrogen is produced by different air separation processes as cryogenic liquefaction and distillation, pressure swing adsorption (PSA) and membrane separation.
  Liquid nitrogen, produced by the cryogenic air separation process, finds wide use as a refrigerant in applications such as cryogenic grinding of plastics and food freezing. Gaseous nitrogen is used in the chemical and petroleum industries for storage tank blanketing and vessel inerting applications, in the food industries to pack oxidisable foods and by the electronics and metals industries for the inert properties.
  production volume 5.62975e10 kg; = RP_PV*nitrogen_liquid_output/ABS(oxygen_liquid_RP)
    (same comment as for argon, crude, liquid)
  property price 0.0615 EUR2005
    Estimated based on literature (http://hypertextbook.com/facts/2007/KarenFan.shtml). The price of liquid nitrogen is around 0.06 USD/l. The density of liquid nitrogen used for recalculation is 0.808 kg/l.
  property carbon content 0
    carbon content on a dry matter basis (reserved; not for manual entry)
  property true value 0.0464325; name nitrogen_liquid_output_true_value
    allocation property applied in "true value" allocation // value calculated from revenue
  properties: carbon content, non-fossil 0, dry mass 1 kg, carbon content, fossil 0, water in wet mass 0 kg, water content 0, wet mass 1 kg, carbon allocation 0 kg

## Inputs from technosphere
- electricity, medium voltage: 1.41848 kWh; source Frischknecht R 1996; lognormal variance with pedigree 0.054, pedigree (3,4,5,1,1)
  Estimated value. An average electricity consumption of 0.8 kWh/kg liquid air was assumed for this dataset. This value equals the energy consumption of larger plants under average operating circumstances. It covers also the energy consumption of smaller plants under optimal operating circumstances. As worst case, the value of 1.2 kWh/kg is assumed, which represents power consumption under unfavourable load conditions.
  For larger plants with a power consumption of several MW, the use of medium voltage electricity is applicable. For small plants also power supply with low voltage (380 V, 50 Hz) would be possible. For this dataset medium voltage electricity is used, because large plants have the main production share of the liquefied air products in Europe.
  Further references:
  Cosmodyne (2001) Performance Specifications, Aspen 1000 / Aspen 2000. Cosmodyne, Torrance, (CA, USA). Retrieved 16.01.2002 from www.cosmodyne.com <http://www.cosmodyne.com>.
  Cryogenmash (2001) KxAxApx Type Double-Pressure Air Separation Plants. General Data. Cryogenic Industries, Moscow, Russia. Retrieved 16.01.2002 from <http://www.cryogenmash.ru/production/vru/vru_kgag2_e.htm>.
  Böcker, N., Grahl, M., Tota, A., Häussinger, P., Leitgeb, P. and Schmücker, B. 2013. Nitrogen. Ullmann's Encyclopedia of Industrial Chemistry. 1–27.
  Boustead I. and Hancock G. F. (1979) Handbook of industrial energy analysis. Elis Hardwood Ldt., Chichester, England.
  Flynn T. M. (1997) Cryogenic Engineering. Marcel Dekker Inc, New York.
  Personal communication, Nicolas Zennaro, AGA, 2001.
  Personal communication, Richard Troxler, Pangas AG Switzerland, 16.01.2002.
  Uncertainty: D
- air separation facility: 1.11705e-9 unit; lognormal variance with pedigree 0.4461, pedigree (5,5,5,3,3)
  Estimated value. The land use is already included in the infrastructure process of the production facility and therefore not considered separately. The infrastructure of the air separation plant refers to an annual production of 80'000 t liquid product and a plant lifetime of 20 years. Therefore the infrastructure has to be divided by a production of 1.6 Mt. With this product output an infrastructure value of 0.63 * 10-9 units per kg of liquefied product were calculated.
  Uncertainty: E

## Inputs from nature
- Nitrogen [natural resource, in air]: 1.33869 kg; = nitrogen_liquid_output; lognormal variance with pedigree 0.0406, pedigree (1,1,5,1,1)
  Calculated value
- Argon-40 [natural resource, in air]: 0.0248234 kg; = argon_liquid_output; lognormal variance with pedigree 0.0406, pedigree (1,1,5,1,1)
  Calculated value
- Water, cooling, unspecified natural origin [natural resource, in water]: 0.0538845 m3; name water_cooling_UNO_input; source Byers, W. 2003; lognormal variance with pedigree 0.0513, pedigree (2,3,5,3,1)
  Estimated value. Assumptions of technology used for cooling. The main cooling circuit is assumed as an open recirculating system with a cooling tower. There will be need for replacement of water due to evaporation and blow down.
  Data from: Byers, W., Lindgren, G., Noling, C. and Peters, D. (2002) References, in Industrial Water Management: A Systems Approach, Second Edition, John Wiley & Sons, Inc., Hoboken, NJ, USA. Retrived from: <https://books.google.ch/books?id=Js6VoZGnJYgC&printsec=frontcover&dq=Byers,+W.,+Lindgren,+G.,+Noling,+C.+and+Peters,+D.+(2002)+Industrial+Water+Management:+A+System+Approach&hl=en&sa=X&redir_esc=y#v=onepage&q=nitroge>
  Similar values can be found in the technical information of Cosmodyne - a cryogenic industries company - ASPEN SERIES oxygen, nitrogen, argon generating systems. Retrieved 08.02.2016 from: <http://cosmodyne.com/wp-content/uploads/2015/10/ASPEN-Low-Res.pdf?b7ab60>.
  Based on the references the amount of cooling water required is assumed to be 0.03039 m3/kg of liquid products.
  Uncertainty: A
- Oxygen [natural resource, in air]: 0.409586 kg; = oxygen_liquid_RP; lognormal variance with pedigree 0.0406, pedigree (1,1,5,1,1)
  Calculated value

## Emissions to nature
- Water [water, unspecified]: 0.0330043 m3; = water_cooling_UNO_input*(1-fraction_CW_to_air); lognormal variance with pedigree 0.0807, pedigree (2,2,5,1,1)
  Calculated as a fraction of the input of water. For more details, refer to the mathematical relation and the parameters.
  property fraction, origin: unspecified 1; name fraction_origin_unspecified_Ww
  property fraction, origin: salt water 0; name fraction_origin_salt_water_Ww
  property fraction, origin: fresh water 0; name fraction_origin_fresh_water_Ww
- Water [air, unspecified]: 0.0208803 m3; = (water_cooling_UNO_input*fraction_CW_to_air); lognormal variance with pedigree 0.0807, pedigree (2,2,5,1,1)
  (same comment as for Water)
  property fraction, origin: unspecified 1; name fraction_origin_unspecified
  property fraction, origin: fresh water 0; name fraction_origin_fresh_water
  property fraction, origin: salt water 0; name fraction_origin_salt_water

## Sampling procedure
Data on energy demand and water resources based on several data sources of different plant size. Infrastructure demand estimated from data of small plants.

## Extrapolations
Energy data of good representativity. Cooling water demand and infrastructure extrapolated from technology of lower representativity. Production volume extrapolated from the global data using GDP.

## Review by Gregor Wernet 2017-08-04
This dataset was additionally reviewed in a separate review process by Eric Johnson of Atlantic Consulting as well as Emilia Moreno Ruiz and Gregor Wernet of ecoinvent.
