# transport, freight, light commercial vehicle

Dataset: EcoSpold 2, unit process
Geography: Europe without Switzerland
Time period: 2005-01-01 to 2021-12-31
Technology level: current
Classification: ISIC rev.4 ecoinvent: 4923:Freight transport by road
Scenario: Business-as-Usual
System model: Allocation, cut-off by classification
Share of production covered: 100 %
Generated by: Michael Spielmann (obsolete)
Published in: Spielmann M. 2007
Database: ecoinvent
isCopyrightProtected: true
accessRestrictedTo: 1

## General comment
Inventory refers to the entire transport life cycle. For road infrastructure, expenditures and environmental interventions due to construction of roads have been allocated based on the Gross tonne kilometre performance. Expenditures due to operation of the road infrastructure, as well as land use have been allocated based on the yearly vehicle kilometre performance. For the attribution of vehicle share to the transport performance a vehicle life time performance of 2.39E05 pkm/vehicle has been assumed. The data of the energy use and combustion emissions are average data for the operation of an average Swiss van (fleet average) in the year 2005, comprising various emission technologies.

## Included activities end
operation of vehicle; production and maintenance of vehicles; construction of road. In the energy use and combustion emissions dataset, fuel consumption is included. Direct airborne emissions of gaseous substances, particulate matters and heavy metals are accounted for. Particulate emissions comprise exhaust- and abrasions emissions. Heavy metal emissions to soil and water caused by tyre abrasion are included.

## Geography
The data for vehicle operation and road infrastructure reflect Swiss conditions. Data for vehicle manufacturing and maintenance represents generic European data. Data for the energy use and combustion emissions reflect the Swiss situation.

## Technology
Petrol, various emission treatment standards. Diesel and petrol vehicles.

## Reference product
- transport, freight, light commercial vehicle: 1 metric ton*km; CPC 65119: Other road transport services of freight; By-product classification allocatable product
  production volume 5.67e10 metric ton*km; name transport_RP_PV
    5.7E10 Mio tkm
    ecoinvent v2 report 14 Table 5-118
  property price 0.59595 EUR2005
    Calculated based on inputs: The price of the product has been calculated as a sum of the values of the material and energy inputs for this product. This value is therefore a rough estimation. It may underestimate the real price since there are additional expenses when producing any product. These expences can include for example labour costs, treatment of waste materials and profit for the producer. Please consider carefully whether this level of data quality is acceptable for your application.

## Inputs from technosphere
- light commercial vehicle: 2.4098e-5 unit; lognormal variance with pedigree 0.342025, pedigree (3,1,5,2,1)
  Uncertainty: o
- petrol, low-sulfur: 0.074327 kg; lognormal variance with pedigree 0.0406, pedigree (1,1,5,1,1)
  Energy use and combustion emissions
  Uncertainty: d
  properties: dry mass 1 kg, carbon content, fossil 0.865, wet mass 1 kg, heating value, net 42.5 MJ
  note on heating value, net: Based on literature, page 611, Report 17: Jungbluth, N., Chudacoff, M., Dauriat, A., Dinkel, F., Doka, G., Faist Emmenegger, M., Gnansounou, E., Kljun, N., Schleiss, K., Spielmann, M., Stettler, C., Sutter, J. 2007: Life Cycle Inventories of Bioenergy. ecoinvent report No. 17, Swiss Centre for Life Cycle Inventories, Dübendorf, CH.
- road: 0.0067419 m*year; lognormal variance with pedigree 0.342, pedigree (3,1,5,1,1)
  Uncertainty: o
- road maintenance: 0.00146774 m*year; lognormal variance with pedigree 0.342, pedigree (3,1,5,1,1)
  Calculated value based demand factors and underlying assumptions for European road transport services. Values are based on total vkm of all road transport services (RER) and the relative shares of each specific form (e.g. 3.5-7.5t lorry). The value per tkm is then based on the average load factor (see Activity Description). Transport performance data is derived from TREMOVE (2009).
  Uncertainty: o
- maintenance, light commercial vehicle: 2.4098e-5 unit; lognormal variance with pedigree 0.342025, pedigree (3,1,5,2,1)
  activityLink introduced to establish a direct link to the corresponding regional supply of this product
  Uncertainty: o
- diesel, low-sulfur: 0.320115 kg; lognormal variance with pedigree 0.0406, pedigree (1,1,5,1,1)
  Energy use and combustion emissions
  Uncertainty: d
  properties: wet mass 1 kg, carbon content, fossil 0.865, dry mass 1 kg, heating value, net 42.8 MJ

## Emissions to nature
- Chromium [soil, unspecified]: 2.07294e-9 kg; lognormal variance with pedigree 0.208, pedigree (5,5,5,1,1)
  Energy use and combustion emissions
  Uncertainty: a
- Benzene [air, unspecified]: 9.0258e-6 kg; lognormal variance with pedigree 0.08, pedigree (1,1,5,1,1)
  Energy use and combustion emissions
  Uncertainty: d
- Copper [soil, unspecified]: 2.90883e-8 kg; lognormal variance with pedigree 0.208, pedigree (5,5,5,1,1)
  Energy use and combustion emissions
  Uncertainty: a
- Ammonia [air, unspecified]: 2.70562e-5 kg; lognormal variance with pedigree 0.0512, pedigree (2,3,5,1,1)
  Energy use and combustion emissions
  Uncertainty: d
- Copper [air, unspecified]: 3.85647e-6 kg; lognormal variance with pedigree 0.756, pedigree (4,5,5,1,1)
  Energy use and combustion emissions
  Uncertainty: t
- Lead [soil, unspecified]: 1.78878e-8 kg; lognormal variance with pedigree 0.208, pedigree (5,5,5,1,1)
  Energy use and combustion emissions
  Uncertainty: a
- Xylene [air, unspecified]: 1.80511e-5 kg; lognormal variance with pedigree 0.08, pedigree (1,1,5,1,1)
  Energy use and combustion emissions
  Uncertainty: d
- Toluene [air, unspecified]: 2.58994e-5 kg; lognormal variance with pedigree 0.08, pedigree (1,1,5,1,1)
  Energy use and combustion emissions
  Uncertainty: d
- Nitrogen oxides [air, unspecified]: 0.00598274 kg; lognormal variance with pedigree 0.08, pedigree (1,1,5,1,1)
  Energy use and combustion emissions
  Uncertainty: d
- Sulfur dioxide [air, unspecified]: 3.94442e-5 kg; lognormal variance with pedigree 0.0406, pedigree (2,1,5,1,1)
  Energy use and combustion emissions
  Uncertainty: o
- Zinc [air, unspecified]: 1.5905e-6 kg; lognormal variance with pedigree 0.756, pedigree (4,5,5,1,1)
  Energy use and combustion emissions
  Uncertainty: t
- Chromium [air, unspecified]: 6.41906e-8 kg; lognormal variance with pedigree 0.756, pedigree (4,5,5,1,1)
  Energy use and combustion emissions
  Uncertainty: t
- Dinitrogen monoxide [air, unspecified]: 4.94619e-5 kg; lognormal variance with pedigree 0.0812, pedigree (2,3,5,1,1)
  Energy use and combustion emissions
  Uncertainty: d
- Nickel [soil, unspecified]: 5.61694e-9 kg; lognormal variance with pedigree 0.208, pedigree (5,5,5,1,1)
  Energy use and combustion emissions
  Uncertainty: a
- Nickel [air, unspecified]: 5.93397e-8 kg; lognormal variance with pedigree 0.756, pedigree (4,5,5,1,1)
  Energy use and combustion emissions
  Uncertainty: t
  property water in wet mass 0 kg; name WWM
  property wet mass 1 kg; name WM
  property carbon content, non-fossil 0; name C_content_non_fossil
  property water content 0; name water_content
  property carbon content, fossil 0; name C_content_fossil
  property dry mass 1 kg; name DM
- Zinc [soil, unspecified]: 1.22756e-6 kg; lognormal variance with pedigree 0.208, pedigree (5,5,5,1,1)
  Energy use and combustion emissions
  Uncertainty: a
- Lead [water, unspecified]: 1.78878e-8 kg; lognormal variance with pedigree 0.808, pedigree (5,5,5,1,1)
  Energy use and combustion emissions
  Uncertainty: a
- Selenium [air, unspecified]: 4.92212e-9 kg; lognormal variance with pedigree 0.756, pedigree (4,5,5,1,1)
  Energy use and combustion emissions
  Uncertainty: t
- Carbon monoxide, fossil [air, unspecified]: 0.0115992 kg; lognormal variance with pedigree 0.69, pedigree (1,1,5,1,1)
  Energy use and combustion emissions
  Uncertainty: d
- Particulates, > 2.5 um, and < 10um [air, unspecified]: 9.54588e-5 kg; lognormal variance with pedigree 0.1627, pedigree (3,3,5,3,1)
  Energy use and combustion emissions
  Uncertainty: a
- NMVOC, non-methane volatile organic compounds, unspecified origin [air, unspecified]: 0.000973302 kg; lognormal variance with pedigree 0.08, pedigree (1,1,5,1,1)
  Energy use and combustion emissions
  Uncertainty: d
- Methane, fossil [air, unspecified]: 4.01684e-5 kg; lognormal variance with pedigree 0.08, pedigree (1,1,5,1,1)
  Energy use and combustion emissions
  Uncertainty: d
- PAH, polycyclic aromatic hydrocarbons [air, unspecified]: 2.1206e-9 kg; lognormal variance with pedigree 1.5812, pedigree (2,3,5,1,1)
  Energy use and combustion emissions
  Uncertainty: r
- Acetaldehyde [air, unspecified]: 8.46331e-5 kg; lognormal variance with pedigree 0.0812, pedigree (2,3,5,1,1)
  Energy use and combustion emissions
  Uncertainty: d
- Particulates, > 10 um [air, unspecified]: 7.68399e-5 kg; lognormal variance with pedigree 0.0807, pedigree (1,3,5,3,1)
  Energy use and combustion emissions
  Uncertainty: a
- Chromium, ion [water, unspecified]: 2.07294e-9 kg; lognormal variance with pedigree 0.468, pedigree (5,5,5,1,1)
  Energy use and combustion emissions
  Uncertainty: a
- Cadmium, ion [water, unspecified]: 4.34654e-10 kg; lognormal variance with pedigree 0.468, pedigree (5,5,5,1,1)
  Energy use and combustion emissions
  Uncertainty: a
- Copper, ion [water, unspecified]: 2.90883e-8 kg; lognormal variance with pedigree 0.468, pedigree (5,5,5,1,1)
  Energy use and combustion emissions
  Uncertainty: a
- Zinc, ion [water, unspecified]: 1.22756e-6 kg; lognormal variance with pedigree 0.808, pedigree (5,5,5,1,1)
  Energy use and combustion emissions
  Uncertainty: a
- Cadmium [air, unspecified]: 4.99613e-9 kg; lognormal variance with pedigree 0.756, pedigree (4,5,5,1,1)
  Energy use and combustion emissions
  Uncertainty: t
- Mercury [air, unspecified]: 9.84436e-12 kg; lognormal variance with pedigree 0.756, pedigree (4,5,5,1,1)
  Energy use and combustion emissions
  Uncertainty: t
- Formaldehyde [air, unspecified]: 0.000156967 kg; lognormal variance with pedigree 0.0812, pedigree (2,3,5,1,1)
  Energy use and combustion emissions
  Uncertainty: d
- Chromium VI [air, unspecified]: 4.92212e-11 kg; lognormal variance with pedigree 0.756, pedigree (4,5,5,1,1)
  Energy use and combustion emissions
  Uncertainty: o
- Cadmium [soil, unspecified]: 4.34654e-10 kg; lognormal variance with pedigree 0.208, pedigree (5,5,5,1,1)
  Energy use and combustion emissions
  Uncertainty: a
- Lead [air, unspecified]: 2.03487e-7 kg; lognormal variance with pedigree 0.756, pedigree (4,5,5,1,1)
  Energy use and combustion emissions
  Uncertainty: t
- Carbon dioxide, fossil [air, unspecified]: 1.23292 kg; lognormal variance with pedigree 0.0406, pedigree (2,1,5,1,1)
  Energy use and combustion emissions
  Uncertainty: o
- Nickel, ion [water, unspecified]: 5.61694e-9 kg; lognormal variance with pedigree 0.808, pedigree (5,5,5,1,1)
  Energy use and combustion emissions
  Uncertainty: a
- Particulates, < 2.5 um [air, unspecified]: 0.000567473 kg; lognormal variance with pedigree 0.3401, pedigree (1,1,5,3,1)
  Energy use and combustion emissions
  Uncertainty: i

## Sampling procedure
Literature data.

## Extrapolations
This dataset has been extrapolated from year 2005 to the year of the calculation (2021). The uncertainty has been adjusted accordingly.
