# spodumene production

Dataset: EcoSpold 2, unit process
Geography: RoW
Time period: 2000-01-01 to 2021-12-31
Technology level: current
Classification: EcoSpold01Categories: chemicals/inorganics
Classification: ISIC rev.4 ecoinvent: 0729:Mining of other non-ferrous metal ores
Scenario: Business-as-Usual
System model: Allocation, cut-off by classification
Generated by: Roland Hischier
Published in: Hischier R. 2007
Database: ecoinvent
isCopyrightProtected: true
accessRestrictedTo: 1

## General comment
This dataset represents the production of 1 kg of milled spodumene in the World. It is a copy of the AU dataset and so there may be larger uncertainty of the process data.

## Included activities start
The activity starts from spodumene in the ground.

## Included activities end
This activites ends with the production of 1 kg of spodumene. The dataset includes the input of raw materials, machineries, energy consumption, emissions to air, and infrastructure of the site.

## Geography
This dataset represents a copy of the dataset "spodumene production" covering geography AU. The uncertainty has been updated accordingly.

## Technology
Technology for iron mining, crushing and milling for limestone production are assumed as a first approximation.

## Time period
The time period is from 2000 to 2012 (date of the publication including information on Lithium content)

## Parameters
- fraction, process water, to air: 0.205 dimensionless; name fraction_PW_to_air; lognormal variance with pedigree 0.092025, pedigree (4,4,3,2,4)
- efficiency: 0.95 dimensionless; name recovery_efficiency
  95% recovery efficiency is assumed

## Reference product
- spodumene: 1 kg; name RefProd; By-product classification allocatable product; CPC 4160: Other non-ferrous metals and articles thereof (including waste and scrap of some metals); cermets and articles […]; CAS 1302-37-0
  EcoSpold01Location=RER
  production volume 2.06422e8 kg; name spodumene_PV; = (1965944 + 41000 + 114000 + 37800*(40500/(40500 + 34800))*(186.89/73.891))*1000
    Calculated based on spodumene production volumes of the countries reported in USGS (2021), In 2018, the reported producers of spodumene are Australia, Brazil, Canada and China.
    For China, the production volume is reported in lithium carbonate equivalent (LCE) and covers the production from both minerals and brine. The reported production volume is split based on the production capacities. In 2017, the capacity of China’s mineral producers was 40,500 t/yr of LCE, while the capacity of brine-based producers was 34,800 t/yr (Jaskula 2020). The capacity share of mineral producers is used as approximation of the share of LCE contained in spodumene mined in China. The conversion to the spodumene amount is done considering the molecular weights of Li2CO3 MW (73.891 g/mol) and spodumene (186.09 g/mol).
    Reference:
    USGS (2021). Lithium Statistics and Information, Minerals Yearbook, Advance Data Release of the 2019 Annual Tables. https://prd-wret.s3.us-west-2.amazonaws.com/assets/palladium/production/atoms/files/myb1-2019-lithi-adv.xlsx
    Jaskula, B. W. (2020). 2017 Minerals Yearbook, Lithium [Advance Release]. U.S. Geological Survey. https://prd-wret.s3.us-west-2.amazonaws.com/assets/palladium/production/atoms/files/myb1-2017-lithi.pdf
  property price 4.3 EUR2005
    Price of the production of 1 kg of lithium in USA, in 2010, based on [http://minerals.usgs.gov/minerals/pubs/mcs/2015/mcs2015.pdf].
  property lithium content 0.0349; name spodumene_Li_content
    lithium content on a dry matter basis. According to Stamp et al. 2012, Li content in concentrated ore is 3.49%
    Reference:
    Stamp, A., Lang, D. J., & Wäger, P. A. (2012). Environmental impacts of a transition toward e-mobility: the present and future role of lithium carbonate production. Journal of Cleaner Production, 23(1), 104-112.
  property carbon content 0
    carbon content on a dry matter basis (reserved; not for manual entry)
  properties: dry mass 1 kg, water content 0, water in wet mass 0 kg, wet mass 1 kg, carbon content, non-fossil 0, carbon content, fossil 0, carbon allocation 0 kg

## Inputs from technosphere
- non-sulfidic tailing, off-site: -1.38886 kg; name tailing_amount; = ((spodumene_in_ground_amount + gangue_amount - RefProd- PM_large_amount- PM_medium_amount- PM_small_amount)/0.7)*-1; lognormal variance with pedigree 0.2106, pedigree (5,5,5,5,5)
  Calculated value to obtain mass balance, considering the dry mass of tailings (0.7, see exchange properties)
  production volume 2.86714e8 kg; = spodumene_PV*tailing_amount/RefProd
    Calculated from production volume of reference product using the relative outputs.
  property price 0 EUR2005; name tailing_amount_price_EUR2005
  property dry mass 0.7 kg; name tailing_DM
  properties: water content 0.428571, wet mass 1 kg, lithium content 0.00188936
  note on lithium content: lithium content on a dry matter basis. Calculated value based on the Li content of spodumene in ground, spodumene concentrate (reference product) and the mass of tailings.
- recultivation, iron mine: 2.13e-6 m2; lognormal variance with pedigree 0.3686, pedigree (4,3,4,5,5)
  EcoSpold01Location=GLO
  Approximation with data from iron mining & lime treatment
  Uncertainty: approximation with data from iron mining & lime treatment
- industrial machine, heavy, unspecified: 0.000231 kg; lognormal variance with pedigree 0.5486, pedigree (4,3,4,5,5)
  EcoSpold01Location=RER
  Approximation with data from iron mining & lime treatment
  Uncertainty: approximation with data from iron mining & lime treatment
- electricity, medium voltage: 0 kWh; pedigree (1,1,1,1,1)
  EcoSpold01Location=UCTE
  Approximation with data from iron mining & lime treatment
  Uncertainty: approximation with data from iron mining & lime treatment
- diesel, burned in building machine: 0.0255 MJ; lognormal variance with pedigree 0.2386, pedigree (4,3,4,5,5)
  Approximation with data from iron mining & lime treatment
  EcoSpold01Location=GLO
  Uncertainty: approximation with data from iron mining & lime treatment
  properties: heating value, net 1 MJ
- mine infrastructure, iron: 8.33e-13 unit; lognormal variance with pedigree 0.5486, pedigree (4,3,4,5,5)
  (same comment as for diesel, burned in building machine)
- heat, district or industrial, other than natural gas: 0 MJ; pedigree (1,1,1,1,1)
  (same comment as for industrial machine, heavy, unspecified)
  properties: heating value, net 1 MJ
- heat, central or small-scale, other than natural gas: 0.00282 MJ; lognormal variance with pedigree 0.2386, pedigree (4,3,4,5,5)
  Approximation with data from iron mining & lime treatment
  EcoSpold01Location=CH
  Uncertainty: approximation with data from iron mining & lime treatment
  properties: heating value, net 1 MJ
- conveyor belt: 2.78e-8 m; lognormal variance with pedigree 0.5486, pedigree (4,3,4,5,5)
  Approximation with data from iron mining & lime treatment
  EcoSpold01Location=RER
  Uncertainty: approximation with data from iron mining & lime treatment
- blasting: 0.000271 kg; lognormal variance with pedigree 0.2386, pedigree (4,3,4,5,5)
  (same comment as for industrial machine, heavy, unspecified)
- electricity, medium voltage: 6.97681e-5, 0.00117126, 0.017035, 0.00539983, 0.00240109, 0.0078231 kWh (6 entries); lognormal variance with pedigree 0.2386, pedigree (4,3,4,5,5)
  (same comment as for electricity, medium voltage)
- heat, district or industrial, other than natural gas: 0.00145674, 0.0883433 MJ (2 entries); lognormal variance with pedigree 0.2386, pedigree (4,3,4,5,5)
  (same comment as for industrial machine, heavy, unspecified)

## Inputs from nature
- Spodumene, in ground [natural resource, in ground]: 0.985074 kg; name spodumene_in_ground_amount; = ( spodumene_Li_content/ recovery_efficiency)/(6.94/(6.94+26.9815384+2*(28.085+3*16))); lognormal variance with pedigree 0.2386, pedigree (4,3,4,5,5)
  Calculated value based on lithium content in pure spodumene in ground (LiAl(SiO3)2), i.e. 3.49% according to Stamp et al. 2012. Molecular weights: Li = 6.94 g/mol; Al = 26.98 g/mol; Si = 28.085 g/mol; O = 16 g/mol
  Reference:
  Stamp, A., Lang, D. J., & Wäger, P. A. (2012). Environmental impacts of a transition toward e-mobility: the present and future role of lithium carbonate production. Journal of Cleaner Production, 23(1), 104-112.
  Uncertainty: approximation with data from iron mining & lime treatment
  property lithium content 0.0186; name spodumene_in_ground_Li_content
- Transformation, to mineral extraction site [natural resource, land]: 2.13e-6 m2; lognormal variance with pedigree 0.3686, pedigree (4,3,4,5,5)
  Approximation with data from iron mining & lime treatment
  Uncertainty: approximation with data from iron mining & lime treatment
- Water, well, in ground [natural resource, in water]: 0.000416658 m3; = (tailing_amount*-1)*0.3/1000; source Kellenberger D. 2007; lognormal variance with pedigree 0.2386, pedigree (4,3,4,5,5)
  Calculated value, based on the wet mass of tailing.
  Uncertainty: approximation with data from iron mining & lime treatment
- Gangue, in ground [natural resource, in ground]: 0.990033 kg; name gangue_amount; = ((spodumene_Li_content/recovery_efficiency)/spodumene_in_ground_Li_content)-(spodumene_Li_content/ recovery_efficiency)/(6.94/(6.94 + 26.98 + 2*(28.085 + 3*16))); lognormal variance with pedigree 0.2106, pedigree (5,5,5,5,5)
  Calculated value based on lithium content in pure spodumene in ground (LiAl(SiO3)2) and extracted ores. Molecular weights: Li = 6.94 g/mol; Al = 26.98 g/mol; Si = 28.085 g/mol; O = 16 g/mol
- Transformation, from forest, unspecified [natural resource, land]: 2.13e-6 m2; lognormal variance with pedigree 0.3686, pedigree (4,3,4,5,5)
  (same comment as for Transformation, to mineral extraction site)
- Occupation, mineral extraction site [natural resource, land]: 0.00012 m2*year; lognormal variance with pedigree 0.2786, pedigree (4,3,4,5,5)
  (same comment as for Transformation, to mineral extraction site)

## Emissions to nature
- Particulates, > 10 um [air, non-urban air or from high stacks]: 0.00145 kg; name PM_large_amount; lognormal variance with pedigree 0.2786, pedigree (4,3,4,5,5)
  (same comment as for Transformation, to mineral extraction site)
- Particulates, < 2.5 um [air, non-urban air or from high stacks]: 0.000145 kg; name PM_small_amount; lognormal variance with pedigree 0.5486, pedigree (4,3,4,5,5)
  (same comment as for Transformation, to mineral extraction site)
- Particulates, > 2.5 um, and < 10um [air, non-urban air or from high stacks]: 0.00131 kg; name PM_medium_amount; lognormal variance with pedigree 0.3686, pedigree (4,3,4,5,5)
  (same comment as for Transformation, to mineral extraction site)

## Sampling procedure
Approximation with data from literature. Amounts are mostly taken from the report by Hischier et al. 2007 (see published source). The amount of spodumene in ground and consequently the tailing amount is based on information about the lithium content in raw and concentrated ores from Stamp et al. (2012), from the mining site of Talison, Australia.

Reference:
Stamp, A., Lang, D. J., & Wäger, P. A. (2012). Environmental impacts of a transition toward e-mobility: the present and future role of lithium carbonate production. Journal of Cleaner Production, 23(1), 104-112.

## Extrapolations
Most data are extrapolated from AU, based on the report by Hischier et al. 2007 (see published source)

## Review by Carl Vadenbo 2021-02-24
Extrapolation from AU could be stated more explicity, but general comment at least mentions that it is a copy of a country-specific dataset.
