# treatment of wastewater from potato starch production, capacity 1.1E10l/year

Dataset: EcoSpold 2, unit process
Geography: RoW
Time period: 1994-01-01 to 2021-12-31
Technology level: current
Classification: ISIC rev.4 ecoinvent: 3700:Sewerage
Classification: EcoSpold01Categories: waste management/wastewater treatment
Tags: Treatment; ConvertedDataset
Scenario: Business-as-Usual
System model: Allocation, cut-off by classification
Generated by: Gabor Doka (obsolete)
Published in: Doka G. 2008
Database: ecoinvent
isCopyrightProtected: true
accessRestrictedTo: 1

## General comment
Wastewater purified in a moderatly large municipal wastewater treatment plant (capacity class 2), with an average capacity size of 71100 per-captia-equivalents PCE.
Wastewater contains (in kg/m3): COD: 2 (GSD=217%); BOD: 1.35 (GSD=154%); Ntot.: 0.006 (GSD=113%);
[This dataset was already contained in the ecoinvent database version 2. It was not individually updated during the transfer to ecoinvent version 3. Life Cycle Impact Assessment results may still have changed, as they are affected by changes in the supply chain, i.e. in other datasets. This dataset was generated following the ecoinvent quality guidelines for version 2. It may have been subject to central changes described in the ecoinvent version 3 change report (http://www.ecoinvent.org/database/ecoinvent-version-3/reports-of-changes/), and the results of the central updates were reviewed extensively. The changes added e.g. consistent water flows and other information throughout the database. The documentation of this dataset can be found in the ecoinvent reports of version 2, which are still available via the ecoinvent website. The change report linked above covers all central changes that were made during the conversion process.]

## Included activities end
Infrastructure materials for municipal wastewater treatment plant, transports, dismantling. Land use burdens.

## Geography
Specific to the technology mix encountered in Switzerland in 2000. Well applicable to modern treatment practices in Europe, North America or Japan.

## Technology
Three stage wastewater treatment (mechanical, biological, chemical) including sludge digestion (fermentation) according to the average technology in Switzerland

## Parameters
- fraction, process water, to air: 0.1 dimensionless; name fraction_PW_to_air; lognormal variance with pedigree 0.092025, pedigree (4,4,3,2,4)

## Reference product
- wastewater from potato starch production: -1 m3; CPC 39920: Sewage sludge; By-product classification Waste
  EcoSpold01Location=CH
  production volume 3.96633 m3
    This is a placeholder value that does not reflect real-world production volumes. This dataset does not currently require a real-world production volume to work in the database framework, and no actual data were collected yet. This has no negative effect on the results of the ecoinvent database.
  property price 0 EUR2005
    Waste products are assigned a price of zero as they are assumed to require further treatment.
  property carbon content, non-fossil 0.993118
    COD= 2 kg/m3 (Tab A.19, ecoinvent v2.2 report 13_I). COD was converted to TOC, using conversion factors in Tab 4.10 (ecoinvent v2.2 report 13_IV). TOC was considered as Total Carbon.
  property carbon content 0.993118
    carbon content on a dry matter basis (reserved; not for manual entry)
  properties: carbon content, fossil 0, water content 1146.05, water in wet mass 999.128 kg, wet mass 1000 kg, dry mass 0.871801 kg, carbon allocation 0.865801 kg

## Inputs from technosphere
- wastewater treatment facility, capacity 1.1E10l/year: 1.9883e-9 unit; lognormal variance with pedigree 0.042, pedigree (1,1,5,5,1)
  uncertainty heeded in exchanges of the module
  EcoSpold01Location=CH
- electricity, low voltage: 0 kWh; pedigree (1,1,1,1,1)
  direct wastewater treatment plant burden. Uncertainty calculated from wastewater composition and treatment model
  EcoSpold01Location=CH
- municipal waste incineration facility: 1.5956e-10 unit; lognormal variance with pedigree 0.062, pedigree (1,1,5,5,1)
  EcoSpold01Location=CH
  burden from sludge incineration. Uncertainty calculated from wastewater composition and treatment model
- process-specific burdens, slag landfill: 0 kg; pedigree (1,1,1,1,1)
  (same comment as for municipal waste incineration facility)
- process-specific burdens, municipal waste incineration: 0 kg; pedigree (1,1,1,1,1)
  (same comment as for municipal waste incineration facility)
- chemical, inorganic: 9.9901e-9 kg; lognormal variance with pedigree 0.172, pedigree (1,1,5,5,1)
  burden from sludge incineration. Uncertainty calculated from wastewater composition and treatment model
  EcoSpold01Location=GLO
  properties: carbon content, fossil 0.003, wet mass 1 kg, dry mass 1 kg
  note on carbon content, fossil: This dataset is an unweighted average of 20 inorganic substances (listed in Tab 88.1, ecoinvent v2.2 report 8, part II), being part of the top100 chemicals included in this database. The C-content has also been calculated as an unweighted average of the C content of the substances composing this dataset.
- hydrochloric acid, without water, in 30% solution state: 5.9941e-9 kg; lognormal variance with pedigree 0.172, pedigree (1,1,5,5,1)
  EcoSpold01Location=RER
  burden from sludge incineration. Uncertainty calculated from wastewater composition and treatment model
  properties: heating value, net 3.32 MJ, dry mass 1 kg, wet mass 1 kg
- residual material landfill: 1.0111e-12 unit; lognormal variance with pedigree 0.072, pedigree (1,1,5,5,1)
  (same comment as for municipal waste incineration facility)
- ammonia, anhydrous, liquid: 0 kg; pedigree (1,1,1,1,1)
  (same comment as for municipal waste incineration facility)
  properties: dry mass 1 kg, wet mass 1 kg
- waste plastic, mixture: 0 kg; pedigree (1,1,1,1,1)
  (same comment as for electricity, low voltage)
  production volume 0 kg
    Calculated from the production volume of wastewater from potato starch production in proportion to the respective output amounts.
  properties: carbon content, fossil 0.747344, water content 0.180638, dry mass 0.847 kg, wet mass 1 kg, heating value, net 30.79 MJ
  note on carbon content, fossil: C content in 1 kg DM was calculated using data in Tab A.2, ecoinvent v2.2 report 13_I
  note on heating value, net: Value taken from the general comment of the treatment dataset.
- titanium dioxide: 4.3136e-7 kg; lognormal variance with pedigree 0.532, pedigree (1,1,5,5,1)
  (same comment as for hydrochloric acid, without water, in 30% solution state)
  properties: wet mass 1 kg, dry mass 1 kg
- slag landfill: 1.893e-12 unit; lognormal variance with pedigree 0.072, pedigree (1,1,5,5,1)
  (same comment as for municipal waste incineration facility)
- heat, district or industrial, natural gas: 0 MJ; pedigree (1,1,1,1,1)
  (same comment as for hydrochloric acid, without water, in 30% solution state)
  properties: heating value, net 1 MJ
- liquid manure spreading, by vacuum tanker: 0.0022794 m3; lognormal variance with pedigree 0.042, pedigree (1,1,5,5,1)
  EcoSpold01Location=CH
  burden from sludge spreading. Uncertainty calculated from wastewater composition and treatment model
- sewer grid, 1.1E10l/year, 242 km: 1.6832e-7 km; lognormal variance with pedigree 0.042, pedigree (1,1,5,5,1)
  EcoSpold01Location=CH
  uncertainty heeded in exchanges of the module
- heat, district or industrial, other than natural gas: 0 MJ; pedigree (1,1,1,1,1)
  (same comment as for municipal waste incineration facility)
  properties: heating value, net 1 MJ
- electricity, high voltage: 0 kWh; pedigree (1,1,1,1,1)
  burden from sludge incineration. Uncertainty calculated from wastewater composition and treatment model
  EcoSpold01Location=CH
- sodium hydroxide, without water, in 50% solution state: 7.4881e-7 kg; lognormal variance with pedigree 0.092, pedigree (1,1,5,5,1)
  burden from sludge incineration. Uncertainty calculated from wastewater composition and treatment model
  EcoSpold01Location=RER
  properties: wet mass 1 kg, heating value, net 3.03 MJ, dry mass 1 kg
- cement, unspecified: 0 kg; pedigree (1,1,1,1,1)
  (same comment as for municipal waste incineration facility)
  properties: wet mass 1 kg, dry mass 1 kg
- process-specific burdens, residual material landfill: 0 kg; pedigree (1,1,1,1,1)
  (same comment as for municipal waste incineration facility)
- quicklime, milled, packed: 1.3576e-7 kg; lognormal variance with pedigree 0.102, pedigree (1,1,5,5,1)
  (same comment as for electricity, high voltage)
  properties: wet mass 1 kg, dry mass 0.99 kg, water content 0.010101
- waste cement, hydrated: 0 kg; pedigree (1,1,1,1,1)
  (same comment as for municipal waste incineration facility)
  production volume 0 kg
    (same comment as for waste plastic, mixture)
  properties: wet mass 1 kg, dry mass 1 kg
- chromium oxide, flakes: 8.8032e-9 kg; lognormal variance with pedigree 0.532, pedigree (1,1,5,5,1)
  (same comment as for sodium hydroxide, without water, in 50% solution state)
  properties: wet mass 1 kg, dry mass 1 kg
- waste graphical paper: -0.0155 kg; lognormal variance with pedigree 0.042, pedigree (1,1,5,5,1)
  (same comment as for electricity, low voltage)
  production volume 0.062 kg
    (same comment as for waste plastic, mixture)
  properties: dry mass 0.888 kg, carbon content, non-fossil 0.454955, heating value, net 14.12 MJ, water content 0.126126, wet mass 1 kg
- electricity, low voltage: 0.00592934, 0.00107962, 0.0243711, 0.085147, 0.0173832, 0.266888, 0.0431777, 0.123984 kWh (8 entries); lognormal variance with pedigree 0.352, pedigree (1,1,5,5,1)
  (same comment as for electricity, low voltage)
- process-specific burdens, slag landfill: 0.000301205, 0.000763595 kg (2 entries); lognormal variance with pedigree 0.072, pedigree (1,1,5,5,1)
  (same comment as for municipal waste incineration facility)
- process-specific burdens, municipal waste incineration: 0.180547, 0.457713 kg (2 entries); lognormal variance with pedigree 0.062, pedigree (1,1,5,5,1)
  (same comment as for municipal waste incineration facility)
- ammonia, anhydrous, liquid: 3.15866e-6, 2.71525e-7, 4.22422e-7, 8.36968e-7, 8.20008e-7, 8.59457e-8, 3.84209e-7, 9.08926e-6 kg (8 entries); lognormal variance with pedigree 0.202, pedigree (1,1,5,5,1)
  (same comment as for municipal waste incineration facility)
- waste plastic, mixture: -0.00172425, -0.000115208, -8.71297e-6, -4.75849e-5, -1.92238e-5, -4.51863e-5, -0.00146914, -0.0120707 kg (8 entries); lognormal variance with pedigree 0.042, pedigree (1,1,5,5,1)
  (same comment as for electricity, low voltage)
  production volume 0.0614782 kg
- heat, district or industrial, natural gas: 1.47212e-5, 0.000352748, 0.000955171 MJ (3 entries); lognormal variance with pedigree 0.202, pedigree (1,1,5,5,1)
  (same comment as for hydrochloric acid, without water, in 30% solution state)
- heat, district or industrial, other than natural gas: 0.000211797, 0.0127893, 0.522299 MJ (3 entries); lognormal variance with pedigree 0.062, pedigree (1,1,5,5,1)
  (same comment as for municipal waste incineration facility)
- electricity, high voltage: 0.000927311, 0.000177774, 0.00409479, 0.0134193, 0.00301416, 0.0434028, 0.00688329, 0.0198426 kWh (8 entries); lognormal variance with pedigree 0.502, pedigree (1,1,5,5,1)
  (same comment as for electricity, high voltage)
- cement, unspecified: 2.8033e-5, 5.83283e-6, 4.27215e-7, 1.2177e-6, 2.75387e-5, 8.10545e-7, 8.90219e-6, 1.07707e-6, 0.000120301 kg (9 entries); lognormal variance with pedigree 0.082, pedigree (1,1,5,5,1)
  (same comment as for municipal waste incineration facility)
- process-specific burdens, residual material landfill: 0.000137293, 0.000348057 kg (2 entries); lognormal variance with pedigree 0.072, pedigree (1,1,5,5,1)
  (same comment as for municipal waste incineration facility)
- waste cement, hydrated: -0.000137293, -0.000348057 kg (2 entries); lognormal variance with pedigree 0.082, pedigree (1,1,5,5,1)
  (same comment as for municipal waste incineration facility)
  production volume 0.00192506 kg

## Emissions to nature
- Nitrogen [water, surface water]: 0.00010474 kg; lognormal variance with pedigree 0.062, pedigree (1,1,5,5,1)
  direct wastewater treatment plant emission. Uncertainty calculated from wastewater composition and treatment model
- Ammonia [air, urban air close to ground]: 7.8186e-5 kg; lognormal variance with pedigree 0.272, pedigree (1,1,5,5,1)
  direct digester gas emission plus emission from sludge incineration plus emission from sludge spreading. Uncertainty calculated from wastewater composition and treatment model
- DOC, Dissolved Organic Carbon [water, surface water]: 0.098082 kg; lognormal variance with pedigree 0.522, pedigree (1,1,5,5,1)
  sewer overload discharge plus direct wastewater treatment plant emission plus emission from sludge incineration. Uncertainty calculated from wastewater composition and treatment model
- Water [water, unspecified]: 0.9 m3; name water_to_water_unspecified; lognormal variance with pedigree 0.0827, pedigree (2,2,5,5,1)
  Calculated value based on water balance.
  property fraction, origin: salt water 0; name fraction_origin_salt_water_Ww
  property fraction, origin: fresh water 1; name fraction_origin_fresh_water_Ww
  property fraction, origin: unspecified 0; name fraction_origin_unspecified_Ww
  property water in wet mass 1000 kg; name WWM
  property carbon content, non-fossil 0; name C_content_non_fossil
  property wet mass 1000 kg; name WM
  property dry mass 0 kg; name DM
  property carbon content, fossil 0; name C_content_fossil
- BOD5, Biological Oxygen Demand [water, surface water]: 0.128 kg; lognormal variance with pedigree 0.182, pedigree (1,1,5,5,1)
  (same comment as for DOC, Dissolved Organic Carbon)
- COD, Chemical Oxygen Demand [water, ground-, long-term]: 0.0034718 kg; lognormal variance with pedigree 0.262, pedigree (1,1,5,5,1)
  emission from sludge incineration. Uncertainty calculated from wastewater composition and treatment model
- Methane, non-fossil [air, urban air close to ground]: 0.0068084 kg; lognormal variance with pedigree 0.282, pedigree (1,1,5,5,1)
  direct digester gas emission plus emission from sludge incineration. Uncertainty calculated from wastewater composition and treatment model
- Ammonium, ion [water, surface water]: 0.0023569 kg; lognormal variance with pedigree 0.052, pedigree (1,1,5,5,1)
  (same comment as for Nitrogen)
- Dinitrogen monoxide [air, urban air close to ground]: 2.2246e-5 kg; lognormal variance with pedigree 0.072, pedigree (1,1,5,5,1)
  direct wastewater treatment plant emission plus direct digester gas emission plus emission from sludge incineration plus emission from sludge spreading. Uncertainty calculated from wastewater composition and treatment model
- BOD5, Biological Oxygen Demand [water, ground-, long-term]: 0.0011356 kg; lognormal variance with pedigree 0.262, pedigree (1,1,5,5,1)
  (same comment as for COD, Chemical Oxygen Demand)
- NMVOC, non-methane volatile organic compounds, unspecified origin [air, urban air close to ground]: 3.0936e-5 kg; lognormal variance with pedigree 0.402, pedigree (1,1,5,5,1)
  direct digester gas emission. Uncertainty calculated from wastewater composition and treatment model
- DOC, Dissolved Organic Carbon [water, ground-, long-term]: 0.0013738 kg; lognormal variance with pedigree 0.262, pedigree (1,1,5,5,1)
  (same comment as for COD, Chemical Oxygen Demand)
- Carbon dioxide, non-fossil [air, urban air close to ground]: 2.5157 kg; lognormal variance with pedigree 0.182, pedigree (1,1,5,5,1)
  direct wastewater treatment plant emission plus direct digester gas emission plus emission from sludge incineration. Uncertainty calculated from wastewater composition and treatment model
- Cyanide [air, urban air close to ground]: 2.6883e-7 kg; lognormal variance with pedigree 0.232, pedigree (1,1,5,5,1)
  (same comment as for COD, Chemical Oxygen Demand)
- TOC, Total Organic Carbon [water, surface water]: 0.10493 kg; lognormal variance with pedigree 0.172, pedigree (1,1,5,5,1)
  (same comment as for DOC, Dissolved Organic Carbon)
- Carbon monoxide, non-fossil [air, urban air close to ground]: 0.0021619 kg; lognormal variance with pedigree 0.292, pedigree (1,1,5,5,1)
  (same comment as for Methane, non-fossil)
- Nitrate [water, ground-, long-term]: 1.073e-5 kg; lognormal variance with pedigree 0.072, pedigree (1,1,5,5,1)
  (same comment as for COD, Chemical Oxygen Demand)
- Nitrogen oxides [air, urban air close to ground]: 0.0001494 kg; lognormal variance with pedigree 0.072, pedigree (1,1,5,5,1)
  (same comment as for Methane, non-fossil)
- Nitrite [water, surface water]: 0.00013765 kg; lognormal variance with pedigree 0.062, pedigree (1,1,5,5,1)
  (same comment as for Nitrogen)
- TOC, Total Organic Carbon [water, ground-, long-term]: 0.0013738 kg; lognormal variance with pedigree 0.262, pedigree (1,1,5,5,1)
  (same comment as for COD, Chemical Oxygen Demand)
- COD, Chemical Oxygen Demand [water, surface water]: 0.38756 kg; lognormal variance with pedigree 0.572, pedigree (1,1,5,5,1)
  (same comment as for DOC, Dissolved Organic Carbon)
- Nitrate [water, surface water]: 0.010325 kg; lognormal variance with pedigree 0.052, pedigree (1,1,5,5,1)
  (same comment as for DOC, Dissolved Organic Carbon)
- Carbon [soil, agricultural]: 0.093793 kg; lognormal variance with pedigree 0.252, pedigree (1,1,5,5,1)
  emission from sludge spreading. Uncertainty calculated from wastewater composition and treatment model
- Water [air, unspecified]: 0.1 m3; name water_to_air_unspecified; lognormal variance with pedigree 0.0827, pedigree (2,2,5,5,1)
  Calculated value based on water balance.
  property fraction, origin: fresh water 0; name fraction_origin_fresh_water
  property fraction, origin: unspecified 1; name fraction_origin_unspecified
  property fraction, origin: salt water 0; name fraction_origin_salt_water

## Extrapolations
wastewater compositions from literature and/or estimates This dataset has been copied from an original dataset covering the geography CH. The uncertainty has been adjusted accordingly.

## Review by Niels Jungbluth 2009-01-22
passed.
