# sodium borates production

Dataset: EcoSpold 2, unit process
Geography: RoW
Time period: 2000-01-01 to 2021-12-31
Technology level: current
Classification: EcoSpold01Categories: chemicals/inorganics
Classification: ISIC rev.4 ecoinvent: 0891:Mining of chemical and fertilizer minerals
Tags: ConvertedDataset
Scenario: Business-as-Usual
System model: Allocation, cut-off by classification
Generated by: Roland Hischier
Published in: Althaus H.-J. 2007
Database: ecoinvent
isCopyrightProtected: true
accessRestrictedTo: 1

## General comment
The functional unit represent 1 kg of sodium borates. Large uncertainty of the process data due to weak data on the production process.
[This dataset was already contained in the ecoinvent database version 2. It was not individually updated during the transfer to ecoinvent version 3. Life Cycle Impact Assessment results may still have changed, as they are affected by changes in the supply chain, i.e. in other datasets. This dataset was generated following the ecoinvent quality guidelines for version 2. It may have been subject to central changes described in the ecoinvent version 3 change report (http://www.ecoinvent.org/database/ecoinvent-version-3/reports-of-changes/), and the results of the central updates were reviewed extensively. The changes added e.g. consistent water flows and other information throughout the database. The documentation of this dataset can be found in the ecoinvent reports of version 2, which are still available via the ecoinvent website. The change report linked above covers all central changes that were made during the conversion process.]

## Included activities end
Raw materials, machineries and energy consumption for production, estimated emissions to air from production and infrastructure of the site (approximation). No water emissions.

## Geography
Data used represent conditions in California (USA).

## Technology
Data approximated with data from iron mining as well as lime crushing and milling. Land-use data based on conditions for sodium borates mining in California (USA).

## Time period
date of published literature

## Parameters
- fraction, process water, to air: 0.205 dimensionless; name fraction_PW_to_air; lognormal variance with pedigree 0.092025, pedigree (4,4,3,2,4)

## Reference product
- sodium borates: 1 kg; By-product classification allocatable product; CPC 16190: Other chemical minerals
  EcoSpold01Location=US
  production volume 4.1e9 kg
    The global production volumes of sodium borates in 2005 were estimated out of the production of boron minerals (The 2007 Mineral Yearbook, USGS; table 6, quantities expressed in B2O3 eq). It has been assumed that all boron minerals produced in Turkey were the calcium borate colemanite, Ca2B6O11-5H2O; and that all boron minerals produced in the US were the sodium borates tincal (Na2B4O7-10H2O), and kernite (Na2B4O7-4H2O), with a 50:50 ratio (after ecoinvent report v2 8- part 16). For the boron minerals produced in the other countries, a 50:25:25 assumption has been made.
  property price 0.0158256 EUR2005
    Calculated based on inputs: The price of the product has been calculated as a sum of the values of the material and energy inputs for this product. This value is therefore a rough estimation. It may underestimate the real price since there are additional expenses when producing any product. These expences can include for example labour costs, treatment of waste materials and profit for the producer. Please consider carefully whether this level of data quality is acceptable for your application.
  property carbon content 0
    carbon content on a dry matter basis (reserved; not for manual entry)
  properties: water content 0, water in wet mass 0 kg, wet mass 1 kg, dry mass 1 kg, carbon content, fossil 0, carbon content, non-fossil 0, carbon allocation 0 kg

## Inputs from technosphere
- heat, central or small-scale, other than natural gas: 0.00282 MJ; lognormal variance with pedigree 0.2706, pedigree (4,3,5,5,5)
  Approximation with data from iron mining & lime treatment
  EcoSpold01Location=CH
  Uncertainty: approximation with data from iron mining & lime treatment
  properties: heating value, net 1 MJ
- heat, district or industrial, other than natural gas: 0 MJ; pedigree (1,1,1,1,1)
  EcoSpold01Location=RER
  Approximation with data from iron mining & lime treatment
  Uncertainty: approximation with data from iron mining & lime treatment
  properties: heating value, net 1 MJ
- electricity, medium voltage: 0 kWh; pedigree (1,1,1,1,1)
  EcoSpold01Location=UCTE
  Approximation with data from iron mining & lime treatment
  Uncertainty: approximation with data from iron mining & lime treatment
- conveyor belt: 2.78e-8 m; lognormal variance with pedigree 0.5806, pedigree (4,3,5,5,5)
  Approximation with data from iron mining & lime treatment
  EcoSpold01Location=RER
  Uncertainty: approximation with data from iron mining & lime treatment
- mine infrastructure, iron: 8.33e-13 unit; lognormal variance with pedigree 0.5806, pedigree (4,3,5,5,5)
  Approximation with data from iron mining & lime treatment
  EcoSpold01Location=GLO
  Uncertainty: approximation with data from iron mining & lime treatment
- diesel, burned in building machine: 0.0255 MJ; lognormal variance with pedigree 0.2706, pedigree (4,3,5,5,5)
  (same comment as for mine infrastructure, iron)
  properties: heating value, net 1 MJ
- recultivation, iron mine: 9.42e-5 m2; lognormal variance with pedigree 0.5806, pedigree (4,3,5,5,5)
  (same comment as for mine infrastructure, iron)
- industrial machine, heavy, unspecified: 0.000231 kg; lognormal variance with pedigree 0.5806, pedigree (4,3,5,5,5)
  (same comment as for heat, district or industrial, other than natural gas)
- blasting: 0.000271 kg; lognormal variance with pedigree 0.2706, pedigree (4,3,5,5,5)
  (same comment as for conveyor belt)
- heat, district or industrial, other than natural gas: 0.00145674, 0.0883433 MJ (2 entries); lognormal variance with pedigree 0.2706, pedigree (4,3,5,5,5)
  (same comment as for heat, district or industrial, other than natural gas)
- electricity, medium voltage: 0.000439831, 8.43406e-5, 0.00193659, 0.0014159, 0.020593, 0.00652769, 0.0029026 kWh (7 entries); lognormal variance with pedigree 0.2706, pedigree (4,3,5,5,5)
  (same comment as for electricity, medium voltage)

## Inputs from nature
- Transformation, to mineral extraction site [natural resource, land]: 9.42e-5 m2; lognormal variance with pedigree 0.4006, pedigree (4,3,5,5,5)
  Approximation with data from iron mining & lime treatment
  Uncertainty: approximation with data from iron mining & lime treatment
- Occupation, mineral extraction site [natural resource, land]: 0.00706 m2*year; lognormal variance with pedigree 0.3106, pedigree (4,3,5,5,5)
  (same comment as for Transformation, to mineral extraction site)
- Borax, in ground [natural resource, in ground]: 1.25 kg; lognormal variance with pedigree 0.2706, pedigree (4,3,5,5,5)
  Estimated based on overall yield of 80%
  Uncertainty: estimated based on overall yield of 80%
- Water, well, in ground [natural resource, in water]: 2.93e-5 m3; name water_well_in_ground_input; lognormal variance with pedigree 0.2706, pedigree (4,3,5,5,5)
  (same comment as for Transformation, to mineral extraction site)
- Transformation, from forest, unspecified [natural resource, land]: 9.42e-5 m2; lognormal variance with pedigree 0.4006, pedigree (4,3,5,5,5)
  (same comment as for Transformation, to mineral extraction site)

## Emissions to nature
- Particulates, > 10 um [air, urban air close to ground]: 0.00145 kg; lognormal variance with pedigree 0.3106, pedigree (4,3,5,5,5)
  (same comment as for Transformation, to mineral extraction site)
- Particulates, > 2.5 um, and < 10um [air, urban air close to ground]: 0.00131 kg; lognormal variance with pedigree 0.4006, pedigree (4,3,5,5,5)
  (same comment as for Transformation, to mineral extraction site)
- Water [water, unspecified]: 2.32935e-5 m3; name water_to_water_unspecified; lognormal variance with pedigree 0.0827, pedigree (2,2,5,5,1)
  Calculated value based on literature values and expert opinion. See comments in the parametres' comment field.
  property fraction, origin: unspecified 0; name fraction_origin_unspecified_Ww
  property fraction, origin: fresh water 1; name fraction_origin_fresh_water_Ww
  property fraction, origin: salt water 0; name fraction_origin_salt_water_Ww
  property water in wet mass 1000 kg; name WWM
  property carbon content, non-fossil 0; name C_content_non_fossil
  property dry mass 0 kg; name DM
  property carbon content, fossil 0; name C_content_fossil
  property wet mass 1000 kg; name WM
- Particulates, < 2.5 um [air, urban air close to ground]: 0.000145 kg; lognormal variance with pedigree 0.5806, pedigree (4,3,5,5,5)
  (same comment as for Transformation, to mineral extraction site)
- Water [air, unspecified]: 6.0065e-6 m3; name water_to_air_unspecified; lognormal variance with pedigree 0.0827, pedigree (2,2,5,5,1)
  (same comment as for Water)
  property fraction, origin: salt water 0; name fraction_origin_salt_water
  property fraction, origin: fresh water 1; name fraction_origin_fresh_water
  property fraction, origin: unspecified 0; name fraction_origin_unspecified

## Extrapolations
see technology This dataset has been copied from an original dataset covering the geography US. The uncertainty has been adjusted accordingly.

## Review by Heiko Kunst 2007-11-09
Passed.
