# light emitting diode production

Dataset: EcoSpold 2, unit process
Geography: GLO
Time period: 1994-01-01 to 2021-12-31
Technology level: current
Classification: EcoSpold01Categories: electronics/component
Classification: ISIC rev.4 ecoinvent: 2610:Manufacture of electronic components and boards
Tags: ConvertedDataset
Scenario: Business-as-Usual
System model: Allocation, cut-off by classification
Generated by: Roland Hischier
Published in: Hischier R. 2007
Database: ecoinvent
isCopyrightProtected: true
accessRestrictedTo: 1

## General comment
This dataset represents the production of 1 kg of a typical light emitting diode (LED) for hole-through mounting. It is based on the assumption that a typical 5mm LED in electronic modules has an average weight of 0.35 g. The data represent a typical light emitting diode (LED) for hole-through mounting used in the information and communication technology. Material data are approximated by using respective information from the dataset “diode production, glass-, for through-hole mounting”. Infrastructure and production efforts are based on own assumptions. The production efforts represent not a specific diode type and have thus, accordingly higher uncertainties.
[This dataset was already contained in the ecoinvent database version 2. It was not individually updated during the transfer to ecoinvent version 3. Life Cycle Impact Assessment results may still have changed, as they are affected by changes in the supply chain, i.e. in other datasets. This dataset was generated following the ecoinvent quality guidelines for version 2. It may have been subject to central changes described in the ecoinvent version 3 change report (http://www.ecoinvent.org/database/ecoinvent-version-3/reports-of-changes/), and the results of the central updates were reviewed extensively. The changes added e.g. consistent water flows and other information throughout the database. The documentation of this dataset can be found in the ecoinvent reports of version 2, which are still available via the ecoinvent website. The change report linked above covers all central changes that were made during the conversion process.]

## Included activities start
From reception of metals and plastics at the factory gate.

## Included activities end
This dataset covers raw material input and production efforts for the production of currently used light emitting diodes (LED) for hole-through mounting technology.

## Geography
Data represent a global valuable composition of glass diodes for through-hole mounting technology, used as a first approximation for LEDs.

## Technology
average diode production composed of the diode wafer production (cleaing, masking, etching, doping, oxidising, metal deposition) and the final assembly of the diode (wafer sawing, die bonding, moulding, trimming and forming)

## Reference product
- light emitting diode: 1 kg; CPC 47150: Diodes, transistors and similar semi-conductor devices; photosensitive semi-conductor devices; light emitting […]; By-product classification allocatable product
  A light-emitting diode (LED) is "a semiconductor device that emits incoherent narrow-spectrum light when electrically biased in the forward direction". This effect is a kind of electroluminescence. Similar to a normal diode, an LED contains a chip of doped semi conducting material. And as in these other diodes, a current can flow easily from the anode to the cathode, but not in the reverse direction. The color of the emitted light by a LED depends on the composition and condition of the semiconducting material used, and can vary from infrared via visible to near-ultraviolet.
  A diode is "a component that restricts the direction of movement of charge carriers. Essentially, it allows an electric current to flow in one direction, but blocks it in the opposite direction." Hence, a diode can be seen as an electronic version of a check valve. A circuit that requires current flow in only one direction will consequently include at least one diode in its circuit design. Currently most of the diodes are made from traditional semiconductor materials like silicium or germanium.
  EcoSpold01Location=GLO
  production volume 1 kg
    Dummy value to be replaced by measured, estimated or calculated value
  property price 181.103 EUR2005
    Calculated based on inputs: The price of the product has been calculated as a sum of the values of the material and energy inputs for this product. This value is therefore a rough estimation. It may underestimate the real price since there are additional expenses when producing any product. These expences can include for example labour costs, treatment of waste materials and profit for the producer. Please consider carefully whether this level of data quality is acceptable for your application.
  property carbon content, fossil 0.0203273
    Calculated as the addition of C contents in the product composition
  property carbon content 0.0203273
    carbon content on a dry matter basis (reserved; not for manual entry)
  properties: carbon content, non-fossil 0, dry mass 1 kg, wet mass 1 kg, water in wet mass 0 kg, water content 0, carbon allocation 0.0203273 kg

## Inputs from technosphere
- nickel, class 1: 0.003848 kg; source Behrendt S 1998; lognormal variance with pedigree 0.134, pedigree (3,4,5,1,4)
  EcoSpold01Location=GLO
  Proxy, diode production, glass-, for through-hole mounting was used. The production of 1 kg of diodes lead to a waste amount of 0.37 kg - whereof 0.04 kg are calculated to be unused raw materials. Hence, the dataset has an input of 1.04 kg of raw materials per kg of diode. The split to the different raw materials (metals, plastics) is based on the reported material specifications.
  Further references:
  Philips Semiconductors (2002) Chemical Content of Semiconductor Devices 2002/2003. Philips Semiconductors, Austin / Zoetermeer / Hong Kong / Tokyo
  ST Microelectronics (2004) Chemical Content of Semiconductor Packaging. PDF from <http://www.stmicroelectronics.com/stonline/company/environm/report03/envi03.pdf>.
  Uncertainty: assumption from conclusion by analogy (using through-hole mounted diodes)
  properties: wet mass 1 kg, dry mass 1 kg
- diode, auxilliaries and energy use: 1 kg; lognormal variance with pedigree 0.134, pedigree (3,4,5,1,4)
  Estimation - details see this other activity dataset
  EcoSpold01Location=GLO
  Uncertainty: rough estimation
- silicon, electronics grade: 0.00468 kg; source Behrendt S 1998; lognormal variance with pedigree 0.134, pedigree (3,4,5,1,4)
  EcoSpold01Location=DE
  Proxy, diode production, glass-, for through-hole mounting was used. The production of 1 kg of diodes lead to a waste amount of 0.37 kg - whereof 0.04 kg are calculated to be unused raw materials. Hence, the dataset has an input of 1.04 kg of raw materials per kg of diode. The split to the different raw materials (metals, plastics) is based on the reported material specifications.
  Further references:
  Philips Semiconductors (2002) Chemical Content of Semiconductor Devices 2002/2003. Philips Semiconductors, Austin / Zoetermeer / Hong Kong / Tokyo
  ST Microelectronics (2004) Chemical Content of Semiconductor Packaging. PDF from <http://www.stmicroelectronics.com/stonline/company/environm/report03/envi03.pdf>.
  Uncertainty: assumption from conclusion by analogy (using through-hole mounted diodes)
  properties: wet mass 1 kg, dry mass 1 kg
- molybdenum: 0.021008 kg; source Behrendt S 1998; lognormal variance with pedigree 0.134, pedigree (3,4,5,1,4)
  EcoSpold01Location=RER
  Proxy, diode production, glass-, for through-hole mounting was used. The production of 1 kg of diodes lead to a waste amount of 0.37 kg - whereof 0.04 kg are calculated to be unused raw materials. Hence, the dataset has an input of 1.04 kg of raw materials per kg of diode. The split to the different raw materials (metals, plastics) is based on the reported material specifications.
  Further references:
  Philips Semiconductors (2002) Chemical Content of Semiconductor Devices 2002/2003. Philips Semiconductors, Austin / Zoetermeer / Hong Kong / Tokyo
  ST Microelectronics (2004) Chemical Content of Semiconductor Packaging. PDF from <http://www.stmicroelectronics.com/stonline/company/environm/report03/envi03.pdf>.
  Uncertainty: assumption from conclusion by analogy (using through-hole mounted diodes)
  properties: wet mass 1 kg, dry mass 1 kg
- lead: 0.016328 kg; source Behrendt S 1998; lognormal variance with pedigree 0.134, pedigree (3,4,5,1,4)
  (same comment as for molybdenum)
  properties: dry mass 1 kg, wet mass 1 kg
- tin: 0.046488 kg; source Behrendt S 1998; lognormal variance with pedigree 0.134, pedigree (3,4,5,1,4)
  (same comment as for molybdenum)
  properties: dry mass 1 kg, wet mass 1 kg
- pig iron: 0 kg; source Behrendt S 1998; pedigree (1,1,1,1,1)
  Proxy, diode production, glass-, for through-hole mounting was used. The production of 1 kg of diodes lead to a waste amount of 0.37 kg - whereof 0.04 kg are calculated to be unused raw materials. Hence, the dataset has an input of 1.04 kg of raw materials per kg of diode. The split to the different raw materials (metals, plastics) is based on the reported material specifications.
  Further references:
  Philips Semiconductors (2002) Chemical Content of Semiconductor Devices 2002/2003. Philips Semiconductors, Austin / Zoetermeer / Hong Kong / Tokyo
  ST Microelectronics (2004) Chemical Content of Semiconductor Packaging. PDF from <http://www.stmicroelectronics.com/stonline/company/environm/report03/envi03.pdf>.
  EcoSpold01Location=GLO
  Uncertainty: assumption from conclusion by analogy (using through-hole mounted diodes)
  properties: carbon content, fossil 0.045, wet mass 1 kg, dry mass 1 kg
  note on carbon content, fossil: Pig iron is the iron produced in the blast furnace. It is an alloy of 94% Fe and more than 2% C (world average 4.5%). (ecoinvent v2.2 report 10_partII)
- copper, cathode: 0.23514 kg; source Behrendt S 1998; lognormal variance with pedigree 0.134, pedigree (3,4,5,1,4)
  (same comment as for molybdenum)
  properties: dry mass 1 kg, wet mass 1 kg
- funnel glass, for cathode ray tube display: 0.26146 kg; source Behrendt S 1998; lognormal variance with pedigree 0.134, pedigree (3,4,5,1,4)
  (same comment as for pig iron)
  properties: dry mass 1 kg, wet mass 1 kg
- epoxy resin, liquid: 0 kg; source Behrendt S 1998; pedigree (1,1,1,1,1)
  (same comment as for molybdenum)
  properties: heating value, net 12.82 MJ, dry mass 1 kg, carbon content, fossil 0.42325, wet mass 1 kg
- pig iron: 0.0382096, 0.41253 kg (2 entries); source Behrendt S 1998; lognormal variance with pedigree 0.134, pedigree (3,4,5,1,4)
  (same comment as for pig iron)
- epoxy resin, liquid: 1.8096e-5, 8.5904e-5 kg (2 entries); source Behrendt S 1998; lognormal variance with pedigree 0.134, pedigree (3,4,5,1,4)
  (same comment as for molybdenum)

## Sampling procedure
literature

## Extrapolations
This dataset has been extrapolated from year 2007 to the year of the calculation (2021). The uncertainty has been adjusted accordingly.

## Review by Roland Hischier 2011-09-20
Transfer of documentation done.

## Review by Rolf Frischknecht 2007-11-15
passed.
