# cement, all types to generic market for cement, unspecified

Dataset: EcoSpold 2, unit process
Geography: CH
Time period: 2013-01-01 to 2021-12-31
Technology level: current
Classification: ISIC rev.4 ecoinvent: 2394:Manufacture of cement, lime and plaster
Scenario: Business-as-Usual
System model: Allocation, cut-off by classification
Generated by: Lucia Valsasina
Database: ecoinvent
isCopyrightProtected: true
accessRestrictedTo: 1

## General comment
This is a linking (transfering) activity which links the specific cement to the generic market for cement, unspecified.

## Included activities start
The activity starts with the reception of a specific cement.

## Included activities end
The activity ends with cement, unspecified which is supplied to the generic market for cement, unspecified.

## Reference product
- cement, unspecified: 1 kg; CPC 374: Plaster, lime and cement; By-product classification allocatable product
  production volume 8.136e8 kg
    Calculated based on regional PV, assuming 20% of cement is redirected to the generic market for cement unspecified
  property price 0.0615 EUR2005
    2005 import and export prices (total trades (USD) divided by total weight (kg) in China, India, USA, Japan, Russia and Europe, major producers and consumers (http://www.cementchina.net/freport/showfre.asp?id=749) from UN Commodity Trade Statistics Database (http://data.un.org/Explorer.aspxDatabase [Accessed 2 July 2010]). Commodity: Cement (portland, aluminious, slag or hydraulic)

## Inputs from technosphere
- cement, blast furnace slag 31-50% and 31-50% other alternative constituents: 0.0005 kg; lognormal variance with pedigree 0.0086, pedigree (1,1,4,1,1)
  This is a linking (transfering) activity. The two different cement products are matched 1:1.
- cement, alternative constituents 21-35%: 0.0295 kg; lognormal variance with pedigree 0.0086, pedigree (1,1,4,1,1)
  (same comment as for cement, blast furnace slag 31-50% and 31-50% other alternative constit)
- cement, alternative constituents 6-20%: 0.7376 kg; lognormal variance with pedigree 0.0086, pedigree (1,1,4,1,1)
  (same comment as for cement, blast furnace slag 31-50% and 31-50% other alternative constit)
- cement, blast furnace slag 36-65%: 0.0136 kg; lognormal variance with pedigree 0.0086, pedigree (1,1,4,1,1)
  (same comment as for cement, blast furnace slag 31-50% and 31-50% other alternative constit)
- cement, blast furnace slag 66-80%: 0.0005 kg
  (same comment as for cement, blast furnace slag 31-50% and 31-50% other alternative constit)
  properties: dry mass 1 kg, wet mass 1 kg
- cement, blast furnace slag 18-30% and 18-30% other alternative constituents: 0.0005 kg; lognormal variance with pedigree 0.0086, pedigree (1,1,4,1,1)
  (same comment as for cement, blast furnace slag 31-50% and 31-50% other alternative constit)
- cement, pozzolana and fly ash 36-55%: 0.0005 kg
  (same comment as for cement, blast furnace slag 31-50% and 31-50% other alternative constit)
  properties: wet mass 1 kg, dry mass 1 kg
- cement, blast furnace slag 81-95%: 0.0005 kg; name cem
  (same comment as for cement, blast furnace slag 31-50% and 31-50% other alternative constit)
  property water content 0; name cem_water_content
  property dry mass 1 kg; name cem_DM
  property water in wet mass 0 kg; name cem_WWM
  property carbon content, non-fossil 0; name cem_C_content_non_fossil
  property wet mass 1 kg; name cem_WM
  property carbon content, fossil 0; name cem_C_content_fossil
- cement, pozzolana and fly ash 11-35%: 0.0005 kg
  (same comment as for cement, blast furnace slag 31-50% and 31-50% other alternative constit)
  properties: wet mass 1 kg, dry mass 1 kg
- cement, Portland: 0.2163 kg; lognormal variance with pedigree 0.0086, pedigree (1,1,4,1,1)
  (same comment as for cement, blast furnace slag 31-50% and 31-50% other alternative constit)

## Extrapolations
This dataset has been extrapolated from year 2013 to the year of the calculation (2021). The uncertainty has been adjusted accordingly.
