# road construction

Dataset: EcoSpold 2, unit process
Geography: RoW
Time period: 1990-01-01 to 2021-12-31
Technology level: current
Classification: EcoSpold01Categories: transport systems/road
Classification: ISIC rev.4 ecoinvent: 4210:Construction of roads and railways
Scenario: Business-as-Usual
System model: Allocation, cut-off by classification
Generated by: [System]
Published in: Spielmann M. 2007
Database: ecoinvent
isCopyrightProtected: true
accessRestrictedTo: 1

## General comment
The dataset represents the expenditures and interventions due to the provision of road, tunnel and bridge infrastructures, the renewal of different road layers and eventual road disposal. All environmental exchanges refer to one meter and year (m*a). Road provision is therefore modelled as a constant renewal rather than as a one-time expenditure and end-of-life, and is assumed directly related to gross vehicle weight (vehicle plus load). In the transport datasets the value of 5.37E-04 m*y per gross ton vehicle km should be applied. The dataset is based on a modeling of Swiss motorways and Class 1, 2 & 3 roads as described in the following sources:

Bundesamt für Statistik (2000) Mobilität in der Schweiz. Ergebnisse des Mikrozensus 2000 zum Verkehrsverhalten. Bundesamt für Statistik, Bern.

Maibach et al. (1999) Ökoinventar Transporte: Grundlagen für den ökologischen Vergleich von Transportsystemen und den Einbezug von Transportsystemen in Ökobilanzen. Technischer Schlussbericht. In: Schweizerischer Nationalfonds zur Förderung der wissenschaftlichen Forschung (ed. SPP Umwelt M.). 2nd Edition. INFRAS, Zürich.

The operation and maintenance of roads then refers to aspects of lighting, weed control, line marking, etc. rather than the replacement and repair of road sections and is therefore directly related to km use. Operation and maintenance are not considered in this road construction dataset.

## Included activities start
The dataset starts with land trransformation for the construction/replacement of roads.

## Included activities end
The dataset ends with the replacement of road, tunnel and bridge infrastructures.

The dataset includes the land, material and energy uses and the construction processes (excavation). It also includes the NMVOC and particulate matter emissions, and the eventual disposal of the road infrastructures as a continous process of renewal.

The dataset does not include road operation and maintenance.

## Geography
Copied from 'road construction, CH 2000'. Data refers to average conditions in Switzerland. For de icing activities, a recent Austrian has been applied.

## Technology
In order to account for the environmental interventions due to road construction (road, tunnel and bridge) generic data for the Swiss road infrastructure is employed. The figures presented are based on inventories generated by Maibach et al. (1999). Due to the fact that different layers of a road are characterised by various life spans, the data is presented for 1 meter of road and 1 year. Different road types have been distinguished; namely motorway (Nationalstrassen) and three different classes (1st class road, 2nd class road and 3rd class road) of the Swiss Road network. For all categories, layers and materials are recorded, according to their life span. For the calculation of material expenditures per m bitumen road, recycling rates have been estimated. For the road foundation, a recycling rate of 50% has been assumed. For the surfacing and for the subgrade no recycling has been assumed. The subgrade will be removed after 100 years and the street must be completely re-constructed. For concrete roads, no recycling is as-sumed. VOC emissions in road construction originate from the use of bitumen. Significant emissions of VOC emissions result from paving works in particular from the use of bitumen solvents for road surface treatments. Bitumen emulsions are characterised by a small solvent content less than 5g/kg. The yearly mass load in Switzerland is estimated with 3.6%. Hot spray bituminous binders contribute approximately 1.6% of the yearly bitumen consumption for road construction in Switzerland and are characterised by a fairly high solvent content: 90-140 g/kg bitumen Stolz (2001). Moreover, during thermic processes of solvent free bitumen VOC emissions occur. These emissions significantly change with the processing temperature and the bitumen type used. In this study, we employ an emission factor of 12kg NMVOC/t bitumen available from BUWAL (1995). Data of particulate emissions from mechanical processes and activities on road construction sites are available from Stolz (2001). The size distribution has been adjusted to comply with the size distribution used in this project.
References:
Maibach M., Peter D. and Seiler B. (1999) Ökoinventar Transporte: Grundlagen für den ökologischen Vergleich von Transportsystemen und den Einbezug von Transportsystemen in Ökobilanzen. Technischer Schlussbericht. In: Schweizerischer Nationalfonds zur Förderung der wissenschaftlichen Forschung (ed. SPP Umwelt M.). 2nd Edition.
Stolz J. (2001) Luftschadstoff-Emissionen von Strassenbaustellen. Teil I: PAH und VOC. Nr. 126. Bundesamt für Umwelt, Wald und Landschaft (BUWAL), Bern
BUWAL (1995) Handbuch: Emissionsfaktoren für stationäre Quellen. Bundesamt fuer Umwelt, Wald und Landschaft, Bern
Wresowar M. and Sieghardt M. (2000) Studie über die Auswirkung stickstoffhältiger Auftaumittel. Auswirkungen auf Boden und Bewuchs. Vergleich mit herkömmlichen Auftaumitteln. pdf-file from http://www.magwien.gv.at/ma22/pool/doc/auftaumittel.pdf.
Hüsler W., Willi E., Meier E., Bachmann P. and Brodkowski L. (1989) Verkehrsflächen der Schweiz: Groberhebung. zur Raumplanung. Bundesamt für Raumplanung (BRP), Bern as pdf-File under: N
BfS (2000) Mobilität in der Schweiz. Ergebnisse des Mikrozensus 2000 zum Verkehrsverhalten. Bundesamt für Statistik, Bern
BFE (2003) Gesamte Erzeugung und Abgabe Elektrischer Enegie in der Schweiz. 1991. Bundesamt für Energie, Bern, Online-Version under: http://www.energie-schweiz.ch/.

## Time period
Road lenght is based on Swiss statistical data (2000). The material consumption represents a situation in the early 1990ties.The road and embakement area are based on a study from 1995 and have been modufied with current road infrastructure data. Road lenght is based on the same statistical data (2000).

## Parameters
- road network, Switzerland: 71150 km; name road_network_CH
  The length of the Swiss road network considering motorways and Class 1, 2 & 3 roads.
  Data from:
  Bundesamt für Statistik (2000) Mobilität in der Schweiz. Ergebnisse des Mikrozensus 2000 zum Verkehrsverhalten. Bundesamt für Statistik, Bern.
  Maibach et al. (1999) Ökoinventar Transporte: Grundlagen für den ökologischen Vergleich von Transportsystemen und den Einbezug von Transportsystemen in Ökobilanzen. Technischer Schlussbericht. In: Schweizerischer Nationalfonds zur Förderung der wissenschaftlichen Forschung (ed. SPP Umwelt M.). 2nd Edition. INFRAS, Zürich.

## Reference product
- road: 1 m*year; CPC 53211: Highways (except elevated highways), streets and roads; By-product classification allocatable product
  production volume 8.38198e9 m*year; name annual_road; = (road_network_CH*1000)*(1/0.008417)
    Estimated. The global production volume is extrapolated from the swiss production volume using the nominal GDP of 2005 (source: United Nations, http://data.un.org/Glossary.aspx?q=GDP+%28current+US%24%29, accessed 20130726 and 20130312).
  property price 4.71563 EUR2005
    Calculated based on inputs: The price of the product has been calculated as a sum of the values of the material and energy inputs for this product. This value is therefore a rough estimation. It may underestimate the real price since there are additional expenses when producing any product. These expences can include for example labour costs, treatment of waste materials and profit for the producer. Please consider carefully whether this level of data quality is acceptable for your application.

## Inputs from technosphere
- inert waste, for final disposal: -117.804 kg; name waste_aggregates; = (gravel+(concrete*c_WM)+bitumen)*-1
  Calculated value.
  production volume 9.8744e11 kg; = annual_road*waste_aggregates
    Calculated from the production volume of road in proportion to the respective output amounts.
  property price 0 EUR2005; name waste_aggregates_price_EUR2005
  properties: wet mass 1 kg, water content 0.00502513, dry mass 0.995 kg
- scrap steel: 0 kg; name scrap_steel
  Calculated value.
  production volume 0 kg
    Calculated from production volume of reference product using the relative outputs.
  property carbon content, fossil 0; name C_content_fossil
  property wet mass 1 kg; name WM
  property carbon content, non-fossil 0; name C_content_non_fossil
  property water content 0; name water_content
  property water in wet mass 0 kg; name WWM
  property price 0 EUR2005; name scrap_steel_price_EUR2005
  property dry mass 1 kg; name DM
- steel, low-alloyed, hot rolled: 0.00767 kg; name steel2; source Maibach M. 1999; lognormal variance with pedigree 0.0546, pedigree (3,3,5,5,1)
  Calculated value. Literature studies and own calculations.
  Uncertainty: l
  properties: carbon content, fossil 0.005, wet mass 1 kg, dry mass 1 kg
  note on carbon content, fossil: Low alloyed steel composition given in Tab. 3.2 ecoinvent v2.2 report 10_partII. Steel assumed to have a C content of 0.5%
- excavation, skid-steer loader: 0.242 m3; = 0.18+0.062; source Stiller H. 1993; lognormal variance with pedigree 0.1846, pedigree (3,3,5,5,1)
  Calculated value. The figures are derived from Stiller (1993).
  Uncertainty: l
- concrete, normal: 0 m3; name concrete; source Maibach M. 1999; pedigree (1,1,1,1,1)
  Calculated value. For the calculation of material expenditures per m bitumen road, recycling rates have been estimated. For the road foundation, a recycling rate of 50% has been assumed. For the surfacing and for the subgrade no recycling has been assumed. The subgrade will be removed after 100 years and the street must be completely re-constructed. For concrete roads, no recycling is assumed.
  Uncertainty: l
  property wet mass 2380 kg; name c_WM
  property dry mass 2190 kg; name concrete_DM
  properties: water content 0.086758
- gravel, crushed: 0 kg; name gravel; source Wresowar M. 2000; pedigree (1,1,1,1,1)
  106 kg gravel is used during the construction of road. Calculated value. Literature studies and own calculations.
  2.11 kg gravel is used during the maintenance of road. Calculated value. For the determination of the use of salt and gravel for icy roads on highways and 1.class roads, data from a recent Austrian study Wresowar & Sieghardt (2000) have been used.
  Uncertainty: l
  properties: wet mass 1 kg, dry mass 1 kg
- bitumen adhesive compound, hot: 3.24 kg; name bitumen; source Maibach M. 1999; lognormal variance with pedigree 0.0546, pedigree (3,3,5,5,1)
  Calculated value. Data of particulate emissions from mechanical processes and activities on road construction sites are available from Stolz (2001). The size distribution has been adjusted to comply with the size distribution used in this project.
  Uncertainty: l
  properties: dry mass 1 kg, wet mass 1 kg, heating value, net 25.15 MJ, carbon content, fossil 0.83
- diesel, burned in building machine: 36.3 MJ; source Frischknecht R. 1996; lognormal variance with pedigree 0.0546, pedigree (3,3,5,5,1)
  Calculated value. The figures are derived from Frischknecht et al. (1996).
  Uncertainty: l
  properties: heating value, net 1 MJ
- reinforcing steel: 0.344 kg; name steel1; source Maibach M. 1999; lognormal variance with pedigree 0.0546, pedigree (3,3,5,5,1)
  Calculated value. Literature studies and own calculations.
  Uncertainty: l
  properties: dry mass 1 kg, carbon content, fossil 0.004, wet mass 1 kg
- electricity, medium voltage: 0 kWh; source Maibach M. 1999; pedigree (1,1,1,1,1)
  (same comment as for bitumen adhesive compound, hot)
- scrap steel: -0.0856564, -0.266014 kg (2 entries)
  Calculated value.
  production volume 2.94769e9 kg
  properties: wet mass 1 kg, dry mass 1 kg
- concrete, normal: 8.13802e-5, 8.47971e-6, 6.86492e-5, 3.86152e-5, 0.000163524, 5.51558e-6, 0.00323201 m3 (7 entries); source Maibach M. 1999; lognormal variance with pedigree 0.0546, pedigree (3,3,5,5,1)
  (same comment as for concrete, normal)
  properties: wet mass 2380 kg, water content 0.086758, dry mass 2190 kg
- gravel, crushed: 4.56082, 0.417542, 20.8793, 80.1424 kg (4 entries); source Wresowar M. 2000; lognormal variance with pedigree 0.0546, pedigree (3,3,5,5,1)
  (same comment as for gravel, crushed)
- electricity, medium voltage: 0.0401777, 0.00770436, 0.176904, 0.585699, 0.12934, 1.88114, 0.265147, 0.86389 kWh (8 entries); source Maibach M. 1999; lognormal variance with pedigree 0.0546, pedigree (3,3,5,5,1)
  (same comment as for bitumen adhesive compound, hot)

## Inputs from nature
All rows: source Bundesamt für Statistik (BfS) 2000
- Occupation, traffic area, rail/road embankment [natural resource, land]: 1.36 m2*year; lognormal variance with pedigree 0.1727, pedigree (2,2,5,5,5)
  Calculated value. The data employed for the road traffic area is based on a comprehensive assessment of land occupation due to Swiss traffic infrastructure in Hüsler et al. (1989). These data has been modified according to recent changes in the Swiss Road network Bundesamt für Statistik (BfS) (2000). Maintenance and land use
  Additional References:
  Hüsler W., Willi E., Meier E., Bachmann P. and Brodkowski L. (1989) Verkehrsflächen der Schweiz: Groberhebung. zur Raumplanung. Bundesamt für Raumplanung (BRP), Bern.
  Uncertainty: l
- Transformation, to traffic area, rail/road embankment [natural resource, land]: 0.00337 m2; lognormal variance with pedigree 0.042, pedigree (1,1,5,5,1)
  Calculated value. Maintenance and land use
- Occupation, traffic area, road network [natural resource, land]: 6.43 m2*year; lognormal variance with pedigree 0.1727, pedigree (2,2,5,5,5)
  (same comment as for Occupation, traffic area, rail/road embankment)
- Transformation, to traffic area, road network [natural resource, land]: 0.00764 m2; lognormal variance with pedigree 0.042, pedigree (1,1,5,5,1)
  Calculated value. Maintenance and land use
- Transformation, from unspecified [natural resource, land]: 0.011 m2; lognormal variance with pedigree 0.042, pedigree (1,1,5,5,1)
  Calculated value. Maintenance and land use

## Emissions to nature
- Particulates, > 2.5 um, and < 10um [air, unspecified]: 0.0234 kg; source Stolz J. 2001; lognormal variance with pedigree 0.1746, pedigree (3,3,5,5,1)
  (same comment as for bitumen adhesive compound, hot)
- Particulates, > 10 um [air, unspecified]: 0.0815 kg; source Stolz J. 2001; lognormal variance with pedigree 0.042, pedigree (1,1,5,5,1)
  Calculated value. Data of particulate emissions from mechanical processes and activities on road construction sites are available from Stolz (2001). The size distribution has been adjusted to comply with the size distribution used in this project.
- NMVOC, non-methane volatile organic compounds, unspecified origin [air, unspecified]: 0.039 kg; source BUWAL 1995; lognormal variance with pedigree 0.1106, pedigree (4,3,5,5,1)
  0.0389 kg NMVOC is used during the construction of road. Literature value. In this study, is employed an emission factor of 12kg NMVOC/t bitumen available from BUWAL (1995).
  Uncertainty: l

## Sampling procedure
national statistics and literature

## Extrapolations
This dataset has been copied from an original dataset covering the geography CH. The uncertainty has been adjusted accordingly.

## Review by Niels Jungbluth 2003-08-29
passed
self validation

## Review by Christian Bauer 2012-09-28
passed
