# treatment of waste polyvinylchloride, unsanitary landfill, very wet infiltration class (1000mm)

Dataset: EcoSpold 2, unit process
Geography: GLO
Time period: 2006-01-01 to 2021-12-31
Technology level: current
Classification: ISIC rev.4 ecoinvent: 3821:Treatment and disposal of non-hazardous waste
Synonyms: municipal waste landfill
Scenario: Business-as-Usual
System model: Allocation, cut-off by classification
Share of production covered: 1 %
Generated by: Avraam Symeonidis
Database: ecoinvent
isCopyrightProtected: true
accessRestrictedTo: 1

## General comment
This dataset represents the activity of waste disposal of waste polyvinylchloride in a unsanitary landfill. Recommended use of this dataset: For PVC, which goes to disposal as part of managed communal waste mixture. // Waste composition (wet, in ppm): upper heating value 21.67 MJ/kg; lower heating value 21.51 MJ/kg; H2O 2000; O 16911; H 54921; C 440610; S 1057; N 1057; P n.a.; B n.a.; Cl 475290; Br 73.839; F 15.506; I n.a.; Ag n.a.; As 2.0042; Ba 196.73; Cd 2.7546; Co 33.322; Cr 43.106; Cu 28.223; Hg 0.89569; Mn 84.301; Mo n.a.; Ni 21.729; Pb 16.002; Sb 45.323; Se 2.2152; Sn 391.41; V 303.95; Zn 59.775; Be 0.52742; Sc n.a.; Sr 93.353; Ti 1054.8; Tl 0.42194; W n.a.; Si n.a.; Fe 3930; Ca n.a.; Al 210.97; K n.a.; Mg n.a.; Na 1545.9; . // Share of carbon in waste that is biogenic 0%. Share of metals in waste not oxidised and bulk-recyclable (exclude very small or thin parts) Iron: 0%; Alu: 0%; Copper: 0%. Overall degradability of waste during 100 years: 1%.

## Included activities start
from final waste deposition (without transports to the site)

## Included activities end
Waste-specific short-term emissions to air via landfill gas and landfill leachate. Waste-specific long-term emissions from landfill.

## Geography
Given name of landfill location is 'infiltration class 5 very wet (2018)'. Landfill site with mean annual temperature (MAT) of 8 degC, mean annual precipitation (MAP) of 1900 mm/year, and net infiltration of 1000 mm/year.
Climate adjustments result in an alpha t (temperature) for permafrost areas of 0.999. Total climate adjustments with alpha pt of 0.999.

## Technology
This is an inventory for an unsanitary, sub-controlled landfill for municipal solid waste. Ultimate average landfill height is 15 meters. Operation phase duration is 25 years.Percentage of landfill gas directly emitted is 100w%.
Leachate of the landfill is not treated. Based on average waste composition and climate data the end of carbonate phase is estimated to be reached 1733 years after waste deposition.

## Reference product
- waste polyvinylchloride: -1 kg; CPC 39270: Waste, parings and scrap of plastics; By-product classification Waste; CAS 9002-86-2; pedigree (1,1,1,1,1)
  main reference product of this activity (supply of disposal service).
  Uncertainty: Uncertainty is not adjusted, as this is the refence product
  production volume 1 kg
    The amount of the annual production volume is a placeholder value. The contribution of this technology to the different local markets can be found in the markets themselves.
  property heating value, net 21.51 MJ
    Value taken from the general comment of the treatment dataset.
  property price 0 EUR2005
    Waste products are assigned a price of zero as they are assumed to require further treatment.
  property carbon content 0.44149
    carbon content on a dry matter basis (reserved; not for manual entry)
  properties: nickel content 2.1772e-5, carbon content, fossil 0.44149, wet mass 1 kg, bromine content 7.3987e-5, beryllium content 5.2848e-7, copper content 2.828e-5, iron content 0.0039379, titanium content 0.001057, aluminium content 0.00021139, selenium content 2.2196e-6, tin content 0.0003922, sodium content 0.001549, vanadium content 0.00030456, cadmium content 2.7601e-6, cobalt content 3.3389e-5, antimony content 4.5414e-5, water in wet mass 0.002 kg, manganese content 8.447e-5, thallium content 4.2278e-7, lead content 1.6034e-5, dry mass 0.998 kg, fluorine content 1.5537e-5, arsenic content 2.0082e-6, water content 0.002004, zinc content 5.9894e-5, barium content 0.00019712, mercury content 8.9749e-7, chromium content 4.3192e-5, strontium content 9.354e-5, nitrogen content 0.0010591, heating value, gross 21.673 MJ, oxygen content 0.016945, hydrogen content 0.055031, sulfur content 0.0010591, chlorine content 0.47624, carbon allocation 0.440607 kg

## Inputs from technosphere
- excavation, skid-steer loader: 0.00031708 m3; lognormal variance with pedigree 0.088256, pedigree (1,1,4,1,1)
  application of daily cover.
  Uncertainty: Uncertainty calculated from uncertainty in base parameters.
- diesel, burned in building machine: 0.046738 MJ; lognormal variance with pedigree 0.088256, pedigree (1,1,4,1,1)
  for waste distribution and compaction.
  Uncertainty: Uncertainty calculated from uncertainty in base parameters.
  properties: heating value, net 1 MJ

## Inputs from nature
- Occupation, dump site [natural resource, land]: 0.0023333 m2*year; lognormal variance with pedigree 0.088256, pedigree (1,1,4,1,1)
  for landfill operation phase and spontaneous renaturation.
  Uncertainty: Uncertainty calculated from uncertainty in base parameters.

## Emissions to nature
- Beryllium [water, ground-, long-term]: 5.2711e-7 kg; lognormal variance with pedigree 0.421, pedigree (1,1,4,1,1)
  Emissions from long-term leachate (>100a) directly from MSW landfill and indirectly via incineration of treatement sludge from leachate treatement.
  Uncertainty: Uncertainty calculated depending on waste input and uncertainty of long-term transfer coefficents in landfill.
- BOD5, Biological Oxygen Demand [water, ground-]: 3.319e-5 kg; lognormal variance with pedigree 0.21639, pedigree (1,1,4,1,1)
  burden from short-term leachate to groundwater in uncontrolled landfill in moist cimate.
  Uncertainty: Uncertainty calculated from unertainty of the waste composition of this waste, uncertainty in waste decomposition and short-term leaching in landfill
- Zinc, ion [water, ground-, long-term]: 5.9746e-5 kg; lognormal variance with pedigree 0.26563, pedigree (1,1,4,1,1)
  (same comment as for Beryllium)
- Heat, waste [water, ground-, long-term]: 21.457 MJ; lognormal variance with pedigree 0.020651, pedigree (1,1,4,1,1)
  burden from long-term decomposition of waste (>100a).
  Uncertainty: Uncertainty calculated from unertainty of the waste composition of this waste, uncertainty in waste decomposition and short-term leaching in landfill
- Strontium [water, ground-, long-term]: 9.3299e-5 kg; lognormal variance with pedigree 0.2508, pedigree (1,1,4,1,1)
  (same comment as for Beryllium)
- COD, Chemical Oxygen Demand [water, ground-]: 0.0001402 kg; lognormal variance with pedigree 0.21639, pedigree (1,1,4,1,1)
  (same comment as for BOD5, Biological Oxygen Demand)
- Tin, ion [water, ground-, long-term]: 0.00039139 kg; lognormal variance with pedigree 0.20321, pedigree (1,1,4,1,1)
  (same comment as for Beryllium)
- TOC, Total Organic Carbon [water, ground-]: 0.00012818 kg; lognormal variance with pedigree 0.21639, pedigree (1,1,4,1,1)
  (same comment as for BOD5, Biological Oxygen Demand)
- Vanadium, ion [water, ground-, long-term]: 4.159e-5 kg; lognormal variance with pedigree 0.45879, pedigree (1,1,4,1,1)
  (same comment as for Beryllium)
- Aluminium [air, non-urban air or from high stacks]: 2.6333e-11 kg; lognormal variance with pedigree 0.68, pedigree (1,1,4,1,1)
  burden from direct release or incineration of landfill biogas; or windblown leachate evaporite in arid climates.
  Uncertainty: Uncertainty calculated from unertainty of the waste composition of this waste, uncertainty in waste decomposition and short-term leaching in landfill
- Lead [water, ground-, long-term]: 1.6001e-5 kg; lognormal variance with pedigree 0.30942, pedigree (1,1,4,1,1)
  (same comment as for Beryllium)
- Sodium [air, non-urban air or from high stacks]: 1.5974e-8 kg; lognormal variance with pedigree 0.47215, pedigree (1,1,4,1,1)
  (same comment as for Aluminium)
- Selenium [water, ground-, long-term]: 2.9242e-7 kg; lognormal variance with pedigree 0.6307, pedigree (1,1,4,1,1)
  (same comment as for Beryllium)
- Titanium [air, non-urban air or from high stacks]: 1.3167e-10 kg; lognormal variance with pedigree 0.62697, pedigree (1,1,4,1,1)
  (same comment as for Aluminium)
- Sodium, ion [water, ground-]: 6.3897e-5 kg; lognormal variance with pedigree 0.20963, pedigree (1,1,4,1,1)
  (same comment as for BOD5, Biological Oxygen Demand)
- Antimony [water, ground-, long-term]: 2.0021e-6 kg; lognormal variance with pedigree 0.88302, pedigree (1,1,4,1,1)
  (same comment as for Beryllium)
- Iron [air, non-urban air or from high stacks]: 1.3479e-10 kg; lognormal variance with pedigree 0.62519, pedigree (1,1,4,1,1)
  (same comment as for Aluminium)
- Thallium [water, ground-]: 2.4501e-10 kg; lognormal variance with pedigree 0.60908, pedigree (1,1,4,1,1)
  (same comment as for BOD5, Biological Oxygen Demand)
- Nickel, ion [water, ground-, long-term]: 2.1716e-5 kg; lognormal variance with pedigree 0.29927, pedigree (1,1,4,1,1)
  (same comment as for Beryllium)
- Strontium [air, non-urban air or from high stacks]: 1.3552e-11 kg; lognormal variance with pedigree 0.70235, pedigree (1,1,4,1,1)
  (same comment as for Aluminium)
- Aluminium [water, ground-]: 1.0533e-7 kg; lognormal variance with pedigree 0.40954, pedigree (1,1,4,1,1)
  (same comment as for BOD5, Biological Oxygen Demand)
- Mercury [water, ground-, long-term]: 8.9483e-7 kg; lognormal variance with pedigree 0.40392, pedigree (1,1,4,1,1)
  (same comment as for Beryllium)
- Thallium [air, non-urban air or from high stacks]: 6.1253e-14 kg; lognormal variance with pedigree 0.87972, pedigree (1,1,4,1,1)
  (same comment as for Aluminium)
- Iron, ion [water, ground-]: 5.3916e-7 kg; lognormal variance with pedigree 0.35694, pedigree (1,1,4,1,1)
  (same comment as for BOD5, Biological Oxygen Demand)
- Manganese [water, ground-, long-term]: 8.3336e-5 kg; lognormal variance with pedigree 0.25419, pedigree (1,1,4,1,1)
  (same comment as for Beryllium)
- Zinc [air, non-urban air or from high stacks]: 6.2852e-12 kg; lognormal variance with pedigree 0.72734, pedigree (1,1,4,1,1)
  (same comment as for Aluminium)
- Titanium, ion [water, ground-]: 5.2666e-7 kg; lognormal variance with pedigree 0.35652, pedigree (1,1,4,1,1)
  (same comment as for BOD5, Biological Oxygen Demand)
- Cobalt [water, ground-, long-term]: 3.3215e-5 kg; lognormal variance with pedigree 0.28507, pedigree (1,1,4,1,1)
  (same comment as for Beryllium)
- Vanadium [air, non-urban air or from high stacks]: 8.0038e-11 kg; lognormal variance with pedigree 0.64428, pedigree (1,1,4,1,1)
  (same comment as for Aluminium)
- Strontium [water, ground-]: 5.4209e-8 kg; lognormal variance with pedigree 0.43171, pedigree (1,1,4,1,1)
  (same comment as for BOD5, Biological Oxygen Demand)
- Chromium VI [water, ground-, long-term]: 8.3653e-8 kg; lognormal variance with pedigree 2.7138, pedigree (1,1,4,1,1)
  (same comment as for Beryllium)
- Beryllium [air, non-urban air or from high stacks]: 7.6566e-14 kg; lognormal variance with pedigree 0.87255, pedigree (1,1,4,1,1)
  (same comment as for Aluminium)
- Beryllium [water, ground-]: 3.0626e-10 kg; lognormal variance with pedigree 0.60192, pedigree (1,1,4,1,1)
  (same comment as for BOD5, Biological Oxygen Demand)
- Copper, ion [water, ground-, long-term]: 2.8222e-5 kg; lognormal variance with pedigree 0.29059, pedigree (1,1,4,1,1)
  (same comment as for Beryllium)
- Selenium [air, non-urban air or from high stacks]: 5.833e-13 kg; lognormal variance with pedigree 0.80719, pedigree (1,1,4,1,1)
  (same comment as for Aluminium)
- Vanadium, ion [water, ground-]: 3.2015e-7 kg; lognormal variance with pedigree 0.37311, pedigree (1,1,4,1,1)
  (same comment as for BOD5, Biological Oxygen Demand)
- Barium [water, ground-, long-term]: 0.00019448 kg; lognormal variance with pedigree 0.22601, pedigree (1,1,4,1,1)
  (same comment as for Beryllium)
- Tin [air, non-urban air or from high stacks]: 5.7593e-12 kg; lognormal variance with pedigree 0.72596, pedigree (1,1,4,1,1)
  (same comment as for Aluminium)
- Zinc, ion [water, ground-]: 2.8283e-8 kg; lognormal variance with pedigree 0.45325, pedigree (1,1,4,1,1)
  (same comment as for BOD5, Biological Oxygen Demand)
- Arsenic, ion [water, ground-, long-term]: 2.0006e-6 kg; lognormal variance with pedigree 0.37776, pedigree (1,1,4,1,1)
  (same comment as for Beryllium)
- Manganese [air, non-urban air or from high stacks]: 2.4109e-10 kg; lognormal variance with pedigree 0.61013, pedigree (1,1,4,1,1)
  (same comment as for Aluminium)
- Tin, ion [water, ground-]: 2.3037e-8 kg; lognormal variance with pedigree 0.45965, pedigree (1,1,4,1,1)
  (same comment as for BOD5, Biological Oxygen Demand)
- Cadmium, ion [water, ground-, long-term]: 2.7497e-6 kg; lognormal variance with pedigree 0.36737, pedigree (1,1,4,1,1)
  (same comment as for Beryllium)
- Lead [air, non-urban air or from high stacks]: 3.1392e-13 kg; lognormal variance with pedigree 0.82333, pedigree (1,1,4,1,1)
  (same comment as for Aluminium)
- Antimony [water, ground-]: 4.7738e-8 kg; lognormal variance with pedigree 0.43637, pedigree (1,1,4,1,1)
  (same comment as for BOD5, Biological Oxygen Demand)
- Bromine [water, ground-, long-term]: 7.1956e-5 kg; lognormal variance with pedigree 0.25862, pedigree (1,1,4,1,1)
  (same comment as for Beryllium)
- Nickel [air, non-urban air or from high stacks]: 3.1544e-12 kg; lognormal variance with pedigree 0.75083, pedigree (1,1,4,1,1)
  (same comment as for Aluminium)
- Selenium [water, ground-]: 2.3332e-9 kg; lognormal variance with pedigree 0.53602, pedigree (1,1,4,1,1)
  (same comment as for BOD5, Biological Oxygen Demand)
- Chloride [water, ground-, long-term]: 0.46316 kg; lognormal variance with pedigree 0.0120041, pedigree (1,1,4,1,1)
  (same comment as for Beryllium)
- Antimony [air, non-urban air or from high stacks]: 1.1935e-11 kg; lognormal variance with pedigree 0.70754, pedigree (1,1,4,1,1)
  (same comment as for Aluminium)
- Mercury [water, ground-]: 6.1283e-10 kg; lognormal variance with pedigree 0.57947, pedigree (1,1,4,1,1)
  (same comment as for BOD5, Biological Oxygen Demand)
- Fluoride [water, ground-, long-term]: 1.5436e-5 kg; lognormal variance with pedigree 0.31046, pedigree (1,1,4,1,1)
  (same comment as for Beryllium)
- Copper [air, non-urban air or from high stacks]: 3.9441e-13 kg; lognormal variance with pedigree 0.81492, pedigree (1,1,4,1,1)
  (same comment as for Aluminium)
- Manganese [water, ground-]: 9.6435e-7 kg; lognormal variance with pedigree 0.34134, pedigree (1,1,4,1,1)
  (same comment as for BOD5, Biological Oxygen Demand)
- Nitrate [water, ground-, long-term]: 4.4192e-5 kg; lognormal variance with pedigree 0.17061, pedigree (1,1,4,1,1)
  (same comment as for Beryllium)
- Mercury [air, non-urban air or from high stacks]: 2.4513e-10 kg; lognormal variance with pedigree 0.60954, pedigree (1,1,4,1,1)
  (same comment as for Aluminium)
- Lead [water, ground-]: 9.4176e-10 kg; lognormal variance with pedigree 0.56586, pedigree (1,1,4,1,1)
  (same comment as for BOD5, Biological Oxygen Demand)
- Nitrite [water, ground-, long-term]: 2.2871e-5 kg; lognormal variance with pedigree 0.17061, pedigree (1,1,4,1,1)
  (same comment as for Beryllium)
- Cobalt [air, non-urban air or from high stacks]: 2.6744e-11 kg; lognormal variance with pedigree 0.68214, pedigree (1,1,4,1,1)
  (same comment as for Aluminium)
- Nickel, ion [water, ground-]: 1.2618e-8 kg; lognormal variance with pedigree 0.48019, pedigree (1,1,4,1,1)
  (same comment as for BOD5, Biological Oxygen Demand)
- Nitrogen, organic bound [water, ground-, long-term]: 0.00068681 kg; lognormal variance with pedigree 0.17061, pedigree (1,1,4,1,1)
  (same comment as for Beryllium)
- Chromium [air, non-urban air or from high stacks]: 1.2269e-12 kg; lognormal variance with pedigree 0.77895, pedigree (1,1,4,1,1)
  (same comment as for Aluminium)
- Copper, ion [water, ground-]: 1.3804e-9 kg; lognormal variance with pedigree 0.55315, pedigree (1,1,4,1,1)
  (same comment as for BOD5, Biological Oxygen Demand)
- Ammonium, ion [water, ground-, long-term]: 0.00042021 kg; lognormal variance with pedigree 0.17061, pedigree (1,1,4,1,1)
  (same comment as for Beryllium)
- Cadmium [air, non-urban air or from high stacks]: 3.2275e-11 kg; lognormal variance with pedigree 0.67713, pedigree (1,1,4,1,1)
  (same comment as for Aluminium)
- Chromium VI [water, ground-]: 4.9076e-9 kg; lognormal variance with pedigree 0.51111, pedigree (1,1,4,1,1)
  (same comment as for BOD5, Biological Oxygen Demand)
- Sulfate [water, ground-, long-term]: 0.0029406 kg; lognormal variance with pedigree 0.1706, pedigree (1,1,4,1,1)
  (same comment as for Beryllium)
- Hydrogen fluoride [air, non-urban air or from high stacks]: 6.1736e-8 kg; lognormal variance with pedigree 0.43126, pedigree (1,1,4,1,1)
  (same comment as for Aluminium)
- Cadmium, ion [water, ground-]: 4.8413e-9 kg; lognormal variance with pedigree 0.51242, pedigree (1,1,4,1,1)
  (same comment as for BOD5, Biological Oxygen Demand)
- Hydrogen sulfide [water, ground-, long-term]: 7.6653e-5 kg; lognormal variance with pedigree 0.1706, pedigree (1,1,4,1,1)
  (same comment as for Beryllium)
- Arsenic [air, non-urban air or from high stacks]: 5.0405e-11 kg; lognormal variance with pedigree 0.66232, pedigree (1,1,4,1,1)
  (same comment as for Aluminium)
- Barium [water, ground-]: 2.2504e-6 kg; lognormal variance with pedigree 0.31315, pedigree (1,1,4,1,1)
  (same comment as for BOD5, Biological Oxygen Demand)
- DOC, Dissolved Organic Carbon [water, ground-, long-term]: 0.43621 kg; lognormal variance with pedigree 0.0127843, pedigree (1,1,4,1,1)
  (same comment as for Beryllium)
- Barium [air, non-urban air or from high stacks]: 5.6261e-10 kg; lognormal variance with pedigree 0.58195, pedigree (1,1,4,1,1)
  (same comment as for Aluminium)
- Cobalt [water, ground-]: 1.0698e-7 kg; lognormal variance with pedigree 0.411, pedigree (1,1,4,1,1)
  (same comment as for BOD5, Biological Oxygen Demand)
- TOC, Total Organic Carbon [water, ground-, long-term]: 0.43621 kg; lognormal variance with pedigree 0.0127843, pedigree (1,1,4,1,1)
  (same comment as for Beryllium)
- Hydrogen chloride [air, non-urban air or from high stacks]: 0.00017232 kg; lognormal variance with pedigree 0.20926, pedigree (1,1,4,1,1)
  (same comment as for Aluminium)
- Arsenic, ion [water, ground-]: 3.5955e-9 kg; lognormal variance with pedigree 0.52214, pedigree (1,1,4,1,1)
  (same comment as for BOD5, Biological Oxygen Demand)
- COD, Chemical Oxygen Demand [water, ground-, long-term]: 0.4771 kg; lognormal variance with pedigree 0.0127843, pedigree (1,1,4,1,1)
  (same comment as for Beryllium)
- Bromine [air, non-urban air or from high stacks]: 2.6036e-8 kg; lognormal variance with pedigree 0.45588, pedigree (1,1,4,1,1)
  (same comment as for Aluminium)
- Fluoride [water, ground-]: 1.1378e-8 kg; lognormal variance with pedigree 0.48374, pedigree (1,1,4,1,1)
  (same comment as for BOD5, Biological Oxygen Demand)
- BOD5, Biological Oxygen Demand [water, ground-, long-term]: 0.11295 kg; lognormal variance with pedigree 0.0127843, pedigree (1,1,4,1,1)
  (same comment as for Beryllium)
- Nitrogen oxides [air, non-urban air or from high stacks]: 1.4479e-8 kg; lognormal variance with pedigree 0.32955, pedigree (1,1,4,1,1)
  burden from direct release or incineration of landfill biogas.
  Uncertainty: Uncertainty calculated from unertainty of the waste composition of this waste, uncertainty in waste decomposition and short-term leaching in landfill
- Chloride [water, ground-]: 0.011955 kg; lognormal variance with pedigree 0.076646, pedigree (1,1,4,1,1)
  (same comment as for BOD5, Biological Oxygen Demand)
- Sulfur dioxide [air, non-urban air or from high stacks]: 1.3777e-6 kg; lognormal variance with pedigree 0.34774, pedigree (1,1,4,1,1)
  (same comment as for Nitrogen oxides)
- Bromine [water, ground-]: 1.8572e-6 kg; lognormal variance with pedigree 0.32326, pedigree (1,1,4,1,1)
  (same comment as for BOD5, Biological Oxygen Demand)
- Carbon dioxide, fossil [air, non-urban air or from high stacks]: 0.006901 kg; lognormal variance with pedigree 0.105708, pedigree (1,1,4,1,1)
  (same comment as for Nitrogen oxides)
- Nitrate [water, ground-]: 1.0579e-6 kg; lognormal variance with pedigree 0.23732, pedigree (1,1,4,1,1)
  (same comment as for BOD5, Biological Oxygen Demand)
- Methane, fossil [air, non-urban air or from high stacks]: 0.0031875 kg; lognormal variance with pedigree 0.11584, pedigree (1,1,4,1,1)
  (same comment as for Nitrogen oxides)
- Nitrite [water, ground-]: 5.4749e-7 kg; lognormal variance with pedigree 0.23732, pedigree (1,1,4,1,1)
  (same comment as for BOD5, Biological Oxygen Demand)
- Sodium, ion [water, ground-, long-term]: 0.001482 kg; lognormal variance with pedigree 0.1583, pedigree (1,1,4,1,1)
  (same comment as for Beryllium)
- Ammonium, ion [water, ground-]: 1.0059e-5 kg; lognormal variance with pedigree 0.23732, pedigree (1,1,4,1,1)
  (same comment as for BOD5, Biological Oxygen Demand)
- Aluminium [water, ground-, long-term]: 0.00021086 kg; lognormal variance with pedigree 0.22369, pedigree (1,1,4,1,1)
  (same comment as for Beryllium)
- Hydrogen sulfide [water, ground-]: 2.8637e-7 kg; lognormal variance with pedigree 0.29191, pedigree (1,1,4,1,1)
  (same comment as for BOD5, Biological Oxygen Demand)
- Nitrogen, organic bound [water, ground-]: 1.6441e-5 kg; lognormal variance with pedigree 0.23732, pedigree (1,1,4,1,1)
  (same comment as for BOD5, Biological Oxygen Demand)
- Thallium [water, ground-, long-term]: 4.2169e-7 kg; lognormal variance with pedigree 0.42817, pedigree (1,1,4,1,1)
  (same comment as for Beryllium)
- Sulfate [water, ground-]: 1.0986e-5 kg; lognormal variance with pedigree 0.29191, pedigree (1,1,4,1,1)
  (same comment as for BOD5, Biological Oxygen Demand)
- Titanium, ion [water, ground-, long-term]: 0.0010543 kg; lognormal variance with pedigree 0.17066, pedigree (1,1,4,1,1)
  (same comment as for Beryllium)
- DOC, Dissolved Organic Carbon [water, ground-]: 0.00012818 kg; lognormal variance with pedigree 0.21639, pedigree (1,1,4,1,1)
  (same comment as for BOD5, Biological Oxygen Demand)
- Iron, ion [water, ground-, long-term]: 0.0039294 kg; lognormal variance with pedigree 0.12852, pedigree (1,1,4,1,1)
  (same comment as for Beryllium)
- Heat, waste [soil, industrial]: 0.14514 MJ; lognormal variance with pedigree 0.079371, pedigree (1,1,4,1,1)
  burden from short-term decomposition of waste (0-100a).
  Uncertainty: Uncertainty calculated from unertainty of the waste composition of this waste, uncertainty in waste decomposition and short-term leaching in landfill

## Extrapolations
This dataset has been extrapolated from year 2012 to the year of the calculation (2021). The uncertainty has been adjusted accordingly.
