# resistor production, metal film type, through-hole mounting

Dataset: EcoSpold 2, unit process
Geography: GLO
Time period: 1994-01-01 to 2021-12-31
Technology level: current
Classification: EcoSpold01Categories: electronics/component
Classification: ISIC rev.4 ecoinvent: 2610:Manufacture of electronic components and boards
Scenario: Business-as-Usual
System model: Allocation, cut-off by classification
Generated by: Roland Hischier
Published in: Hischier R. 2007
Database: ecoinvent
isCopyrightProtected: true
accessRestrictedTo: 1

## General comment
This dataset represents the production of 1 kg of metal film type resistors for the through-hole mounting technology. It is based on the assumption that a typical metal film type resistor electronic module has an average weight of 0.48 g.The data represent a typical metal-film type resistor for through-hole mounting, used in the information and communication technology. Material data are taken from datasheets of producers of such resistors and from the literature. Infrastructure and production efforts are based on own assumptions. The production efforts represent not a specific resistor type and have thus, accordingly higher uncertainties.

## Included activities start
From reception of metals, plastics at the factory gate.

## Included activities end
This dataset includes raw material input and production efforts for the production of currently used metal-film resistors for through-hole mounting technology.

## Geography
Data represent a global valuable composition of metal-film type resistors.

## Technology
Average technology for the production of resistors and potentiometers - comprising terminmation printing; resistive body printing; glass coat printing; laser trimming; substrate stripping (SMT) resp. ceramic rods; deposition processes; ageing; capping (THT) resp. printing; curing; punching; revetting; molding (ptoentiom.)

## Reference product
- resistor, metal film type, through-hole mounting: 1 kg; source Hobbs L. 2007; By-product classification allocatable product; CPC 47120: Electrical resistors (except heating resistors)
  Metal-film type resistor represent the best compromise of all resistors. They are not as accurate and have a higher temperature coefficient of resistance and are not as stable as Precision Wirewounds. But they are more accurate, do not have a voltage coefficient, and have a lower temperature coefficient than Carbon Film. This type of resistor has a very low noise level when properly manufactured.
  EcoSpold01Location=GLO
  production volume 1 kg
    Dummy value to be replaced by measured, estimated or calculated value
  property price 23.3884 EUR2005
    Calculated based on inputs: The price of the product has been calculated as a sum of the values of the material and energy inputs for this product. This value is therefore a rough estimation. It may underestimate the real price since there are additional expenses when producing any product. These expences can include for example labour costs, treatment of waste materials and profit for the producer. Please consider carefully whether this level of data quality is acceptable for your application.
  property carbon content, fossil 0.029003
    Calculated as the addition of C contents in the product composition, and referred to 1 kg DM resistor.
  property carbon content, non-fossil 0
    (same comment as for resistor, metal film type, through-hole mounting)
  property carbon content 0.029003
    carbon content on a dry matter basis (reserved; not for manual entry)
  properties: dry mass 1 kg, water content 0, wet mass 1 kg, water in wet mass 0 kg, carbon allocation 0.029003 kg

## Inputs from technosphere
- silica sand: 0.15375 kg; source Behrendt S 1998; lognormal variance with pedigree 0.042, pedigree (1,4,5,1,1)
  Calculated Value. The production of 1 kg of resistors lead to a waste amount of 0.23 kg unused raw materials. Hence, this dataset here has an input of 1.23 kg of raw materials per kg of resistor. The split to the different raw materials (metals, plastics, etc.) is based on the reported material specifications.
  Further references
  ZVEI (2006) Umbrella Specs. Download of December 21 from <http://www.zvei.org/index.php?id=1158>.
  EcoSpold01Location=DE
  Uncertainty: average from literature & company information
  properties: water content 0.010101, wet mass 1 kg, dry mass 0.99 kg
- silicone product: 0 kg; source Behrendt S 1998; pedigree (1,1,1,1,1)
  Calculated Value. The production of 1 kg of resistors lead to a waste amount of 0.23 kg unused raw materials. Hence, this dataset here has an input of 1.23 kg of raw materials per kg of resistor. The split to the different raw materials (metals, plastics, etc.) is based on the reported material specifications.
  Further references
  ZVEI (2006) Umbrella Specs. Download of December 21 from <http://www.zvei.org/index.php?id=1158>.
  EcoSpold01Location=RER
  Uncertainty: average from literature & company information
  properties: carbon content, fossil 0.324324, wet mass 1 kg, dry mass 1 kg, heating value, net 9.83 MJ
  note on carbon content, fossil: The term silicones is used for compounds in which silicon atoms are linked via oxygen atoms, each silicon atom bearing one or several organic groups. In industrially important silicones, these groups are usually methyl or phenyl (ecoinvent v2.2 report 8_part71 & Ullmann). The chemical formula was considered to be [Si(CH3)2O]n (Ullmann).
- epoxy resin, liquid: 0 kg; source Behrendt S 1998; pedigree (1,1,1,1,1)
  (same comment as for silicone product)
  properties: carbon content, fossil 0.42325, wet mass 1 kg, dry mass 1 kg, heating value, net 12.82 MJ
- pig iron: 0 kg; source Behrendt S 1998; pedigree (1,1,1,1,1)
  EcoSpold01Location=GLO
  Calculated Value. The production of 1 kg of resistors lead to a waste amount of 0.23 kg unused raw materials. Hence, this dataset here has an input of 1.23 kg of raw materials per kg of resistor. The split to the different raw materials (metals, plastics, etc.) is based on the reported material specifications.
  Further references
  ZVEI (2006) Umbrella Specs. Download of December 21 from <http://www.zvei.org/index.php?id=1158>.
  Uncertainty: average from literature & company information
  properties: dry mass 1 kg, carbon content, fossil 0.045, wet mass 1 kg
  note on carbon content, fossil: Pig iron is the iron produced in the blast furnace. It is an alloy of 94% Fe and more than 2% C (world average 4.5%). (ecoinvent v2.2 report 10_partII)
- resistor, auxilliaries and energy use: 1 kg; lognormal variance with pedigree 0.134, pedigree (3,4,5,1,4)
  EcoSpold01Location=GLO
  Estimation - details see this other activity dataset
  Uncertainty: rough estimation
- methyl acrylate: 0.000123 kg; source Behrendt S 1998; lognormal variance with pedigree 0.042, pedigree (1,4,5,1,1)
  (same comment as for pig iron)
  properties: carbon content, fossil 0.55814, dry mass 1 kg, wet mass 1 kg, heating value, net 25.35 MJ
- nickel, class 1: 0.029028 kg; source Behrendt S 1998; lognormal variance with pedigree 0.042, pedigree (1,4,5,1,1)
  Calculated Value. The production of 1 kg of resistors lead to a waste amount of 0.23 kg unused raw materials. Hence, this dataset here has an input of 1.23 kg of raw materials per kg of resistor. The split to the different raw materials (metals, plastics, etc.) is based on the reported material specifications.
  Further references
  ZVEI (2006) Umbrella Specs. Download of December 21 from <http://www.zvei.org/index.php?id=1158>.
  EcoSpold01Location=GLO
  Uncertainty: average from literature & company information
  properties: wet mass 1 kg, dry mass 1 kg
- titanium dioxide: 0 kg; source Behrendt S 1998; pedigree (1,1,1,1,1)
  (same comment as for silicone product)
  properties: dry mass 1 kg, wet mass 1 kg
- polyurethane, flexible foam: 0 kg; source Behrendt S 1998; pedigree (1,1,1,1,1)
  EcoSpold01Location=RER
  Calculated Value. The production of 1 kg of resistors lead to a waste amount of 0.23 kg unused raw materials. Hence, this dataset here has an input of 1.23 kg of raw materials per kg of resistor. The split to the different raw materials (metals, plastics, etc.) is based on the reported material specifications.
  Further references
  ZVEI (2006) Umbrella Specs. Download of December 21 from <http://www.zvei.org/index.php?id=1158>.
  Uncertainty: average from literature & company information
  properties: heating value, net 30.67 MJ, dry mass 1 kg, carbon content, fossil 0.633827, wet mass 1 kg
  note on carbon content, fossil: Polyurethanes (PUR) is the collective name for an extensive group of polymers with very different compositions and correspondingly varied property profiles, though their molecule chain contains all a urethane group (-NH-CO-O-). All PURs are built on a common principle : they are produced by the diisocyanate polyaddition process, that links polyols and (di)isocyanates. In this dataset, an example of typical polyurethane mixture is described (Ullmann, Polyurethanes, Dieterich et al. & ecoinvent v2 report 11_II). C content was calculated as an addition of C contents in its components.
- steel, low-alloyed, hot rolled: 0.0738 kg; source Behrendt S 1998; lognormal variance with pedigree 0.042, pedigree (1,4,5,1,1)
  (same comment as for polyurethane, flexible foam)
  properties: carbon content, fossil 0.005, dry mass 1 kg, wet mass 1 kg
  note on carbon content, fossil: Low alloyed steel composition given in Tab. 3.2 ecoinvent v2.2 report 10_partII. Steel assumed to have a C content of 0.5%
- polyethylene terephthalate, granulate, amorphous: 0.025215 kg; source Behrendt S 1998; lognormal variance with pedigree 0.042, pedigree (1,4,5,1,1)
  (same comment as for polyurethane, flexible foam)
  properties: heating value, net 22.95 MJ, carbon content, fossil 0.625, dry mass 1 kg, wet mass 1 kg
  note on carbon content, fossil: Polymer of the ethylen terephtalate monomer (C10H8O4)n (ecoinvent v2.2 report 11_II), MW=192 g/mol
- copper, cathode: 0.45756 kg; source Behrendt S 1998; lognormal variance with pedigree 0.042, pedigree (1,4,5,1,1)
  (same comment as for silicone product)
  properties: dry mass 1 kg, wet mass 1 kg
- lead: 0.061869 kg; source Behrendt S 1998; lognormal variance with pedigree 0.042, pedigree (1,4,5,1,1)
  (same comment as for silicone product)
  properties: dry mass 1 kg, wet mass 1 kg
- aluminium oxide, non-metallurgical: 0 kg; source Behrendt S 1998; pedigree (1,1,1,1,1)
  (same comment as for silicone product)
  properties: wet mass 1 kg, dry mass 1 kg
- aluminium, wrought alloy: 0.000369 kg; source Behrendt S 1998; lognormal variance with pedigree 0.042, pedigree (1,4,5,1,1)
  (same comment as for polyurethane, flexible foam)
  properties: dry mass 1 kg, wet mass 1 kg
- magnesium oxide: 0.005166 kg; source Behrendt S 1998; lognormal variance with pedigree 0.042, pedigree (1,4,5,1,1)
  (same comment as for polyurethane, flexible foam)
  properties: dry mass 1 kg, wet mass 1 kg
- tin: 0.10762 kg; source Behrendt S 1998; lognormal variance with pedigree 0.042, pedigree (1,4,5,1,1)
  (same comment as for polyurethane, flexible foam)
  properties: wet mass 1 kg, dry mass 1 kg
- lime, packed: 0 kg; source Behrendt S 1998; pedigree (1,1,1,1,1)
  EcoSpold01Location=CH
  Calculated Value. The production of 1 kg of resistors lead to a waste amount of 0.23 kg unused raw materials. Hence, this dataset here has an input of 1.23 kg of raw materials per kg of resistor. The split to the different raw materials (metals, plastics, etc.) is based on the reported material specifications.
  Further references
  ZVEI (2006) Umbrella Specs. Download of December 21 from <http://www.zvei.org/index.php?id=1158>.
  Uncertainty: average from literature & company information
  properties: carbon content, fossil 0.117492, dry mass 0.998 kg, wet mass 1 kg, water content 0.00200401
  note on carbon content, fossil: Table 3.1, ecoinvent v2.2 report 7, part VII, pg 3. MW CaCO3=100, MW MgCO3=84
- silicone product: 0.000648385, 0.00131961 kg (2 entries); source Behrendt S 1998; lognormal variance with pedigree 0.042, pedigree (1,4,5,1,1)
  (same comment as for silicone product)
- epoxy resin, liquid: 0.00359554, 0.0170685 kg (2 entries); source Behrendt S 1998; lognormal variance with pedigree 0.042, pedigree (1,4,5,1,1)
  (same comment as for silicone product)
- pig iron: 0.0107082, 0.115612 kg (2 entries); source Behrendt S 1998; lognormal variance with pedigree 0.042, pedigree (1,4,5,1,1)
  (same comment as for pig iron)
- titanium dioxide: 0.000246, 0.000492 kg (2 entries); source Behrendt S 1998; lognormal variance with pedigree 0.042, pedigree (1,4,5,1,1)
  (same comment as for silicone product)
- polyurethane, flexible foam: 0.00025092, 0.00122508 kg (2 entries); source Behrendt S 1998; lognormal variance with pedigree 0.042, pedigree (1,4,5,1,1)
  (same comment as for polyurethane, flexible foam)
- aluminium oxide, non-metallurgical: 0.115291, 0.0195187 kg (2 entries); source Behrendt S 1998; lognormal variance with pedigree 0.042, pedigree (1,4,5,1,1)
  (same comment as for silicone product)
- lime, packed: 0.00979975, 0.000249502, 0.0195937 kg (3 entries); source Behrendt S 1998; lognormal variance with pedigree 0.042, pedigree (1,4,5,1,1)
  (same comment as for lime, packed)

## Sampling procedure
literature

## Extrapolations
This dataset has been extrapolated from year 2007 to the year of the calculation (2021). The uncertainty has been adjusted accordingly.

## Review by Rolf Frischknecht 2007-09-14
passed
