# heat and power co-generation, natural gas, mini-plant 2KW electrical

Dataset: EcoSpold 2, unit process
Geography: CH
Time period: 2000-01-01 to 2021-12-31
Technology level: current
Classification: EcoSpold01Categories: natural gas/cogeneration
Classification: ISIC rev.4 ecoinvent: 3530:Steam and air conditioning supply
Tags: with true value; ConvertedDataset
Scenario: Business-as-Usual
System model: Allocation, cut-off by classification
Generated by: [System]
Published in: Heck, T. 2007
Database: ecoinvent
isCopyrightProtected: true
accessRestrictedTo: 1

## General comment
The multioutput-process 'natural gas, burned in Mini-BHKW, allocation exergy' delivers the coproducts 'heat, at Mini-BHKW, allocation exergy' and 'electricity, at Mini-BHKW, allocation exergy'. The exergy allocation is the allocation scheme suggested to be used within ecoinvent (e.g. in electricity mixes).
[This dataset was already contained in the ecoinvent database version 2. It was not individually updated during the transfer to ecoinvent version 3. Life Cycle Impact Assessment results may still have changed, as they are affected by changes in the supply chain, i.e. in other datasets. This dataset was generated following the ecoinvent quality guidelines for version 2. It may have been subject to central changes described in the ecoinvent version 3 change report (http://www.ecoinvent.org/database/ecoinvent-version-3/reports-of-changes/), and the results of the central updates were reviewed extensively. The changes added e.g. consistent water flows and other information throughout the database. The documentation of this dataset can be found in the ecoinvent reports of version 2, which are still available via the ecoinvent website. The change report linked above covers all central changes that were made during the conversion process.]

## Included activities end
The module includes fuel input, infrastructure, emissions to air, and substances needed for operation.

## Geography
Could be used for central European conditions.

## Technology
Specific manufacturer (Ecopower in Switzerland)

## Parameters
- scaling factor: 1.53846 dimensionless; name scaling_factor

## Reference product
- heat, central or small-scale, natural gas: 1 MJ; = 0.65 * scaling_factor; CPC 17300: Steam and hot water; By-product classification allocatable product
  Amount was scaled to 1.
  production volume 1.51e8 MJ; name apv_heat
    Literature value/extrapolation.
    According to OECD (2013), the total amount of heat produced in CHP plants in Switzerland amounts to 452 TJ in 2009. No specification is made on whether this heat is central/small-scale or district/industrial.
    The annual production volumes determine the shares of supplying activities to a certain market. The market for heat, central or small-scale, natural gas, is assumed to be supplied by 12.2% CHP plants and 87.8% heat plants.
    In order to model these shares, the 452 TJ from CHP plants were distributed to all three datasets supplying heat from CHP plants on the market for heat, central or small-scale, natural gas.
    OECD (2013), 'OECD - Electricity and heat generation', IEA Electricity Information Statistics (OECD iLibrary database).doi: 10.1787/data-00457-en(Accessed on 15 Julyl 2013)
  property Corresponding fuel use 1.40166 MJ; name fuel_use; = 35.532*0.0256410256410256/0.65
    Lower heating value of the fuel input related to the heat/electricity output
  property exergy 0.1393 MJ; name exergy
    allocation factor for electricity (=1) vs. heat, where heat is calculated as the termodynamic mean temperature Tm = (Tfeed-Treturn)/ln(Tfeed/Treturn), relative to the application temperature (Tu, typically = 293 K), i.e. (Tm-Tu)/Tm
  property true value relation 0.1393; name true_value_relation
    property to calculate 'true value' from
  property price 0.01 EUR2005
    Temporary price data. Calculated as 90% of purchasers price based on: Average European district heat price from Ecoheatcool and Euroheat 2005-2006, Ecoheat Work package 1: The European heat market. Final report. http://www.solarthermalworld.org/files/Ecoheatcool%20WP1%20Web.pdf?download
  property true value 0.00569904
    allocation property applied in "true value" allocation // value calculated from true value relation
  properties: heating value, net 1 MJ

## By-products
- electricity, low voltage: 0 kWh; name electricity; CPC 17100: Electrical energy; By-product classification allocatable product
  Amount was scaled to the amount of reference product.
  production volume 1.61222e7 kWh; = apv_heat*electricity
    Calculated value
  property exergy 3.6 MJ; name electricity_exergy
    (same comment as for heat, central or small-scale, natural gas)
  property price 0.107 EUR2005; name electricity_price_EUR2005
    Temporary price data. Calculated as 90% of purchasers price based on: IEA Key world energy statistics 2004 (www.iea.org/textbase/nppdf/free/2004/keyworld2004.pdf)
  property true value relation 3.6; name electricity_true_value_relation
    property to calculate 'true value' from
  property true value 0.0157253; name electricity_true_value
    (same comment as for heat, central or small-scale, natural gas)

## Inputs from technosphere
- mini CHP plant, common components for heat+electricity: 5.68848e-8 unit; = 1.39E-07 * scaling_factor; lognormal variance with pedigree 0.04, pedigree (1,1,5,1,1)
  Amount was scaled to the amount of reference product.
  This exchange has an activity link directly to the producing activity because the product is primarily consumed in the same geographical area where it is produced.
- mini CHP plant, components for heat only: 5.68848e-8 unit; = 1.39E-07 * scaling_factor; lognormal variance with pedigree 0.04, pedigree (1,1,5,1,1)
  (same comment as for mini CHP plant, common components for heat+electricity)
- natural gas, low pressure: 0.0104934 m3; = 0.0256410256410256 * scaling_factor; lognormal variance with pedigree 0.04, pedigree (1,1,5,1,1)
  Amount was scaled to the amount of reference product.
  properties: wet mass 1 kg, carbon content, fossil 0.695187, heating value, gross 39 MJ, heating value, net 39 MJ, dry mass 1 kg
  note on carbon content, fossil: C content considered the same as in high pressure (consumption mix)
  note on heating value, net: Literature value, Source: United Nations Statistics Division (2018) International Recommendations for Energy Statistics (IRES). Available at: http://unstats.un.org/unsd/statcom/doc11/BG-IRES.pdf.
- mini CHP plant, components for electricity only: 5.68848e-8 unit; = 1.39E-07 * scaling_factor; lognormal variance with pedigree 0.04, pedigree (1,1,5,1,1)
  (same comment as for mini CHP plant, common components for heat+electricity)
- waste mineral oil: -1.22773e-5 kg; name waste_min_oil; = (3E-05 * scaling_factor)*-1; lognormal variance with pedigree 0.16, pedigree (1,1,5,1,1)
  rough estimate
  Amount was scaled to the amount of reference product.
  production volume 6969.23 kg; = apv_heat*waste_min_oil
    Calculated value
  property price 0 EUR2005; name waste_min_oil_price_EUR2005
  properties: water content 0.111111, wet mass 1 kg, carbon content, fossil 0.864444, dry mass 0.9 kg, heating value, net 34.7 MJ
  note on carbon content, fossil: Tab A.6, ecoinvent v2.2 report 13_I. C content has been calculated after data in the tables, and then referred to 1 kg DM
  note on heating value, net: Value taken from the general comment of the treatment dataset.
- lubricating oil: 1.22773e-5 kg; = 3E-05 * scaling_factor; lognormal variance with pedigree 0.05, pedigree (1,1,5,1,1)
  vender information
  Amount was scaled to the amount of reference product.
  properties: heating value, net 40.2 MJ, wet mass 1 kg, dry mass 1 kg, carbon content, fossil 0.75
  note on heating value, net: Literature value, Source: IPCC 2006, 2006 IPCC Guidelines for National Greenhouse Gas Inventories, Prepared by the National Greenhouse Gas Inventories Programme, Eggleston H.S., Buendia L., Miwa K., Ngara T. and Tanabe K. (eds). Published: IGES, Japan
  note on carbon content, fossil: Lubricating oil is produced from diesel. C-content/dry mass of fats and oils considered 75%, from: ecoinvent v2.2 report, n 15a, pg 40

## Emissions to nature
- Particulates, < 2.5 um [air, urban air close to ground]: 6.13864e-8 kg; = 1.5E-07 * scaling_factor; lognormal variance with pedigree 0.16, pedigree (1,1,5,1,1)
  estimate based on different references
  Amount was scaled to the amount of reference product.
- NMVOC, non-methane volatile organic compounds, unspecified origin [air, urban air close to ground]: 2.04621e-6 kg; = 5E-06 * scaling_factor; lognormal variance with pedigree 0.34, pedigree (1,1,5,1,1)
  (Schmieder 2002)
  Amount was scaled to the amount of reference product.
- Dinitrogen monoxide [air, urban air close to ground]: 1.02311e-6 kg; = 2.5E-06 * scaling_factor; lognormal variance with pedigree 0.34, pedigree (1,1,5,1,1)
  rough estimate
  Amount was scaled to the amount of reference product.
- Nitrogen oxides [air, urban air close to ground]: 9.00334e-6 kg; = 2.2E-05 * scaling_factor; lognormal variance with pedigree 0.16, pedigree (1,1,5,1,1)
  technical documentation of manufacturer
  Amount was scaled to the amount of reference product.
- Methane, fossil [air, urban air close to ground]: 1.75974e-5 kg; = 4.3E-05 * scaling_factor; lognormal variance with pedigree 0.34, pedigree (1,1,5,1,1)
  (Schmieder 2002)
  Amount was scaled to the amount of reference product.
- Carbon monoxide, fossil [air, urban air close to ground]: 5.23831e-5 kg; = 0.000128 * scaling_factor; lognormal variance with pedigree 0.16, pedigree (1,1,5,1,1)
  (same comment as for Nitrogen oxides)
- Carbon dioxide, fossil [air, urban air close to ground]: 0.0229176 kg; = 0.056 * scaling_factor; lognormal variance with pedigree 0.04, pedigree (1,1,5,1,1)
  composition of natural gas
  Amount was scaled to the amount of reference product.
- Sulfur dioxide [air, urban air close to ground]: 2.25084e-7 kg; = 5.5E-07 * scaling_factor; lognormal variance with pedigree 0.04, pedigree (1,1,5,1,1)
  composition of natural gas
  Amount was scaled to the amount of reference product.

## Sampling procedure
Manufacturer information.

## Review by Emilia Moreno Ruiz 2012-04-16
calculation of fuel use property.

## Review by Gerald Rebitzer (obsolete) 2003-07-03
passed
