# treatment of wastewater from medium density fibreboard production, capacity 5E9l/year

Dataset: EcoSpold 2, unit process
Geography: RER
Time period: 2012-01-01 to 2021-12-31
Technology level: current
Classification: EcoSpold01Categories: waste management/wastewater treatment
Classification: ISIC rev.4 ecoinvent: 3700:Sewerage
Tags: Treatment
Scenario: Business-as-Usual
System model: Allocation, cut-off by classification
Generated by: Frank Werner
Database: ecoinvent
isCopyrightProtected: true
accessRestrictedTo: 1

## General comment
Wastewater purified in a medium size municipal wastewater treatment plant (capacity class 3), with an average capacity size of 24900 per-captia-equivalents PCE.
The treated waste water has the following composition (see sampling procedure for source):
Wastewater contains (in kg/m3): BOD: 0.00651 (GSD=122.5%); DOC: 0.0608 (GSD=122.5%); Ntot.: 0.006802 (GSD=122.5%); PO4-P: 0.00001044 (GSD=122.5%); Cr: 0.0000669 (GSD=223.8%); Cu: 0.0000334 (GSD=223.8%); Zn: 0.000048 (GSD=223.8%);
[This dataset is meant to replace the following datasets:]

## Included activities end
Infrastructure materials for municipal wastewater treatment plant, transports, dismantling. Land use burdens.

## Geography
Specific to the technology mix encountered in Switzerland in 2000. Well applicable to modern treatment practices in Europe, North America or Japan.

## Technology
Three stage wastewater treatment (mechanical, biological, chemical) including sludge digestion (fermentation) according to the average technology in Switzerland

## Parameters
- fraction, process water, to air: 0.1 dimensionless; lognormal variance with pedigree 0.092025, pedigree (4,4,3,2,4)

## Reference product
- wastewater from medium density board production: -1 m3; CPC 39920: Sewage sludge; By-product classification Waste
  production volume 5.52e6 m3; name p_board
    calculated from RER production volume times waste water/m3
  property price 0 EUR2005
    Waste products are assigned a price of zero as they are assumed to require further treatment.

## Inputs from technosphere
- process-specific burdens, municipal waste incineration: 0 kg; pedigree (1,1,1,1,1)
  EcoSpold01Location=CH
  burden from sludge incineration. Uncertainty calculated from wastewater composition and treatment model
- aluminium sulfate, powder: 1.34e-5 kg; lognormal variance with pedigree 0.033, pedigree (1,1,4,1,1)
  properties: wet mass 1 kg, dry mass 1 kg
- waste graphical paper: -0.0155 kg; name w_paper; lognormal variance with pedigree 0.008, pedigree (1,1,4,1,1)
  EcoSpold01Location=CH
  direct wastewater treatment plant burden. Uncertainty calculated from wastewater composition and treatment model
  production volume 85560 kg; = p_board*w_paper
    Calculated from the production volume of wastewater from particle board production in proportion to the respective output amounts.
  property price 0 EUR2005; name w_paper_price_EUR2005
  properties: wet mass 1 kg, dry mass 0.888 kg, water content 0.126126, carbon content, non-fossil 0.454955, heating value, net 14.12 MJ
  note on heating value, net: Value taken from the general comment of the treatment dataset.
- sodium hydroxide, without water, in 50% solution state: 1.43e-6 kg; lognormal variance with pedigree 0.033, pedigree (1,1,4,1,1)
  properties: wet mass 1 kg, dry mass 1 kg, heating value, net 3.03 MJ
- municipal waste incineration facility: 1.41e-11 unit; lognormal variance with pedigree 0.018, pedigree (1,1,4,1,1)
  burden from sludge incineration. Uncertainty calculated from wastewater composition and treatment model
  EcoSpold01Location=CH
- process-specific burdens, residual material landfill: 0 kg; pedigree (1,1,1,1,1)
  (same comment as for municipal waste incineration facility)
- quicklime, milled, packed: 2.6e-7 kg; lognormal variance with pedigree 0.033, pedigree (1,1,4,1,1)
  properties: dry mass 0.99 kg, water content 0.010101, wet mass 1 kg
- hydrochloric acid, without water, in 30% solution state: 1.836e-8 kg; lognormal variance with pedigree 0.118, pedigree (1,1,4,1,1)
  EcoSpold01Location=RER
  burden from sludge incineration. Uncertainty calculated from wastewater composition and treatment model
  properties: wet mass 1 kg, dry mass 1 kg, heating value, net 3.32 MJ
- process-specific burdens, slag landfill: 0 kg; pedigree (1,1,1,1,1)
  (same comment as for municipal waste incineration facility)
- iron (III) chloride, without water, in 40% solution state: 7.26e-5 kg; lognormal variance with pedigree 0.158, pedigree (1,1,4,1,1)
  properties: wet mass 1 kg, dry mass 1 kg
- sewer grid, 5E9l/year, 110 km: 2.17e-7 km; lognormal variance with pedigree 0.008, pedigree (1,1,4,1,1)
  EcoSpold01Location=CH
  uncertainty heeded in exchanges of the module
- residual material landfill: 2.54e-13 unit; lognormal variance with pedigree 0.038, pedigree (1,1,4,1,1)
  (same comment as for municipal waste incineration facility)
- ammonia, anhydrous, liquid: 2.85e-5 kg; lognormal variance with pedigree 0.158, pedigree (1,1,4,1,1)
  properties: wet mass 1 kg, dry mass 1 kg
- slag landfill: 4.063e-13 unit; lognormal variance with pedigree 0.038, pedigree (1,1,4,1,1)
  (same comment as for municipal waste incineration facility)
- chemical, inorganic: 3.26e-8 kg; lognormal variance with pedigree 0.118, pedigree (1,1,4,1,1)
  EcoSpold01Location=GLO
  burden from sludge incineration. Uncertainty calculated from wastewater composition and treatment model
  properties: wet mass 1 kg, dry mass 1 kg, carbon content, fossil 0.003
  note on carbon content, fossil: This dataset is an unweighted average of 20 inorganic substances (listed in Tab 88.1, ecoinvent v2.2 report 8, part II), being part of the top100 chemicals included in this database. The C-content has also been calculated as an unweighted average of the C content of the substances composing this dataset.
- titanium dioxide: 8.15e-7 kg; lognormal variance with pedigree 0.033, pedigree (1,1,4,1,1)
  properties: wet mass 1 kg, dry mass 1 kg
- heat, for reuse in municipal waste incineration only: 0 MJ; pedigree (1,1,1,1,1)
- electricity, low voltage: 0.0613 kWh; lognormal variance with pedigree 0.128, pedigree (1,1,4,1,1)
  (same comment as for waste graphical paper)
- chromium oxide, flakes: 1.66e-8 kg; lognormal variance with pedigree 0.033, pedigree (1,1,4,1,1)
  properties: dry mass 1 kg, wet mass 1 kg
- waste plastic, mixture: -0.0155 kg; name w_plastic; lognormal variance with pedigree 0.008, pedigree (1,1,4,1,1)
  direct wastewater treatment plant burden. Uncertainty calculated from wastewater composition and treatment model
  EcoSpold01Location=CH
  production volume 85560 kg; = p_board*w_plastic
    (same comment as for waste graphical paper)
  property price 0 EUR2005; name w_plastic_price_EUR2005
  properties: heating value, net 30.79 MJ, dry mass 0.847 kg, wet mass 1 kg, water content 0.180638, carbon content, fossil 0.747344
  note on carbon content, fossil: C content in 1 kg DM was calculated using data in Tab A.2, ecoinvent v2.2 report 13_I
- wastewater treatment facility, capacity 5E9l/year: 5.688e-9 unit; lognormal variance with pedigree 0.008, pedigree (1,1,4,1,1)
  EcoSpold01Location=CH
  uncertainty heeded in exchanges of the module
- waste cement, hydrated: 0 kg; name w_cement; pedigree (1,1,1,1,1)
  (same comment as for municipal waste incineration facility)
  production volume 0 kg
    (same comment as for waste graphical paper)
  property price 0 EUR2005; name w_cement_price_EUR2005
  properties: dry mass 1 kg, wet mass 1 kg
- iron sulfate: 4.95e-5 kg; lognormal variance with pedigree 0.158, pedigree (1,1,4,1,1)
  properties: wet mass 1 kg, dry mass 1 kg
- cement, unspecified: 0 kg; pedigree (1,1,1,1,1)
  (same comment as for process-specific burdens, municipal waste incineration)
  properties: wet mass 1 kg, dry mass 1 kg
- electricity, for reuse in municipal waste incineration only: 0 kWh; pedigree (1,1,1,1,1)
- process-specific burdens, municipal waste incineration: 0.054854, 0.00164603 kg (2 entries); lognormal variance with pedigree 0.018, pedigree (1,1,4,1,1)
  (same comment as for process-specific burdens, municipal waste incineration)
- process-specific burdens, residual material landfill: 0.000118446, 3.55425e-6 kg (2 entries); lognormal variance with pedigree 0.038, pedigree (1,1,4,1,1)
  (same comment as for municipal waste incineration facility)
- process-specific burdens, slag landfill: 0.000222328, 6.6715e-6 kg (2 entries); lognormal variance with pedigree 0.038, pedigree (1,1,4,1,1)
  (same comment as for municipal waste incineration facility)
- heat, for reuse in municipal waste incineration only: 2.67628e-5, 0.000183517, 0.000499318, 0.00647278, 0.0225756, 0.00157518, 0.00110951, 8.94644e-5, 0.00258376, 0.000146049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 MJ (20 entries); lognormal variance with pedigree 0.033, pedigree (1,1,4,1,1)
- waste cement, hydrated: -0.00013495, -4.04952e-6 kg (2 entries); lognormal variance with pedigree 0.05, pedigree (1,1,4,5,1)
  (same comment as for municipal waste incineration facility)
  production volume 767.28 kg
- cement, unspecified: 5.48539e-5, 9.46116e-7 kg (2 entries); lognormal variance with pedigree 0.048, pedigree (1,1,4,1,1)
  (same comment as for process-specific burdens, municipal waste incineration)
- electricity, for reuse in municipal waste incineration only: 8.90265e-6, 6.10468e-5, 0.000166098, 0.00215317, 3.56106e-6, 0.000523985, 0.000369079, 2.97603e-5, 0.000859488, 4.85831e-5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 kWh (20 entries); lognormal variance with pedigree 0.033, pedigree (1,1,4,1,1)

## Emissions to nature
- Copper [air, urban air close to ground]: 1.82e-10 kg; lognormal variance with pedigree 0.158, pedigree (1,1,4,1,1)
- Iron, ion [water, ground-, long-term]: 1.95e-5 kg; lognormal variance with pedigree 0.158, pedigree (1,1,4,1,1)
- BOD5, Biological Oxygen Demand [water, surface water]: 0.000617 kg; lognormal variance with pedigree 0.098, pedigree (1,1,4,1,1)
  sewer overload discharge plus direct wastewater treatment plant emission plus emission from sludge incineration. Uncertainty calculated from wastewater composition and treatment model
- Zinc [air, urban air close to ground]: 5.41e-10 kg; lognormal variance with pedigree 0.158, pedigree (1,1,4,1,1)
- Aluminium [water, ground-, long-term]: 1.56e-6 kg; lognormal variance with pedigree 0.158, pedigree (1,1,4,1,1)
- COD, Chemical Oxygen Demand [water, ground-, long-term]: 0.00029 kg; lognormal variance with pedigree 0.158, pedigree (1,1,4,1,1)
  emission from sludge incineration. Uncertainty calculated from wastewater composition and treatment model
- Iron [air, urban air close to ground]: 1.39e-9 kg; lognormal variance with pedigree 0.158, pedigree (1,1,4,1,1)
- Zinc, ion [water, ground-, long-term]: 5.14e-7 kg; lognormal variance with pedigree 0.158, pedigree (1,1,4,1,1)
- DOC, Dissolved Organic Carbon [water, ground-, long-term]: 0.000115 kg; lognormal variance with pedigree 0.158, pedigree (1,1,4,1,1)
  (same comment as for COD, Chemical Oxygen Demand)
- Aluminium [air, urban air close to ground]: 3.3e-9 kg; lognormal variance with pedigree 0.158, pedigree (1,1,4,1,1)
- Carbon monoxide, non-fossil [air, urban air close to ground]: 0.000112 kg; lognormal variance with pedigree 0.198, pedigree (1,1,4,1,1)
  direct digester gas emission plus emission from sludge incineration. Uncertainty calculated from wastewater composition and treatment model
- Sulfate [water, surface water]: 4.26e-5 kg; lognormal variance with pedigree 0.158, pedigree (1,1,4,1,1)
- NMVOC, non-methane volatile organic compounds, unspecified origin [air, urban air close to ground]: 1.55e-6 kg; lognormal variance with pedigree 0.298, pedigree (1,1,4,1,1)
  direct digester gas emission. Uncertainty calculated from wastewater composition and treatment model
- Nitrite [water, surface water]: 0.000156 kg; lognormal variance with pedigree 0.158, pedigree (1,1,4,1,1)
- BOD5, Biological Oxygen Demand [water, ground-, long-term]: 9.49e-5 kg; lognormal variance with pedigree 0.158, pedigree (1,1,4,1,1)
  (same comment as for COD, Chemical Oxygen Demand)
- Phosphate [water, surface water]: 1.13e-5 kg; lognormal variance with pedigree 0.158, pedigree (1,1,4,1,1)
- DOC, Dissolved Organic Carbon [water, surface water]: 0.009311 kg; lognormal variance with pedigree 0.008, pedigree (1,1,4,1,1)
  (same comment as for BOD5, Biological Oxygen Demand)
- Chloride [water, surface water]: 4.44e-5 kg; lognormal variance with pedigree 0.158, pedigree (1,1,4,1,1)
- Ammonium, ion [water, surface water]: 0.00267 kg; lognormal variance with pedigree 0.158, pedigree (1,1,4,1,1)
- Chromium VI [water, surface water]: 3.5e-5 kg; lognormal variance with pedigree 0.158, pedigree (1,1,4,1,1)
- Carbon dioxide, non-fossil [air, urban air close to ground]: 0.1745 kg; lognormal variance with pedigree 0.068, pedigree (1,1,4,1,1)
  direct wastewater treatment plant emission plus direct digester gas emission plus emission from sludge incineration. Uncertainty calculated from wastewater composition and treatment model
- Copper, ion [water, surface water]: 8.66e-6 kg; lognormal variance with pedigree 0.158, pedigree (1,1,4,1,1)
- Nitrate [water, surface water]: 0.0117 kg; lognormal variance with pedigree 0.158, pedigree (1,1,4,1,1)
- Zinc, ion [water, surface water]: 1.48e-5 kg; lognormal variance with pedigree 0.158, pedigree (1,1,4,1,1)
- Nitrogen [water, surface water]: 0.0001187 kg; lognormal variance with pedigree 0.158, pedigree (1,1,4,1,1)
- Iron, ion [water, surface water]: 1.42e-8 kg; lognormal variance with pedigree 0.158, pedigree (1,1,4,1,1)
- Nitrogen oxides [air, urban air close to ground]: 0.000176 kg; lognormal variance with pedigree 0.158, pedigree (1,1,4,1,1)
- Aluminium [water, surface water]: 1.76e-10 kg; lognormal variance with pedigree 0.158, pedigree (1,1,4,1,1)
- Water [air, unspecified]: 0.1 m3; lognormal variance with pedigree 0.0487, pedigree (2,2,4,1,1)
  Calculated value based on water balance.
- Ammonia [air, urban air close to ground]: 1.807e-5 kg; lognormal variance with pedigree 0.158, pedigree (1,1,4,1,1)
- Chromium, ion [water, surface water]: 1.05e-7 kg; lognormal variance with pedigree 0.158, pedigree (1,1,4,1,1)
- TOC, Total Organic Carbon [water, ground-, long-term]: 0.000115 kg; lognormal variance with pedigree 0.158, pedigree (1,1,4,1,1)
  (same comment as for COD, Chemical Oxygen Demand)
- Dinitrogen monoxide [air, urban air close to ground]: 3.37e-5 kg; lognormal variance with pedigree 0.158, pedigree (1,1,4,1,1)
- Nitrate [water, ground-, long-term]: 2.03e-5 kg; lognormal variance with pedigree 0.158, pedigree (1,1,4,1,1)
- Water [water, unspecified]: 0.9 m3; lognormal variance with pedigree 0.0487, pedigree (2,2,4,1,1)
  Calculated value based on water balance.
  property carbon content, fossil 0; name C_content_fossil
  property dry mass 0 kg; name DM
  property carbon content, non-fossil 0; name C_content_non_fossil
  property wet mass 1000 kg; name WM
  property water in wet mass 1000 kg; name WWM
- Cyanide [air, urban air close to ground]: 5.08e-7 kg; lognormal variance with pedigree 0.158, pedigree (1,1,4,1,1)
- Phosphate [water, ground-, long-term]: 7.76e-7 kg; lognormal variance with pedigree 0.158, pedigree (1,1,4,1,1)
- COD, Chemical Oxygen Demand [water, surface water]: 0.0383 kg; lognormal variance with pedigree 0.008, pedigree (1,1,4,1,1)
  (same comment as for BOD5, Biological Oxygen Demand)
- Phosphorus [air, urban air close to ground]: 6.63e-9 kg; lognormal variance with pedigree 0.158, pedigree (1,1,4,1,1)
- Chromium VI [water, ground-, long-term]: 3.48e-6 kg; lognormal variance with pedigree 0.158, pedigree (1,1,4,1,1)
- Methane, non-fossil [air, urban air close to ground]: 0.000341 kg; lognormal variance with pedigree 0.178, pedigree (1,1,4,1,1)
  (same comment as for Carbon monoxide, non-fossil)
- Chromium [air, urban air close to ground]: 2.436e-12 kg; lognormal variance with pedigree 0.158, pedigree (1,1,4,1,1)
- Copper, ion [water, ground-, long-term]: 1.99e-5 kg; lognormal variance with pedigree 0.158, pedigree (1,1,4,1,1)
- TOC, Total Organic Carbon [water, surface water]: 0.0097 kg; lognormal variance with pedigree 0.088, pedigree (1,1,4,1,1)
  (same comment as for BOD5, Biological Oxygen Demand)

## Sampling procedure
Survey among member companies of the European Panel Federation; generation of dataset with ecoinvent 2.0 tool for treatment of wastewater

## Extrapolations
This dataset has been extrapolated from year 2012 to the year of the calculation (2021). The uncertainty has been adjusted accordingly.

## Review by Emilia Moreno Ruiz 2015-01-29
Correction on nitrate emission to groundwater long term
