# treatment of residue from mechanical treatment, liquid crystal display, municipal incineration with fly ash extraction

Dataset: EcoSpold 2, unit process
Geography: CH
Time period: 2006-01-01 to 2021-12-31
Technology level: current
Classification: ISIC rev.4 ecoinvent: 3821:Treatment and disposal of non-hazardous waste
Synonyms: Kehrichtverbrennung; Siedlungsabfallverbrennung; municipal waste incineration
Scenario: Business-as-Usual
System model: Allocation, cut-off by classification
Share of production covered: 100 %
Generated by: Gabor Doka
Published in: Doka G. 2015
Database: ecoinvent
isCopyrightProtected: true
accessRestrictedTo: 1

## General comment
This dataset represents the activity of waste disposal of residue from mechanical treatment, liquid crystal display in a municipal solid waste incinerator (MSWI) // Recommended use of this dataset: Only for incineration of shredder residues generated in the recycling (mechanical treatment) of LCD screens (Liquid Crystal Display screen residue) // Inventoried waste contains 1.95% rubber; 47.7% Plastics from electronic consumer goods; 47.7% Plastics from electronic industrial goods; 0.0121% MSWI iron scrap; 2.22% Alu in MSW; 0.0336% Glass; 0.358% wiring copper; 0.00595% Pb in ASR inert; 0.00302% silver; . // Waste composition (wet, in ppm): upper heating value 35.17 MJ/kg; lower heating value 33.72 MJ/kg; H2O 8758.3; O 49320; H 72691; C 793850; S 406.13; N 12691; P 477.22; B n.a.; Cl 6556; Br 5248.3; F 238.56; I n.a.; Ag 30.203; As 7.1568; Ba 168.9; Cd 143.84; Co 28.129; Cr 50.345; Cu 6626.7; Hg 0.81112; Mn 6.8754; Mo 2.8627; Ni 478.2; Pb 200.83; Sb 4575.8; Se 1.8699; Sn 193.79; V 0.74601; Zn 732.6; Be 0.44521; Sc n.a.; Sr 78.803; Ti 4272.1; Tl 0.35617; W n.a.; Si 2953.8; Fe 1604.7; Ca 2994.1; Al 24344; K 111.65; Mg n.a.; Na 154.79; // Share of carbon in waste that is biogenic 0%. // Share of metals in waste not oxidised and bulk-recyclable (exclude very small or thin parts) Iron: 6.16%; Alu: 90.6%; Copper: 53.98%. // Recovery of metal scrap from bottom ash to recycling: 0.055725g iron scrap, 6.7217g aluminium scrap, 1.0522g copper scrap. From this waste, the FLUWA process in the technology mix recovers 0.000893kg (DM) of a hydroxide sludge to be recycled in zinc furnaces. // Ultimately one kg of this waste produces 0.07926 kg of bottom ash (can include some washed ash) and 0.01164 kg of residues, which are landfilled (technology mix). Additional solidification of residues with 0.004657 kg of cement.Net energy production: 4.33MJ/kg electric energy and 8.39MJ/kg thermal energy. //

## Included activities start
waste incineration from waste reception gate and delivery into waste bunker at incinerator plant site (without transports to the incinerator)

## Included activities end
Waste-specific short-term emissions to water from leachate. Long-term emissions from landfill to ground water.

## Geography
Specific to the technology mix encountered in Switzerland in 2012.

## Technology
average Swiss MSWI plants in 2010 (grate incinerators) with electrostatic precipitator for fly ash (ESP), wet flue gas scrubber and 25% SNCR , 42.77% SCR-high dust , 32.68% SCR-low dust -DeNOx facilities and 0% without Denox (weighted according to mass of burnt waste, representing Swiss average). Efficiency of iron scrap separation from slag : 58%. Efficiency of non-ferrous scrap separation from slag : 31%. The technology mix for this dataset includes a filter ash treatment (FLUWA) of a share of 46.22%. Gross electric efficiency technology mix 15.84% and Gross thermal efficiency technology mix 28.51%

## Time period
Waste composition as given in literature reference, theoretical data or other source. Transfer coefficients for modern MSWI.

## Reference product
- residue from mechanical treatment, liquid crystal display: -1 kg; name RP_amount_1; CPC 39: Wastes or scraps; By-product classification Waste
  Main reference product of this activity (supply of disposal service).
  production volume 2.9976e6 kg; name RP_PV_1
    based on corresponding global production volume of MSW fraction in conventional MSWI (wo fly ash extraction) and scaled down to annual Swiss incinerated MSW mass of 3.02 mio. tonnes.
  property price 0 EUR2005; name RP_amount_1_price_EUR2005
    Waste products are assigned a price of zero as they are assumed to require further treatment.
  property heating value, net 33.72 MJ
    Value taken from the general comment of the treatment dataset.
  property carbon content 0.80086
    carbon content on a dry matter basis (reserved; not for manual entry)
  properties: fluorine content 0.00024067, chlorine content 0.0066139, cobalt content 2.8377e-5, mercury content 8.1829e-7, barium content 0.00017039, chromium content 5.079e-5, copper content 0.0066853, silver content 3.047e-5, manganese content 6.9361e-6, selenium content 1.8864e-6, arsenic content 7.22e-6, tin content 0.0001955, cadmium content 0.00014511, lead content 0.0002026, nickel content 0.00048243, antimony content 0.0046162, vanadium content 7.526e-7, strontium content 7.9499e-5, beryllium content 4.4915e-7, molybdenum content 2.888e-6, zinc content 0.00073907, wet mass 1 kg, water in wet mass 0.0087583 kg, potassium content 0.00011263, silicon content 0.0029799, sodium content 0.00015616, thallium content 3.5932e-7, titanium content 0.0043099, calcium content 0.0030205, iron content 0.0016189, aluminium content 0.024559, oxygen content 0.049756, sulfur content 0.00040972, nitrogen content 0.012803, dry mass 0.99124 kg, water content 0.0088357, carbon content, fossil 0.80086, hydrogen content 0.073334, phosphorus content 0.00048143, bromine content 0.0052947, carbon allocation 0.793844 kg

## By-products
All rows: pedigree (1,1,1,1,1)
- electricity, for reuse in municipal waste incineration only: 0 kWh; name E_el_prod_MSWI; CPC 17100: Electrical energy; By-product classification allocatable product
  Net electricity generated from this waste and used in internal MSWI plant energy redistribution.
  Uncertainty: uncertainty is calculated from uncertainties in waste composition and uncertainties in energy efficiency and the uncertainty in internal energy demand
  production volume 3.6091e6 kWh
    calculated in proportion to reference product waste input to incinerator
  property price 0.1 EUR2005; name E_el_prod_MSWI_price_EUR2005
    Estimated to be the same price as in case of electricity, medium voltage.
  property exergy 3.6 MJ; name E_el_prod_MSWI_exergy
    This exergy property is based on the exergy content of the product.
  property true value relation 3.6; name E_el_prod_MSWI_true_value_relation
    property to calculate "true value" from
- heat, for reuse in municipal waste incineration only: 0 MJ; name E_th_prod_MSWI; By-product classification allocatable product; CPC 17300: Steam and hot water
  Net useful heat generated from this waste and used in internal MSWI plant energy redistribution.
  Uncertainty: uncertainty is calculated from uncertainties in waste composition and uncertainties in energy efficiency and the uncertainty in internal energy demand
  production volume 2.5151e7 MJ
    calculated in proportion to reference product waste input to incinerator
  property exergy 0.1842 MJ; name E_th_prod_MSWI_exergy
    This exergy property is based on the exergy content of the product.
  property true value relation 0.1842; name E_th_prod_MSWI_true_value_relation
    property to calculate "true value" from
  property price 0.0106 EUR2005; name E_th_prod_MSWI_price_EUR2005
    Average European district heat price from Ecoheatcool and Euroheat 2005-2006, Ecoheat Work package 1: The European heat market. Final report. 10.6 EUR/GJ i s the price of district heat. http://www.solarthermalworld.org/files/Ecoheatcool%20WP1%20Web.pdf?download
- iron scrap, sorted, pressed: 0 kg; CPC 39310: Slag, dross, scalings and other waste from the manufacture of iron or steel; By-product classification Recyclable
  Iron scrap recovered from this waste.
  Uncertainty: uncertainty calculated from uncertainty in waste composition, uncertainty of share of recyclable metal, uncertainty of transfer coefficient to bottom ash, uncertainty of the efficiency of scrap removal in MSWI plant.
  production volume 0 kg
    calculated in proportion to reference product waste input to incinerator
  property price 0.175 EUR2005
    Temporary price data. Calculated as 90% of purchasers price based on: 2005 import and export prices (total trades (USD) divided by total weight (kg) in biggest economies of the world: EU27, USA, Brasil, China, India, Japan and Russia) from UN Commodity Trade Statistics Database (http://data.un.org/Explorer.aspxDatabase [Accessed 2011.06.20]). Commodity: Waste or scrap, of cast iron
  property carbon content 0
    carbon content on a dry matter basis (reserved; not for manual entry)
  properties: wet mass 1 kg, water content 0, carbon content, fossil 0, water in wet mass 0 kg, dry mass 1 kg, carbon content, non-fossil 0, carbon allocation 0 kg
- aluminium scrap, post-consumer, prepared for melting: 0 kg; By-product classification Recyclable; CPC 39363: Waste and scrap of aluminium
  Aluminium scrap recovered from this waste.
  Uncertainty: uncertainty calculated from uncertainty in waste composition, uncertainty of share of recyclable metal, uncertainty of transfer coefficient to bottom ash, uncertainty of the efficiency of scrap removal in MSWI plant.
  production volume 0 kg
    calculated in proportion to reference product waste input to incinerator
  property price 0.806 EUR2005
    Temporary price data. Calculated as 90% of purchasers price based on: 2005 import and export prices (total trades (USD) divided by total weight (kg) in biggest economies of the world: EU27, USA, Brasil, China, India, Japan and Russia) from UN Commodity Trade Statistics Database (http://data.un.org/Explorer.aspxDatabase [Accessed 2011.06.17]). Commodity: Waste or scrap, aluminium
  property carbon content 0
    carbon content on a dry matter basis (reserved; not for manual entry)
  properties: dry mass 1 kg, carbon content, fossil 0, wet mass 1 kg, water content 0, water in wet mass 0 kg, carbon content, non-fossil 0, carbon allocation 0 kg
- copper scrap, sorted, pressed: 0 kg; CPC 39361: Waste and scrap of copper; By-product classification Recyclable
  Copper scrap recovered from this waste.
  Uncertainty: uncertainty calculated from uncertainty in waste composition, uncertainty of share of recyclable metal, uncertainty of transfer coefficient to bottom ash, uncertainty of the efficiency of scrap removal in MSWI plant.
  production volume 0 kg
    calculated in proportion to reference product waste input to incinerator
  property price 2.84 EUR2005
    Temporary price data. Calculated as 90% of purchasers price based on: Source: USGS Mineral Yearbook 2007, Table 1 in <http://minerals.usgs.gov/minerals/pubs/commodity/recycle/myb1-2007-recyc.pdf>
  property carbon content 0
    carbon content on a dry matter basis (reserved; not for manual entry)
  properties: carbon content, fossil 0, carbon content, non-fossil 0, wet mass 1 kg, water in wet mass 0 kg, water content 0, dry mass 1 kg, carbon allocation 0 kg
- metalliferous hydroxide sludge: 0 kg; By-product classification Recyclable; CPC 1429: Other non-ferrous metal ores and concentrates (other than uranium or thorium ores and concentrates)
  Metalliferous hydroxide sludge from filter ash leaching (FLUWA).
  Uncertainty: uncertainty is calculated from uncertainties in waste composition and transfer coefficients to filter ash in incinerator and the uncertainty of the transfer coefficients of the FLUWA process.
  production volume 0 kg
    calculated in proportion to reference product waste input to incinerator
  property price 0.0042 EUR2005
    World market value of manure, deflated with barley world market price and consumer price index, based on [http://www.gov.pe.ca/photos/original/af_NM_manconv.pdf].
  property heating value, net 0 MJ
    Non combustible products are assumed to have an LHV equal to zero (0).
  property carbon content 0.046248
    carbon content on a dry matter basis (reserved; not for manual entry)
  properties: water content 3, aluminium content 0.00017675, potassium content 0.00079545, chlorine content 0.17415, oxygen content 0.32321, dry mass 0.25 kg, sulfur content 0.027969, arsenic content 7.4267e-5, wet mass 1 kg, phosphorus content 0.01049, cadmium content 0.054867, molybdenum content 0.00019651, fluorine content 0.003898, bromine content 0.1161, chromium content 0.00026895, cobalt content 0.00077723, barium content 5.3244e-5, lead content 0.0028447, mercury content 1.6554e-6, selenium content 2.2243e-5, nickel content 0.00049844, copper content 0.0014184, manganese content 7.5369e-6, antimony content 0.055615, titanium content 0.00039242, silicon content 0.00016789, tin content 0.00019145, beryllium content 7.4519e-6, carbon content, fossil 0.046248, iron content 0.0001861, strontium content 1.0066e-6, vanadium content 4.5659e-6, zinc content 0.14459, thallium content 4.0315e-6, water in wet mass 0.75 kg, sodium content 0.0012247, calcium content 0.033552, carbon allocation 0.011562 kg

## Inputs from technosphere
- titanium dioxide: 0.00014181 kg; lognormal variance with pedigree 1.0297, pedigree (1,1,4,1,1)
  Input to DeNOx stage (TiO2 catalyst carrier)
  Uncertainty: uncertainty calculated from uncertainty in average DeNOx input, uncertainty in the share of thermal NOx, uncertainty of nitrogen content in average municipal waste and the uncertainty in nitrogen content in *this* waste.
  properties: dry mass 1 kg, wet mass 1 kg
- chromium oxide, flakes: 2.8942e-6 kg; lognormal variance with pedigree 1.0297, pedigree (1,1,4,1,1)
  Input to DeNOx stage. Active component in SCR catalyst (vanadium pentoxide, V2O5), here approximated with the available chromium trioxide.
  Uncertainty: uncertainty calculated from uncertainty in average DeNOx input, uncertainty in the share of thermal NOx, uncertainty of nitrogen content in average municipal waste and the uncertainty in nitrogen content in *this* waste.
  properties: wet mass 1 kg, dry mass 1 kg
- hydrogen peroxide, without water, in 50% solution state: 0.00078961 kg; lognormal variance with pedigree 0.089407, pedigree (1,1,4,1,1)
  Auxilliary oxidising agent for filter ash treatment (FLUWA).
  Uncertainty: uncertainty calculated from uncertainty in of transfer coefficients in the incinerator, and the uncertainty of the waste composition of this waste
  properties: dry mass 1 kg, heating value, net 7.13 MJ, wet mass 1 kg
- cationic resin: 4.1109e-6 kg; lognormal variance with pedigree 1.6032, pedigree (1,1,4,1,1)
  Auxilliary input for mercury removal in filter ash treatment (FLUWA).
  Uncertainty: uncertainty calculated from uncertainty in of transfer coefficients in the incinerator, and the uncertainty of the waste composition of this waste
  properties: wet mass 1 kg, carbon content, fossil 0.521606, dry mass 0.5 kg, water content 1, heating value, net 6.68 MJ
- municipal waste incineration facility: 2.5e-10 unit
  Demands per kilogram waste.
- water, decarbonised: 1.9734 kg; lognormal variance with pedigree 0.26167, pedigree (1,1,4,1,1)
  Incinerator process water used in flue gas scrubber stage.
  Uncertainty: uncertainty calculated from uncertainty in average water input, and the uncertainty of the waste composition of this waste
  properties: wet mass 1 kg
- process-specific burdens, slag landfill: 0.079261 kg; lognormal variance with pedigree 0.048048, pedigree (1,1,4,1,1)
  Mass-specific expenditures required for landfilling of bottom ash.;activityLink introduced to establish a direct link to the corresponding regional supply of this product
  Uncertainty: uncertainty is calculated from uncertainties in waste composition and transfer coefficients in incinerator
- slag landfill: 1.4091e-10 unit; lognormal variance with pedigree 0.048048, pedigree (1,1,4,1,1)
  Landfill infrastructure required for landfilling of bottom ash.
  Uncertainty: uncertainty is calculated from uncertainties in waste composition and transfer coefficients in incinerator
- sodium hydroxide, without water, in 50% solution state: 0.0011477 kg; lognormal variance with pedigree 0.18829, pedigree (1,1,4,1,1)
  Auxilliary inputs for the flue gas treatment stage of the incinerator plant, and partially in the filter ash treatment (FLUWA).
  Uncertainty: uncertainty calculated from uncertainty in average NaOH input, of transfer coefficients in the incinerator, and the uncertainty of the waste composition of this waste
  properties: wet mass 1 kg, dry mass 1 kg, heating value, net 3.03 MJ
- process-specific burdens, residual material landfill: 0.02321 kg; lognormal variance with pedigree 0.062328, pedigree (1,1,4,1,1)
  Mass-specific expenditures required for landfilling of incineration residues.;activityLink introduced to establish a direct link to the corresponding regional supply of this product
  Uncertainty: uncertainty is calculated from uncertainties in waste composition and transfer coefficients in incinerator
- quicklime, milled, packed: 0.003651 kg; lognormal variance with pedigree 0.38393, pedigree (1,1,4,1,1)
  Auxilliary inputs for the flue gas treatment stage of the incinerator plant.
  Uncertainty: uncertainty calculated from uncertainty in average CaO input, of transfer coefficients in the incinerator, and the uncertainty of the waste composition of this waste
  properties: dry mass 0.99 kg, wet mass 1 kg, water content 0.010101
- residual material landfill: 4.8354e-11 unit; lognormal variance with pedigree 0.062328, pedigree (1,1,4,1,1)
  Landfill infrastructure required for landfilling of incineration residues.
  Uncertainty: uncertainty is calculated from uncertainties in waste composition and transfer coefficients in incinerator
- hydrochloric acid, without water, in 30% solution state: 0.00035399 kg; lognormal variance with pedigree 0.073874, pedigree (1,1,4,1,1)
  Auxilliary inputs for the wastewater treatment stage of the incinerator plant.
  Uncertainty: uncertainty calculated from uncertainty in average HCl input, of transfer coefficients in the incinerator, and the uncertainty of the waste composition of this waste
  properties: dry mass 1 kg, heating value, net 3.32 MJ, wet mass 1 kg
- iron (III) chloride, without water, in 40% solution state: 7.1215e-5 kg; lognormal variance with pedigree 0.26167, pedigree (1,1,4,1,1)
  Auxilliary inputs for the wastewater treatment stage of the incinerator plant.
  Uncertainty: uncertainty calculated from uncertainty in average FeCl3 input, of transfer coefficients in the incinerator, and the uncertainty of the waste composition of this waste
  properties: wet mass 1 kg, dry mass 1 kg
- chemical, organic: 2.7575e-5 kg; lognormal variance with pedigree 0.75086, pedigree (1,1,4,1,1)
  Auxilliary inputs for the wastewater treatment stage of the incinerator plant. Proxy for (pure) Trisodium-trimercapto-s-triazine (CAS 17766-26-6), used as 15% diluted solution, aka TMT15.
  Uncertainty: uncertainty calculated from uncertainty in average TMT15 input, of transfer coefficients in the incinerator, and the uncertainty of the waste composition of this waste
  properties: wet mass 1 kg, heating value, net 19.03 MJ, carbon content, fossil 0.628, dry mass 1 kg
- chemical, inorganic: 0.00016646 kg; lognormal variance with pedigree 0.21875, pedigree (1,1,4,1,1)
  Auxilliary inputs for the wastewater treatment stage of the incinerator plant. Proxy for Polyelectrolyte.
  Uncertainty: uncertainty calculated from uncertainty in average Polyelectrolyte input, of transfer coefficients in the incinerator, and the uncertainty of the waste composition of this waste
  properties: dry mass 1 kg, carbon content, fossil 0.003, wet mass 1 kg
- cement, unspecified: 0.0046565 kg; lognormal variance with pedigree 0.071412, pedigree (1,1,4,1,1)
  Cement required for solidification of landfilled residual material.
  Uncertainty: Uncertainty calculated from uncertainty of the waste composition of this waste, of transfer coefficients in the incinerator and of the solidification recipe.
  properties: wet mass 1 kg, dry mass 1 kg
- waste cement, hydrated: -0.011641 kg; lognormal variance with pedigree 0.071412, pedigree (1,1,4,1,1)
  Hydrated cement output for solidification of landfilled residual material.
  Uncertainty: Uncertainty calculated from uncertainty of the waste composition of this waste and transfer coefficients in the incinerator and of the solidification recipe.
  production volume 34896 kg
    calculated in proportion to reference product waste input to incinerator
  properties: wet mass 1 kg, dry mass 1 kg
- transport, freight, lorry, unspecified: 0.0038856 metric ton*km; lognormal variance with pedigree 0.035866, pedigree (1,1,4,1,1)
  Transport services to transport incineration residues to landfills and filter ash to external treatments (FLUWA).
  Uncertainty: uncertainty calculated from uncertainty of the waste composition of this waste, uncertainty of transfer coefficients and the uncertainty in generic transportation distances
- ammonia, anhydrous, liquid: 0.0022635 kg; lognormal variance with pedigree 0.67308, pedigree (1,1,4,1,1)
  Input to DeNOx stage (100% NH3).
  Uncertainty: uncertainty calculated from uncertainty in average DeNOx input, uncertainty in the share of thermal NOx, uncertainty of nitrogen content in average municipal waste and the uncertainty in nitrogen content in *this* waste.
  properties: dry mass 1 kg, wet mass 1 kg
- heat, district or industrial, natural gas: 0.42328 MJ; lognormal variance with pedigree 0.67308, pedigree (1,1,4,1,1)
  Input to DeNOx stage, to heat up flue gas in low-dust SCR.
  Uncertainty: uncertainty calculated from uncertainty in average DeNOx input, uncertainty in the share of thermal NOx, uncertainty of nitrogen content in average municipal waste and the uncertainty in nitrogen content in *this* waste.
  properties: heating value, net 1 MJ
- spent activated carbon with mercury: -4.3273e-6 kg; name BP_amount_1; lognormal variance with pedigree 1.6032, pedigree (1,1,4,1,1)
  Spent ion exchanger charged with mercury, from FLUWA filter ash treatment, approximated here with Spent activated carbon with mercury, deposited undergound in a polyethylene Big Bag.
  Uncertainty: uncertainty calculated from uncertainty in of transfer coefficients in the incinerator, and the uncertainty of the waste composition of this waste.
  production volume 12.9715 kg; = ABS(RP_PV_1 * (BP_amount_1 / RP_amount_1))
    Calculated from production volume of reference product using the relative outputs.
  property price 0 EUR2005; name BP_amount_1_price_EUR2005
  properties: carbon content, fossil 0.6, wet mass 1 kg, dry mass 1 kg, heating value, net 18.18 MJ
- iron scrap, sorted, pressed: -5.5725e-5 kg; lognormal variance with pedigree 0.61418, pedigree (1,1,4,1,1)
  (same comment as for iron scrap, sorted, pressed)
  production volume 167.04 kg
  properties: wet mass 1 kg, dry mass 1 kg, price 0.175 EUR2005
- aluminium scrap, post-consumer, prepared for melting: -0.0067217 kg; lognormal variance with pedigree 0.28212, pedigree (1,1,4,1,1)
  (same comment as for aluminium scrap, post-consumer, prepared for melting)
  production volume 20149 kg
  properties: dry mass 1 kg, wet mass 1 kg, price 0.806 EUR2005
- copper scrap, sorted, pressed: -0.0010522 kg; lognormal variance with pedigree 0.43521, pedigree (1,1,4,1,1)
  (same comment as for copper scrap, sorted, pressed)
  production volume 3154.2 kg
  properties: wet mass 1 kg, dry mass 1 kg, price 2.84 EUR2005
- metalliferous hydroxide sludge: -0.0035711 kg; lognormal variance with pedigree 0.06976, pedigree (1,1,4,1,1)
  (same comment as for metalliferous hydroxide sludge)
  production volume 10705 kg
  properties: water content 3, chlorine content 0.17415, oxygen content 0.32321, dry mass 0.25 kg, sulfur content 0.027969, wet mass 1 kg, cadmium content 0.054867, bromine content 0.1161, antimony content 0.055615, carbon content, fossil 0.046248, zinc content 0.14459, calcium content 0.033552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

## Inputs from nature
- Oxygen [natural resource, in air]: 2.7081 kg; lognormal variance with pedigree 0.017177, pedigree (1,1,4,1,1)
  Oxygen from ambient air needed to combust and oxidise this waste. Net demand, i.e. without O2 leaving the plant in flue gas uncombusted.
  Uncertainty: uncertainty is calculated from uncertainties in waste composition and transfer coefficients to flue gas and soild residues in incinerator

## Emissions to nature
- Copper, ion [water, surface water]: 3.514e-7 kg; lognormal variance with pedigree 0.94633, pedigree (1,1,4,1,1)
  Emissions to water from waste composition and transfer coefficients in incinerator and landfills.
  Uncertainty: uncertainty is calculated from uncertainties in waste composition and transfer coefficients in incinerator and landfills
- Ammonia [air, urban air close to ground]: 2.6613e-6 kg; lognormal variance with pedigree 0.72817, pedigree (1,1,4,1,1)
  Nitrogen species emitted to air after DeNOx stage.
  Uncertainty: uncertainty calculated from uncertainty in average N-emissions and uncertainty in the share of thermal NOx and the uncertainty in nitrogen content in *this* waste.
- Manganese [water, ground-, long-term]: 5.5174e-6 kg; lognormal variance with pedigree 1.8052, pedigree (1,1,4,1,1)
  Long-term emissions from landfilling of incineration residues.
  Uncertainty: uncertainty is calculated from uncertainties in waste composition and transfer coefficients in incinerator and landfills.
- Mercury [water, surface water]: 4.316e-9 kg; lognormal variance with pedigree 1.773, pedigree (1,1,4,1,1)
  (same comment as for Copper, ion)
- Dinitrogen monoxide [air, urban air close to ground]: 0.00018929 kg; lognormal variance with pedigree 1.1211, pedigree (1,1,4,1,1)
  (same comment as for Ammonia)
- Molybdenum [water, ground-, long-term]: 2.2071e-6 kg; lognormal variance with pedigree 1.4396, pedigree (1,1,4,1,1)
  (same comment as for Manganese)
- Manganese [water, surface water]: 8.2952e-10 kg; lognormal variance with pedigree 1.3097, pedigree (1,1,4,1,1)
  (same comment as for Copper, ion)
- Cyanide [air, urban air close to ground]: 4.0667e-5 kg; lognormal variance with pedigree 1.1211, pedigree (1,1,4,1,1)
  (same comment as for Ammonia)
- Nickel, ion [water, ground-, long-term]: 0.00046706 kg; lognormal variance with pedigree 0.74986, pedigree (1,1,4,1,1)
  (same comment as for Manganese)
- Molybdenum [water, surface water]: 4.7634e-7 kg; lognormal variance with pedigree 0.92023, pedigree (1,1,4,1,1)
  (same comment as for Copper, ion)
- Phosphorus [air, urban air close to ground]: 4.8487e-7 kg; lognormal variance with pedigree 0.78174, pedigree (1,1,4,1,1)
  Emission to air from waste composition and transfer coefficients.
  Uncertainty: uncertainty is calculated from uncertainties in waste composition and transfer coefficients in incinerator
- Lead [water, ground-, long-term]: 0.0001592 kg; lognormal variance with pedigree 1.7785, pedigree (1,1,4,1,1)
  (same comment as for Manganese)
- Nickel, ion [water, surface water]: 3.1573e-7 kg; lognormal variance with pedigree 1.3846, pedigree (1,1,4,1,1)
  (same comment as for Copper, ion)
- Hydrogen chloride [air, urban air close to ground]: 3.6801e-6 kg; lognormal variance with pedigree 0.44996, pedigree (1,1,4,1,1)
  (same comment as for Phosphorus)
- Antimony [water, ground-, long-term]: 0.0018567 kg; lognormal variance with pedigree 0.41698, pedigree (1,1,4,1,1)
  (same comment as for Manganese)
- Lead [water, surface water]: 1.0678e-8 kg; lognormal variance with pedigree 0.91, pedigree (1,1,4,1,1)
  (same comment as for Copper, ion)
- Bromine [air, urban air close to ground]: 2.6215e-6 kg; lognormal variance with pedigree 0.47462, pedigree (1,1,4,1,1)
  (same comment as for Phosphorus)
- Selenium [water, ground-, long-term]: 1.4349e-6 kg; lognormal variance with pedigree 0.96734, pedigree (1,1,4,1,1)
  (same comment as for Manganese)
- Antimony [water, surface water]: 0.00089926 kg; lognormal variance with pedigree 0.44308, pedigree (1,1,4,1,1)
  (same comment as for Copper, ion)
- Hydrogen fluoride [air, urban air close to ground]: 1.6095e-6 kg; lognormal variance with pedigree 0.86553, pedigree (1,1,4,1,1)
  (same comment as for Phosphorus)
- Tin, ion [water, ground-, long-term]: 0.00012864 kg; lognormal variance with pedigree 0.99793, pedigree (1,1,4,1,1)
  (same comment as for Manganese)
- Selenium [water, surface water]: 3.7256e-7 kg; lognormal variance with pedigree 1.0582, pedigree (1,1,4,1,1)
  (same comment as for Copper, ion)
- Arsenic [air, urban air close to ground]: 5.6061e-8 kg; lognormal variance with pedigree 1.3318, pedigree (1,1,4,1,1)
  (same comment as for Phosphorus)
- Vanadium, ion [water, ground-, long-term]: 4.3555e-7 kg; lognormal variance with pedigree 1.2859, pedigree (1,1,4,1,1)
  (same comment as for Manganese)
- Tin, ion [water, surface water]: 1.751e-7 kg; lognormal variance with pedigree 0.80306, pedigree (1,1,4,1,1)
  (same comment as for Copper, ion)
- Barium [air, urban air close to ground]: 6.6294e-7 kg; lognormal variance with pedigree 0.91365, pedigree (1,1,4,1,1)
  (same comment as for Phosphorus)
- Zinc, ion [water, ground-, long-term]: 0.00032932 kg; lognormal variance with pedigree 1.5272, pedigree (1,1,4,1,1)
  (same comment as for Manganese)
- Vanadium, ion [water, surface water]: 1.5533e-9 kg; lognormal variance with pedigree 1.5148, pedigree (1,1,4,1,1)
  (same comment as for Copper, ion)
- Cadmium [air, urban air close to ground]: 7.328e-8 kg; lognormal variance with pedigree 0.94306, pedigree (1,1,4,1,1)
  (same comment as for Phosphorus)
- Antimony [air, urban air close to ground]: 3.6655e-9 kg; lognormal variance with pedigree 0.54436, pedigree (1,1,4,1,1)
  (same comment as for Phosphorus)
- Beryllium [water, ground-, long-term]: 4.1782e-7 kg; lognormal variance with pedigree 1.6395, pedigree (1,1,4,1,1)
  (same comment as for Manganese)
- Zinc, ion [water, surface water]: 4.4734e-8 kg; lognormal variance with pedigree 0.64534, pedigree (1,1,4,1,1)
  (same comment as for Copper, ion)
- Cobalt [air, urban air close to ground]: 5.1157e-8 kg; lognormal variance with pedigree 1.1563, pedigree (1,1,4,1,1)
  (same comment as for Phosphorus)
- Selenium [air, urban air close to ground]: 2.2308e-8 kg; lognormal variance with pedigree 1.5056, pedigree (1,1,4,1,1)
  (same comment as for Phosphorus)
- Strontium [water, ground-, long-term]: 7.8718e-5 kg; lognormal variance with pedigree 1.00149, pedigree (1,1,4,1,1)
  (same comment as for Manganese)
- Beryllium [water, surface water]: 2.7707e-10 kg; lognormal variance with pedigree 2.2808, pedigree (1,1,4,1,1)
  (same comment as for Copper, ion)
- Chromium [air, urban air close to ground]: 4.3746e-8 kg; lognormal variance with pedigree 1.0828, pedigree (1,1,4,1,1)
  (same comment as for Phosphorus)
- Tin [air, urban air close to ground]: 1.2653e-10 kg; lognormal variance with pedigree 0.95777, pedigree (1,1,4,1,1)
  (same comment as for Phosphorus)
- Titanium, ion [water, ground-, long-term]: 0.0012785 kg; lognormal variance with pedigree 0.72686, pedigree (1,1,4,1,1)
  (same comment as for Manganese)
- Strontium [water, surface water]: 5.1519e-8 kg; lognormal variance with pedigree 1.6706, pedigree (1,1,4,1,1)
  (same comment as for Copper, ion)
- Copper [air, urban air close to ground]: 2.7916e-7 kg; lognormal variance with pedigree 0.46773, pedigree (1,1,4,1,1)
  (same comment as for Phosphorus)
- Vanadium [air, urban air close to ground]: 1.5179e-8 kg; lognormal variance with pedigree 1.6203, pedigree (1,1,4,1,1)
  (same comment as for Phosphorus)
- Thallium [water, ground-, long-term]: 2.7336e-7 kg; lognormal variance with pedigree 1.4385, pedigree (1,1,4,1,1)
  (same comment as for Manganese)
- Titanium, ion [water, surface water]: 8.6973e-7 kg; lognormal variance with pedigree 0.38993, pedigree (1,1,4,1,1)
  (same comment as for Copper, ion)
- Mercury [air, urban air close to ground]: 2.2998e-8 kg; lognormal variance with pedigree 1.6132, pedigree (1,1,4,1,1)
  (same comment as for Phosphorus)
- Zinc [air, urban air close to ground]: 4.9059e-7 kg; lognormal variance with pedigree 0.73076, pedigree (1,1,4,1,1)
  (same comment as for Phosphorus)
- Silicon [water, ground-, long-term]: 0.00064449 kg; lognormal variance with pedigree 4.4717, pedigree (1,1,4,1,1)
  (same comment as for Manganese)
- Thallium [water, surface water]: 2.5353e-10 kg; lognormal variance with pedigree 1.7274, pedigree (1,1,4,1,1)
  (same comment as for Copper, ion)
- Manganese [air, urban air close to ground]: 1.2574e-9 kg; lognormal variance with pedigree 1.3536, pedigree (1,1,4,1,1)
  (same comment as for Phosphorus)
- Strontium [air, urban air close to ground]: 7.8803e-9 kg; lognormal variance with pedigree 1.0387, pedigree (1,1,4,1,1)
  (same comment as for Phosphorus)
- Iron, ion [water, ground-, long-term]: 0.00079349 kg; lognormal variance with pedigree 1.1641, pedigree (1,1,4,1,1)
  (same comment as for Manganese)
- Silicon [water, surface water]: 1.6545e-6 kg; lognormal variance with pedigree 0.71173, pedigree (1,1,4,1,1)
  (same comment as for Copper, ion)
- Molybdenum [air, urban air close to ground]: 3.7667e-9 kg; lognormal variance with pedigree 1.4624, pedigree (1,1,4,1,1)
  (same comment as for Phosphorus)
- Titanium [air, urban air close to ground]: 3.5444e-6 kg; lognormal variance with pedigree 0.50235, pedigree (1,1,4,1,1)
  (same comment as for Phosphorus)
- Calcium, ion [water, ground-, long-term]: 0.0027087 kg; lognormal variance with pedigree 0.47735, pedigree (1,1,4,1,1)
  (same comment as for Manganese)
- Iron, ion [water, surface water]: 3.0031e-8 kg; lognormal variance with pedigree 1.0913, pedigree (1,1,4,1,1)
  (same comment as for Copper, ion)
- Nickel [air, urban air close to ground]: 6.0057e-7 kg; lognormal variance with pedigree 0.78174, pedigree (1,1,4,1,1)
  (same comment as for Phosphorus)
- Thallium [air, urban air close to ground]: 3.5617e-10 kg; lognormal variance with pedigree 1.7339, pedigree (1,1,4,1,1)
  (same comment as for Phosphorus)
- Aluminium [water, ground-, long-term]: 0.014323 kg; lognormal variance with pedigree 0.27853, pedigree (1,1,4,1,1)
  (same comment as for Manganese)
- Calcium, ion [water, surface water]: 5.3754e-5 kg; lognormal variance with pedigree 0.22921, pedigree (1,1,4,1,1)
  (same comment as for Copper, ion)
- Lead [air, urban air close to ground]: 1.159e-8 kg; lognormal variance with pedigree 0.91365, pedigree (1,1,4,1,1)
  (same comment as for Phosphorus)
- Silicon [air, urban air close to ground]: 4.4067e-9 kg; lognormal variance with pedigree 0.59394, pedigree (1,1,4,1,1)
  (same comment as for Phosphorus)
- Potassium, ion [water, ground-, long-term]: 8.0109e-5 kg; lognormal variance with pedigree 0.64554, pedigree (1,1,4,1,1)
  (same comment as for Manganese)
- Aluminium [water, surface water]: 4.2161e-7 kg; lognormal variance with pedigree 0.92562, pedigree (1,1,4,1,1)
  (same comment as for Copper, ion)
- Iron [air, urban air close to ground]: 2.6986e-9 kg; lognormal variance with pedigree 0.67282, pedigree (1,1,4,1,1)
  (same comment as for Phosphorus)
- Sodium, ion [water, ground-, long-term]: 0.00010615 kg; lognormal variance with pedigree 0.67456, pedigree (1,1,4,1,1)
  (same comment as for Manganese)
- Potassium, ion [water, surface water]: 3.0275e-5 kg; lognormal variance with pedigree 0.38049, pedigree (1,1,4,1,1)
  (same comment as for Copper, ion)
- Calcium [air, urban air close to ground]: 2.337e-5 kg; lognormal variance with pedigree 0.53733, pedigree (1,1,4,1,1)
  (same comment as for Phosphorus)
- NMVOC, non-methane volatile organic compounds, unspecified origin [air, urban air close to ground]: 5.8092e-7 kg; lognormal variance with pedigree 0.074458, pedigree (1,1,4,1,1)
  Incomplete combustion product emitted to air.
  Uncertainty: uncertainty calculated from uncertainty in average operation emissions, and the uncertainty of the flue gas volume from this waste.
- Sodium, ion [water, surface water]: 4.6453e-5 kg; lognormal variance with pedigree 0.31812, pedigree (1,1,4,1,1)
  (same comment as for Copper, ion)
- Aluminium [air, urban air close to ground]: 1.8645e-9 kg; lognormal variance with pedigree 0.36661, pedigree (1,1,4,1,1)
  (same comment as for Phosphorus)
- Particulates, < 2.5 um [air, urban air close to ground]: 1.524e-6 kg; lognormal variance with pedigree 0.37326, pedigree (1,1,4,1,1)
  (same comment as for NMVOC, non-methane volatile organic compounds, unspecified origin)
- BOD5, Biological Oxygen Demand [water, ground-, long-term]: 0.0019242 kg; lognormal variance with pedigree 0.019963, pedigree (1,1,4,1,1)
  (same comment as for Manganese)
- Potassium [air, urban air close to ground]: 5.5159e-7 kg; lognormal variance with pedigree 0.96512, pedigree (1,1,4,1,1)
  (same comment as for Phosphorus)
- Particulates, > 2.5 um, and < 10um [air, urban air close to ground]: 7.6583e-9 kg; lognormal variance with pedigree 0.16931, pedigree (1,1,4,1,1)
  (same comment as for NMVOC, non-methane volatile organic compounds, unspecified origin)
- Chromium, ion [water, surface water]: 6.5039e-9 kg; lognormal variance with pedigree 0.68846, pedigree (1,1,4,1,1)
  (same comment as for Copper, ion)
- BOD5, Biological Oxygen Demand [water, surface water]: 0.00059058 kg; lognormal variance with pedigree 0.026, pedigree (1,1,4,1,1)
  (same comment as for Copper, ion)
- Dioxins, measured as 2,3,7,8-tetrachlorodibenzo-p-dioxin [air, urban air close to ground]: 2.5528e-14 kg; lognormal variance with pedigree 0.37326, pedigree (1,1,4,1,1)
  (same comment as for NMVOC, non-methane volatile organic compounds, unspecified origin)
- TOC, Total Organic Carbon [water, ground-, long-term]: 0.0023278 kg; lognormal variance with pedigree 0.019963, pedigree (1,1,4,1,1)
  (same comment as for Manganese)
- Sodium [air, urban air close to ground]: 1.0929e-6 kg; lognormal variance with pedigree 0.921, pedigree (1,1,4,1,1)
  (same comment as for Phosphorus)
- Benzene [air, urban air close to ground]: 1.2765e-8 kg; lognormal variance with pedigree 0.074458, pedigree (1,1,4,1,1)
  (same comment as for NMVOC, non-methane volatile organic compounds, unspecified origin)
- COD, Chemical Oxygen Demand [water, ground-, long-term]: 0.0058827 kg; lognormal variance with pedigree 0.019963, pedigree (1,1,4,1,1)
  (same comment as for Manganese)
- DOC, Dissolved Organic Carbon [water, surface water]: 0.00026323 kg; lognormal variance with pedigree 0.025798, pedigree (1,1,4,1,1)
  (same comment as for Copper, ion)
- Toluene [air, urban air close to ground]: 2.5529e-8 kg; lognormal variance with pedigree 0.074458, pedigree (1,1,4,1,1)
  (same comment as for NMVOC, non-methane volatile organic compounds, unspecified origin)
- Sulfate [water, ground-, long-term]: 0.00097105 kg; lognormal variance with pedigree 0.58131, pedigree (1,1,4,1,1)
  (same comment as for Manganese)
- COD, Chemical Oxygen Demand [water, surface water]: 0.0006035 kg; lognormal variance with pedigree 0.025821, pedigree (1,1,4,1,1)
  (same comment as for Copper, ion)
- Benzene, pentachloro- [air, urban air close to ground]: 6.744e-11 kg; lognormal variance with pedigree 0.074458, pedigree (1,1,4,1,1)
  (same comment as for NMVOC, non-methane volatile organic compounds, unspecified origin)
- DOC, Dissolved Organic Carbon [water, ground-, long-term]: 0.0023278 kg; lognormal variance with pedigree 0.019963, pedigree (1,1,4,1,1)
  (same comment as for Manganese)
- TOC, Total Organic Carbon [water, surface water]: 0.00026323 kg; lognormal variance with pedigree 0.025798, pedigree (1,1,4,1,1)
  (same comment as for Copper, ion)
- Benzene, hexachloro- [air, urban air close to ground]: 2.669e-11 kg; lognormal variance with pedigree 0.074458, pedigree (1,1,4,1,1)
  (same comment as for NMVOC, non-methane volatile organic compounds, unspecified origin)
- Nitrate [water, ground-, long-term]: 0.0004552 kg; lognormal variance with pedigree 0.35656, pedigree (1,1,4,1,1)
  (same comment as for Manganese)
- Sulfate [water, surface water]: 0.00016595 kg; lognormal variance with pedigree 0.40343, pedigree (1,1,4,1,1)
  (same comment as for Copper, ion)
- Phenol, pentachloro- [air, urban air close to ground]: 5.5589e-12 kg; lognormal variance with pedigree 0.074458, pedigree (1,1,4,1,1)
  (same comment as for NMVOC, non-methane volatile organic compounds, unspecified origin)
- Phosphate [water, ground-, long-term]: 4.2914e-5 kg; lognormal variance with pedigree 5.1372, pedigree (1,1,4,1,1)
  (same comment as for Manganese)
- Nitrate [water, surface water]: 0.00016305 kg; lognormal variance with pedigree 0.23632, pedigree (1,1,4,1,1)
  (same comment as for Copper, ion)
- Benzo(a)pyrene [air, urban air close to ground]: 2.8406e-13 kg; lognormal variance with pedigree 0.37326, pedigree (1,1,4,1,1)
  (same comment as for NMVOC, non-methane volatile organic compounds, unspecified origin)
- Chloride [water, ground-, long-term]: 0.00082692 kg; lognormal variance with pedigree 0.40666, pedigree (1,1,4,1,1)
  (same comment as for Manganese)
- Phosphate [water, surface water]: 7.1041e-7 kg; lognormal variance with pedigree 0.36976, pedigree (1,1,4,1,1)
  (same comment as for Copper, ion)
- Heat, waste [air, urban air close to ground]: 25.889 MJ; lognormal variance with pedigree 0.023193, pedigree (1,1,4,1,1)
  Waste heat generated from heating value of this waste plus any electricity required to process it.
  Uncertainty: uncertainty is calculated from uncertainties in waste composition and uncertainties in energy efficiency and the uncertainty in internal energy demand
- Bromine [water, ground-, long-term]: 0.00027207 kg; lognormal variance with pedigree 0.46301, pedigree (1,1,4,1,1)
  (same comment as for Manganese)
- Chloride [water, surface water]: 0.00557 kg; lognormal variance with pedigree 0.15892, pedigree (1,1,4,1,1)
  (same comment as for Copper, ion)
- Water [air, urban air close to ground]: 0.00188068 m3; lognormal variance with pedigree 0.73559, pedigree (1,1,4,1,1)
  Water vapour from waste humidity, hydrogen oxidation and part of the process water.
  Uncertainty: Uncertainty calculated from uncertainty in waste composition, process water input and the uncertainty of fraction to air.
- Fluoride [water, ground-, long-term]: 0.00015916 kg; lognormal variance with pedigree 0.51372, pedigree (1,1,4,1,1)
  (same comment as for Manganese)
- Bromine [water, surface water]: 0.00487 kg; lognormal variance with pedigree 0.1171, pedigree (1,1,4,1,1)
  (same comment as for Copper, ion)
- Heat, waste [water, surface water]: 5.9565 MJ; lognormal variance with pedigree 0.023193, pedigree (1,1,4,1,1)
  (same comment as for Heat, waste)
- Silver, ion [water, ground-, long-term]: 3.0202e-5 kg; lognormal variance with pedigree 1.1294, pedigree (1,1,4,1,1)
  (same comment as for Manganese)
- Fluoride [water, surface water]: 6.9431e-5 kg; lognormal variance with pedigree 0.54062, pedigree (1,1,4,1,1)
  (same comment as for Copper, ion)
- Water [water, surface water]: 0.000673253 m3; lognormal variance with pedigree 1.1201, pedigree (1,1,4,1,1)
  Process water released to surface water.
  Uncertainty: uncertainty calculated from uncertainty in process water input and the uncertainty of fraction to surface water.
- Arsenic, ion [water, ground-, long-term]: 4.3632e-6 kg; lognormal variance with pedigree 1.3207, pedigree (1,1,4,1,1)
  (same comment as for Manganese)
- Silver, ion [water, surface water]: 1.0486e-9 kg; lognormal variance with pedigree 2.225, pedigree (1,1,4,1,1)
  (same comment as for Copper, ion)
- Barium [water, ground-, long-term]: 0.00012339 kg; lognormal variance with pedigree 1.2541, pedigree (1,1,4,1,1)
  (same comment as for Manganese)
- Arsenic, ion [water, surface water]: 2.7149e-6 kg; lognormal variance with pedigree 1.2096, pedigree (1,1,4,1,1)
  (same comment as for Copper, ion)
- Carbon monoxide, fossil [air, urban air close to ground]: 2.1699e-5 kg; lognormal variance with pedigree 0.74722, pedigree (1,1,4,1,1)
  (same comment as for NMVOC, non-methane volatile organic compounds, unspecified origin)
- Cadmium, ion [water, ground-, long-term]: 2.3117e-5 kg; lognormal variance with pedigree 4.9213, pedigree (1,1,4,1,1)
  (same comment as for Manganese)
- Barium [water, surface water]: 7.1664e-8 kg; lognormal variance with pedigree 0.72218, pedigree (1,1,4,1,1)
  (same comment as for Copper, ion)
- Carbon dioxide, fossil [air, urban air close to ground]: 2.8932 kg; lognormal variance with pedigree 0.009675, pedigree (1,1,4,1,1)
  (same comment as for Phosphorus)
- Cobalt [water, ground-, long-term]: 2.4608e-5 kg; lognormal variance with pedigree 1.0998, pedigree (1,1,4,1,1)
  (same comment as for Manganese)
- Cadmium, ion [water, surface water]: 2.5588e-8 kg; lognormal variance with pedigree 0.92754, pedigree (1,1,4,1,1)
  (same comment as for Copper, ion)
- Methane, fossil [air, urban air close to ground]: 1.9147e-7 kg; lognormal variance with pedigree 0.074458, pedigree (1,1,4,1,1)
  (same comment as for NMVOC, non-methane volatile organic compounds, unspecified origin)
- Chromium VI [water, ground-, long-term]: 2.6518e-6 kg; lognormal variance with pedigree 2.4678, pedigree (1,1,4,1,1)
  (same comment as for Manganese)
- Cobalt [water, surface water]: 4.635e-9 kg; lognormal variance with pedigree 1.658, pedigree (1,1,4,1,1)
  (same comment as for Copper, ion)
- Sulfur dioxide [air, urban air close to ground]: 4.318e-6 kg; lognormal variance with pedigree 0.79587, pedigree (1,1,4,1,1)
  (same comment as for Phosphorus)
- Copper, ion [water, ground-, long-term]: 0.0053979 kg; lognormal variance with pedigree 0.42226, pedigree (1,1,4,1,1)
  (same comment as for Manganese)
- Chromium VI [water, surface water]: 7.6281e-7 kg; lognormal variance with pedigree 1.1401, pedigree (1,1,4,1,1)
  (same comment as for Copper, ion)
- Nitrogen oxides [air, urban air close to ground]: 0.00084275 kg; lognormal variance with pedigree 0.72817, pedigree (1,1,4,1,1)
  Sum of fuel-Nox and thermal-NOx emitted to air after DeNOx stage.
  Uncertainty: uncertainty calculated from uncertainty in average N-emissions and uncertainty in the share of thermal NOx and the uncertainty in nitrogen content in *this* waste.
- Mercury [water, ground-, long-term]: 1.7034e-7 kg; lognormal variance with pedigree 1.6369, pedigree (1,1,4,1,1)
  (same comment as for Manganese)

## Extrapolations
This dataset has been extrapolated from year 2012 to the year of the calculation (2021). The uncertainty has been adjusted accordingly.
