# treatment of drilling waste, landfarming

Dataset: EcoSpold 2, unit process
Geography: CH
Time period: 2000-01-01 to 2021-12-31
Technology level: current
Classification: ISIC rev.4 ecoinvent: 3821:Treatment and disposal of non-hazardous waste
Classification: EcoSpold01Categories: waste management/landfarming
Tags: ConvertedDataset; Treatment
Scenario: Business-as-Usual
System model: Allocation, cut-off by classification
Generated by: Gabor Doka (obsolete)
Published in: Doka G. 2007
Database: ecoinvent
isCopyrightProtected: true
accessRestrictedTo: 1

## General comment
Inventoried waste contains 100% drilling waste; .
waste composition (wet, in ppm): upper heating value 0.773 MJ/kg; H2O 714700; O 100000; H 5000; C 30000; S 6000; N n.a.; P 500; B 100; Cl 35000; Br n.a.; F 500; I n.a.; Ag n.a.; As 4; Ba 5000; Cd n.a.; Co n.a.; Cr 50; Cu n.a.; Hg n.a.; Mn 400; Mo n.a.; Ni n.a.; Pb n.a.; Sb n.a.; Se n.a.; Sn n.a.; V n.a.; Zn 150; Be n.a.; Sc n.a.; Sr 100; Ti n.a.; Tl n.a.; W n.a.; Si 1000; Fe 20000; Ca 40000; Al 10000; K 3500; Mg 8000; Na 20000;
Share of carbon in waste that is biogenic 0%.
[This dataset was already contained in the ecoinvent database version 2. It was not individually updated during the transfer to ecoinvent version 3. Life Cycle Impact Assessment results may still have changed, as they are affected by changes in the supply chain, i.e. in other datasets. This dataset was generated following the ecoinvent quality guidelines for version 2. It may have been subject to central changes described in the ecoinvent version 3 change report (http://www.ecoinvent.org/database/ecoinvent-version-3/reports-of-changes/), and the results of the central updates were reviewed extensively. The changes added e.g. consistent water flows and other information throughout the database. The documentation of this dataset can be found in the ecoinvent reports of version 2, which are still available via the ecoinvent website. The change report linked above covers all central changes that were made during the conversion process.]

## Included activities end
direct emissions from landfarming applications (100% to industrial soil). Burden for spreading process.

## Technology
direct spreading on industrial areas. No crop growing.

## Time period
Waste composition as given in literature reference.

## Reference product
- drilling waste: -1 kg; CPC 39990: Other wastes n.e.c.; By-product classification Waste
  production volume 0.48 kg; = (0.8/100)*60
    Swiss production volume is scaled based on the Global GDP and the assumption that Switzerland amounts for circa 0.8% of the global DGP. Original comment: estimated proportion; source: ecoinvent v2; value to be replaced by value to be calculated from the demand for this treatment activity
  property heating value, net 0 MJ
    Non combustible products are assumed to have an LHV equal to zero (0).
  property price 0 EUR2005
    Waste products are assigned a price of zero as they are assumed to require further treatment.
  property carbon content, fossil 0.105263
    C content was calculated for 1 kg DM, using data in Tab A.9, ecoinvent v2.2 report 13_I.
  property carbon content 0.105263
    carbon content on a dry matter basis (reserved; not for manual entry)
  properties: water content 2.50877, wet mass 1 kg, carbon content, non-fossil 0, water in wet mass 0.715 kg, dry mass 0.285 kg, carbon allocation 0.03 kg

## Inputs from technosphere
- liquid manure spreading, by vacuum tanker: 0.001 m3; lognormal variance with pedigree 0.148, pedigree (5,5,5,1,4)
  Approximate burden for spreading. vaccum tank spreading (in m3) for landfarming of waste (in kg)
  This exchange has an activity link directly to the producing activity because the product is primarily consumed in the same geographical area where it is produced.

## Emissions to nature
- Magnesium [soil, industrial]: 0.008 kg; lognormal variance with pedigree 0.43, pedigree (1,1,5,1,1)
  direct emission from landfarming process. Uncertainty from uncertainty in waste composition.
- Fluoride [soil, industrial]: 0.0005 kg; lognormal variance with pedigree 0.79, pedigree (1,1,5,1,1)
  (same comment as for Magnesium)
- Aluminium [soil, industrial]: 0.01 kg; lognormal variance with pedigree 0.41, pedigree (1,1,5,1,1)
  (same comment as for Magnesium)
- Chloride [soil, industrial]: 0.035 kg; lognormal variance with pedigree 0.26, pedigree (1,1,5,1,1)
  (same comment as for Magnesium)
- Iron [soil, industrial]: 0.02 kg; lognormal variance with pedigree 0.33, pedigree (1,1,5,1,1)
  (same comment as for Magnesium)
- Phosphorus [soil, industrial]: 0.0005 kg; lognormal variance with pedigree 0.79, pedigree (1,1,5,1,1)
  (same comment as for Magnesium)
- Chromium [soil, industrial]: 5e-5 kg; lognormal variance with pedigree 1.09, pedigree (1,1,5,1,1)
  (same comment as for Magnesium)
- Calcium [soil, industrial]: 0.04 kg; lognormal variance with pedigree 0.25, pedigree (1,1,5,1,1)
  (same comment as for Magnesium)
- Boron [soil, industrial]: 0.0001 kg; lognormal variance with pedigree 1, pedigree (1,1,5,1,1)
  (same comment as for Magnesium)
- Barium [soil, industrial]: 0.005 kg; lognormal variance with pedigree 0.49, pedigree (1,1,5,1,1)
  (same comment as for Magnesium)
- Strontium [soil, industrial]: 0.0001 kg; lognormal variance with pedigree 1, pedigree (1,1,5,1,1)
  (same comment as for Magnesium)
- Potassium [soil, industrial]: 0.0035 kg; lognormal variance with pedigree 0.54, pedigree (1,1,5,1,1)
  (same comment as for Magnesium)
- Arsenic [soil, industrial]: 4e-6 kg; lognormal variance with pedigree 1.43, pedigree (1,1,5,1,1)
  (same comment as for Magnesium)
- Silicon [soil, industrial]: 0.001 kg; lognormal variance with pedigree 0.7, pedigree (1,1,5,1,1)
  (same comment as for Magnesium)
- Manganese [soil, industrial]: 0.0004 kg; lognormal variance with pedigree 0.82, pedigree (1,1,5,1,1)
  (same comment as for Magnesium)
- Carbon [soil, industrial]: 0.03 kg; lognormal variance with pedigree 0.28, pedigree (1,1,5,1,1)
  (same comment as for Magnesium)
- Zinc [soil, industrial]: 0.00015 kg; lognormal variance with pedigree 0.04, pedigree (1,1,5,1,1)
  (same comment as for Magnesium)
- Sodium [soil, industrial]: 0.02 kg; lognormal variance with pedigree 0.33, pedigree (1,1,5,1,1)
  (same comment as for Magnesium)
- Sulfur [soil, industrial]: 0.006 kg; lognormal variance with pedigree 0.47, pedigree (1,1,5,1,1)
  (same comment as for Magnesium)

## Sampling procedure
Waste compositions from literature data.

## Extrapolations
This dataset has been extrapolated from year 2000 to the year of the calculation (2021). The uncertainty has been adjusted accordingly.

## Review by Niels Jungbluth 2003-07-31
Passed.
