# grass production, permanent grassland, Swiss integrated production, extensive

Dataset: EcoSpold 2, unit process
Geography: CH
Time period: 1995-01-01 to 2021-12-31
Technology level: current
Classification: ISIC rev.4 ecoinvent: 0119:Growing of other non-perennial crops
Scenario: Business-as-Usual
System model: Allocation, cut-off by classification
Share of production covered: 0 %
Generated by: Fredy Dinkel
Published in: Jungbluth N. 2007
Database: ecoinvent
isCopyrightProtected: true
accessRestrictedTo: 1

## General comment
Refers to 1 kg dry matter of fresh grass from intensive organic production with 1.66 kg CO2 and 18.9 MJ per kg dry matter. The dry matter yield is 3000 kg/ha. The dry matter content of fresh grass is 15%.

## Included activities start
This activity assumes grass production on a permanent natural meadow with a lifetime of 50 years and represents one year of cultivation on an established meadow. The input of pesticides is included.

## Included activities end
The dataset includes all machine operations and corresponding machine infrastructure and sheds. Machine operations are: mowing and loading for transport; pesticides are applied manually to single plants. This activity ends after loading of the grass at the farm gate.

## Geography
Refers to a production in the Swiss plateau (lowlands <700m).

## Technology
Extenisv organic production.

## Parameters
- fraction, irrigation water to surface water: 0.2 dimensionless; name fraction_IW_to_surface_water; lognormal variance with pedigree 0.0886, pedigree (4,3,1,1,4)
  Literature value (Döll, 2011) cross referenced with expert opinion.
- fraction, irrigation water, to air: 0.3353 dimensionless; name fraction_IW_to_air; lognormal variance with pedigree 0.0409, pedigree (2,2,2,1,1)
  Literature value (Siebert, 2010) (Vionnet, S., Quantis Water Database - Technical Report, 2012).
- fraction, irrigation water, to ground water: 0.8 dimensionless; name fraction_IW_to_ground_water; lognormal variance with pedigree 0.0886, pedigree (4,3,1,1,4)
  Literature value (Döll, 2011) cross referenced with expert opinion.

## Reference product
- grass, Swiss integrated production: 1 kg; name REF_PRODUCT; CPC 01919: Forage products, n.e.c.; By-product classification allocatable product
  production volume 2.35116e8 kg
    Source: ecoinvent 2; 88% integrated production
  property price 0.645 EUR2005; name REF_PRODUCT_price_EUR2005
    Temporary price data. Calculated as 90% of purchasers price based on: Source: Ecoinvent report nr. 17, table 12.46
  property energy content 18.9 MJ; name REF_PRODUCT_energy_content
    Approximation by values for hay. See chapter 'Product Properties' in '01_crop production - yields & inputs CH & Europe_v1.0.pdf', section 'AGRICULTURAL PRODUCTION IN SWITZERLAND' - pdf-document on the dedicated talk page of ecoinvent (www.ecoinvent.org/documentation).
  property dry mass 1 kg; name REF_PRODUCT_DM
  property carbon content, non-fossil 0.443857; name REF_PRODUCT_C_content_non_fossil
    biogene carbon content on a dry matter basis
    Composition data obtained from the average composition of Fescue Fresh, Orchardgrass Fresh, and Timothy Fresh in (http://beefmagazine.com/images/2009%20feed%20table.pdf). First, composition data were refered to 1 kg dry mass. Then, C-contents were calculated considering a C-content/dry mass of 46% in carbohydrates (including fibres), 53% in proteins and 75% in fats. All data from 'Evolutionary and Biochemical Aspects', A.D. Kay and T. Vrede (in Global Ecology, 2010, Elsevier B.V., S.E. Jørgensen Ed.).
  property carbon content 0.443857
    carbon content on a dry matter basis (reserved; not for manual entry)
  properties: carbon content, fossil 0, wet mass 6.66667 kg, water content 5.66667, water in wet mass 5.66667 kg, carbon allocation 0.443857 kg

## Inputs from technosphere
- glyphosate: 3.3333e-5 kg; lognormal variance with pedigree 0.0507, pedigree (2,2,5,1,1)
  Assumption application of 0.1 l Glyphosate used for single plant treatments only (allowed pesticides for extensive IP).
  Assumption application of 0.1 l Glyphosate used for single plant treatments only (allowed pesticides for extensive IP).
  properties: dry mass 1 kg, wet mass 1 kg, carbon content, fossil 0.214286
- fodder loading, by self-loading trailer: 0.056 m3; lognormal variance with pedigree 0.0688, pedigree (2,2,5,3,3)
  Calculation with grass of about 120 kg/m3 and dry matter content of 15%
  This exchange has an activity link directly to the producing activity because the product is primarily consumed in the same geographical area where it is produced.
- packaging, for pesticides: 6.6666e-5 kg; lognormal variance with pedigree 0.0912, pedigree (4,3,5,5,4)
  Total amount of active substance/s of pesticides needed for the production of grass, Swiss integrated production is calculated to be circa 3.33E-05 kg. Pesticide/s used in this dataset is/are: 'glyphosate'. The total amount of active substance/s is doubled in order to account for the packaging of the dilluted product of pesticide/s that is/are applied. Therefore, 6.67E-05 kg of packaging for pesticides is justified with this exchange.
  properties: price 0.0642 EUR2005, carbon content, fossil 0.85714, wet mass 1 kg, heating value, net 25.97 MJ, dry mass 1 kg
- mowing, by rotary mower: 0.00033333 ha; source LBL 2004; lognormal variance with pedigree 0.0587, pedigree (2,2,5,1,3)
  Max. 1 harvest per year, min. 1 harvest per 3 years (LBL 2004). 1 harvest per year was assumed for straw areas with use for bioenergy production. For those straw areas the use of rotary mower was assumed possible.
  This exchange has an activity link directly to the producing activity because the product is primarily consumed in the same geographical area where it is produced.
- irrigation: 0.000515063 m3; name water_irrigation_input; source Siebert, S. 2010; lognormal variance with pedigree 0.0427, pedigree (2,2,5,1,1)
  Calculated based on literature values (Döll, 2010) and partially modelled at ETH (Pfister, S.).
  property water in wet mass 999.89 kg; name WWM
  property water content 9089.91; name water_content
  property carbon content, non-fossil 0; name C_content_non_fossil
  property dry mass 0.11 kg; name DM
  property wet mass 1000 kg; name WM
  property carbon content, fossil 0; name C_content_fossil

## Inputs from nature
- Energy, gross calorific value, in biomass [natural resource, biotic]: 18.9 MJ; lognormal variance with pedigree 0.0418844, pedigree (2,1,5,3,1)
  Calculation with 18.9 MJ/kg DM energy content of grass (Nemecek et al. 2004)
- Carbon dioxide, in air [natural resource, in air]: 1.62747 kg; = 44/12 * (REF_PRODUCT_C_content_non_fossil * REF_PRODUCT * REF_PRODUCT_DM ); lognormal variance with pedigree 0.0407, pedigree (2,1,5,3,1)
  Modelled,see chapter 'CO2 binding' in '01_crop production_direct field emissions and natural resources_v1.0.pdf' - pdf-document on the dedicated talk page of ecoinvent (www.ecoinvent.org/documentation)
- Occupation, pasture, man made, extensive [natural resource, land]: 3.3333 m2*year; lognormal variance with pedigree 0.0807, pedigree (2,2,5,1,1)
  Modelled, see chapter 'Land use' in '01_crop production_direct field emissions and natural resources_v1.0.pdf' - pdf-document on the dedicated talk page of ecoinvent (www.ecoinvent.org/documentation)
- Transformation, to pasture, man made, extensive [natural resource, land]: 0.066667 m2; lognormal variance with pedigree 0.1781, pedigree (4,2,5,1,1)
  (same comment as for Occupation, pasture, man made, extensive)
- Transformation, from pasture, man made, extensive [natural resource, land]: 0.066667 m2; lognormal variance with pedigree 0.1781, pedigree (4,2,5,1,1)
  (same comment as for Occupation, pasture, man made, extensive)

## Emissions to nature
- Lead [soil, agricultural]: -3.3e-6 kg; source Nemecek, T. 2004
  Calculation input - output balance using data about metal content of grass, seed and fertilizers summarized in Nemecek et al. (2004)
- Zinc [soil, agricultural]: -4e-5 kg; source Nemecek, T. 2004
  (same comment as for Lead)
- Dinitrogen monoxide [air, non-urban air or from high stacks]: 2.95874e-5 kg; name N2O; lognormal variance with pedigree 0.1607, pedigree (2,1,5,3,4)
  Modelled, see chapter 'Emissions of N2O to the air' in '01_crop production_direct field emissions and natural resources_v1.0.pdf' - pdf-document on the dedicated talk page of ecoinvent (www.ecoinvent.org/documentation)
- Phosphate [water, surface water]: 0.00011452 kg; source Nemecek, T. 2004; lognormal variance with pedigree 0.1608, pedigree (2,2,5,3,4)
  Formula as in ecoinvent report No. 15, chapter 4.4 (Nemecek et al. 2004)
- Mercury [soil, agricultural]: -1.5e-7 kg; source Nemecek, T. 2004
  (same comment as for Lead)
- Water [air, unspecified]: 0.000172701 m3; name water_to_air_unspecified; = (water_irrigation_input*fraction_IW_to_air); lognormal variance with pedigree 0.0807, pedigree (2,2,5,1,1)
  Calculated value based on literature values and expert opinion. See comments in the parametres' comment field.
  property fraction, origin: unspecified 0; name fraction_origin_unspecified
  property fraction, origin: salt water 0; name fraction_origin_salt_water
  property fraction, origin: fresh water 1; name fraction_origin_fresh_water
- Nitrate [water, ground-]: 0.0111 kg; lognormal variance with pedigree 0.1608, pedigree (2,2,5,3,4)
  Modelled with the 'SALCA-NO3 model' described in '01_crop production_direct field emissions and natural resources_v1.0.pdf' - pdf-document on the dedicated talk page of ecoinvent (www.ecoinvent.org/documentation)
- Water [water, ground-]: 0.00027389 m3; name water_to_water_ground; = water_irrigation_input*(1-fraction_IW_to_air)*fraction_IW_to_ground_water; lognormal variance with pedigree 0.1286, pedigree (4,3,5,1,4)
  Calculated value. See the parameters and their comments to understand the calculation.
  property fraction, origin: salt water 0; name fraction_origin_salt_water_Wgw
  property fraction, origin: fresh water 1; name fraction_origin_fresh_water_Wgw
  property fraction, origin: unspecified 0; name fraction_origin_unspecified_Wgw
- Water [water, surface water]: 6.84724e-5 m3; name water_to_water_surface; = water_irrigation_input*(1-fraction_IW_to_air)*fraction_IW_to_surface_water; lognormal variance with pedigree 0.1286, pedigree (4,3,5,1,4)
  Calculated value. See the parameters and their comments to understand the calculation.
  property fraction, origin: fresh water 1; name fraction_origin_fresh_water_Wsw
  property fraction, origin: salt water 0; name fraction_origin_salt_water_Wsw
- Phosphorus [water, surface water]: 1.5363e-6 kg; source Nemecek, T. 2004; lognormal variance with pedigree 0.1608, pedigree (2,2,5,3,4)
  Formula as in ecoinvent report No. 15, chapter 4.4 (Nemecek et al. 2004)
- Copper [soil, agricultural]: -8.6e-6 kg; source Nemecek, T. 2004
  (same comment as for Lead)
- Glyphosate [soil, agricultural]: 3.3333e-5 kg; source Nemecek, T. 2004; lognormal variance with pedigree 0.0607, pedigree (2,2,5,1,1)
  Calculation input - output balance
- Chromium [soil, agricultural]: -1.09e-6 kg; source Nemecek, T. 2004
  (same comment as for Lead)
- Nitrogen oxides [air, non-urban air or from high stacks]: 6.21335e-6 kg; = 0.21 * N2O; lognormal variance with pedigree 0.1607, pedigree (2,1,5,3,4)
  Modelled, see chapter 'Emissions of NOx to the air' in '01_crop production_direct field emissions and natural resources_v1.0.pdf' - pdf-document on the dedicated talk page of ecoinvent (www.ecoinvent.org/documentation)
- Cadmium [soil, agricultural]: -1.3e-7 kg; source Nemecek, T. 2004
  (same comment as for Lead)
- Phosphate [water, ground-]: 4.5806e-5 kg; source Nemecek, T. 2004; lognormal variance with pedigree 0.1608, pedigree (2,2,5,3,4)
  Formula as in ecoinvent report No. 15, chapter 4.4 (Nemecek et al. 2004)
- Nickel [soil, agricultural]: -1.68e-6 kg; source Nemecek, T. 2004
  (same comment as for Lead)

## Sampling procedure
Data were compiled from statistics, fertilising recommendations, documents from extension services and expert knowledge.

## Extrapolations
This dataset has been extrapolated from year 2005 to the year of the calculation (2021). The uncertainty has been adjusted accordingly.

## Review by Niels Jungbluth 2005-08-25
Passed.
