# magnesium, for reuse in titanium sponge production, to generic market for magnesium

Dataset: EcoSpold 2, unit process
Geography: JP
Time period: 2021-01-01 to 2021-12-31
Technology level: current
Classification: ISIC rev.4 ecoinvent: 2420:Manufacture of basic precious and other non-ferrous metals
Scenario: Business-as-Usual
System model: Allocation, cut-off by classification
Generated by: David FitzGerald
Database: ecoinvent
isCopyrightProtected: true
accessRestrictedTo: 1

## General comment
This activity links magnesium, obtained from the electrolysis of magnesium chloride that is produced during the production of titanium sponge, to the market for magnesium.
As the magnesium that is recovered through the electrolysis of magnesium chloride is exclusively reused for the production of titanium sponge, it is assumed that it actually does not supply the market for magnesium. For this reason, the production volume is a dummy value.
The purpose of this activity is to link the recovered magnesium to the market for magnesium in the Consequential system model. In that system model, the activities that are consuming magnesium recovered through the electrolysis of magnesium chloride get instead supplied by the marginal suppliers of magnesium.

## Reference product
- magnesium: 1 kg; CPC 41601: Tungsten, molybdenum, tantalum, magnesium, cobalt, cadmium, titanium, zirconium, beryllium, gallium, hafnium, […]; By-product classification allocatable product; CAS 7439-95-4
  production volume 0.98 kg; = 4*0.245
    Dummy value used, as this activity is assumed to not supply the market for magnesium. The scaling factor corresponds to Japan's share of the global production volume of magnesium recovered through the electrolysis of magnesium chloride, produced during the production of titanium sponge.
  property carbon content 0
    carbon content on a dry matter basis (reserved; not for manual entry)
  properties: carbon content, non-fossil 0, dry mass 1 kg, wet mass 1 kg, water in wet mass 0 kg, carbon content, fossil 0, water content 0, price 11 EUR2005, carbon allocation 0 kg

## Inputs from technosphere
- magnesium, for reuse in titanium sponge production: 1 kg
  properties: magnesium content 1, dry mass 1 kg, wet mass 1 kg
