# conveyor belt production

Dataset: EcoSpold 2, unit process
Geography: RER
Time period: 2000-01-01 to 2021-12-31
Technology level: current
Classification: EcoSpold01Categories: construction processes/machinery
Classification: ISIC rev.4 ecoinvent: 2816:Manufacture of lifting and handling equipment
Synonyms: band; conveying; Förderanlage
Tags: ConvertedDataset
Scenario: Business-as-Usual
System model: Allocation, cut-off by classification
Generated by: Daniel Kellenberger (obsolete)
Published in: Kellenberger D. 2007
Database: ecoinvent
isCopyrightProtected: true
accessRestrictedTo: 1

## General comment
Most data are taken from a description of one type of conveyor belt and completed by assuming transportation distances for components. This module should not be used if its relative importance would be high in a certain environmental inventory.
[This dataset was already contained in the ecoinvent database version 2. It was not individually updated during the transfer to ecoinvent version 3. Life Cycle Impact Assessment results may still have changed, as they are affected by changes in the supply chain, i.e. in other datasets. This dataset was generated following the ecoinvent quality guidelines for version 2. It may have been subject to central changes described in the ecoinvent version 3 change report (http://www.ecoinvent.org/database/ecoinvent-version-3/reports-of-changes/), and the results of the central updates were reviewed extensively. The changes added e.g. consistent water flows and other information throughout the database. The documentation of this dataset can be found in the ecoinvent reports of version 2, which are still available via the ecoinvent website. The change report linked above covers all central changes that were made during the conversion process.]

## Included activities end
Includes the most important materials, the transportation of the new parts to the assembly plant and of all dismantled parts at the end of life either to the secondary metal producer or to the disposal site. No disposal of metal is included as it is recycled. Disposal of concrete from foundation and conveyor rubber band is included. No energy for assembling is included.

## Geography
Certain elementary flows or intermediate product flows are extrapolated from Swiss conditions.

## Technology
The module represents an example for an average technology used in Europe in the late 1990s

## Reference product
- conveyor belt: 1 m; CPC 43550: Pneumatic and other continuous action elevators and conveyors, for goods or materials; By-product classification allocatable product
  production volume 1.32237 m
    This is a placeholder value that does not reflect real-world production volumes. This dataset does not currently require a real-world production volume to work in the database framework, and no actual data were collected yet. This has no negative effect on the results of the ecoinvent database. The placeholder value of this activity was scaled according to the nominal GDP of 2005 (source: United Nations, http://data.un.org/Glossary.aspx?q=GDP+%28current+US%24%29, accessed 20130726) to reflect an appropriate share of the global production volume, which is also a placeholder value.
  property price 257.124 EUR2005
    Calculated based on inputs: The price of the product has been calculated as a sum of the values of the material and energy inputs for this product. This value is therefore a rough estimation. It may underestimate the real price since there are additional expenses when producing any product. These expences can include for example labour costs, treatment of waste materials and profit for the producer. Please consider carefully whether this level of data quality is acceptable for your application.

## Inputs from technosphere
- waste rubber, unspecified: 0 kg; pedigree (1,1,1,1,1)
  production volume 0 kg
    Calculated from the production volume of conveyor belt in proportion to the respective output amounts.
  properties: carbon content, fossil 0.853, dry mass 1 kg, wet mass 1 kg, heating value, net 27.19 MJ
  note on heating value, net: Value taken from the general comment of the treatment dataset.
- synthetic rubber: 13.6 kg; lognormal variance with pedigree 0.0601, pedigree (3,5,5,3,1)
  properties: heating value, net 26.42 MJ, wet mass 1 kg, dry mass 1 kg, carbon content, fossil 0.871949
  note on carbon content, fossil: EPDM (Ethylene-propene-diene terpolymer) rubber is a terpolymer of ethylene, propene, and a diene with the residual unsaturated portion of the diene in the side chain (ecoinvent v2.2 report 7-part XX & Ullmann). Chemical formula (deduced from Evidences of Solvent-Induced Miscibility in Polychloroprene-co-Ethylene-Propene Diene Terpolymer Blends, Dubey et al., Journal of Applied Polymer Science, 2009, 111:1884–1891): C20H35
- scrap steel: 0 kg; pedigree (1,1,1,1,1)
  production volume 0 kg
    (same comment as for waste rubber, unspecified)
  properties: wet mass 1 kg, dry mass 1 kg
- section bar rolling, steel: 500 kg; lognormal variance with pedigree 0.0581, pedigree (1,5,5,3,1)
  activityLink introduced to establish a direct link to the corresponding regional supply of this product
- wire drawing, steel: 29.6 kg; lognormal variance with pedigree 0.0601, pedigree (3,5,5,3,1)
  (same comment as for section bar rolling, steel)
- waste reinforced concrete: 0 kg; pedigree (1,1,1,1,1)
  production volume 0 kg
    (same comment as for waste rubber, unspecified)
  properties: water content 0.00585407, wet mass 1 kg, dry mass 0.99418 kg
- steel, low-alloyed, hot rolled: 530 kg; lognormal variance with pedigree 0.0601, pedigree (3,5,5,3,1)
  properties: carbon content, fossil 0.005, dry mass 1 kg, wet mass 1 kg
  note on carbon content, fossil: Low alloyed steel composition given in Tab. 3.2 ecoinvent v2.2 report 10_partII. Steel assumed to have a C content of 0.5%
- concrete, normal: 0.01 m3; lognormal variance with pedigree 0.0601, pedigree (3,5,5,3,1)
  properties: water content 0.086758, dry mass 2190 kg, wet mass 2380 kg
- waste rubber, unspecified: -13.0521, -0.547924 kg (2 entries); lognormal variance with pedigree 0.0601, pedigree (3,5,5,3,1)
  production volume 13.6 kg
- scrap steel: -29.5625, -0.0374547 kg (2 entries); lognormal variance with pedigree 0.0601, pedigree (3,5,5,3,1)
  production volume 29.6 kg
- waste reinforced concrete: -22.7589, -0.241147 kg (2 entries); lognormal variance with pedigree 0.0601, pedigree (3,5,5,3,1)
  production volume 23 kg

## Sampling procedure
most data from literature

## Extrapolations
This dataset has been extrapolated from year 2001 to the year of the calculation (2021). The uncertainty has been adjusted accordingly.

## Review by Roberto Dones 2003-07-04
Passed
