# primary lead production from concentrate

Dataset: EcoSpold 2, unit process
Geography: GLO
Time period: 2000-01-01 to 2021-12-31
Technology level: current
Classification: ISIC rev.4 ecoinvent: 2420:Manufacture of basic precious and other non-ferrous metals
Classification: EcoSpold01Categories: metals/extraction
Scenario: Business-as-Usual
System model: Allocation, cut-off by classification
Generated by: Mischa Classen
Published in: Classen M. 2009
Database: ecoinvent
isCopyrightProtected: true
accessRestrictedTo: 1

## General comment
The dataset describes the primary production of 1 kg of lead and 0.008 kg of Parkes process crust, in 2005. The activity is modelled as a combination of the two predominant smelting processes: Sinter oxidation / blast furnace reduction, and direct smelting process.

## Included activities start
From reception of raw materials, at the factory gate.

## Included activities end
This activity ends with the refining of lead, at the factory.

The dataset includes the sinter/blast furnace reduction process, the direct smelting reduction process, the final refining of lead, and the disposal of slag.

The dataset does not include emissions to air of Germanium, Gallium, Indium, Selenium, acid mists and VOC, nor the emissions to water of chlorides and sulphates, nor the sulfur consumption in the smelting process.

## Geography
This module represents the production of primary lead on a global average.

## Technology
There are two basic pyrometallurgical processes available for the production of lead from lead or mixed lead-zinc-sulphide concentrates: sinter oxidation / blast furnace reduction route or Direct Smelting Reduction Processes. Both processes are followed by a refining step to produce the final product with the required purity, and may also be used for concentrates mixed with secondary raw materials.
SINTER OXIDATION / BLAST FURNACE REDUCTION:
The sinter oxidation / blast furnace reduction involves two steps: 1) A sintering oxidative roast to remove sulphur with production of PbO; and 2) Blast furnace reduction of the sinter product.
The objective of sintering lead concentrates is to remove as much sulphur as possible from the galena and the accompanying iron, zinc, and copper sulphides, while producing lump agglomerate with appropriate properties for subsequent reduction in the blast furnace (a type of a shaft furnace).
As raw material feed, lead concentrates are blended with recycled sinter fines, secondary material and other process materials and pelletised in rotating drums. Pellets are fed onto sinter machine and ignited. The burning pellets are conveyed over a series of wind-boxes through which air is blown. Sulphur is oxidised to sulphur dioxide and the reaction generates enough heat to fuse and agglomerate the pellets.
Sinter is charged to the blast furnace with metallurgical coke. Air and/or oxygen enriched air is injected and reacts with the coke to produce carbon monoxide. This generates sufficient heat to melt the charge. The gangue content of the furnace charge combines with the added fluxes or reagents to form a slag.
For smelting bulk lead-zinc-concentrates and secondary material, frequently the Imperial Smelting Furnace is used. Here, hot sinter and pre-heated coke as well as hot briquettes are charged. Hot air is injected. The reduction of the metal oxides not only produces lead and slag but also zinc, which is volatile at the furnace operating temperature and passes out of the ISF with the furnace off-gases. The gases also contain some cadmium and lead. The furnace gases pass through a splash condenser in which a shower of molten lead quenches them and the metals are absorbed into the liquid lead, the zinc is refined by distillation.
DIRECT SMELTING REDUCTION:
The Direct Smelting Reduction Process does not carry out the sintering stage separately. Lead sulphide concentrates and secondary materials are charged directly to a furnace and are then melted and oxidised. Sulphur dioxide is formed and is collected, cleaned and converted to sulphuric acid. Carbon (coke or gas) and fluxing agents are added to the molten charge and lead oxide is reduced to lead, a slag is formed. Some zinc and cadmium are “fumed” off in the furnace, their oxides are captured in the abatement plant and recovered.
Several processes are used for direct smelting of lead concentrates and some secondary material to produce crude lead and slag. Bath smelting processes are used: the ISA Smelt/Ausmelt furnaces (sometimes in combination with blast furnaces), Kaldo (TBRC) and QSL integrated processes are used in EU and Worldwide. The Kivcet integrated process is also used and is a flash smelting process. The ISA Smelt/Ausmelt furnaces and the QSL take moist, pelletised feed and the Kaldo and Kivcet use dried feed.
REFINING:
Lead bullion may contain varying amounts of copper, silver, bismuth, antimony, arsenic and tin. Lead recovered from secondary sources may contain similar impurities, but generally antimony and calcium dominate. There are two methods of refining crude lead: electrolytic refining and pyrometallurgical refining. Electrolytic refining uses anodes of de-copperised lead bullion and starter cathodes of pure lead. This is a high-cost process and is used infrequently. A pyrometallurgical refinery consists of a series of kettles, which are indirectly heated by oil or gas. Over a series of separation processes impurities and metal values are separated from the lead bouillon.
Overall waste: The production of metals is related to the generation of several by-products, residues and wastes, which are also listed in the European Waste Catalogue (Council Decision 94/3/EEC). The ISF or direct smelting furnaces also are significant sources of solid slag. This slag has been subjected to high temperatures and generally contains low levels of leachable metals, consequently it may be used in construction. Solid residues also arise as the result of the treatment of liquid effluents. The main waste stream is gypsum waste (CaSO4) and metal hydroxides that are produced at the wastewater neutralisation plant.
These wastes are considered to be a cross-media effect of these treatment techniques but many are recycled to pyrometallurgical process to recover the metals. Dust or sludge from the treatment of gases are used as raw materials for the production of other metals such as Ge, Ga, In and As, etc or can be returned to the smelter or into the leach circuit for the recovery of lead and zinc. Hg/Se residues arise at the pre-treatment of mercury or selenium streams from the gas cleaning stage. This solid waste stream amounts to approximately 40 - 120 t/y in a typical plant. Hg and Se can be recovered from these residues depending on the market for these metals.
Overall emissions: The main emissions to air from zinc and lead production are sulphur dioxide, other sulphur compounds and acid mists; nitrogen oxides and other nitrogen compounds, metals and their compounds; dust; VOC and dioxins. Other pollutants are considered to be of negligible importance for the industry, partly because they are not present in the production process and partly because they are immediately neutralised (e.g. chlorine) or occur in very low concentrations. Emissions are to a large extent bound to dust (except cadmium, arsenic and mercury that can be present in the vapour phase).
Metals and their compounds and materials in suspension are the main pollutants emitted to water. The metals concerned are Zn, Cd, Pb, Hg, Se, Cu, Ni, As, Co and Cr. Other significant substances are fluorides, chlorides and sulphates. Wastewater from the gas cleaning of the smelter and fluid-bed roasting stages are the most important sources.
References:
Sutherland C. A., Milner E. F., Kerby R. C., Teindl H. and Melin A. (1997) Lead. In: Ullmann's encyclopedia of industrial chemistry (ed. Anonymous). 5th edition on CD-ROM Edition. Wiley & Sons, London.
IPPC (2001) Integrated Pollution Prevention and Control (IPPC); Reference Document on Best Available Techniques in the Non Ferrous Metals Industries. European Commission. Retrieved from http://www.jrc.es/pub/english.cgi/ 0/733169

## Reference product
- sulfuric acid: 1 kg; name sulfuric_acid; source IPPC 2002; CPC 34231: Chemical elements n.e.c.; inorganic acids except phosphoric, nitric and sulphonitric; inorganic oxygen compoun[…]; By-product classification allocatable product; CAS 7664-93-9
  Literature value.
  production volume 4.118e9 kg; = sulfuric_acid*RP_PV_1/lead
    Calculated from production volume of reference product using the relative outputs.
  property price 0.063 EUR2005; name sulfuric_acid_price_EUR2005
    Data related to the price of sulfuric acid were provided by Yara International (https://www.yara.com/)
  property carbon content 0
    carbon content on a dry matter basis (reserved; not for manual entry)
  property true value 0.07308; name sulfuric_acid_true_value
    allocation property applied in "true value" allocation // value calculated from revenue
  properties: dry mass 1 kg, wet mass 1 kg, water in wet mass 0 kg, carbon content, fossil 0, water content 0, carbon content, non-fossil 0, carbon allocation 0 kg
- lead: 0 kg; CPC 41441: Lead, unwrought; By-product classification allocatable product; CAS 7439-92-1
  Lead is a lustrous metal. When freshly cut, surfaces are bluish white but oxidise readily to the familiar dull grey colour. Lead has four naturally occurring isotopes: 208Pb (51 - 53 %), 206Pb (23.5 - 27 %), 207Pb (20.5 - 23 %) and 204Pb (1.35 - 1.5 %). Three of the natural isotopes are radioactive (208Pb, end product of thorium decay; 206Pb and 207Pb, from uranium series). A number of unstable radioactive isotopes of Pb also exist. Lead is a preferred shielding material against gamma rays and X-rays; if sufficiently pure, it does not become radioactive when used for shielding against neutron sources (Sutherland et al., 1997).
  Uses: Generally toxicity concerns and substitution by plastics and copper have reduced the market considerably. Main applications of lead are the following (Sutherland et al., 1997):
  - Batteries: The battery market is by far the largest end use of lead. Batteries for starting, lighting and ignition (SLI) represent the predominant use of lead. Traction batteries are used to power electric vehicles. Stationary batteries are used for standby and emergency power supply.
  - Pigments and Lead Compounds: After batteries, the next largest use of refined lead is in glass making, ceramic glazes, plastic stabilisers, and paints. The lead pigment market is now very small.
  - Semi finished Products: Rolled and extruded lead, mainly sheet and pipe, account for about 8 % of total lead use.
  - Cable Sheathing: A major area of lead use was in the protection of electrical and telecommunications cables, but this market has declined drastically due to substitution by aluminium and plastics.
  - Lead Alloys: Solders, type metal, bearing alloys containing lead still account for about 4 % of the lead consumption.
  - Gasoline Additives: In 1972 the use of tetraethyl lead for improving the octane rating of gasoline was nearly 400’000 t/a. Since then, this sector has declined by 70 % due to restrictions through environmental legislation.
  - Shot and Ammunition: Shot and ammunition account for about 2 % of lead consumption and represent a steady market.
  - Miscellaneous: Uses that do not fall into the above categories account for about 4 % of lead use, and include products featuring the high density of lead such as wheel weights, yacht keels, ornamental items, stained glass, and massive radiation shielding.
  Modelled, based on “ISIC 2420” - pdf-document on the dedicated talk page of ecoinvent (www.ecoinvent.org/documentation).
  See section: Regarding “primary lead production from concentrate, GLO 2005” dataset.
  production volume 3.55e9 kg; name RP_PV_1
    Primary production of lead in 2005 in the world, according to http://minerals.usgs.gov/minerals/pubs/commodity/lead/myb1-2007-lead.xls (T14)
  property price 0.744 EUR2005; name lead_price_EUR2005
    Temporary price data. Calculated as 90% of purchasers price based on: Source: ecoinvent v2 report 10-part IX, Tab 5.10 & 2.5
  property carbon content 0
    carbon content on a dry matter basis (reserved; not for manual entry)
  property true value 0.744; name lead_true_value
    allocation property applied in "true value" allocation // value calculated from revenue
  properties: carbon content, fossil 0, water content 0, wet mass 1 kg, carbon content, non-fossil 0, water in wet mass 0 kg, dry mass 1 kg, carbon allocation 0 kg

## By-products
- crust from Parkes process for lead production: 0 kg; name BP_amount_1; source IPPC 2001; CPC 39: Wastes or scraps; By-product classification allocatable product
  EcoSpold01Location=GLO
  Modelled, based on “ISIC 2420” - pdf-document on the dedicated talk page of ecoinvent (www.ecoinvent.org/documentation).
  See section: Regarding “primary lead production from concentrate, GLO 2005” dataset.
  Estimation: Parkes process crust contains 18% of silver.
  production volume 2.85938e7 kg; = BP_amount_1*RP_PV_1/lead
    Calculated relative to the lead output
  property carbon content, fossil 0
    The metals lead, zinc, cadmium, silver are contained in the parkes process crust of primary lead production (ecoinvent v2.2 report 20_part VIII)
  property carbon content, non-fossil 0
    (same comment as for crust from Parkes process for lead production)
  property price 1.59 EUR2005
    Temporary price data.The price of lead concentrate is 0.376 Euro (Temporary price data. Calculated as 90% of purchasers price based on: Lead content in concentrate 55%. Concentrate price per kg Pb 86.5% of refined Pb price (13.5% treatment charges according to CHR Metals Limited 2005: Dynamic cost curves. http://www.minecost.com/dynamic.pdf). 2004 lead price from USGS (2007) Mineral commodity summaries 2007. <http://minerals.usgs.gov/minerals/pubs/mcs/2007/mcs2007.pdf> [Accessed 25 May 2010]). When producing 1kg of lead concentrate, 0.008kg of crust from Parkes process for lead production is produced as a by-product. The economic allocation factor in eiv2.2 was 96.7% for lead concentrate and 3.3% for the crust from Parkes process for lead production. Following this assumption the price of the crust from Parkes process for lead production is calculated to be ((0.03292*1*0.376)/(0.008-0.03292*0.008)=) 1.589 Euro.
  property carbon content 0
    carbon content on a dry matter basis (reserved; not for manual entry)
  property true value 0.0128068; name BP_amount_1_true_value
    allocation property applied in "true value" allocation // value calculated from revenue
  properties: dry mass 1 kg, water content 0, water in wet mass 0 kg, wet mass 1 kg, carbon allocation 0 kg

## Inputs from technosphere
- oxygen, liquid: 0 kg; source Ayres R. U. 2002; pedigree (1,1,1,1,1)
  Modelled, based on “ISIC 2420” - pdf-document on the dedicated talk page of ecoinvent (www.ecoinvent.org/documentation).
  See section: Regarding “primary lead production from concentrate, GLO 2005” dataset.
  Further references:
  IPPC (2001) Integrated Pollution Prevention and Control (IPPC); Reference Document on Best Available Techniques in the Non Ferrous Metals Industries. European Commission. Retrieved from http://www.jrc.es/pub/english.cgi/ 0/733169 <http://www.jrc.es/pub/english.cgi/0/733169>
  EcoSpold01Location=RER
  properties: dry mass 1 kg, wet mass 1 kg
- heat, district or industrial, other than natural gas: 0.443903 MJ; source IPPC 2001; lognormal variance with pedigree 0.0606, pedigree (3,3,5,1,3)
  EcoSpold01Location=RER
  Modelled, based on “ISIC 2420” - pdf-document on the dedicated talk page of ecoinvent (www.ecoinvent.org/documentation).
  See section: Regarding “primary lead production from concentrate, GLO 2005” dataset.
  Calculated value: Total heat (other than natural gas) consumption stands for consumption of heavy fuel oil and coal.
  properties: heating value, net 1 MJ
- nitrogen, liquid: 0 kg; source IPPC 2001; pedigree (1,1,1,1,1)
  EcoSpold01Location=RER
  Modelled, based on “ISIC 2420” - pdf-document on the dedicated talk page of ecoinvent (www.ecoinvent.org/documentation).
  See section: Regarding “primary lead production from concentrate, GLO 2005” dataset.
  properties: wet mass 1 kg, dry mass 1 kg
- electricity, medium voltage: 0.0119876 kWh; source IPPC 2002; lognormal variance with pedigree 0.0706, pedigree (3,3,5,1,3)
  Estimation: No quantitative compilation of electricity production is available, therefore the UCTE production mix was chosen as approximation (year 2000: nuclear 15%; hydro 4%; fossil 81%).
  EcoSpold01Location=UCTE
- heat, district or industrial, natural gas: 0.0416274 MJ; source IPPC 2001; lognormal variance with pedigree 0.0606, pedigree (3,3,5,1,3)
  Modelled, based on “ISIC 2420” - pdf-document on the dedicated talk page of ecoinvent (www.ecoinvent.org/documentation).
  See section: Regarding “primary lead production from concentrate, GLO 2005” dataset.
  EcoSpold01Location=RER
  properties: heating value, net 1 MJ
- lead concentrate: 0.140842 kg; = lead*(1/0.55*(1/0.98)); lognormal variance with pedigree 0.0606, pedigree (3,3,5,1,3)
  Estimation from dataset author: Concentrate contains 55% lead (1.02 kg Pb, yield = 98%) and 0.08% silver (1.49 g Ag, yield = 97%).
  properties: dry mass 1 kg, concentration, lead 0.55 kg/kg, wet mass 1 kg
  note on concentration, lead: Calculated based on information from the zinc-lead mine operation dataset.
- lime, packed: 0 kg; source Ayres R. U. 2002; pedigree (1,1,1,1,1)
  EcoSpold01Location=CH
  Modelled, based on “ISIC 2420” - pdf-document on the dedicated talk page of ecoinvent (www.ecoinvent.org/documentation).
  See section: Regarding “primary lead production from concentrate, GLO 2005” dataset.
  Calculated value: Lime consumption accounts for consumption in the sinter oxidation / blast furnace reduction process, and for 50% of the fluxes of both smelting processes.
  properties: water content 0.00200401, carbon content, fossil 0.117492, wet mass 1 kg, dry mass 0.998 kg
  note on carbon content, fossil: Table 3.1, ecoinvent v2.2 report 7, part VII, pg 3. MW CaCO3=100, MW MgCO3=84
- iron ore concentrate: 0.004826 kg; source IPPC 2001; lognormal variance with pedigree 0.0606, pedigree (3,3,5,1,3)
  Modelled, based on “ISIC 2420” - pdf-document on the dedicated talk page of ecoinvent (www.ecoinvent.org/documentation).
  See section: Regarding “primary lead production from concentrate, GLO 2005” dataset.
  Proxy: "iron ore, beneficiated, 65%Fe" is used as a proxy for iron oxide minerals.
  EcoSpold01Location=GLO
  properties: dry mass 1 kg, wet mass 1 kg
- lead smelter slag: -0.0321708 kg; name BP_amount_2; source IPPC 2002; lognormal variance with pedigree 0.0606, pedigree (3,3,5,1,3)
  Proxy: "lead smelter slag, 0% water" is used as a proxy for Slag.
  EcoSpold01Location=GLO
  production volume 1.50442e9 kg; = BP_amount_2*RP_PV_1/lead
    Calculated from the production volume of lead in proportion to the respective output amounts.
  property price 0 EUR2005; name BP_amount_2_price_EUR2005
  properties: wet mass 1 kg, dry mass 1 kg
- silica sand: 0.0477059 kg; source Ayres R. U. 2002; lognormal variance with pedigree 0.0606, pedigree (3,3,5,1,3)
  EcoSpold01Location=DE
  Modelled, based on “ISIC 2420” - pdf-document on the dedicated talk page of ecoinvent (www.ecoinvent.org/documentation).
  See section: Regarding “primary lead production from concentrate, GLO 2005” dataset.
  Estimation: For both smelting processes, silica sand consumption accounts for 50% of total fluxes.
  properties: water content 0.010101, wet mass 1 kg, dry mass 0.99 kg
- oxygen, liquid: 0.00343377, 0.0125142 kg (2 entries); source Ayres R. U. 2002; lognormal variance with pedigree 0.0606, pedigree (3,3,5,1,3)
  (same comment as for oxygen, liquid)
- nitrogen, liquid: 0.000337724, 0.00123035 kg (2 entries); source IPPC 2001; lognormal variance with pedigree 0.0606, pedigree (3,3,5,1,3)
  (same comment as for nitrogen, liquid)
- lime, packed: 0.0167833, 0.000427304, 0.0335568 kg (3 entries); source Ayres R. U. 2002; lognormal variance with pedigree 0.0606, pedigree (3,3,5,1,3)
  (same comment as for lime, packed)

## Emissions to nature
- Sulfur dioxide [air, non-urban air or from high stacks]: 0.0025066 kg; source IPPC 2001; lognormal variance with pedigree 0.054, pedigree (3,4,5,1,1)
  Modelled, based on "ISIC 2420" - pdf-document on the dedicated talk page of ecoinvent (www.ecoinvent.org/documentation).
  See section: Regarding "primary lead production from concentrate, GLO 2005" dataset.
- BOD5, Biological Oxygen Demand [water, surface water]: 2.95055e-5 kg; source Weidema B. P. 2011; lognormal variance with pedigree 0.0987, pedigree (1,3,5,3,3)
  Calculated value.
  Further references:
  Xiao X., Songwen X., Xueyi G., Kelong H. and Ryoichi Y. (2003) LCA Case Study of Zinc Hydro and Pyro-Metallurgical Process in China. In: International Journal for Life Cycle Assessment, Online first, pp. 1 - 5.
  Uncertainty: values from Zn-production
- Mercury [water, surface water]: 3.2643e-9 kg; source Xiao X. 2003; lognormal variance with pedigree 0.7087, pedigree (1,3,5,3,3)
  Estimation: Values for a Chinese zinc smelter are used.
  Uncertainty: values from Zn-production
- Mercury [air, non-urban air or from high stacks]: 6.31073e-9 kg; source IPPC 2001; lognormal variance with pedigree 0.694, pedigree (3,4,5,1,1)
  Modelled, based on “ISIC 2420” - pdf-document on the dedicated talk page of ecoinvent (www.ecoinvent.org/documentation).
  See section: Regarding “primary lead production from concentrate, GLO 2005” dataset.
  Further references:
  EEA (ed.) (1999a) Primary Lead Production (B334-1). In: EMEP / CORINAIR Emission Inventory Guidebook. 3rd edition October 2002 Update Edition. European Enviornmental Agency, Online-Version under: http://reports.eea.eu.int/ technical_report_2001_3/en/en/tab_content_RLR <http://reports.eea.eu.int/technical_report_2001_3/en/en/tab_content_RLR>.
- TOC, Total Organic Carbon [water, surface water]: 1.73053e-5 kg; source Weidema B. P. 2011; lognormal variance with pedigree 0.0987, pedigree (1,3,5,3,3)
  (same comment as for BOD5, Biological Oxygen Demand)
- Particulates, < 2.5 um [air, non-urban air or from high stacks]: 1.25425e-5 kg; lognormal variance with pedigree 0.354, pedigree (3,4,5,1,1)
  (same comment as for Sulfur dioxide)
- Arsenic, ion [water, surface water]: 7.5914e-8 kg; source Xiao X. 2003; lognormal variance with pedigree 0.7087, pedigree (1,3,5,3,3)
  (same comment as for Mercury)
- Copper, ion [water, surface water]: 3.7957e-7 kg; source Xiao X. 2003; lognormal variance with pedigree 0.7087, pedigree (1,3,5,3,3)
  (same comment as for Mercury)
- Antimony [air, non-urban air or from high stacks]: 1.71778e-7 kg; source IPPC 2001; lognormal variance with pedigree 0.694, pedigree (3,4,5,1,1)
  (same comment as for Sulfur dioxide)
- Particulates, > 2.5 um, and < 10um [air, non-urban air or from high stacks]: 8.95861e-6 kg; lognormal variance with pedigree 0.054, pedigree (3,4,5,1,1)
  (same comment as for Sulfur dioxide)
- Cadmium, ion [water, surface water]: 1.97376e-7 kg; source Xiao X. 2003; lognormal variance with pedigree 0.7087, pedigree (1,3,5,3,3)
  (same comment as for Mercury)
- COD, Chemical Oxygen Demand [water, surface water]: 4.42578e-5 kg; source Xiao X. 2003; lognormal variance with pedigree 0.0987, pedigree (1,3,5,3,3)
  (same comment as for Mercury)
- Carbon dioxide, fossil [air, unspecified]: 0.0223377 kg; source IPPC 2001; lognormal variance with pedigree 0.1282, pedigree (4,2,5,3,4)
  Calculated value: Emissions result from lime addition. 0.44 kg of CO2 / kg of lime.
- Lead [air, non-urban air or from high stacks]: 2.36776e-5 kg; source IPPC 2001; lognormal variance with pedigree 0.694, pedigree (3,4,5,1,1)
  (same comment as for Mercury)
- Cadmium [air, non-urban air or from high stacks]: 2.47593e-7 kg; source IPPC 2001; lognormal variance with pedigree 0.094, pedigree (3,4,5,1,1)
  (same comment as for Mercury)
- Arsenic [air, non-urban air or from high stacks]: 3.08036e-7 kg; source IPPC 2001; lognormal variance with pedigree 0.694, pedigree (3,4,5,1,1)
  (same comment as for Mercury)
- DOC, Dissolved Organic Carbon [water, surface water]: 1.73053e-5 kg; source Weidema B. P. 2011; lognormal variance with pedigree 0.0987, pedigree (1,3,5,3,3)
  (same comment as for BOD5, Biological Oxygen Demand)
- Dioxins, measured as 2,3,7,8-tetrachlorodibenzo-p-dioxin [air, non-urban air or from high stacks]: 3.7957e-12 kg; source EC 2002; lognormal variance with pedigree 1.37, pedigree (1,1,5,1,1)
  Estimation: Dioxin emissions are approximated with the reported emission factor of 50 μg-TEQ / t secondary zinc production.
- Lead [water, surface water]: 1.36645e-6 kg; source Xiao X. 2003; lognormal variance with pedigree 0.7087, pedigree (1,3,5,3,3)
  (same comment as for Mercury)
- Particulates, > 10 um [air, non-urban air or from high stacks]: 3.58405e-6 kg; lognormal variance with pedigree 0.074, pedigree (3,4,5,1,1)
  (same comment as for Sulfur dioxide)

## Sampling procedure
literature

## Extrapolations
see Geography and Technology

## Review by Bo Weidema 2012-06-01
This dataset has been modified by renaming the output to "lead for stockpiling", reflecting that lead output depends on the amount of zinc produced, and any excess relative to demand is stockpiled.
Lead is, like Cd, toxic and will therefore be stockpiled if there is not enough demand. There are some differences in relative ore concentration of zinc and lead that allows some flexibility in reducing or increasing output of lead by shifting production between mines. In general, there is enough lead to meet the demand (because the demand for zinc is higher), but as long as the market is growing (it was falling in 1970-2000; at the moment it is growing due to more cars in China, e-bikes etc.) there is a need for virgin input, and no stockpiling. But as recycling is close to 100%, there will eventually be too much lead compared to zinc (which has more dissipative uses). So stockpiling (either at mine or after recovery) is the long-term marginal consequence of an increased demand, even if it does not happen today.

## Review by Roberto Dones 2007-11-07
passed

## Review by Roland Hischier 2011-12-01
Transfer of documentation done.

## Review by Bo Weidema 2012-09-28
obsolete resource allocation correction removed
