# polypropylene production, granulate

Dataset: EcoSpold 2, unit process
Geography: RoW
Time period: 2011-01-01 to 2021-12-31
Technology level: current
Classification: ISIC rev.4 ecoinvent: 2013:Manufacture of plastics and synthetic rubber in primary forms
Synonyms: PP
Scenario: Business-as-Usual
System model: Allocation, cut-off by classification
Generated by: Thomas Fröhlich
Published in: PlasticsEurope 2016
Database: ecoinvent
isCopyrightProtected: true
accessRestrictedTo: 1

## General comment
The dataset represents the production mix of commercial PP production technologies: slurry suspension polymerisation,Bulk suspension polymerisation, gas phase polymerisation using Ziegler-Natta and Metallocene catalysts
PP is usually manufactured with the gas phase or the suspension (slurry) process. Modern suspension processes, however, use liquid monomers instead of a solvent and are termed “bulk” process.
In the gas phase processes a fluidised bed of polymer particles and catalyst is maintained by a steady gaseous monomer feed from the bottom of the reactor. Polymer powder is continuously extracted at the bottom of the fluidised bed reactor. Unreacted monomer gas from the top is compressed and recycled to the reactor inlet. Catalyst, and co-catalyst if necessary, is also continuously fed to the reactor. Typically Ziegler-Natta catalysts are used for gas phase polymerisation where the catalyst is supported on inert silica particles so that the reaction takes place at the catalyst surface.
The suspension polymerisation can be described as precipitation process. The formation of the polymer takes place in a hydrocarbon diluent and under conditions, where the monomer is soluble in the solution. The precipitated polymer, however, is insoluble and forms a fine suspension. The polymer is then separated by centrifugation. The suspension process can be combined with a stirred tank reactor or a loop reactor. Different diluents can be chosen, like C5 to C9 hydrocarbons, hexane, or isobutane.
The bulk suspension process describes the slurry suspension process used for the production of PP where the monomer propylene is used as solvent instead of other hydrocarbons. Modern suspension processes for the production of PP use liquid monomers instead of gaseous.
After the reaction phase, most of the residual (unreacted) monomers (which are mostly present as gases) are separated from the polymer and are either recycled back into the process or flared of. Depending on the purity of the separated monomers, the gas can either be fed directly back into the production line or the monomers are returned to a purification unit. To limit the accumulation of impurities in the process, usually a small side-stream (purge) of the unreacted gas is sent back to the cracker or to a dedicated purification unit. After polymerisation, the polymer is usually fed di-rectly into a hot melt extruder, where additives can be added to the melted polymer if required. The polymer is then pelletised in an underwater pelletiser. The pelletised product is dried, blended where required and degassed.

## Included activities start
Acitivity starts with monomers and comonomers entering the polymerisation plant. Energy supply is included in terms of heat production inside the battery limits of the plant. Steam and electricity supply is outside the activity.

## Included activities end
Activity ends with polymer granulate leaving the factory.

## Allocation
The polyolefin production itself is regarded as a single-output process since only one polymer type is produced by one installation. All other products of this installation, e.g. monomers being recycled to the cracker or distillation, or hydrocarbons being used thermally, are treated as internal flows replacing the respective input materials (i.e. monomers or energy carriers). Hence, no allocation is needed for the polyolefin production process.

## Geography
Extrapolated from dataset with data for EU27 including Norway and Switzerland. The production volume and uncertainty have been adjusted accordingly.

## Time period
Data was collected for the year 2011, processed in 2013 and published in 2014

## Reference product
- polypropylene, granulate: 1 kg; CPC 347: Plastics in primary forms; By-product classification allocatable product; CAS 9003-07-0
  Reference Product
  production volume 4.67018e10 kg; name RP_PV
    According to Plastics Europe, Global production volume of plastics in 2013 was 299 Mt. It is assumed that the global production share (of the total plastic production) of polypropylene, granulate is equal to the respective European production share, which is 25 % of the total plastics production in Europe.
    Source: PlasticsEurope, 2013, Plastics - The Facts 2013, accessed online at: https://www.plasticseurope.org/en/resources/market-data on 11th of July 2018
  property price 0.76 EUR2005
    From UN data, http://data.un.org/Data.aspx?q=polypropylene&d=ComTrade&f=_l1Code%3a40%3bcmdCode%3a390210
  property heating value, net 32.78 MJ
    Value extracted from "treatment of waste polypropylene, open burning"
  property carbon content 0.857143
    carbon content on a dry matter basis (reserved; not for manual entry)
  properties: water content 0, wet mass 1 kg, dry mass 1 kg, carbon content, non-fossil 0, water in wet mass 0 kg, carbon content, fossil 0.857143, carbon allocation 0.857143 kg

## Inputs from technosphere
- compressed air, 600 kPa gauge: 0.0398991 m3; lognormal variance with pedigree 0.0212, pedigree (3,3,4,5,3)
  Weighted average of reported input
- chemical, organic: 0.00711046 kg; lognormal variance with pedigree 0.0212, pedigree (3,3,4,5,3)
  Sum input parameter covering partly confidential information on additives, solvents, catalysts. Weighted average of reported input materials.
  properties: carbon content, fossil 0.628, dry mass 1 kg, wet mass 1 kg, heating value, net 19.03 MJ
  note on carbon content, fossil: This dataset is an unweighted average of 20 organic substances (listed in Tab 88.1, ecoinvent v2.2 report 8, part II), being part of the top100 chemicals included in this database. The C-content has also been calculated as an unweighted average of the C content of the substances composing this dataset.
- nitrogen, liquid: 0.0526179 kg; lognormal variance with pedigree 0.0212, pedigree (3,3,4,5,3)
  Weighted average of reported input
  properties: dry mass 1 kg, wet mass 1 kg
- hazardous waste, for incineration: -0.00228419 kg; name BP_amount3; lognormal variance with pedigree 0.0212, pedigree (3,3,4,5,3)
  Weighted average of reported waste
  production volume 1.06676e8 kg; = BP_amount3*RP_PV
    calculated with production volume of reference product
  property price 0 EUR2005; name BP_amount3_price_EUR2005
  properties: water content 0.333333, heating value, net 17 MJ, carbon content, fossil 0.554667, wet mass 1 kg, dry mass 0.75 kg
  note on heating value, net: Value taken from the general comment of the treatment dataset.
  note on carbon content, fossil: Tab A.6, ecoinvent v2.2 report 13_I. C content has been calculated after data in the tables, and then referred to 1 kg DM
- electricity, medium voltage: 0 kWh; pedigree (1,1,1,1,1)
  Weighted average of reported input
- waste plastic, mixture: 0 kg; name BP_amount2; pedigree (1,1,1,1,1)
  Weighted average of reported waste
  production volume 0 kg
    calculated with production volume of reference product
  property price 0 EUR2005; name BP_amount2_price_EUR2005
  properties: carbon content, fossil 0.747344, heating value, net 30.79 MJ, wet mass 1 kg, dry mass 0.847 kg, water content 0.180638
- hydrogen, liquid: 0.00019513 kg; lognormal variance with pedigree 0.0212, pedigree (3,3,4,5,3)
  Weighted average of reported input
  properties: heating value, net 120.21 MJ, wet mass 1 kg, dry mass 1 kg
- solvent, organic: 0.000739521 kg; lognormal variance with pedigree 0.0212, pedigree (3,3,4,5,3)
  Weighted average of reported input
  properties: wet mass 1 kg, dry mass 1 kg, heating value, net 19.11 MJ, carbon content, fossil 0.63072
- propylene: 0 kg; pedigree (1,1,1,1,1)
  Weighted average of reported input
  properties: dry mass 1 kg, wet mass 1 kg, heating value, net 43.22 MJ, carbon content, fossil 0.857143
- wastewater, unpolluted: -0.0162738 m3; name BP_amount4; lognormal variance with pedigree 0.0212, pedigree (3,3,4,5,3)
  Weighted average of reported waste
  production volume 7.60014e8 m3; = BP_amount4*RP_PV
    calculated with production volume of reference product
  property price 0 EUR2005; name BP_amount4_price_EUR2005
  properties: water content 2962.17, dry mass 0.337476 kg, carbon content, non-fossil 0.00178991, carbon content, fossil 0.00178991, wet mass 1000 kg
  note on carbon content, fossil: Assumed to be like in tap water. Bicarbonate content is 2.93 mol/m3. CO2 content is 0.1 mol/m3 (ecoinvent v2.2 report 8, Tab 93.1).
- ethylene: 0 kg; pedigree (1,1,1,1,1)
  Weighted average of reported input
  properties: wet mass 1 kg, dry mass 1 kg, heating value, net 43.22 MJ, carbon content, fossil 0.857143
- titanium tetrachloride: 0.00109493 kg; lognormal variance with pedigree 0.0212, pedigree (3,3,4,5,3)
  Weighted average of reported input
  properties: wet mass 1 kg, dry mass 1 kg
- chemical, inorganic: 4.11111e-6 kg; lognormal variance with pedigree 0.0212, pedigree (3,3,4,5,3)
  (same comment as for chemical, organic)
  properties: dry mass 1 kg, carbon content, fossil 0.003, wet mass 1 kg
  note on carbon content, fossil: This dataset is an unweighted average of 20 inorganic substances (listed in Tab 88.1, ecoinvent v2.2 report 8, part II), being part of the top100 chemicals included in this database. The C-content has also been calculated as an unweighted average of the C content of the substances composing this dataset.
- wastewater, average: -0.000675952 m3; name BP_amount1; lognormal variance with pedigree 0.0606, pedigree (3,3,4,5,3)
  Weighted average of reported waste
  production volume 3.15682e7 m3; = BP_amount1*RP_PV
    calculated with production volume of reference product
  property price 0 EUR2005; name BP_amount1_price_EUR2005
  properties: wet mass 1000 kg, carbon content, non-fossil 0.194039, dry mass 0.346837 kg, water content 2882.2
  note on carbon content, non-fossil: 0.0673 kg TOC/m3 (Tab A.17, ecoinvent v2.2 report 13_I). TOC was considered as Total Carbon.
- heat, from steam, in chemical industry: 0.568567 MJ; lognormal variance with pedigree 0.0212, pedigree (3,3,4,5,3)
  Weighted average of reported input
  properties: heating value, net 1 MJ
- chemical factory, organics: 4e-10 unit; lognormal variance with pedigree 0.3118, pedigree (2,3,3,4,3)
  Calculated based on literature data published by the industry. For this activity, no information was readily available concerning infrastructure and land-use. Therefore, the infrastructure is estimated based on data from two chemical factories, the BASF site of Ludwigshafen and the chemical factory in Gendorf (which are both located in Germany), which produce a wide range of chemical substances. Based on this data, the following assumptions are made: the built area amounts to about 4.2 ha, the plant has an average output of 50"000 t/a and a lifespan of fifty years. The estimated infrastructure amount is therefore 4.00 E-10 units per kg of produced chemical.
  References:
  Althaus H.-J., Chudacoff M., Hischier R., Jungbluth N., Osses M. and Primas A. (2007) Life Cycle Inventories of Chemicals. ecoinvent report No. 8, v2.0. EMPA Dübendorf, Swiss Centre for Life Cycle Inventories, Dübendorf, CH.
  Gendorf (2000) Umwelterklärung 2000, Werk Gendorf. Werk Gendorf, Burgkirchen.
- natural gas, high pressure: 0 m3; pedigree (1,1,1,1,1)
  Weighted average of reported input
  properties: carbon content, fossil 0.695187, wet mass 1 kg, heating value, net 39 MJ, dry mass 1 kg
  note on heating value, net: Literature value, Source: United Nations Statistics Division (2018) International Recommendations for Energy Statistics (IRES). Available at: http://unstats.un.org/unsd/statcom/doc11/BG-IRES.pdf.
- electricity, medium voltage: 0.00443126, 0.000849725, 0.0142651, 0.207473, 0.0292435, 0.0952796 kWh (6 entries); lognormal variance with pedigree 0.0212, pedigree (3,3,4,5,3)
  Weighted average of reported input
- waste plastic, mixture: -0.000226432, -1.51293e-5, -1.14421e-6, -6.24895e-6, -2.5245e-6, -5.93396e-6, -0.00158515 kg (7 entries); lognormal variance with pedigree 0.0212, pedigree (3,3,4,5,3)
  Weighted average of reported waste
  production volume 8.60509e7 kg
- propylene: 0.0185615, 0.969103 kg (2 entries); lognormal variance with pedigree 0.0212, pedigree (3,3,4,5,3)
  Weighted average of reported input
- ethylene: 0.000860856, 0.0536535 kg (2 entries); lognormal variance with pedigree 0.0212, pedigree (3,3,4,5,3)
  Weighted average of reported input
- natural gas, high pressure: 6.78837e-5, 0.000101436, 0.000168862, 0.00137873, 0.00023274, 0.00316511 m3 (6 entries); lognormal variance with pedigree 0.0212, pedigree (3,3,4,5,3)
  Weighted average of reported input

## Inputs from nature
- Water, cooling, unspecified natural origin [natural resource, in water]: 0.0192503 m3; lognormal variance with pedigree 0.0212, pedigree (3,3,4,5,3)
  Weighted average of reported input
- Water, unspecified natural origin [natural resource, in water]: 0.000586742 m3; lognormal variance with pedigree 0.0212, pedigree (3,3,4,5,3)
  Weighted average of reported input

## Emissions to nature
- Chloride [water, unspecified]: 0.000145564 kg; lognormal variance with pedigree 0.0606, pedigree (3,3,4,5,3)
  Weighted average of reported emissions
- Sulfate [water, unspecified]: 0.000147119 kg; lognormal variance with pedigree 0.0606, pedigree (3,3,4,5,3)
  Weighted average of reported emissions
- Nitrogen, organic bound [water, unspecified]: 3.13276e-6 kg; lognormal variance with pedigree 0.0606, pedigree (3,3,4,5,3)
  Weighted average of reported emissions
- Copper, ion [water, unspecified]: 8.11439e-9 kg; lognormal variance with pedigree 0.6706, pedigree (3,3,4,5,3)
  Weighted average of reported emissions
- Aluminium [water, unspecified]: 1.09353e-7 kg; lognormal variance with pedigree 0.6706, pedigree (3,3,4,5,3)
  Weighted average of reported emissions
- Sulfur dioxide [air, unspecified]: 6.34431e-8 kg; lognormal variance with pedigree 0.0212, pedigree (3,3,4,5,3)
  Weighted average of reported emissions
- Hydrogen [air, unspecified]: 5.73076e-8 kg; lognormal variance with pedigree 0.0606, pedigree (3,3,4,5,3)
  Weighted average of reported emissions
- Dinitrogen monoxide [air, unspecified]: 8.27339e-7 kg; lognormal variance with pedigree 0.0606, pedigree (3,3,4,5,3)
  Weighted average of reported emissions
- Nickel, ion [water, unspecified]: 1.72288e-9 kg; lognormal variance with pedigree 0.6706, pedigree (3,3,4,5,3)
  Weighted average of reported emissions
- Particulates, > 10 um [air, unspecified]: 6.61805e-6 kg; lognormal variance with pedigree 0.0606, pedigree (3,3,4,5,3)
  Weighted average of reported emissions
- Propene [air, unspecified]: 3.82619e-5 kg; lognormal variance with pedigree 0.1406, pedigree (3,3,4,5,3)
  Weighted average of reported emissions
- Mercury [water, unspecified]: 1.42324e-11 kg; lognormal variance with pedigree 0.6706, pedigree (3,3,4,5,3)
  Weighted average of reported emissions
- Nitrogen oxides [air, unspecified]: 2.00236e-5 kg; lognormal variance with pedigree 0.0606, pedigree (3,3,4,5,3)
  Weighted average of reported emissions
- Suspended solids, unspecified [water, unspecified]: 1.04372e-5 kg; lognormal variance with pedigree 0.0606, pedigree (3,3,4,5,3)
  Weighted average of reported emissions
- Sulfur hexafluoride [air, unspecified]: 5.81147e-10 kg; lognormal variance with pedigree 0.0606, pedigree (3,3,4,5,3)
  Weighted average of reported emissions
- Phosphorus [water, unspecified]: 1.13894e-6 kg; lognormal variance with pedigree 0.0606, pedigree (3,3,4,5,3)
  Weighted average of reported emissions
- Carbon dioxide, fossil [air, unspecified]: 0.0415733 kg; lognormal variance with pedigree 0.0212, pedigree (3,3,4,5,3)
  Weighted average of reported emissions
- Arsenic, ion [water, unspecified]: 1.51813e-9 kg; lognormal variance with pedigree 0.6706, pedigree (3,3,4,5,3)
  Weighted average of reported emissions
- Methane, fossil [air, unspecified]: 3.20543e-6 kg; lognormal variance with pedigree 0.0606, pedigree (3,3,4,5,3)
  Weighted average of reported emissions
- Particulates, > 2.5 um, and < 10um [air, unspecified]: 2.77433e-6 kg; lognormal variance with pedigree 0.1406, pedigree (3,3,4,5,3)
  Weighted average of reported emissions
- Fluoride [water, unspecified]: 1.23681e-7 kg; lognormal variance with pedigree 0.0606, pedigree (3,3,4,5,3)
  Weighted average of reported emissions
- Zinc, ion [water, unspecified]: 1.11129e-7 kg; lognormal variance with pedigree 0.6706, pedigree (3,3,4,5,3)
  Weighted average of reported emissions
- Water [air, unspecified]: 0.00288732 m3; lognormal variance with pedigree 0.0212, pedigree (3,3,4,5,3)
  Calculated to close water balance
- Lead [water, unspecified]: 2.30091e-9 kg; lognormal variance with pedigree 0.6706, pedigree (3,3,4,5,3)
  Weighted average of reported emissions
- Cadmium, ion [water, unspecified]: 1.48729e-10 kg; lognormal variance with pedigree 0.6706, pedigree (3,3,4,5,3)
  Weighted average of reported emissions
- NMVOC, non-methane volatile organic compounds, unspecified origin [air, unspecified]: 0.000268994 kg; lognormal variance with pedigree 0.0606, pedigree (3,3,4,5,3)
  Weighted average of reported emissions
- Carbon monoxide, fossil [air, unspecified]: 1.58699e-5 kg; lognormal variance with pedigree 0.6706, pedigree (3,3,4,5,3)
  Weighted average of reported emissions
- Ethene [air, unspecified]: 7.26111e-7 kg; lognormal variance with pedigree 0.1406, pedigree (3,3,4,5,3)
  Weighted average of reported emissions
- Ammonium, ion [water, unspecified]: 5.63628e-7 kg; lognormal variance with pedigree 0.0606, pedigree (3,3,4,5,3)
  Weighted average of reported emissions
- Nitrate [water, unspecified]: 7.39138e-7 kg; lognormal variance with pedigree 0.0606, pedigree (3,3,4,5,3)
  Weighted average of reported emissions
- AOX, Adsorbable Organic Halogen as Cl [water, unspecified]: 6.74897e-8 kg; lognormal variance with pedigree 0.0606, pedigree (3,3,4,5,3)
  Weighted average of reported emissions
- Chromium, ion [water, unspecified]: 1.17778e-8 kg; lognormal variance with pedigree 0.6706, pedigree (3,3,4,5,3)
  Weighted average of reported emissions

## Sampling procedure
Extrapolated from European data. Questionnaires sent out to all production units in Europe operated by PlasticEurope member companies.

## Extrapolations
This dataset has been created as a copy of the original dataset covering the geography RER, i.e., Europe. Annual production volume(s) and uncertainty have been adjusted accordingly. It is important to note that original RER dataset represents the average production mix, composed of several different processes/technologies, in Europe in the year of reference. It might not reflect the actual global production mix and should hence only be used as a proxy.
