# copper smelting facility construction

Dataset: EcoSpold 2, unit process
Geography: RoW
Time period: 2000-01-01 to 2021-12-31
Technology level: current
Classification: EcoSpold01Categories: metals/extraction
Classification: ISIC rev.4 ecoinvent: 4100:Construction of buildings
Synonyms: Kaldo Converter
Tags: ConvertedDataset
Scenario: Business-as-Usual
System model: Allocation, cut-off by classification
Generated by: Wolfram Scharnhorst
Published in: Classen M. 2009
Database: ecoinvent
isCopyrightProtected: true
accessRestrictedTo: 1

## General comment
Production of Kaldo converter and converter aisle: chromium steel, refractory bricks and concrete foundation. Building hall houses the facilities, covering 1200m2. Service lifetime 50 year. Service lifetime 50 year, 250'000 t of metals produced per year.
[This dataset was already contained in the ecoinvent database version 2. It was not individually updated during the transfer to ecoinvent version 3. Life Cycle Impact Assessment results may still have changed, as they are affected by changes in the supply chain, i.e. in other datasets. This dataset was generated following the ecoinvent quality guidelines for version 2. It may have been subject to central changes described in the ecoinvent version 3 change report (http://www.ecoinvent.org/database/ecoinvent-version-3/reports-of-changes/), and the results of the central updates were reviewed extensively. The changes added e.g. consistent water flows and other information throughout the database. The documentation of this dataset can be found in the ecoinvent reports of version 2, which are still available via the ecoinvent website. The change report linked above covers all central changes that were made during the conversion process.]

## Included activities end
Construction of facilities and housing, and their disposal. No transports and construction work considered.

## Geography
Data describes a Swedish plant that is singular in the region and ranges worldwide among the big producer. It may be taken as approximation for the global situation

## Technology
Due to high temperature chromium steel and refractory materials are used. Kaldo converter and converter aisle considered.

## Reference product
- copper smelting facility: 1 unit; CPC 53269: Other constructions for manufacturing; By-product classification allocatable product
  production volume 3.96757 unit
    This is a placeholder value that does not reflect real-world production volumes. This dataset does not currently require a real-world production volume to work in the database framework, and no actual data were collected yet. This has no negative effect on the results of the ecoinvent database.
  property price 4.5987e6 EUR2005
    Upscale from EU 27 to the world by PPP (0.8458 in 2003 and 0,8426 in 2004)

## Inputs from technosphere
- concrete, normal: 0 m3; pedigree (1,1,1,1,1)
  properties: dry mass 2190 kg, wet mass 2380 kg, water content 0.086758
- waste concrete, not reinforced: 0 kg; pedigree (1,1,1,1,1)
  production volume 0 kg
    Calculated from the production volume of blister-copper conversion facility in proportion to the respective output amounts.
  properties: dry mass 1 kg, wet mass 1 kg
- section bar rolling, steel: 54198 kg; lognormal variance with pedigree 0.0426, pedigree (2,1,5,5,1)
- refractory, basic, packed: 3.3214e6 kg; lognormal variance with pedigree 0.0426, pedigree (2,1,5,5,1)
  properties: dry mass 1 kg, wet mass 1 kg
- concrete, medium strength: 0 m3; pedigree (1,1,1,1,1)
  properties: wet mass 2380 kg, dry mass 2190 kg, water content 0.086758
- building, hall, steel construction: 1201 m2; lognormal variance with pedigree 0.06, pedigree (4,1,5,5,1)
- drawing of pipe, steel: 7438.7 kg; lognormal variance with pedigree 0.0426, pedigree (2,1,5,5,1)
- nickel smelter slag: -3.3214e6 kg; lognormal variance with pedigree 0.0426, pedigree (2,1,5,5,1)
  production volume 9.9642e6 kg
    (same comment as for waste concrete, not reinforced)
  properties: carbon content, fossil 0.00345, wet mass 1 kg, dry mass 1 kg
- steel, chromium steel 18/8, hot rolled: 61637 kg; lognormal variance with pedigree 0.0426, pedigree (2,1,5,5,1)
  properties: carbon content, fossil 0.0008, dry mass 1 kg, wet mass 1 kg
  note on carbon content, fossil: Stainless steel model is the grade 304 steel (18/8 stainless, 18% chromium 8% nickel; max. 0.08% C)
- concrete, normal: 19.2513, 0.579989, 2.00596, 16.2397, 9.13483, 38.6834, 1.30477 m3 (7 entries); lognormal variance with pedigree 0.044, pedigree (3,1,5,5,1)
- waste concrete, not reinforced: -0.0970377, -130.703 kg (2 entries); lognormal variance with pedigree 0.044, pedigree (3,1,5,5,1)
  production volume 392.4 kg
- concrete, medium strength: 10.6012, 3.87934, 15.037, 11.0515, 3.03104 m3 (5 entries); lognormal variance with pedigree 0.044, pedigree (3,1,5,5,1)

## Inputs from nature
- Transformation, to industrial area [natural resource, land]: 1201 m2; lognormal variance with pedigree 0.162, pedigree (1,1,5,5,1)
- Transformation, from unspecified [natural resource, land]: 1201 m2; lognormal variance with pedigree 0.162, pedigree (1,1,5,5,1)
- Occupation, industrial area [natural resource, land]: 60050 m2*year; lognormal variance with pedigree 0.084, pedigree (3,1,5,5,1)

## Sampling procedure
estimation

## Extrapolations
see Geography and Technology This dataset has been copied from an original dataset covering the geography SE. The uncertainty has been adjusted accordingly.

## Review by Roberto Dones 2007-08-22
Passed
