# shale brick production

Dataset: EcoSpold 2, unit process
Geography: CA-QC
Time period: 2012-01-01 to 2021-12-31
Technology level: current
Classification: ISIC rev.4 ecoinvent: 2392:Manufacture of clay building materials
Classification: EcoSpold01Categories: construction materials/bricks
Tags: single enterprise data
Scenario: Business-as-Usual
System model: Allocation, cut-off by classification
Share of production covered: 100 %
Generated by: Catherine Reid
Database: ecoinvent
isCopyrightProtected: true
accessRestrictedTo: 1

## General comment
This dataset represents the production of brick from shale in Quebec in 2012.
Specific data were collected from the only producer of brick in Quebec on the basis of shale extracted annually. The amount of brick produce annually was calculated by data provider in order to report the specific data by kg of brick produce. The annual production volume of the region is of 66'957 tons.

This company also provided data for the datasets ''shale quarry operation, QC, 2012'' and ''brick production facility construction, QC, 2029''.

## Included activities start
This activity starts from the reception of shale.

## Included activities end
The activity ends with the storage of brick.

The dataset includes first ginding process, wet process (includes second ginding, mixing and plastifying), storage, forming (extruding molding method) and cutting, drying, firing, loading and storage.

This dataset doesn't include :
1) Packaging of the brick (should be included in the market) : wood inserted into the pallets of bricks (7.094E-04 kg/kg), high density polyethylene (tethers for pallets) (4.77E-04 kg/kg)
2) Some of the waste (recycling) : tatters and absorbant contaminated with oil and grease (1.531E-05 kg/kg), hydraulic hoses (7.47E-07 kg/kg), batteries (3.062E-06 kg/kg), neons (5.041E-05 linear feet/kg), metals (3.425E-04 kg/kg), plastic bags containing barium (1.355E-04 kg/kg), paper bags/plastics (1.47E-04 l/kg).

## Geography
Inputs and outputs relate to Quebec production.

## Technology
Current technology

## Time period
The dataset represents the activity in 2012

## Parameters
- fraction, process water, to air: 1 dimensionless; name fraction_water_air; lognormal variance with pedigree 0.0006, pedigree (1,1,1,1,1)
  Measured Data. All water consumed is evaporated.

## Reference product
- shale brick: 1 kg; name ref_prod; CPC 373: Refractory products and structural non-refractory clay products; By-product classification allocatable product
  production volume 6.6957e7 kg; name AnnualProduction
    Calculated value based on sales.
  property price 0.134 EUR2005; name ref_prod_price_EUR2005
    Calculated based on consumer prices. The size of one shale brick is estimated to be 1m*1m*0.03m resulting in 0.03m3 of volume. The density is estimated to be 2500 kg/m3. The price per 1m2 of the shale brick is approximatelly 10 EUR. The calculated price for 1kg of shale brick is than 0.134 EUR.
  property carbon content, fossil 0
    fossil carbon content on a dry matter basis.
    Made mainly from shale, sand and other aditives.
  property carbon content, non-fossil 0
    biogene carbon content on a dry matter basis.
    Made mainly from shale, sand and other aditives.
  property carbon content 0
    carbon content on a dry matter basis (reserved; not for manual entry)
  properties: wet mass 1 kg, water in wet mass 0 kg, dry mass 1 kg, water content 0, carbon allocation 0 kg

## Inputs from technosphere
- tap water: 0.001487 kg; name water_input; lognormal variance with pedigree 0.0092, pedigree (2,1,4,1,1)
  Calculated Value based on the amount reported by kg of shale extracted. Assumption : water is supplied from public water supply.
  EcoSpold01Location=RER
  Uncertainty: ;
  properties: wet mass 1 kg, dry mass 0.000337476 kg, carbon content, fossil 0.00178991, water content 2962.17
  note on carbon content, fossil: Bicarbonate content is 2.93 mol/m3. CO2 content is 0.1 mol/m3 (ecoinvent v2.2 report 8, Tab 93.1).
- waste mineral oil: -3.868e-5 kg; name Waste_mineral_oil; lognormal variance with pedigree 0.0092, pedigree (2,1,4,1,1)
  Calculated Value based on the amount reported by kg of shale extracted.
  production volume 2589.9 kg; = AnnualProduction * Waste_mineral_oil / ref_prod
    Calculated from production volume of reference product using the relative outputs.
  property price 0 EUR2005; name Waste_mineral_oil_price_EUR2005
  properties: dry mass 0.9 kg, carbon content, fossil 0.864444, water content 0.111111, wet mass 1 kg, heating value, net 34.7 MJ
  note on carbon content, fossil: Literature value.Tab A.6, ecoinvent v2.2 report 13_I. C content has been calculated after data in the tables, and then referred to 1 kg DM
  note on heating value, net: Value taken from the general comment of the treatment dataset.
- bentonite: 0.001564 kg; lognormal variance with pedigree 0.0092, pedigree (2,1,4,1,1)
  Calculated Value based on the amount reported by kg of shale extracted.
  properties: wet mass 1 kg, dry mass 1 kg
- diesel, burned in building machine: 0.031023 MJ; = (fuel_input_diesel*density_diesel_buildingmachine*UnitConversion(1, 'm3', 'l'))*Net_heat_value_diesel_buildingmachine*42.8; lognormal variance with pedigree 0.008, pedigree (1,1,4,1,1)
  Calculated Value. See parameters exchanges properties for details.
  EcoSpold01Location=GLO
  Uncertainty: Calculated variable. Uncertainty will be determined from propagation of uncertainty factors of underlying variables.
  property fuel input in physical units, m3 8.629e-7 m3; name fuel_input_diesel
  property density 0.84 kg/l; name density_diesel_buildingmachine
  property heating value, net 1 MJ; name Net_heat_value_diesel_buildingmachine
  note on fuel input in physical units, m3: Calculated Value based on the amount reported by kg of shale extracted.
  note on density: Literature value. Value Taken from Table 5.1 of report "Overview and methodology, Data quality guideline for the ecoinvent database version 3" (ecoinvent report No. 1 (v3), 2011)
  note on heating value, net: Literature value.Net (lower) heating (calorific) value. Value Taken from Table 5.1 of report "Overview and methodology, Data quality guideline for the ecoinvent database version 3" (ecoinvent report No. 1 (v3), 2011)
- solvent, organic: 1.1472e-5 kg; = (Spent_solvent_mixture*-1); lognormal variance with pedigree 0.0486, pedigree (5,1,4,1,1)
  Estimation based on the amount of waste solvent.
  properties: heating value, net 19.11 MJ, wet mass 1 kg, dry mass 1 kg, carbon content, fossil 0.63072
- chemical, inorganic: 7.654e-5 kg; lognormal variance with pedigree 0.0092, pedigree (2,1,4,1,1)
  Calculated Value based on the amount reported by kg of shale extracted.
  Reported as grey pigment (proxy).
  properties: dry mass 1 kg, wet mass 1 kg, carbon content, fossil 0.003
  note on carbon content, fossil: This dataset is an unweighted average of 20 inorganic substances (listed in Tab 88.1, ecoinvent v2.2 report 8, part II), being part of the top100 chemicals included in this database. The C-content has also been calculated as an unweighted average of the C content of the substances composing this dataset.
- sheet rolling, chromium steel: 1.57e-7 kg; lognormal variance with pedigree 0.2106, pedigree (5,5,5,5,5)
  EcoSpold01Location=RER
  Estimated value. Estimation based on brick production, GLO dataset (ecoinvent v3). Forming of mould used for extruding (forming) the brick.
  Uncertainty: Proxy. The uncertainty has been maximized.
- spent solvent mixture: -1.1472e-5 kg; name Spent_solvent_mixture; = (Spent_solvent_mixture_output*Spent_solvent_mixture_density)*-1; lognormal variance with pedigree 0.008, pedigree (1,1,4,1,1)
  Calculated value based on measured value and estimation. See parameters exchanges properties for details.
  Uncertainty: Calculated variable. Uncertainty will be determined from propagation of uncertainty factors of underlying variables.
  production volume 768.131 kg; = AnnualProduction * Spent_solvent_mixture / ref_prod
    Calculated from production volume of reference product using the relative outputs.
  property density 0.8 kg/l; name Spent_solvent_mixture_density
  property price 0 EUR2005; name Spent_solvent_mixture_price_EUR2005
  property input 1.434e-5 l; name Spent_solvent_mixture_output
  properties: wet mass 1 kg, heating value, net 21.7 MJ, carbon content, fossil 0.571257, water content 0.197605, dry mass 0.835 kg
  note on carbon content, fossil: Literature value.Tab A.7, ecoinvent v2.2 report 13_I. C content has been calculated after data in the tables, and then referred to 1 kg DM
- steel, low-alloyed: 1.57e-7 kg; lognormal variance with pedigree 0.2106, pedigree (5,5,5,5,5)
  Estimation based on the dataset brick production, GLO. Mould used for extruding (forming) the brick.
  Uncertainty: Proxy. The uncertainty has been maximized.
  properties: wet mass 1 kg, carbon content, fossil 0.005, dry mass 1 kg
- sand: 0.01158 kg; lognormal variance with pedigree 0.0092, pedigree (2,1,4,1,1)
  Calculated Value based on the amount reported by kg of shale extracted.
  EcoSpold01Location=CH
  Uncertainty: ;
  properties: wet mass 1 kg, dry mass 1 kg
- shale: 1.046 kg; lognormal variance with pedigree 0.0092, pedigree (2,1,4,1,1)
  Calculated Value. The amount consumed correspond to the clay used as feedstock (99,91%) and for additives were clay is used as a proxy (0,0878%) (Gold and red art clay, Brikote).
  Uncertainty: ;
  properties: wet mass 1 kg, water content 0.036269, dry mass 0.965 kg
- heat, district or industrial, natural gas: 2.18227 MJ; = fuel_input_naturalgas*Net_heat_value_naturalgas*36.3/fuel_use_naturalgas; lognormal variance with pedigree 0.008, pedigree (1,1,4,1,1)
  Calculated value based on reported fuel input (in m³), the Net Heating Value of the fuel and assumed efficiency (1/Fuel_use).
  See parameters exchanges properties for details.
  Uncertainty: Calculated variable. Uncertainty will be determined from propagation of uncertainty factors of underlying variables.
  property Corresponding fuel use 1.04645 MJ; name fuel_use_naturalgas; = (0.98039+1.0417+1.0526+1.1111)/4
  property fuel input in physical units, m3 0.06291 m3; name fuel_input_naturalgas
  property heating value, net 1 MJ; name Net_heat_value_naturalgas
  note on Corresponding fuel use: Calculated value. Lower heating value of the fuel input related to the heat/electricity output. Calculated with corresponding heat production datasets.
  note on fuel input in physical units, m3: Calculated Value based on the amount reported by kg of shale extracted. Fuel input reported in m³.
- lime, packed: 0.00275 kg; lognormal variance with pedigree 0.0092, pedigree (2,1,4,1,1)
  EcoSpold01Location=CH
  Calculated Value based on the amount reported by kg of shale extracted. Reported as barium carbonate (proxy).
  Uncertainty: ;
  properties: carbon content, fossil 0.117492, wet mass 1 kg, dry mass 0.998 kg, water content 0.00200401
  note on carbon content, fossil: Table 3.1, ecoinvent v2.2 report 7, part VII, pg 3. MW CaCO3=100, MW MgCO3=84
- chemical, organic: 0.0005689 kg; lognormal variance with pedigree 0.0092, pedigree (2,1,4,1,1)
  Calculated Value based on the amount reported by kg of shale extracted. Stands for sodium lignosulfonate.
  properties: dry mass 1 kg, heating value, net 19.03 MJ, wet mass 1 kg, carbon content, fossil 0.628
  note on carbon content, fossil: This dataset is an unweighted average of 20 organic substances (listed in Tab 88.1, ecoinvent v2.2 report 8, part II), being part of the top100 chemicals included in this database. The C-content has also been calculated as an unweighted average of the C content of the substances composing this dataset.
- propane, burned in building machine: 0.00241901 MJ; = (fuel_input_propane*density_propane*1000)*Net_heat_value_propane*46.46; lognormal variance with pedigree 0.008, pedigree (1,1,4,1,1)
  Calculated Value. See exchanges properties for details.
  Uncertainty: Calculated variable. Uncertainty will be determined from propagation of uncertainty factors of underlying variables.
  property heating value, net 1 MJ; name Net_heat_value_propane
  property density 0.515 kg/l; name density_propane
  property fuel input in physical units, m3 1.011e-7 m3; name fuel_input_propane
  note on heating value, net: Literature value. Net (lower) heating (calorific) value. Taken directly from ecoinvent v3.0 dataset "propane, burned in building machine, GLO 2013".
  note on density: Literature value. Density for liquid propane (at 15°C), taken from http://www.cfbp.fr/proprietes-des-gpl/caracteristiques-generales-et-physico-chimiques-n305.
- lubricating oil: 8.435e-5 kg; lognormal variance with pedigree 0.0092, pedigree (2,1,4,1,1)
  EcoSpold01Location=RER
  Calculated Value based on the amount reported by kg of shale extracted.
  Uncertainty: ;
  properties: carbon content, fossil 0.75, dry mass 1 kg, wet mass 1 kg, heating value, net 40.2 MJ
  note on carbon content, fossil: Lubricating oil is produced from diesel. C-content/dry mass of fats and oils considered 75%, from: ecoinvent v2.2 report, n 15a, pg 40
  note on heating value, net: Literature value, Source: IPCC 2006, 2006 IPCC Guidelines for National Greenhouse Gas Inventories, Prepared by the National Greenhouse Gas Inventories Programme, Eggleston H.S., Buendia L., Miwa K., Ngara T. and Tanabe K. (eds). Published: IGES, Japan
- brick production facility: 1.99133e-10 unit; = 1/lifetime_capacity; lognormal variance with pedigree 0.008, pedigree (1,1,4,1,1)
  Calculated value based on the real capacity of the facility. See exchanges properties for details.
  Uncertainty: Calculated variable. Uncertainty will be determined from propagation of uncertainty factors of underlying variables.
  property lifetime 75 year; name lifetime
  property lifetime capacity [kg] 5.02178e9 kg; name lifetime_capacity; = capacity*lifetime
  property annual production 6.6957e7 kg; name capacity
  note on lifetime: Estimated value based on the dataset ''brick production facility construction, Quebec''.
  note on annual production: Measured value based on sales of brick for the dataset brick shale production, Québec (source: questionnaire). Represent the real capacity of the facility.
- kaolin: 1.274e-5 kg; lognormal variance with pedigree 0.0092, pedigree (2,1,4,1,1)
  Calculated Value based on the amount reported by kg of shale extracted.
  Reported as ball clay (proxy).
  properties: dry mass 1 kg, wet mass 1 kg
- electricity, medium voltage: 0.08598 kWh; lognormal variance with pedigree 0.0092, pedigree (2,1,4,1,1)
  Calculated Value based on the amount reported by kg of shale extracted.
  EcoSpold01Location=UCTE
  Uncertainty: ;
- frit, for ceramic tile: 0.000257 kg; lognormal variance with pedigree 0.0092, pedigree (2,1,4,1,1)
  Calculated Value based on the amount reported by kg of shale extracted.
- manganese: 0.002456 kg; lognormal variance with pedigree 0.0092, pedigree (2,1,4,1,1)
  Calculated Value based on the amount reported by kg of shale extracted.
  properties: wet mass 1 kg, dry mass 1 kg

## Emissions to nature
- Water [air, unspecified]: 1.487e-6 m3; = (water_input*fraction_water_air/density_water)*UnitConversion(1, 'l', 'm3'); lognormal variance with pedigree 0.008, pedigree (1,1,4,1,1)
  Calculated value based on measured value and expert opinion. See comments in the parametres' comment field.
  Uncertainty: Calculated variable. Uncertainty will be determined from propagation of uncertainty factors of underlying variables.
  property density 1 kg/l; name density_water

## Sampling procedure
The data relates to only productor of brick in Quebec.

## Extrapolations
This dataset has been extrapolated from year 2012 to the year of the calculation (2021). The uncertainty has been adjusted accordingly.

## Review by Emilia Moreno Ruiz 2015-09-22
relevant direct links added
