# treatment of copper in car shredder residue, municipal incineration with fly ash extraction

Dataset: EcoSpold 2, unit process
Geography: CH
Time period: 2006-01-01 to 2021-12-31
Technology level: current
Classification: ISIC rev.4 ecoinvent: 3821:Treatment and disposal of non-hazardous waste
Synonyms: municipal waste incineration; Kehrichtverbrennung; Siedlungsabfallverbrennung
Scenario: Business-as-Usual
System model: Allocation, cut-off by classification
Share of production covered: 100 %
Generated by: Gabor Doka
Published in: Doka G. 2015
Database: ecoinvent
isCopyrightProtected: true
accessRestrictedTo: 1

## General comment
This dataset represents the activity of waste disposal of copper in car shredder residue in a municipal solid waste incinerator (MSWI) // Recommended use of this dataset: For disposal of rather fine or dusty copper, which goes to incineration as part of Automotive Shredder Residue (ASR). Due to fine grain size of the particles, 50% burnability is assumed, therefore not suited for less fine copper parts in waste. Pure, isolated copper fractions will not be disposed in incinerators, but rather go to recycling. // Inventoried waste contains 50% Cu in ASR burnable; 50% Cu in ASR inert; . // Waste composition (wet, in ppm): H2O n.a.; O n.a.; H n.a.; C n.a.; S 0.0000028372; N n.a.; P n.a.; B n.a.; Cl n.a.; Br n.a.; F n.a.; I n.a.; Ag 489.05; As n.a.; Ba n.a.; Cd n.a.; Co n.a.; Cr 2.7346; Cu 924870; Hg n.a.; Mn 1483.2; Mo n.a.; Ni 4062.3; Pb 0.0044823; Sb 3438.1; Se n.a.; Sn 8733.9; V 0.00002178; Zn 1075.5; Be n.a.; Sc n.a.; Sr n.a.; Ti n.a.; Tl n.a.; W n.a.; Si 6428.2; Fe 9181.1; Ca n.a.; Al 40233; K n.a.; Mg n.a.; Na n.a.; // Share of carbon in waste that is biogenic 60.4%. // Share of metals in waste not oxidised and bulk-recyclable (exclude very small or thin parts) Iron: 0%; Alu: 0%; Copper: 50%. // Recovery of metal scrap from bottom ash to recycling: 0g iron scrap, 0g aluminium scrap, 135.4g copper scrap. From this waste, the FLUWA process in the technology mix recovers 0.000393kg (DM) of a hydroxide sludge to be recycled in zinc furnaces. // Ultimately one kg of this waste produces 1.218 kg of bottom ash (can include some washed ash) and 0.04218 kg of residues, which are landfilled (technology mix). Additional solidification of residues with 0.01687 kg of cement.Net energy production: 0MJ/kg electric energy and 0MJ/kg thermal energy. //

## Included activities start
waste incineration from waste reception gate and delivery into waste bunker at incinerator plant site (without transports to the incinerator)

## Included activities end
Waste-specific short-term emissions to water from leachate. Long-term emissions from landfill to ground water.

## Geography
Specific to the technology mix encountered in Switzerland in 2012.

## Technology
average Swiss MSWI plants in 2010 (grate incinerators) with electrostatic precipitator for fly ash (ESP), wet flue gas scrubber and 25% SNCR , 42.77% SCR-high dust , 32.68% SCR-low dust -DeNOx facilities and 0% without Denox (weighted according to mass of burnt waste, representing Swiss average). Efficiency of iron scrap separation from slag : 58%. Efficiency of non-ferrous scrap separation from slag : 31%. The technology mix for this dataset includes a filter ash treatment (FLUWA) of a share of 46.22%. Gross electric efficiency technology mix 15.84% and Gross thermal efficiency technology mix 28.51%

## Time period
Waste composition as given in literature reference, theoretical data or other source. Transfer coefficients for modern MSWI.

## Reference product
- copper in car shredder residue: -1 kg; By-product classification Waste; CPC 39361: Waste and scrap of copper; CAS 7440-50-8
  Main reference product of this activity (supply of disposal service).
  production volume 945280 kg
    based on corresponding global production volume of MSW fraction in conventional MSWI (wo fly ash extraction) and scaled down to annual Swiss incinerated MSW mass of 3.02 mio. tonnes.
  property price 0 EUR2005
    Waste products are assigned a price of zero as they are assumed to require further treatment.
  properties: dry mass 1 kg, aluminium content 0.040233, tin content 0.0087339, zinc content 0.0010755, iron content 0.0091811, vanadium content 2.178e-11, antimony content 0.0034381, silicon content 0.0064282, wet mass 1 kg, manganese content 0.0014832, chromium content 2.7346e-6, copper content 0.92487, silver content 0.00048905, sulfur content 2.8372e-12, lead content 4.4823e-9, nickel content 0.0040623

## By-products
- metalliferous hydroxide sludge: 0 kg; By-product classification Recyclable; CPC 1429: Other non-ferrous metal ores and concentrates (other than uranium or thorium ores and concentrates); pedigree (1,1,1,1,1)
  Metalliferous hydroxide sludge from filter ash leaching (FLUWA).
  Uncertainty: uncertainty is calculated from uncertainties in waste composition and transfer coefficients to filter ash in incinerator and the uncertainty of the transfer coefficients of the FLUWA process.
  production volume 0 kg
    calculated in proportion to reference product waste input to incinerator
  property price 0.0042 EUR2005
    World market value of manure, deflated with barley world market price and consumer price index, based on [http://www.gov.pe.ca/photos/original/af_NM_manconv.pdf].
  property heating value, net 0 MJ
    Non combustible products are assumed to have an LHV equal to zero (0).
  properties: wet mass 1 kg, water in wet mass 0.75 kg, nickel content 0.0048077, lead content 1.0289e-7, vanadium content 1.5773e-10, water content 3, antimony content 0.047434, manganese content 0.0019272, aluminium content 0.0035298, zinc content 0.24117, silicon content 0.00043299, iron content 0.001288, dry mass 0.25 kg, tin content 0.0097983, silver content 0.00084658, sulfur content 2.2184e-10, chromium content 1.6664e-5, copper content 0.48857, oxygen content 0.20018
- copper scrap, sorted, pressed: 0 kg; CPC 39361: Waste and scrap of copper; By-product classification Recyclable; pedigree (1,1,1,1,1)
  Copper scrap recovered from this waste.
  Uncertainty: uncertainty calculated from uncertainty in waste composition, uncertainty of share of recyclable metal, uncertainty of transfer coefficient to bottom ash, uncertainty of the efficiency of scrap removal in MSWI plant.
  production volume 0 kg
    calculated in proportion to reference product waste input to incinerator
  property price 2.84 EUR2005
    Temporary price data. Calculated as 90% of purchasers price based on: Source: USGS Mineral Yearbook 2007, Table 1 in <http://minerals.usgs.gov/minerals/pubs/commodity/recycle/myb1-2007-recyc.pdf>
  property carbon content 0
    carbon content on a dry matter basis (reserved; not for manual entry)
  properties: carbon content, fossil 0, wet mass 1 kg, dry mass 1 kg, carbon content, non-fossil 0, water in wet mass 0 kg, water content 0, carbon allocation 0 kg

## Inputs from technosphere
- hydrogen peroxide, without water, in 50% solution state: 0.0030397 kg; lognormal variance with pedigree 0.013406, pedigree (1,1,4,1,1)
  Auxilliary oxidising agent for filter ash treatment (FLUWA).
  Uncertainty: uncertainty calculated from uncertainty in of transfer coefficients in the incinerator, and the uncertainty of the waste composition of this waste
  properties: heating value, net 7.13 MJ, wet mass 1 kg, dry mass 1 kg
- chemical, inorganic: 1.1966e-5 kg; lognormal variance with pedigree 0.027278, pedigree (1,1,4,1,1)
  Auxilliary inputs for the wastewater treatment stage of the incinerator plant. Proxy for Polyelectrolyte.
  Uncertainty: uncertainty calculated from uncertainty in average Polyelectrolyte input, of transfer coefficients in the incinerator, and the uncertainty of the waste composition of this waste
  properties: carbon content, fossil 0.003, wet mass 1 kg, dry mass 1 kg
- chromium oxide, flakes: 1.1833e-7 kg; lognormal variance with pedigree 0.5583, pedigree (1,1,4,1,1)
  Input to DeNOx stage. Active component in SCR catalyst (vanadium pentoxide, V2O5), here approximated with the available chromium trioxide.
  Uncertainty: uncertainty calculated from uncertainty in average DeNOx input, uncertainty in the share of thermal NOx, uncertainty of nitrogen content in average municipal waste and the uncertainty in nitrogen content in *this* waste.
  properties: dry mass 1 kg, wet mass 1 kg
- iron (III) chloride, without water, in 40% solution state: 0.0005667 kg; lognormal variance with pedigree 0.028885, pedigree (1,1,4,1,1)
  Auxilliary inputs for the wastewater treatment stage of the incinerator plant.
  Uncertainty: uncertainty calculated from uncertainty in average FeCl3 input, of transfer coefficients in the incinerator, and the uncertainty of the waste composition of this waste
  properties: wet mass 1 kg, dry mass 1 kg
- titanium dioxide: 5.7984e-6 kg; lognormal variance with pedigree 0.5583, pedigree (1,1,4,1,1)
  Input to DeNOx stage (TiO2 catalyst carrier)
  Uncertainty: uncertainty calculated from uncertainty in average DeNOx input, uncertainty in the share of thermal NOx, uncertainty of nitrogen content in average municipal waste and the uncertainty in nitrogen content in *this* waste.
  properties: wet mass 1 kg, dry mass 1 kg
- process-specific burdens, slag landfill: 1.2181 kg; lognormal variance with pedigree 0.0126876, pedigree (1,1,4,1,1)
  Mass-specific expenditures required for landfilling of bottom ash.;activityLink introduced to establish a direct link to the corresponding regional supply of this product
  Uncertainty: uncertainty is calculated from uncertainties in waste composition and transfer coefficients in incinerator
- hydrochloric acid, without water, in 30% solution state: 0.0011975 kg; lognormal variance with pedigree 0.0133777, pedigree (1,1,4,1,1)
  Auxilliary inputs for the wastewater treatment stage of the incinerator plant.
  Uncertainty: uncertainty calculated from uncertainty in average HCl input, of transfer coefficients in the incinerator, and the uncertainty of the waste composition of this waste
  properties: dry mass 1 kg, wet mass 1 kg, heating value, net 3.32 MJ
- heat, district or industrial, natural gas: 0.017306 MJ; lognormal variance with pedigree 0.18537, pedigree (1,1,4,1,1)
  Input to DeNOx stage, to heat up flue gas in low-dust SCR.
  Uncertainty: uncertainty calculated from uncertainty in average DeNOx input, uncertainty in the share of thermal NOx, uncertainty of nitrogen content in average municipal waste and the uncertainty in nitrogen content in *this* waste.
  properties: heating value, net 1 MJ
- slag landfill: 2.1655e-9 unit; lognormal variance with pedigree 0.0126876, pedigree (1,1,4,1,1)
  Landfill infrastructure required for landfilling of bottom ash.
  Uncertainty: uncertainty is calculated from uncertainties in waste composition and transfer coefficients in incinerator
- sodium hydroxide, without water, in 50% solution state: 0.00086695 kg; lognormal variance with pedigree 0.013406, pedigree (1,1,4,1,1)
  Auxilliary inputs for the flue gas treatment stage of the incinerator plant, and partially in the filter ash treatment (FLUWA).
  Uncertainty: uncertainty calculated from uncertainty in average NaOH input, of transfer coefficients in the incinerator, and the uncertainty of the waste composition of this waste
  properties: heating value, net 3.03 MJ, wet mass 1 kg, dry mass 1 kg
- residual material landfill: 1.752e-10 unit; lognormal variance with pedigree 0.0111965, pedigree (1,1,4,1,1)
  Landfill infrastructure required for landfilling of incineration residues.
  Uncertainty: uncertainty is calculated from uncertainties in waste composition and transfer coefficients in incinerator
- ammonia, anhydrous, liquid: 9.2548e-5 kg; lognormal variance with pedigree 0.18537, pedigree (1,1,4,1,1)
  Input to DeNOx stage (100% NH3).
  Uncertainty: uncertainty calculated from uncertainty in average DeNOx input, uncertainty in the share of thermal NOx, uncertainty of nitrogen content in average municipal waste and the uncertainty in nitrogen content in *this* waste.
  properties: wet mass 1 kg, dry mass 1 kg
- water, decarbonised: 0.14186 kg; lognormal variance with pedigree 0.028885, pedigree (1,1,4,1,1)
  Incinerator process water used in flue gas scrubber stage.
  Uncertainty: uncertainty calculated from uncertainty in average water input, and the uncertainty of the waste composition of this waste
  properties: wet mass 1 kg
- transport, freight, lorry, unspecified: 0.05137 metric ton*km; lognormal variance with pedigree 0.0122233, pedigree (1,1,4,1,1)
  Transport services to transport incineration residues to landfills and filter ash to external treatments (FLUWA).
  Uncertainty: uncertainty calculated from uncertainty of the waste composition of this waste, uncertainty of transfer coefficients and the uncertainty in generic transportation distances
- process-specific burdens, residual material landfill: 0.084097 kg; lognormal variance with pedigree 0.0111965, pedigree (1,1,4,1,1)
  Mass-specific expenditures required for landfilling of incineration residues.;activityLink introduced to establish a direct link to the corresponding regional supply of this product
  Uncertainty: uncertainty is calculated from uncertainties in waste composition and transfer coefficients in incinerator
- electricity, for reuse in municipal waste incineration only: 0.062041 kWh; name E_el_prod_MSWI; lognormal variance with pedigree 0.00859512, pedigree (1,1,4,1,1)
  Net electricity required to incinerate this waste (subsidiesed from high-calorific waste fractions).
  Uncertainty: uncertainty is calculated from uncertainties in waste composition and uncertainties in energy efficiency and the uncertainty in internal energy demand
- waste cement, hydrated: -0.042181 kg; lognormal variance with pedigree 0.02028, pedigree (1,1,4,1,1)
  Hydrated cement output for solidification of landfilled residual material.
  Uncertainty: Uncertainty calculated from uncertainty of the waste composition of this waste and transfer coefficients in the incinerator and of the solidification recipe.
  production volume 39872 kg
    calculated in proportion to reference product waste input to incinerator
  properties: wet mass 1 kg, dry mass 1 kg
- municipal waste incineration facility: 2.5e-10 unit
  Demands per kilogram waste.
- heat, for reuse in municipal waste incineration only: 0.1285 MJ; name E_th_prod_MSWI; lognormal variance with pedigree 0.00859512, pedigree (1,1,4,1,1)
  Net heat required to incinerate this waste (subsidiesed from high-calorific waste fractions).
  Uncertainty: uncertainty is calculated from uncertainties in waste composition and uncertainties in energy efficiency and the uncertainty in internal energy demand
- cement, unspecified: 0.016872 kg; lognormal variance with pedigree 0.02028, pedigree (1,1,4,1,1)
  Cement required for solidification of landfilled residual material.
  Uncertainty: Uncertainty calculated from uncertainty of the waste composition of this waste, of transfer coefficients in the incinerator and of the solidification recipe.
  properties: dry mass 1 kg, wet mass 1 kg
- metalliferous hydroxide sludge: -0.001573 kg; lognormal variance with pedigree 0.089272, pedigree (1,1,4,1,1)
  (same comment as for metalliferous hydroxide sludge)
  production volume 1486.9 kg
  properties: price 0.0042 EUR2005, wet mass 1 kg, nickel content 0.0048077, water content 3, antimony content 0.047434, manganese content 0.0019272, aluminium content 0.0035298, zinc content 0.24117, dry mass 0.25 kg, tin content 0.0097983, copper content 0.48857, oxygen content 0.20018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
- copper scrap, sorted, pressed: -0.1354 kg; lognormal variance with pedigree 0.018156, pedigree (1,1,4,1,1)
  (same comment as for copper scrap, sorted, pressed)
  production volume 127990 kg
  properties: price 2.84 EUR2005, wet mass 1 kg, dry mass 1 kg

## Inputs from nature
- Oxygen [natural resource, in air]: 0.28481 kg; lognormal variance with pedigree 0.00800609, pedigree (1,1,4,1,1)
  Oxygen from ambient air needed to combust and oxidise this waste. Net demand, i.e. without O2 leaving the plant in flue gas uncombusted.
  Uncertainty: uncertainty is calculated from uncertainties in waste composition and transfer coefficients to flue gas and soild residues in incinerator

## Emissions to nature
- Vanadium, ion [water, surface water]: 2.5675e-9 kg; lognormal variance with pedigree 2.14, pedigree (1,1,4,1,1)
  Emissions to water from waste composition and transfer coefficients in incinerator and landfills.
  Uncertainty: uncertainty is calculated from uncertainties in waste composition and transfer coefficients in incinerator and landfills
- Silicon [water, surface water]: 4.6758e-6 kg; lognormal variance with pedigree 0.71854, pedigree (1,1,4,1,1)
  (same comment as for Vanadium, ion)
- Thallium [water, surface water]: 5.2635e-12 kg; lognormal variance with pedigree 0.72642, pedigree (1,1,4,1,1)
  (same comment as for Vanadium, ion)
- Water [air, urban air close to ground]: 0 m3
  Water vapour from waste humidity, hydrogen oxidation and part of the process water.
- Zinc, ion [water, surface water]: 4.8871e-8 kg; lognormal variance with pedigree 1.0377, pedigree (1,1,4,1,1)
  (same comment as for Vanadium, ion)
- Manganese [water, ground-, long-term]: 0.0013295 kg; lognormal variance with pedigree 0.67467, pedigree (1,1,4,1,1)
  Long-term emissions from landfilling of incineration residues.
  Uncertainty: uncertainty is calculated from uncertainties in waste composition and transfer coefficients in incinerator and landfills.
- Lead [air, urban air close to ground]: 1.8464e-13 kg; lognormal variance with pedigree 1.9713, pedigree (1,1,4,1,1)
  Emission to air from waste composition and transfer coefficients.
  Uncertainty: uncertainty is calculated from uncertainties in waste composition and transfer coefficients in incinerator
- Heat, waste [water, surface water]: 0.041563 MJ; lognormal variance with pedigree 0.00898726, pedigree (1,1,4,1,1)
  Waste heat generated from heating value of this waste plus any electricity required to process it.
  Uncertainty: uncertainty is calculated from uncertainties in waste composition and uncertainties in energy efficiency and the uncertainty in internal energy demand
- Aluminium [water, ground-, long-term]: 0.032005 kg; lognormal variance with pedigree 0.21832, pedigree (1,1,4,1,1)
  (same comment as for Manganese)
- Heat, waste [air, urban air close to ground]: 0.18179 MJ; lognormal variance with pedigree 0.00898726, pedigree (1,1,4,1,1)
  (same comment as for Heat, waste)
- Antimony [water, surface water]: 0.000339 kg; lognormal variance with pedigree 0.47227, pedigree (1,1,4,1,1)
  (same comment as for Vanadium, ion)
- Benzo(a)pyrene [air, urban air close to ground]: 1.0362e-12 kg; lognormal variance with pedigree 0.46202, pedigree (1,1,4,1,1)
  Incomplete combustion product emitted to air.
  Uncertainty: uncertainty calculated from uncertainty in average operation emissions, and the uncertainty of the flue gas volume from this waste.
- NMVOC, non-methane volatile organic compounds, unspecified origin [air, urban air close to ground]: 2.119e-6 kg; lognormal variance with pedigree 0.11508, pedigree (1,1,4,1,1)
  (same comment as for Benzo(a)pyrene)
- Thallium [water, ground-, long-term]: 3.1528e-9 kg; lognormal variance with pedigree 0.26601, pedigree (1,1,4,1,1)
  (same comment as for Manganese)
- Lead [water, ground-, long-term]: 5.0972e-9 kg; lognormal variance with pedigree 8.6435, pedigree (1,1,4,1,1)
  (same comment as for Manganese)
- Chromium VI [water, ground-, long-term]: 1.8451e-7 kg; lognormal variance with pedigree 2.7396, pedigree (1,1,4,1,1)
  (same comment as for Manganese)
- Nickel, ion [water, surface water]: 2.6201e-6 kg; lognormal variance with pedigree 1.1561, pedigree (1,1,4,1,1)
  (same comment as for Vanadium, ion)
- Sulfate [water, ground-, long-term]: 7.2596e-12 kg; lognormal variance with pedigree 1.7745, pedigree (1,1,4,1,1)
  (same comment as for Manganese)
- Benzene, hexachloro- [air, urban air close to ground]: 9.7358e-11 kg; lognormal variance with pedigree 0.11508, pedigree (1,1,4,1,1)
  (same comment as for Benzo(a)pyrene)
- Manganese [water, surface water]: 1.2857e-7 kg; lognormal variance with pedigree 1.0737, pedigree (1,1,4,1,1)
  (same comment as for Vanadium, ion)
- Benzene, pentachloro- [air, urban air close to ground]: 2.46e-10 kg; lognormal variance with pedigree 0.11508, pedigree (1,1,4,1,1)
  (same comment as for Benzo(a)pyrene)
- Mercury [water, surface water]: 3.3993e-14 kg; lognormal variance with pedigree 0.9951, pedigree (1,1,4,1,1)
  (same comment as for Vanadium, ion)
- Toluene [air, urban air close to ground]: 9.3124e-8 kg; lognormal variance with pedigree 0.11508, pedigree (1,1,4,1,1)
  (same comment as for Benzo(a)pyrene)
- Copper, ion [water, surface water]: 5.1361e-5 kg; lognormal variance with pedigree 0.59834, pedigree (1,1,4,1,1)
  (same comment as for Vanadium, ion)
- Copper, ion [water, ground-, long-term]: 0.76269 kg; lognormal variance with pedigree 0.00855858, pedigree (1,1,4,1,1)
  (same comment as for Manganese)
- Vanadium [air, urban air close to ground]: 2.3097e-13 kg; lognormal variance with pedigree 1.9367, pedigree (1,1,4,1,1)
  (same comment as for Lead)
- Chromium VI [water, surface water]: 5.3539e-8 kg; lognormal variance with pedigree 1.5101, pedigree (1,1,4,1,1)
  (same comment as for Vanadium, ion)
- Dioxins, measured as 2,3,7,8-tetrachlorodibenzo-p-dioxin [air, urban air close to ground]: 9.3117e-14 kg; lognormal variance with pedigree 0.46202, pedigree (1,1,4,1,1)
  (same comment as for Benzo(a)pyrene)
- Cobalt [water, surface water]: 2.266e-11 kg; lognormal variance with pedigree 0.82494, pedigree (1,1,4,1,1)
  (same comment as for Vanadium, ion)
- Particulates, > 2.5 um, and < 10um [air, urban air close to ground]: 2.7935e-8 kg; lognormal variance with pedigree 0.22992, pedigree (1,1,4,1,1)
  (same comment as for Benzo(a)pyrene)
- Cadmium, ion [water, surface water]: 3.8878e-14 kg; lognormal variance with pedigree 1.2514, pedigree (1,1,4,1,1)
  (same comment as for Vanadium, ion)
- Particulates, < 2.5 um [air, urban air close to ground]: 5.5591e-6 kg; lognormal variance with pedigree 0.46202, pedigree (1,1,4,1,1)
  (same comment as for Benzo(a)pyrene)
- Calcium, ion [water, ground-, long-term]: 0.00071958 kg; lognormal variance with pedigree 1.4527, pedigree (1,1,4,1,1)
  (same comment as for Manganese)
- Arsenic, ion [water, surface water]: 1.5824e-7 kg
  Emissions to water from waste composition and transfer coefficients in incinerator and landfills.
- Silver, ion [water, surface water]: 5.011e-7 kg; lognormal variance with pedigree 0.71674, pedigree (1,1,4,1,1)
  (same comment as for Vanadium, ion)
- Cadmium, ion [water, ground-, long-term]: 2.3288e-11 kg; lognormal variance with pedigree 6.2392, pedigree (1,1,4,1,1)
  (same comment as for Manganese)
- Sulfate [water, surface water]: 9.6782e-13 kg; lognormal variance with pedigree 1.5445, pedigree (1,1,4,1,1)
  (same comment as for Vanadium, ion)
- Aluminium [air, urban air close to ground]: 1.6401e-8 kg; lognormal variance with pedigree 0.29583, pedigree (1,1,4,1,1)
  (same comment as for Lead)
- Iron [air, urban air close to ground]: 8.227e-9 kg; lognormal variance with pedigree 0.454, pedigree (1,1,4,1,1)
  (same comment as for Lead)
- Iron, ion [water, ground-, long-term]: 0.0047388 kg; lognormal variance with pedigree 0.68098, pedigree (1,1,4,1,1)
  (same comment as for Manganese)
- Silicon [air, urban air close to ground]: 5.0061e-9 kg; lognormal variance with pedigree 0.50235, pedigree (1,1,4,1,1)
  (same comment as for Lead)
- Antimony [air, urban air close to ground]: 1.3771e-9 kg; lognormal variance with pedigree 0.58683, pedigree (1,1,4,1,1)
  (same comment as for Lead)
- Zinc [air, urban air close to ground]: 3.6043e-7 kg; lognormal variance with pedigree 0.68004, pedigree (1,1,4,1,1)
  (same comment as for Lead)
- Phenol, pentachloro- [air, urban air close to ground]: 2.0277e-11 kg; lognormal variance with pedigree 0.11508, pedigree (1,1,4,1,1)
  (same comment as for Benzo(a)pyrene)
- Zinc, ion [water, ground-, long-term]: 0.00077919 kg; lognormal variance with pedigree 0.76955, pedigree (1,1,4,1,1)
  (same comment as for Manganese)
- Tin [air, urban air close to ground]: 2.8525e-9 kg; lognormal variance with pedigree 0.47462, pedigree (1,1,4,1,1)
  (same comment as for Lead)
- Vanadium, ion [water, ground-, long-term]: 8.0409e-7 kg; lognormal variance with pedigree 1.6196, pedigree (1,1,4,1,1)
  (same comment as for Manganese)
- Silicon [water, ground-, long-term]: 0.0019487 kg; lognormal variance with pedigree 3.9725, pedigree (1,1,4,1,1)
  (same comment as for Manganese)
- Tin, ion [water, ground-, long-term]: 0.0072408 kg; lognormal variance with pedigree 0.40949, pedigree (1,1,4,1,1)
  (same comment as for Manganese)
- Silver, ion [water, ground-, long-term]: 0.00044272 kg; lognormal variance with pedigree 0.74655, pedigree (1,1,4,1,1)
  (same comment as for Manganese)
- Antimony [water, ground-, long-term]: 0.00094631 kg; lognormal variance with pedigree 0.67554, pedigree (1,1,4,1,1)
  (same comment as for Manganese)
- Tin, ion [water, surface water]: 4.0173e-6 kg; lognormal variance with pedigree 0.34513, pedigree (1,1,4,1,1)
  (same comment as for Vanadium, ion)
- Nickel [air, urban air close to ground]: 2.5516e-6 kg; lognormal variance with pedigree 0.50931, pedigree (1,1,4,1,1)
  (same comment as for Lead)
- Manganese [air, urban air close to ground]: 1.4163e-7 kg; lognormal variance with pedigree 0.65121, pedigree (1,1,4,1,1)
  (same comment as for Lead)
- Copper [air, urban air close to ground]: 4.2355e-5 kg; lognormal variance with pedigree 0.047542, pedigree (1,1,4,1,1)
  (same comment as for Lead)
- Chromium [air, urban air close to ground]: 1.1939e-9 kg; lognormal variance with pedigree 1.4696, pedigree (1,1,4,1,1)
  (same comment as for Lead)
- Ammonia [air, urban air close to ground]: 1.0881e-7 kg; lognormal variance with pedigree 0.23591, pedigree (1,1,4,1,1)
  Nitrogen species emitted to air after DeNOx stage.
  Uncertainty: uncertainty calculated from uncertainty in average N-emissions and uncertainty in the share of thermal NOx and the uncertainty in nitrogen content in *this* waste.
- Benzene [air, urban air close to ground]: 4.6562e-8 kg; lognormal variance with pedigree 0.11508, pedigree (1,1,4,1,1)
  (same comment as for Benzo(a)pyrene)
- Nitrogen oxides [air, urban air close to ground]: 3.4457e-5 kg; lognormal variance with pedigree 0.23591, pedigree (1,1,4,1,1)
  Sum of fuel-Nox and thermal-NOx emitted to air after DeNOx stage.
  Uncertainty: uncertainty calculated from uncertainty in average N-emissions and uncertainty in the share of thermal NOx and the uncertainty in nitrogen content in *this* waste.
- Nickel, ion [water, ground-, long-term]: 0.0040137 kg; lognormal variance with pedigree 0.48127, pedigree (1,1,4,1,1)
  (same comment as for Manganese)
- Sulfur dioxide [air, urban air close to ground]: 1.5086e-14 kg; lognormal variance with pedigree 1.9448, pedigree (1,1,4,1,1)
  (same comment as for Lead)
- Cobalt [water, ground-, long-term]: 1.3573e-8 kg; lognormal variance with pedigree 0.78792, pedigree (1,1,4,1,1)
  (same comment as for Manganese)
- Methane, fossil [air, urban air close to ground]: 2.7651e-7 kg; lognormal variance with pedigree 0.11508, pedigree (1,1,4,1,1)
  (same comment as for Benzo(a)pyrene)
- Lead [water, surface water]: 2.3272e-12 kg; lognormal variance with pedigree 3.0757, pedigree (1,1,4,1,1)
  (same comment as for Vanadium, ion)
- Methane, non-fossil [air, urban air close to ground]: 4.2192e-7 kg; lognormal variance with pedigree 0.11508, pedigree (1,1,4,1,1)
  (same comment as for Benzo(a)pyrene)
- Carbon monoxide, fossil [air, urban air close to ground]: 3.1335e-5 kg; lognormal variance with pedigree 0.87146, pedigree (1,1,4,1,1)
  (same comment as for Benzo(a)pyrene)
- Carbon monoxide, non-fossil [air, urban air close to ground]: 4.7814e-5 kg; lognormal variance with pedigree 0.87146, pedigree (1,1,4,1,1)
  (same comment as for Benzo(a)pyrene)
- Water [water, surface water]: 0 m3
  Process water released to surface water.
- Chromium, ion [water, surface water]: 1.7751e-10 kg; lognormal variance with pedigree 0.98884, pedigree (1,1,4,1,1)
  (same comment as for Vanadium, ion)
- Aluminium [water, surface water]: 1.8304e-6 kg; lognormal variance with pedigree 0.65953, pedigree (1,1,4,1,1)
  (same comment as for Vanadium, ion)
- Calcium, ion [water, surface water]: 1.2013e-6 kg; lognormal variance with pedigree 0.90914, pedigree (1,1,4,1,1)
  (same comment as for Vanadium, ion)
- Mercury [water, ground-, long-term]: 2.0362e-11 kg; lognormal variance with pedigree 2.3387, pedigree (1,1,4,1,1)
  (same comment as for Manganese)
- Iron, ion [water, surface water]: 1.2938e-7 kg; lognormal variance with pedigree 1.1845, pedigree (1,1,4,1,1)
  (same comment as for Vanadium, ion)
- Arsenic, ion [water, ground-, long-term]: 0 kg; pedigree (1,1,1,1,1)
  (same comment as for Manganese)

## Extrapolations
This dataset has been extrapolated from year 2012 to the year of the calculation (2021). The uncertainty has been adjusted accordingly.
