# para-phenylene diamine production

Dataset: EcoSpold 2, unit process
Geography: GLO
Time period: 2012-01-01 to 2021-12-31
Technology level: current
Classification: EcoSpold01Categories: chemicals/organics
Classification: ISIC rev.4 ecoinvent: 2011:Manufacture of basic chemicals
Scenario: Business-as-Usual
System model: Allocation, cut-off by classification
Generated by: Marylène Dussault
Published in: Fierz-David, H.E. 1921
Database: ecoinvent
isCopyrightProtected: true
accessRestrictedTo: 1

## General comment
This dataset represents the production of o-phenylenediamine from hydrogenation of 2-nitroaniline. Most common production route for para-phenylenediamine is reported to be through hydrogenation of 4-nitroaniline. Common hydrogenation or reduction for the family of products is reported to be the Bechamp reduction which involves use of iron and acid as regents. Reaction is assumed to yield 95% of product. This dataset is a estimation partially based on literature for the production of para-phenylendiamine.

## Included activities start
with 4-nitroaniline

## Included activities end
With production para-phenylendiamine. This dataset includes only raw materials. Energy requirements, wastes and emissions have been excluded due to lack of data.

## Reference product
- para-phenylene diamine: 1 kg; name PPD; CPC 34150: Amine-function compounds; oxygen-function amino-compounds, except lysine and its esters and salts thereof and […]; By-product classification allocatable product; CAS 106-50-3
  1
  production volume 1.1e7 kg; name PV_PPD
    Estimated.
  property carbon content, non-fossil 0; name PPD_C_content_non_fossil
    biogene carbon content on a dry matter basis
  property water in wet mass 0 kg; name PPD_WWM
  property heating value, net 29.16 MJ
    LHV is calculated based on the elemental composition of the substance. Based on the name of the substance, the chemical formula of the substance is manually found to be: C6H8N2.
  property wet mass 1 kg; name PPD_WM
  property price 3 EUR2005; name PPD_price_EUR2005
    Estimated based on current purchaser prices.
  property carbon content, fossil 0.67; name PPD_C_content_fossil
    fossil carbon content on a dry matter basis
  property dry mass 1 kg; name PPD_DM
  property carbon content 0.67
    carbon content on a dry matter basis (reserved; not for manual entry)
  properties: carbon allocation 0.67 kg

## Inputs from technosphere
- chemical factory, organics: 4e-10 unit; lognormal variance with pedigree 0.3107, pedigree (2,2,4,5,1)
  Approximated value. Infrastructure of a typical plant.
  Uncertainty: infrastructure of a typical plant
- water, deionised: 0 kg; name water; pedigree (1,1,1,1,1)
  Calculated value. Water content of acid solution.
  properties: wet mass 1 kg
- heat, from steam, in chemical industry: 0 MJ; pedigree (1,1,1,1,1)
  Estimated value. Represents energy requirement for phenylenediamine production. No data were available. Thus, value taken directly from ecoinvent V3.0 chloronitrobenzene production, which is assumed to be similar.
  properties: heating value, net 1 MJ
- hydrochloric acid, without water, in 30% solution state: 0 kg; name HCl; pedigree (1,1,1,1,1)
  Literature value. Based on Fierz-David (1921).
  properties: wet mass 1 kg, dry mass 1 kg, heating value, net 3.32 MJ
- tap water: 1.9 kg; name tapwater; source Sadek, S. E. 1992; lognormal variance with pedigree 0.0606, pedigree (3,5,5,5,3)
  Literature value. Reprensents water use for Bechamp reduction. Reported as hydraulic load in Sadek, S.E., et al (1992).
  properties: wet mass 1 kg, water content 2962.17, carbon content, fossil 0.00178991, dry mass 0.000337476 kg
  note on carbon content, fossil: Bicarbonate content is 2.93 mol/m3. CO2 content is 0.1 mol/m3 (ecoinvent v2.2 report 8, Tab 93.1).
- electricity, medium voltage: 0.025683 kWh; lognormal variance with pedigree 0.1786, pedigree (4,5,5,5,5)
  (same comment as for heat, from steam, in chemical industry)
- wastewater, average: 0 m3; name BP_amount_1; pedigree (1,1,1,1,1)
  Approximated process. Represents treatment of wastewater from phenylenediamine production.
  production volume 0 m3
    Calculated from production volume of reference product using the relative outputs.
  property price 0 EUR2005; name BP_amount_1_price_EUR2005
  properties: dry mass 0.346837 kg, water content 2882.2, wet mass 1000 kg, carbon content, non-fossil 0.194039
  note on carbon content, non-fossil: 0.0673 kg TOC/m3 (Tab A.17, ecoinvent v2.2 report 13_I). TOC was considered as Total Carbon.
- soda ash, light, crystalline, heptahydrate: 0.105 kg; lognormal variance with pedigree 0.0832, pedigree (3,3,5,1,4)
  Literature value. Based on Fierz-David (1921).
  properties: wet mass 1 kg, carbon content, fossil 0.0517241, dry mass 1 kg, heating value, net 3.43 MJ
- blast furnace sludge: 0 kg; name BP_amount_2; pedigree (1,1,1,1,1)
  Approximated process, Reprensents iron waste from Bechamp reaction, which is known to be important and in the form of sludge. Value is estimated based on mass of iron used in the reaction, but is likely to be underestimated because it is mix with other substances.
  production volume 0 kg
    Calculated from production volume of reference product using the relative outputs.
  property price 0 EUR2005; name BP_amount_2_price_EUR2005
  properties: carbon content, fossil 0.339168, wet mass 1 kg, dry mass 0.914 kg, water content 0.0940919
- 2-nitroaniline: 1.34495 kg; lognormal variance with pedigree 0.0247, pedigree (4,2,4,1,3)
  Approximated process. Represents 4-nitroaniline.Value is estimated based on stochiometry and assumption of 95% yield.
  properties: wet mass 1 kg, dry mass 1 kg, carbon content, fossil 0.521741, heating value, net 21.07 MJ
- iron scrap, sorted, pressed: 0 kg; name iron; pedigree (1,1,1,1,1)
  Literature value. Based on Fierz-David (1921). Reported as fine iron turnings which is used as catalyst.
  properties: dry mass 1 kg, wet mass 1 kg
- water, deionised: 0.0398423, 0.000143422, 0.129341 kg (3 entries); lognormal variance with pedigree 0.0832, pedigree (3,3,5,1,4)
  Calculated value. Water content of acid solution.
- heat, from steam, in chemical industry: 0.963765, 5.46623 MJ (2 entries); lognormal variance with pedigree 0.1786, pedigree (4,5,5,5,5)
  (same comment as for heat, from steam, in chemical industry)
- hydrochloric acid, without water, in 30% solution state: 0.0132598, 0.0593086 kg (2 entries); lognormal variance with pedigree 0.0832, pedigree (3,3,5,1,4)
  Literature value. Based on Fierz-David (1921).
- wastewater, average: -5.29079e-5, -5.72365e-6, -0.000110695 m3 (3 entries); lognormal variance with pedigree 0.0986, pedigree (4,5,5,5,4)
  Approximated process. Represents treatment of wastewater from phenylenediamine production.
  production volume 1862.59 m3
- blast furnace sludge: -0.222056, -0.056413, -0.379652, -2.49977 kg (4 entries); lognormal variance with pedigree 0.1306, pedigree (5,5,5,5,4)
  (same comment as for blast furnace sludge)
  production volume 3.47368e7 kg
- iron scrap, sorted, pressed: 0.624072, 2.53382 kg (2 entries); lognormal variance with pedigree 0.0832, pedigree (3,3,5,1,4)
  (same comment as for iron scrap, sorted, pressed)

## Emissions to nature
- TOC, Total Organic Carbon [water, unspecified]: 0.05 kg; source Sadek, S. E. 1992; lognormal variance with pedigree 0.1, pedigree (3,5,5,5,3)
  (same comment as for tap water)
- Sodium, ion [water, unspecified]: 0.0455505 kg; lognormal variance with pedigree 0.138, pedigree (4,5,5,5,4)
  Stochiometric value. Represented carbonate ions emitted to water from neutralisation of chlroridric acid with soda ash.
- BOD5, Biological Oxygen Demand [water, surface water]: 0.085 kg; = TOC*1.7; source Doka G. 2009; lognormal variance with pedigree 0.1, pedigree (3,5,5,5,3)
  Calculated value. Calculated by default as BOD (gC2) = 1.27 TOC (BOD measured in g O2). Conversion factor used by Doka (2009).
- COD, Chemical Oxygen Demand [water, surface water]: 0.135 kg; = TOC*2.7; lognormal variance with pedigree 0.1, pedigree (3,5,5,5,3)
  Calculated value. Calculated by default as TOC (gC) = COD/2.7 (COD measured in g O2).
- Carbonate [water, unspecified]: 0.0594495 kg
  (same comment as for Sodium, ion)
- DOC, Dissolved Organic Carbon [water, surface water]: 0.05 kg; = TOC; lognormal variance with pedigree 0.1, pedigree (3,5,5,5,3)
  Calculated value. Calculated as equal to TOC.
- Hydrogen chloride [air, non-urban air or from high stacks]: 0.000145137 kg; = HCl*0.002; source Hischier, R. 2005; lognormal variance with pedigree 0.218, pedigree (4,5,5,5,5)
  Estimated value. Represents hydrochloridric acid emitted to air based on assumption for chemical production published by Hischier et al. (2005).
- Chloride [water, unspecified]: 0.0704166 kg; lognormal variance with pedigree 0.138, pedigree (4,5,5,5,4)
  Calculated value. Represents chloride emissions to water from neutralised chloridric acid. Value was calculated based on chloride input minus estimation of air emissions,
- TOC, Total Organic Carbon [water, surface water]: 0.05 kg; name TOC; source Sadek, S. E. 1992; lognormal variance with pedigree 0.1, pedigree (3,5,5,5,3)
  (same comment as for tap water)

## Sampling procedure
see technology

## Extrapolations
This dataset has been extrapolated from year 2012 to the year of the calculation (2021). The uncertainty has been adjusted accordingly.
