# electricity production, oil

Dataset: EcoSpold 2, unit process
Geography: PT
Time period: 1980-01-01 to 2021-12-31
Technology level: current
Classification: EcoSpold01Categories: oil/power plants
Classification: ISIC rev.4 ecoinvent: 3510:Electric power generation, transmission and distribution
Synonyms: heavy fuel oil; petroleum
Tags: oil power; fossil fuels
Scenario: Business-as-Usual
System model: Allocation, cut-off by classification
Generated by: Karin Treyer
Published in: Jungbluth, N. 2007
Database: ecoinvent
isCopyrightProtected: true
accessRestrictedTo: 1

## General comment
This dataset represents the production of high voltage electricity at a grid-connected oil power plant with a capacity of 500 MW on the world in 2012.
Emissions are in general calculated/estimated based on the fuel oil type S, European quality. This dataset has been built on the basis of oil electricity production datasets in version 2 of the ecoinvent database which were elaborated by N. Jungbluth 2007 (see main publication in modelling and administrative). The values and emissions are a weighted average of emissions in all datasets in version 2 (which are considered as the global values) multiplied with an efficiency scaling factor. The datasets in version 2 were valid for the following countries: AT, BE, BR, GR, CN, CS, CZ, DE, DK, ES, FI, FR, GB, GR, HR, HU, IE, IT, JP, MK, NL, NO, PT, PL, SE, SI, SK. Weighting was made with electricity production data in those countries based on IEA/OECD 2010. The weighted averages are taken as global values and then scaled with a factor derived from the comparison of the global average efficiency and the efficiency valid for this dataset in order to account for a higher or lower fuel input for the production of 1 kWh, respectively. Nothing else than the efficiency has been adjusted in this dataset; besides that no new data collection has taken place
Comments:
- sulfur content of the oil is not adapted to local/average conditions.
- CO2 emissions are presented for the combustion and for the flue gas treatment
- Extensive comments on emissions can be found in Jungbluth 2007, on which this dataset is based on.
Emissions to the water are from flue gas treatment. Most of these data come from two power plants in Portugal (EDP 2001) and data from Slowakia
EDP (2001) Environmental Report 2000. Electricidade de Portugal, S.A., Lisboa, PT, retrieved from: www.edp.pt.
Slovenské elektrárne (2002) Environment Report 2001, Bratislave, SK, retrieved from: www.seas.sk.
IEA/OECD. 2010. Electricity Information 2010. International Energy Agency (IEA), Paris Cedex (FR). Part IV. Detailed OECD Electricity And Heat Data.

## Included activities start
From the constructed power plant ready to produce electricity and from the fuel ready to be used.

## Included activities end
This activity ends with 1kWh of high voltage electricity produced at the power plant and arrived at the busbar.

This dataset includes all energy use, use of chemicals, emissions to air and water including treatment of flue gasses and effluents. In an oil power plant, water is needed for cooling, feed water for the steam circuit, for the flue gas treatment, or other cleaning. This dataset only considers water use (evaporation) for cooling and steam circuit.

## Technology
Electricity production in a conventional oil power plant with a capacity of 500 MWe.

## Time period
The Annual Production Volume is valid for the year 2012.

## Parameters
- water withdrawal, electricity production from oil, once-T and coolingP CS: 0.098 m3/kWh; name WWithdrawal_EP_oil_onceT_andCP_CS; lognormal variance with pedigree 0.092025, pedigree (4,4,3,2,4)
  Estimated based on literature (Scown, 2011, Water Footprint of U.S. Transportation Fuels, SI).
  nan
- fraction, water, completely softened, to air: 0.15 dimensionless; name fraction_WCS_to_air; = fraction_PW_to_air; lognormal variance with pedigree 0.092025, pedigree (4,4,3,2,4)
  Calculated value. See comment in the other parametres present in this dataset. Water, completely softened is considered to be always used as process water, thus process water fractions to air are applied to all water, completely softened input flows to calculate the amount of water consumed in the processes.
  nan
- average efficiency of oil power plants, country: 0.392 dimensionless; name efficiency_oil_country; lognormal variance with pedigree 0.003325, pedigree (3,2,1,2,2)
  Literature value/calculated value. Net electrical efficiency based on the lower heating value (LHV).
  For all OECD countries, the IEA Electricity information 2014 provides data for the year 2012 on fuel input (TJ, Net calorific value NCV) and gross electricity production (GWh) as well as heat production (TJ) in tables 8 and 9 for each country for electricity only and Combined Heat and Power (CHP) plants each. Together with the information on own use (see parameter "losses"), the net electrical efficiency based on the NCV is calculated.
  For all non-OECD countries, data from the IEA Energy balances of non-OECD countries 2014 have been used. These tables do not always provide information on how much of the electricity has been produced in electricity only and in CHP plants, but often give the total value only.
  IEA. 2014. Electricity Information 2014. ISBN 978-92-64-21692-1. International Energy Agency (IEA), Paris Cedex (FR).
  IEA/OECD. 2014. Energy balances of non-OECD countries 2014. International Energy Agency (IEA), Paris Cedex (FR).
  nan
- average efficiency of oil power plants, global: 0.37 dimensionless; name efficiency_oil_global; lognormal variance with pedigree 0.003325, pedigree (3,2,1,2,2)
  (same comment as for average efficiency of oil power plants, country)
- fraction, process water, to air: 0.15 dimensionless; name fraction_PW_to_air; lognormal variance with pedigree 0.092025, pedigree (4,4,3,2,4)
  Literature value. In case when no industry/process specific data are available, default evaporation fraction value is used. This value is 15% and is based on literature (Statistics Canada, 2007 & Shaffer, K.H., 2008, Consumptive water use in the Great Lakes Basin, USGS & Shiklomanov, 2003, World Water Resources at the Beginning of the 21st Century) and has been approved by an expert.
  nan
- fraction, water, decarbonised, to air: 0.0118019 dimensionless; name fraction_WDC_to_air; = fraction_CW_to_air; lognormal variance with pedigree 0.092025, pedigree (4,4,3,2,4)
  Calculated value. See comments in the other parametres present in this dataset. Decarbonised water is considered to be always used as cooling water, thus cooling water fractions to air are applied to all carbonised water input flows to calculate the amount of water consumed in the processes.
  nan
- recirculating cooling system as a fraction of all cooling systems: 0.27 dimensionless; name recirculating_CS_fraction_from_allCS; lognormal variance with pedigree 0.092025, pedigree (4,4,3,2,4)
  Calculated as an average of data available for Europe (Floerke, 2008, Future changes of freshwater needs in the electricity production sector) and USA (NERL, 2011, Estimating freshwater needs to meet future thermoelectric generation requirements).
  nan
- fraction, cooling water, to air: 0.0118019 dimensionless; name fraction_CW_to_air; lognormal variance with pedigree 0.041425, pedigree (2,3,2,2,1)
  Calculated value
  nan
- losses from gross electricity production: 0.04 dimensionless; name losses_gross_net; lognormal variance with pedigree 0.003525, pedigree (3,2,2,2,2)
  Calculated value. Own use of electricity plants in this country in 2012. For the OECD countries, the OECD iLibrary provides gross and net electricity values for the specific sector \"Total Fuel Combustion\", from which the loss value is being calculated. This value is then applied to all fossil fuel datasets, as no data on a more detailed level were available.
  OECD. 2014. IEA Electricity Information Statistics: OECD - Electricity and heat generation. OECD iLibrary. Online database. DOI : 10.1787/elect-data-en
  nan
  Uncertainty: g
- water withdrawal, electricity production from oil, recirculating CS: 0.0021 m3/kWh; name WWithdrawal_EP_oil_recirculating_CS; lognormal variance with pedigree 0.092025, pedigree (4,4,3,2,4)
  (same comment as for water withdrawal, electricity production from oil, once-T and coolingP)
- water consumption, electricity production from oil, recirculating CS: 0.0018 m3/kWh; name WConsumption_EP_oil_recirculatingCS; lognormal variance with pedigree 0.092025, pedigree (4,4,3,2,4)
  (same comment as for water withdrawal, electricity production from oil, once-T and coolingP)
- factor: input of MJ for the production of 1 kWh: 9.18367 MJ/kWh; name scaling_factor; = 1*3.6/efficiency_oil_country; lognormal variance with pedigree 0.0006, pedigree (1,1,1,1,1)
  Calculated value. 3.6 MJ = 1kWh.
  nan
- relation between the global and the country's efficiency of oil power plants: 0.943878 dimensionless; name relation_global_country; = efficiency_oil_global/ efficiency_oil_country; undefined min 1, max 1, standardDeviation95 0, pedigree (1,1,1,1,1)
  Parameter not needed in this dataset but present due to parent child relationship.
  nan
- water consumption, electricity production from oil, once-T and coolingP CS: 0.0005 m3/kWh; name WConsumption_EP_oil_onceT_andCP_CS; lognormal variance with pedigree 0.092025, pedigree (4,4,3,2,4)
  (same comment as for water withdrawal, electricity production from oil, once-T and coolingP)
- gross electricity production: 1.154e9 kWh; name gross_electricity; lognormal variance with pedigree 0.0012, pedigree (2,1,1,1,1)
  Literature value/statistics. For all OECD countries, gross electricity production 2012 with oil electricity only and CHP plants was taken from the IEA electricity information 2014, country tables 8 and 9. For all non-OECD countries, the values were found in the IEA energy balances of non-OECD countries 2014.
  IEA. 2014. Electricity Information 2014. ISBN 978-92-64-21692-1. International Energy Agency (IEA), Paris Cedex (FR).
  IEA/OECD. 2014. Energy balances of non-OECD countries 2014. International Energy Agency (IEA), Paris Cedex (FR).
  nan
- once-through and cooling pond cooling systems as a fraction of all cooling syste: 0.73 dimensionless; name once_through_andCP_CS_fractio_from_allCS; lognormal variance with pedigree 0.092025, pedigree (4,4,3,2,4)
  (same comment as for recirculating cooling system as a fraction of all cooling systems)

## Reference product
- electricity, high voltage: 1 kWh; name electricity; By-product classification allocatable product; CPC 17100: Electrical energy
  production volume 1.10784e9 kWh; name apv_electricity; = gross_electricity* (1-losses_gross_net)
    Calculated value.
  property price 0.0977 EUR2005
    Temporary price data. Calculated as 90% of purchasers price based on: 94% of the average price (to account for a 6% loss in transformation and transmission) for electricity for industrial consumersin 2005 (excluded taxes). From IEA.
  properties: Corresponding fuel use 10.1 MJ

## By-products
- fly ash and scrubber sludge: 0 kg; name fly_ash; source Jungbluth, N. 2007, p. Tab. 12.27, p. 238; CPC 39: Wastes or scraps; By-product classification Waste
  Exchange present due to parent child relationship
  production volume 0 kg; = apv_electricity * fly_ash
    Calculated from the production volume of electricity produced in proportion to the respective output amounts.
  property price 0 EUR2005; name fly_ash_price_EUR2005
    Waste products are assigned a price of zero as they are assumed to require further treatment.
  property heating value, net 0 MJ
    Non combustible products are assumed to have an LHV equal to zero (0).
  property carbon content, fossil 0.167
    Tab A.6, ecoinvent v2.2 report 13_I. C content has been calculated after data in the tables, and then referred to 1 kg DM
  property carbon content 0.167
    carbon content on a dry matter basis (reserved; not for manual entry)
  properties: carbon content, non-fossil 0, water in wet mass 0.9 kg, wet mass 1 kg, dry mass 0.1 kg, water content 9, carbon allocation 0.0167 kg
- residue from cooling tower: 0 kg; name cooling_tower; source Jungbluth, N. 2007, p. Tab. 12.27, p. 238; CPC 39: Wastes or scraps; By-product classification Waste
  Exchange present due to parent child relationship
  production volume 0 kg; = apv_electricity * cooling_tower
    (same comment as for fly ash and scrubber sludge)
  property heating value, net 0 MJ
    Non combustible products are assumed to have an LHV equal to zero (0).
  property price 0 EUR2005; name cooling_tower_price_EUR2005
    (same comment as for fly ash and scrubber sludge)
  property carbon content 0.0544233
    carbon content on a dry matter basis (reserved; not for manual entry)
  properties: water in wet mass 0.3 kg, carbon content, non-fossil 0, wet mass 1 kg, water content 0.428571, dry mass 0.7 kg, carbon content, fossil 0.0544233, carbon allocation 0.0380963 kg
- waste mineral oil: 0 kg; name waste_oil; source Jungbluth, N. 2007; CPC 39990: Other wastes n.e.c.; By-product classification Waste
  Exchange present due to parent child relationship
  production volume 0 kg; = apv_electricity *waste_oil
    (same comment as for fly ash and scrubber sludge)
  property price 0 EUR2005; name waste_oil_price_EUR2005
    (same comment as for fly ash and scrubber sludge)
  property heating value, net 34.7 MJ
    Value taken from the general comment of the treatment dataset.
  property carbon content, fossil 0.864444
    (same comment as for fly ash and scrubber sludge)
  property carbon content 0.864444
    carbon content on a dry matter basis (reserved; not for manual entry)
  properties: dry mass 0.9 kg, water in wet mass 0.1 kg, carbon content, non-fossil 0, wet mass 1 kg, water content 0.111111, carbon allocation 0.778 kg
- municipal solid waste: 0 kg; name municipal_waste; source Jungbluth, N. 2007; CPC 39910: Municipal waste; By-product classification Waste
  Exchange present due to parent child relationship
  production volume 0 kg; = apv_electricity * municipal_waste
    (same comment as for fly ash and scrubber sludge)
  property price 0 EUR2005; name municipal_waste_price_EUR2005
    (same comment as for fly ash and scrubber sludge)
  property heating value, net 11.74 MJ
    Value taken from the general comment of the treatment dataset.
  property carbon content, fossil 0.171549
    MSW composition in tab 4.1, ecoinvent v2.2 report 13_I. C content referred to 1 kg DM
  property carbon content, non-fossil 0.261655
    MSW composition in tab 4.1, ecoinvent v2.2 report 13_I. C content referred to 1 kg DM
  property carbon content 0.433204
    carbon content on a dry matter basis (reserved; not for manual entry)
  properties: dry mass 0.771 kg, wet mass 1 kg, water in wet mass 0.229 kg, water content 0.297017, carbon allocation 0.334 kg

## Inputs from technosphere
- oil power plant, 500MW: 1.13501e-11 unit; = 1.2359E-12 * scaling_factor; source Jungbluth, N. 2007; lognormal variance with pedigree 0.3506, pedigree (2,5,5,5,1)
  Estimation based on case study
- lignite ash: -0.000483419 kg; name lignite_ash; = (5.2639E-05 * scaling_factor)*-1; source Jungbluth, N. 2007; lognormal variance with pedigree 0.0027, pedigree (2,2,3,1,1)
  Literature data for this country
  Amount was scaled to the amount of reference product.
  production volume 535551 kg; = apv_electricity * lignite_ash
    (same comment as for fly ash and scrubber sludge)
  property price 0 EUR2005; name lignite_ash_price_EUR2005
  properties: dry mass 1 kg, wet mass 1 kg
- water, completely softened: 0.0992423 kg; name water_softened_input; = 0.105143225836924 * relation_global_country; source Jungbluth, N. 2007, p. Tab. 12.10 p. 228; lognormal variance with pedigree 0.0439, pedigree (2,2,5,5,2)
  Literature value/estimation. Estimation based on several literature sources:
  Frischknecht R., Bollens U., Bosshart S., Ciot M., Ciseri L., Doka G., Dones R., Gantner U., Hischier R. and Martin A. (1996) Ökoinventare von Energiesystemen: Grundlagen für den ökologischen Vergleich von Energiesystemen und den Einbezug von Energiesystemen in Ökobilanzen für die Schweiz. 3. Gruppe Energie - Stoffe - Umwelt (ESU), Eidgenössische Technische Hochschule Zürich und Sektion Ganzheitliche Systemanalysen, Paul Scherrer Institut, Villigen, Bundesamt für Energie (Hrsg.), Bern, CH, retrieved from: www.energieforschung.ch.
  Powergen (2001) Environment Report 2000. Powergen UK, Coventry, UK, retrieved from: www.pgen.com
  ESB (1997) Environmental Review 1997. Electricity Supply Board, Dublin, IE, retrieved from: www.esb.ie
  EDP (2001) Environmental Report 2000. Electricidade de Portugal, S.A., Lisboa, PT, retrieved from: www.edp.pt
  IPPC (2001b) Integrated Pollution Prevention and Control (IPPC): Draft Reference Document on Best Available Techniques for Large Combustion Plants. European Commission Directorate-General JRC, Joint Research Centre, Seville, Spain, retrieved from: http://eippcb.jrc.es.
  properties: wet mass 1 kg
- water, decarbonised: 0.426361 kg; name water_decarbonised_input; = 0.046426 * scaling_factor; source Jungbluth, N. 2007, p. Tab. 12.10 p. 228; lognormal variance with pedigree 0.0027, pedigree (2,2,3,1,1)
  Literature data for this country
  Amount was scaled to the amount of reference product.
  Literature data for this country
  Amount was scaled to the amount of reference product.
  properties: wet mass 1 kg
- heavy fuel oil: 0.226754 kg; = 0.024691 * scaling_factor; source Jungbluth, N. 2007; lognormal variance with pedigree 0.0027, pedigree (2,2,3,1,1)
  Literature data for heating value
  Amount was scaled to the amount of reference product.
  properties: wet mass 1 kg, heating value, net 41.2 MJ, carbon content, fossil 0.849, dry mass 1 kg
- oil power plant, 500MW: 0 unit; source Jungbluth, N. 2007
  Estimation based on case study
- ammonia, anhydrous, liquid: 0.000580463 kg; = 6.3206E-05 * scaling_factor; source Jungbluth, N. 2007, p. Tab. 12.11 p. 228; lognormal variance with pedigree 0.0147, pedigree (2,4,3,3,1)
  IPPC 2001 for flue gas treatment
  Amount was scaled to the amount of reference product.
  properties: wet mass 1 kg, dry mass 1 kg
- bilge oil: -3.27306e-5 kg; name bilge_oil; = (3.564E-06 * scaling_factor)*-1; source Jungbluth, N. 2007; lognormal variance with pedigree 0.0027, pedigree (2,2,3,1,1)
  Literature data for this country
  Amount was scaled to the amount of reference product.
  production volume 36260.3 kg; = apv_electricity * bilge_oil
    (same comment as for fly ash and scrubber sludge)
  property price 0 EUR2005; name bilge_oil_price_EUR2005
  properties: heating value, net 1.92 MJ, dry mass 0.1 kg, carbon content, fossil 0.84, wet mass 1 kg, water content 9
  note on heating value, net: Value taken from the general comment of the treatment dataset.
  note on carbon content, fossil: Tab A.6, ecoinvent v2.2 report 13_I. C content has been calculated after data in the tables, and then referred to 1 kg DM
- limestone, crushed, washed: 0.0126386 kg; = 0.0013762 * scaling_factor; source Jungbluth, N. 2007, p. Tab. 12.11 p. 228; lognormal variance with pedigree 0.0147, pedigree (2,4,3,3,1)
  IPPC 2001 for flue gas treatment
  Amount was scaled to the amount of reference product.
  properties: carbon content, fossil 0.117257, water content 0.00200401, dry mass 0.998 kg, wet mass 1 kg
  note on carbon content, fossil: Table 3.1, ecoinvent v2.2 report 7, part VII, pg 3. MW CaCO3=100, MW MgCO3=84. C content of limestone is 0.117257 kg/kg DM

## Inputs from nature
- Water, cooling, unspecified natural origin [natural resource, in water]: 0.0747952 m3; name water_cooling_UNO_input; source Scown, C.D., et al. 2011, p. Tab. 12.10 p. 228; lognormal variance with pedigree 0.130025, pedigree (4,4,5,2,4)
  Literature data for this country
  Amount was scaled to the amount of reference product.
  Calculated based on literature (Scown, C.D., et al., 2011, Water Footprint of U.S. Trasportation Fuels;Scown, C.D., et al., 2011, Water Footprint of U.S. Trasportation Fuels (SI); Stiegel, 2008, Estimating Freshwater Needs to Meet Future Thermoelectric Generation Requirements; Floerke, M., 2009, Future changes of freshwater needs in the electricity production sector), (Vionnet, S., Quantis Water Database - Technical Report, 2012). Water use in this process is modelled based on literature (see references). The process boundaries are given by the boundaries of the power plant. The process ends when the energy (MJ) is produced and ready to be used for electricity production (kWh).
  Calculated based on literature data. 9.7 MJ is calculated efficiency of the electricity production, average of all available regions.

## Emissions to nature
- Cobalt [water, surface water]: 8.52722e-10 kg; = 9.2852E-11 * scaling_factor; source Jungbluth, N. 2007, p. Tab. 12.26, p. 238; lognormal variance with pedigree 0.6527, pedigree (2,2,3,1,1)
  Literature data for this country
  Amount was scaled to the amount of reference product.
- Methane, fossil [air, urban air close to ground]: 4.88489e-5 kg; = 5.3191E-06 * scaling_factor; source Jungbluth, N. 2007, p. Tab. 12.19, Tab. 12.20; lognormal variance with pedigree 0.092, pedigree (1,1,3,1,1)
  Calculation based on VOC emission. Deviation calculated from ranges
  Amount was scaled to the amount of reference product.
- Methanol [air, urban air close to ground]: 4.88489e-6 kg; = 5.3191E-07 * scaling_factor; source Jungbluth, N. 2007; lognormal variance with pedigree 0.092, pedigree (1,1,3,1,1)
  (same comment as for Methane, fossil)
- Hydrocarbons, aliphatic, alkanes, unspecified [air, urban air close to ground]: 9.76959e-6 kg; = 1.0638E-06 * scaling_factor; source Jungbluth, N. 2007; lognormal variance with pedigree 0.092, pedigree (1,1,3,1,1)
  (same comment as for Methane, fossil)
- Zinc, ion [water, surface water]: 2.51403e-8 kg; = 2.7375E-09 * scaling_factor; source Jungbluth, N. 2007, p. Tab. 12.26, p. 238; lognormal variance with pedigree 0.6527, pedigree (2,2,3,1,1)
  Literature data for this country
  Amount was scaled to the amount of reference product.
- Acetic acid [air, urban air close to ground]: 9.76959e-6 kg; = 1.0638E-06 * scaling_factor; source Jungbluth, N. 2007; lognormal variance with pedigree 0.092, pedigree (1,1,3,1,1)
  (same comment as for Methane, fossil)
- Dioxins, measured as 2,3,7,8-tetrachlorodibenzo-p-dioxin [air, urban air close to ground]: 9.18367e-14 kg; = 1E-14 * scaling_factor; source Jungbluth, N. 2007, p. Tab. 12.22 p. 235; lognormal variance with pedigree 0.3147, pedigree (2,4,3,3,1)
  Literature
  Amount was scaled to the amount of reference product.
- Acetaldehyde [air, urban air close to ground]: 2.39262e-6 kg; = 2.6053E-07 * scaling_factor; source Jungbluth, N. 2007; lognormal variance with pedigree 0.092, pedigree (1,1,3,1,1)
  (same comment as for Methane, fossil)
- PAH, polycyclic aromatic hydrocarbons [air, urban air close to ground]: 1.65306e-8 kg; = 1.8E-09 * scaling_factor; source Jungbluth, N. 2007, p. Tab. 12.21, p. 235; lognormal variance with pedigree 0.3147, pedigree (2,4,3,3,1)
  Literature
  Amount was scaled to the amount of reference product.
- Arsenic, ion [water, surface water]: 4.26361e-10 kg; = 4.6426E-11 * scaling_factor; source Jungbluth, N. 2007, p. Tab. 12.26, p. 238; lognormal variance with pedigree 0.6527, pedigree (2,2,3,1,1)
  Literature data for this country
  Amount was scaled to the amount of reference product.
- Chromium [air, urban air close to ground]: 2.88266e-7 kg; = 3.1389E-08 * scaling_factor; source Jungbluth, N. 2007, p. Tab. 12.23, Tab. 12.24; lognormal variance with pedigree 1.462, pedigree (1,1,3,1,1)
  Calculation based on particle emission. Deviation calculated from ranges
  Amount was scaled to the amount of reference product.
- Copper [air, urban air close to ground]: 1.16945e-6 kg; = 1.2734E-07 * scaling_factor; source Jungbluth, N. 2007, p. Tab. 12.23, Tab. 12.24; lognormal variance with pedigree 1.312, pedigree (1,1,3,1,1)
  (same comment as for Chromium)
- Sodium [air, urban air close to ground]: 2.7551e-6 kg; = 3E-07 * scaling_factor; source Jungbluth, N. 2007, p. Tab. 12.25; lognormal variance with pedigree 0.1007, pedigree (3,3,5,3,3)
  Literature
  Amount was scaled to the amount of reference product.
- Selenium [air, urban air close to ground]: 1.24411e-7 kg; = 1.3547E-08 * scaling_factor; source Jungbluth, N. 2007; lognormal variance with pedigree 1.212, pedigree (1,1,3,1,1)
  (same comment as for Chromium)
- Particulates, < 2.5 um [air, urban air close to ground]: 0.000124411 kg; = 1.3547E-05 * scaling_factor; source Jungbluth, N. 2007, p. Tab. 12.17 / Tab. 12.18; lognormal variance with pedigree 0.3027, pedigree (2,2,3,1,1)
  Literature data for this country
  Amount was scaled to the amount of reference product.
- Hydrogen fluoride [air, urban air close to ground]: 2.76429e-7 kg; = 3.01E-08 * scaling_factor; source Jungbluth, N. 2007, p. Tab. 12.25; lognormal variance with pedigree 0.0612, pedigree (2,3,3,1,3)
  Literature
  Amount was scaled to the amount of reference product.
- Copper, ion [water, surface water]: 4.26361e-9 kg; = 4.6426E-10 * scaling_factor; source Jungbluth, N. 2007, p. Tab. 12.26, p. 238; lognormal variance with pedigree 0.6527, pedigree (2,2,3,1,1)
  Literature data for this country
  Amount was scaled to the amount of reference product.
- Hydrocarbons, aliphatic, unsaturated [air, urban air close to ground]: 4.88489e-7 kg; = 5.3191E-08 * scaling_factor; source Jungbluth, N. 2007; lognormal variance with pedigree 0.092, pedigree (1,1,3,1,1)
  (same comment as for Methane, fossil)
- Zinc [air, urban air close to ground]: 5.97187e-7 kg; = 6.5027E-08 * scaling_factor; source Jungbluth, N. 2007; lognormal variance with pedigree 1.212, pedigree (1,1,3,1,1)
  (same comment as for Chromium)
- Acetone [air, urban air close to ground]: 2.39262e-6 kg; = 2.6053E-07 * scaling_factor; source Jungbluth, N. 2007; lognormal variance with pedigree 0.092, pedigree (1,1,3,1,1)
  (same comment as for Methane, fossil)
- Cadmium [air, urban air close to ground]: 7.86288e-8 kg; = 8.5618E-09 * scaling_factor; source Jungbluth, N. 2007, p. Tab. 12.23, Tab. 12.24; lognormal variance with pedigree 1.212, pedigree (1,1,3,1,1)
  (same comment as for Chromium)
- Hypochlorite [water, ocean]: 2.93878e-6 kg; = 3.2E-07 * scaling_factor; source Jungbluth, N. 2007; lognormal variance with pedigree 0.1021, pedigree (3,4,5,3,3)
  Literature
  Amount was scaled to the amount of reference product.
- Formaldehyde [air, urban air close to ground]: 7.32738e-6 kg; = 7.9787E-07 * scaling_factor; source Jungbluth, N. 2007, p. Tab. 12.19, Tab. 12.20; lognormal variance with pedigree 0.092, pedigree (1,1,3,1,1)
  (same comment as for Methane, fossil)
- Benzene [air, urban air close to ground]: 4.88489e-7 kg; = 5.3191E-08 * scaling_factor; source Jungbluth, N. 2007; lognormal variance with pedigree 0.092, pedigree (1,1,3,1,1)
  (same comment as for Methane, fossil)
- Water [water, unspecified]: 0.0743338 m3; name water_to_water_unspecified; = (water_decarbonised_input/1000)*(1-fraction_WDC_to_air)+water_cooling_UNO_input*(1-fraction_CW_to_air); lognormal variance with pedigree 0.0427, pedigree (2,2,3,1,1)
  Calculated value based on literature values and expert opinion. See comments in the parametres" comment field.
  property fraction, origin: salt water 0; name fraction_origin_salt_water_Ww
  property water in wet mass 1000 kg; name WWM
  property carbon content, fossil 0; name C_content_fossil
  property dry mass 0 kg; name DM
  property wet mass 1000 kg; name WM
  property carbon content, non-fossil 0; name C_content_non_fossil
  property fraction, origin: fresh water 0.0062301; name fraction_origin_fresh_water_Ww
  property fraction, origin: unspecified 0.99377; name fraction_origin_unspecified_Ww
- Sulfur dioxide [air, urban air close to ground]: 0.0123566 kg; = 0.0013455 * scaling_factor; source Jungbluth, N. 2007, p. Tab. 12.14 p. 230; lognormal variance with pedigree 0.0027, pedigree (2,2,3,1,1)
  Literature data for this country
  Amount was scaled to the amount of reference product.
- Propane [air, urban air close to ground]: 4.88489e-7 kg; = 5.3191E-08 * scaling_factor; source Jungbluth, N. 2007, p. Tab. 12.19, Tab. 12.20; lognormal variance with pedigree 0.092, pedigree (1,1,3,1,1)
  (same comment as for Methane, fossil)
- Carbon monoxide, fossil [air, urban air close to ground]: 9.18367e-5 kg; = 1E-05 * scaling_factor; source Jungbluth, N. 2007, p. Tab. 12.13, p. 229; lognormal variance with pedigree 0.162, pedigree (1,1,3,1,1)
  Calculation from ranges
  Amount was scaled to the amount of reference product.
- Hydrocarbons, aromatic [air, urban air close to ground]: 9.76959e-8 kg; = 1.0638E-08 * scaling_factor; source Jungbluth, N. 2007; lognormal variance with pedigree 0.092, pedigree (1,1,3,1,1)
  (same comment as for Methane, fossil)
- Cadmium, ion [water, surface water]: 1.03748e-9 kg; = 1.1297E-10 * scaling_factor; source Jungbluth, N. 2007, p. Tab. 12.26, p. 238; lognormal variance with pedigree 0.6527, pedigree (2,2,3,1,1)
  Literature data for this country
  Amount was scaled to the amount of reference product.
- Mercury [water, surface water]: 4.47677e-10 kg; = 4.8747E-11 * scaling_factor; source Jungbluth, N. 2007, p. Tab. 12.26, p. 238; lognormal variance with pedigree 0.6527, pedigree (2,2,3,1,1)
  Literature data for this country
  Amount was scaled to the amount of reference product.
- Sulfide [water, surface water]: 1.91865e-7 kg; = 2.0892E-08 * scaling_factor; source Jungbluth, N. 2007, p. Tab. 12.26, p. 238; lognormal variance with pedigree 0.0427, pedigree (2,2,3,1,1)
  Literature data for this country
  Amount was scaled to the amount of reference product.
- Mercury [air, urban air close to ground]: 1.37755e-9 kg; = 1.5E-10 * scaling_factor; source Jungbluth, N. 2007; lognormal variance with pedigree 1.632, pedigree (1,1,3,1,1)
  Calculation from ranges
  Amount was scaled to the amount of reference product.
- Water [air, unspecified]: 0.000887758 m3; name water_to_air_unspecified; = (water_decarbonised_input/1000)*fraction_WDC_to_air+water_cooling_UNO_input*fraction_CW_to_air; lognormal variance with pedigree 0.0427, pedigree (2,2,3,1,1)
  (same comment as for Water)
  property fraction, origin: salt water 0; name fraction_origin_salt_water
  property fraction, origin: fresh water 0.0062301; name fraction_origin_fresh_water
  property fraction, origin: unspecified 0.99377; name fraction_origin_unspecified
- AOX, Adsorbable Organic Halogen as Cl [water, surface water]: 1.51356e-8 kg; = 1.6481E-09 * scaling_factor; source Jungbluth, N. 2007, p. Tab. 12.26, p. 238; lognormal variance with pedigree 0.0427, pedigree (2,2,3,1,1)
  Literature data for this country
  Amount was scaled to the amount of reference product.
- Sulfite [water, surface water]: 6.43812e-6 kg; = 7.0104E-07 * scaling_factor; source Jungbluth, N. 2007, p. Tab. 12.26, p. 238; lognormal variance with pedigree 0.0427, pedigree (2,2,3,1,1)
  Literature data for this country
  Amount was scaled to the amount of reference product.
- BOD5, Biological Oxygen Demand [water, surface water]: 5.99666e-6 kg; = 6.5297E-07 * scaling_factor; source Jungbluth, N. 2007, p. Tab. 12.26, p. 238; lognormal variance with pedigree 0.0427, pedigree (2,2,3,1,1)
  Literature data for this country
  Amount was scaled to the amount of reference product.
- Vanadium [air, urban air close to ground]: 2.48822e-5 kg; = 2.7094E-06 * scaling_factor; source Jungbluth, N. 2007; lognormal variance with pedigree 1.392, pedigree (1,1,3,1,1)
  (same comment as for Chromium)
- Chromium, ion [water, surface water]: 4.26361e-9 kg; = 4.6426E-10 * scaling_factor; source Jungbluth, N. 2007, p. Tab. 12.26, p. 238; lognormal variance with pedigree 0.6527, pedigree (2,2,3,1,1)
  Literature data for this country
  Amount was scaled to the amount of reference product.
- Nickel, ion [water, surface water]: 9.8798e-8 kg; = 1.0758E-08 * scaling_factor; source Jungbluth, N. 2007, p. Tab. 12.26, p. 238; lognormal variance with pedigree 0.6527, pedigree (2,2,3,1,1)
  Literature data for this country
  Amount was scaled to the amount of reference product.
- Ammonia [air, urban air close to ground]: 9.18367e-7 kg; = 1E-07 * scaling_factor; source Jungbluth, N. 2007, p. p.232; lognormal variance with pedigree 1.102, pedigree (1,1,3,1,1)
  Calculation from ranges
  Amount was scaled to the amount of reference product.
- Beryllium [air, urban air close to ground]: 5.12192e-10 kg; = 5.5772E-11 * scaling_factor; source Jungbluth, N. 2007; lognormal variance with pedigree 0.6927, pedigree (3,3,5,3,1)
  Literature
  Amount was scaled to the amount of reference product.
- Sulfate [water, surface water]: 0.000713094 kg; = 7.7648E-05 * scaling_factor; source Jungbluth, N. 2007, p. Tab. 12.26, p. 238; lognormal variance with pedigree 0.0427, pedigree (2,2,3,1,1)
  Literature data for this country
  Amount was scaled to the amount of reference product.
- Particulates, > 10 um [air, urban air close to ground]: 0.000248822 kg; = 2.7094E-05 * scaling_factor; source Jungbluth, N. 2007, p. Tab. 12.17 / Tab. 12.18; lognormal variance with pedigree 0.0427, pedigree (2,2,3,1,1)
  Literature data for this country
  Amount was scaled to the amount of reference product.
- Carbon dioxide, fossil [air, urban air close to ground]: 0.706224 kg; = 0.0769 * scaling_factor; source Jungbluth, N. 2007, p. Tab. 12.12, p. 229; lognormal variance with pedigree 0.0027, pedigree (2,2,3,1,1)
  Literature data for this country
  Amount was scaled to the amount of reference product.
- DOC, Dissolved Organic Carbon [water, surface water]: 3.66677e-6 kg; = 3.9927E-07 * scaling_factor; source Jungbluth, N. 2007; lognormal variance with pedigree 0.0427, pedigree (2,2,3,1,1)
  Calculated as equal to TOC.
  Amount was scaled to the amount of reference product.
- Thallium [water, surface water]: 1.32171e-8 kg; = 1.4392E-09 * scaling_factor; source Jungbluth, N. 2007, p. Tab. 12.26, p. 238; lognormal variance with pedigree 0.6527, pedigree (2,2,3,1,1)
  Literature data for this country
  Amount was scaled to the amount of reference product.
- Tin, ion [water, surface water]: 4.26361e-10 kg; = 4.6426E-11 * scaling_factor; source Jungbluth, N. 2007, p. Tab. 12.26, p. 238; lognormal variance with pedigree 0.6527, pedigree (2,2,3,1,1)
  Literature data for this country
  Amount was scaled to the amount of reference product.
- Lead [water, surface water]: 1.78081e-8 kg; = 1.9391E-09 * scaling_factor; source Jungbluth, N. 2007, p. Tab. 12.26, p. 238; lognormal variance with pedigree 0.6527, pedigree (2,2,3,1,1)
  Literature data for this country
  Amount was scaled to the amount of reference product.
- Vanadium, ion [water, surface water]: 2.45526e-7 kg; = 2.6735E-08 * scaling_factor; source Jungbluth, N. 2007, p. Tab. 12.26, p. 238; lognormal variance with pedigree 0.6527, pedigree (2,2,3,1,1)
  Literature data for this country
  Amount was scaled to the amount of reference product.
- Chloride [water, surface water]: 8.72339e-5 kg; = 9.4988E-06 * scaling_factor; source Jungbluth, N. 2007, p. Tab. 12.26, p. 238; lognormal variance with pedigree 0.0427, pedigree (2,2,3,1,1)
  Literature data for this country
  Amount was scaled to the amount of reference product.
- Benzo(a)pyrene [air, urban air close to ground]: 1.37755e-10 kg; = 1.5E-11 * scaling_factor; source Jungbluth, N. 2007; lognormal variance with pedigree 0.3707, pedigree (3,3,5,3,3)
  Literature
  Amount was scaled to the amount of reference product.
- Arsenic [air, urban air close to ground]: 1.64222e-7 kg; = 1.7882E-08 * scaling_factor; source Jungbluth, N. 2007, p. Tab. 12.23, Tab. 12.24; lognormal variance with pedigree 1.212, pedigree (1,1,3,1,1)
  (same comment as for Chromium)
- Nitrogen [water, surface water]: 2.9149e-5 kg; = 3.174E-06 * scaling_factor; source Jungbluth, N. 2007, p. Tab. 12.26, p. 238; lognormal variance with pedigree 0.0427, pedigree (2,2,3,1,1)
  Literature data for this country
  Amount was scaled to the amount of reference product.
- Particulates, > 2.5 um, and < 10um [air, urban air close to ground]: 0.000124411 kg; = 1.3547E-05 * scaling_factor; source Jungbluth, N. 2007, p. Tab. 12.17 / Tab. 12.18; lognormal variance with pedigree 0.1227, pedigree (2,2,3,1,1)
  Literature data for this country
  Amount was scaled to the amount of reference product.
- Ethanol [air, urban air close to ground]: 4.88489e-6 kg; = 5.3191E-07 * scaling_factor; source Jungbluth, N. 2007; lognormal variance with pedigree 0.092, pedigree (1,1,3,1,1)
  (same comment as for Methane, fossil)
- TOC, Total Organic Carbon [water, surface water]: 3.66677e-6 kg; = 3.9927E-07 * scaling_factor; source Jungbluth, N. 2007, p. Tab. 12.26, p. 238; lognormal variance with pedigree 0.0427, pedigree (2,2,3,1,1)
  Literature data for this country
  Amount was scaled to the amount of reference product.
- Manganese [water, surface water]: 1.2791e-8 kg; = 1.3928E-09 * scaling_factor; source Jungbluth, N. 2007, p. Tab. 12.26, p. 238; lognormal variance with pedigree 0.6527, pedigree (2,2,3,1,1)
  Literature data for this country
  Amount was scaled to the amount of reference product.
- Phosphorus [water, surface water]: 6.60866e-8 kg; = 7.1961E-09 * scaling_factor; source Jungbluth, N. 2007, p. Tab. 12.26, p. 238; lognormal variance with pedigree 0.0427, pedigree (2,2,3,1,1)
  Literature data for this country
  Amount was scaled to the amount of reference product.
- Iron [air, urban air close to ground]: 6.42857e-7 kg; = 7E-08 * scaling_factor; source Jungbluth, N. 2007; lognormal variance with pedigree 0.7107, pedigree (3,3,5,3,3)
  Literature
  Amount was scaled to the amount of reference product.
- Carbon dioxide, fossil [air, unspecified]: 0.00567468 kg; = 0.00061791 * scaling_factor; source Jungbluth, N. 2007, p. Tab. 12.29, Tab. 12.30; lognormal variance with pedigree 0.0206, pedigree (2,5,3,1,1)
  Calculation for limestone use
  Amount was scaled to the amount of reference product.
- Suspended solids, unspecified [water, surface water]: 5.51186e-6 kg; = 6.0018E-07 * scaling_factor; source Jungbluth, N. 2007, p. Tab. 12.26, p. 238; lognormal variance with pedigree 0.0427, pedigree (2,2,3,1,1)
  Literature data for this country
  Amount was scaled to the amount of reference product.
- COD, Chemical Oxygen Demand [water, surface water]: 6.55889e-6 kg; = 7.1419E-07 * scaling_factor; source Jungbluth, N. 2007, p. Tab. 12.26, p. 238; lognormal variance with pedigree 0.0427, pedigree (2,2,3,1,1)
  Literature data for this country
  Amount was scaled to the amount of reference product.
- Molybdenum [air, urban air close to ground]: 1.8911e-7 kg; = 2.0592E-08 * scaling_factor; source Jungbluth, N. 2007; lognormal variance with pedigree 1.212, pedigree (1,1,3,1,1)
  (same comment as for Chromium)
- Nitrogen oxides [air, urban air close to ground]: 0.00230933 kg; = 0.00025146 * scaling_factor; source Jungbluth, N. 2007, p. Tab. 12.15 p. 231; lognormal variance with pedigree 0.0427, pedigree (2,2,3,1,1)
  Literature data for this country
  Amount was scaled to the amount of reference product.
- Calcium [air, urban air close to ground]: 2.7551e-7 kg; = 3E-08 * scaling_factor; source Jungbluth, N. 2007, p. Tab. 12.25; lognormal variance with pedigree 0.1007, pedigree (3,3,5,3,3)
  Literature
  Amount was scaled to the amount of reference product.
- Hydrocarbons, unspecified [water, surface water]: 1.28792e-7 kg; = 1.4024E-08 * scaling_factor; source Jungbluth, N. 2007, p. Tab. 12.26, p. 238; lognormal variance with pedigree 0.3027, pedigree (2,2,3,1,1)
  Literature data for this country
  Amount was scaled to the amount of reference product.
- Manganese [air, urban air close to ground]: 2.7371e-7 kg; = 2.9804E-08 * scaling_factor; source Jungbluth, N. 2007, p. Tab. 12.23, Tab. 12.24; lognormal variance with pedigree 1.212, pedigree (1,1,3,1,1)
  (same comment as for Chromium)
- Lead [air, urban air close to ground]: 8.46009e-7 kg; = 9.2121E-08 * scaling_factor; source Jungbluth, N. 2007; lognormal variance with pedigree 1.212, pedigree (1,1,3,1,1)
  (same comment as for Chromium)
- Dinitrogen monoxide [air, urban air close to ground]: 3.67347e-5 kg; = 4E-06 * scaling_factor; source Jungbluth, N. 2007, p. Tab. 12.16 p. 232; lognormal variance with pedigree 0.352, pedigree (1,1,3,1,1)
  Calculation from ranges
  Amount was scaled to the amount of reference product.
- Chromium VI [air, urban air close to ground]: 2.85805e-9 kg; = 3.1121E-10 * scaling_factor; source Jungbluth, N. 2007, p. Tab. 12.23, Tab. 12.24; lognormal variance with pedigree 2.2927, pedigree (3,3,5,3,1)
  Literature, basic uncertainity = 20
  Amount was scaled to the amount of reference product.
- Hypochlorite [water, surface water]: 3.4898e-6 kg; = 3.8E-07 * scaling_factor; source Jungbluth, N. 2007; lognormal variance with pedigree 0.1021, pedigree (3,4,5,3,3)
  Literature
  Amount was scaled to the amount of reference product.
- Iron, ion [water, surface water]: 4.24745e-7 kg; = 4.625E-08 * scaling_factor; source Jungbluth, N. 2007, p. Tab. 12.26, p. 238; lognormal variance with pedigree 0.6527, pedigree (2,2,3,1,1)
  Literature data for this country
  Amount was scaled to the amount of reference product.
- Fluoride [water, surface water]: 7.24812e-7 kg; = 7.8924E-08 * scaling_factor; source Jungbluth, N. 2007, p. Tab. 12.26, p. 238; lognormal variance with pedigree 0.0427, pedigree (2,2,3,1,1)
  Literature data for this country
  Amount was scaled to the amount of reference product.
- Cobalt [air, urban air close to ground]: 8.70888e-7 kg; = 9.483E-08 * scaling_factor; source Jungbluth, N. 2007, p. Tab. 12.23, Tab. 12.24; lognormal variance with pedigree 1.212, pedigree (1,1,3,1,1)
  (same comment as for Chromium)
- Oils, unspecified [water, surface water]: 1.97596e-7 kg; = 2.1516E-08 * scaling_factor; source Jungbluth, N. 2007, p. Tab. 12.26, p. 238; lognormal variance with pedigree 0.3027, pedigree (2,2,3,1,1)
  Literature data for this country
  Amount was scaled to the amount of reference product.
- Hydrogen chloride [air, urban air close to ground]: 4.14184e-7 kg; = 4.51E-08 * scaling_factor; source Jungbluth, N. 2007, p. Tab. 12.25; lognormal variance with pedigree 0.0612, pedigree (2,3,3,1,3)
  Literature
  Amount was scaled to the amount of reference product.
- Nickel [air, urban air close to ground]: 6.86755e-6 kg; = 7.478E-07 * scaling_factor; source Jungbluth, N. 2007; lognormal variance with pedigree 1.212, pedigree (1,1,3,1,1)
  (same comment as for Chromium)

## Sampling procedure
Literature, environmental reports and questionnaires

## Extrapolations
This dataset has been extrapolated from year 2015 to the year of the calculation (2021). The uncertainty has been adjusted accordingly.

## Review by Carl Vadenbo 2015-07-23
The update of the whole electricity sector for the ecoinvent v3.2 database consist of hundreds of datasets. All these datasets have passed through a streamlined review processes where the underlying modelling of production volumes, technology shares and efficiencies was reviewed in detail prior to the datasets being submitted to the database.
