# cobwork production

Dataset: EcoSpold 2, unit process
Geography: RoW
Time period: 1994-01-01 to 2021-12-31
Technology level: current
Classification: EcoSpold01Categories: mortar and plaster/production
Classification: ISIC rev.4 ecoinvent: 2392:Manufacture of clay building materials
Tags: ConvertedDataset
Scenario: Business-as-Usual
System model: Allocation, cut-off by classification
Generated by: Daniel Kellenberger (obsolete)
Published in: Kellenberger D. 2004
Database: ecoinvent
isCopyrightProtected: true
accessRestrictedTo: 1

## General comment
mixing of raw materials with machines, depositing by hand and drying by air. For the transportation of the raw materials an average distance of 20 km has been assumed.
[This dataset was already contained in the ecoinvent database version 2. It was not individually updated during the transfer to ecoinvent version 3. Life Cycle Impact Assessment results may still have changed, as they are affected by changes in the supply chain, i.e. in other datasets. This dataset was generated following the ecoinvent quality guidelines for version 2. It may have been subject to central changes described in the ecoinvent version 3 change report (http://www.ecoinvent.org/database/ecoinvent-version-3/reports-of-changes/), and the results of the central updates were reviewed extensively. The changes added e.g. consistent water flows and other information throughout the database. The documentation of this dataset can be found in the ecoinvent reports of version 2, which are still available via the ecoinvent website. The change report linked above covers all central changes that were made during the conversion process.]

## Included activities end
It includes the raw materials clay in ground, wooden chips and water. It includes also the digging, crumbling and mixing of clay, and the transports of the raw materials to the construction site. No packaging and no infrastructure is taken into account.

## Geography
For some exchanges CH, RER and GLO modules have been used as proxy.

## Technology
The raw materials (clay and wooden chips) are mixed with water and smacked by hand on mainly hurdle work.

## Parameters
- fraction, process water, to air: 0.15 dimensionless; name fraction_PW_to_air; lognormal variance with pedigree 0.092025, pedigree (4,4,3,2,4)
- fraction, tap water, to air: 0.15 dimensionless; name fraction_TW_to_air; lognormal variance with pedigree 0.092025, pedigree (4,4,3,2,4)

## Reference product
- cobwork: 1 kg; CPC 37330: Refractory cements, mortars, concretes and similar compositions n.e.c.; By-product classification allocatable product
  EcoSpold01Location=CH
  production volume 3.96633 kg
    This is a placeholder value that does not reflect real-world production volumes. This dataset does not currently require a real-world production volume to work in the database framework, and no actual data were collected yet. This has no negative effect on the results of the ecoinvent database.
  property heating value, net 1.73 MJ
    LHV is calculated based on the Carbon content of the product. More details can be found on the respective documentation.
  property price 0.0150698 EUR2005
    Calculated based on inputs: The price of the product has been calculated as a sum of the values of the material and energy inputs for this product. This value is therefore a rough estimation. It may underestimate the real price since there are additional expenses when producing any product. These expences can include for example labour costs, treatment of waste materials and profit for the producer. Please consider carefully whether this level of data quality is acceptable for your application.
  property carbon content, non-fossil 0.0572054
    Cobwork is a mixture of clay and an additive which in this study are wooden chips (ecoinvent v2.2 report 7, part XXI). Density of moist (U=40%) wooden chips is 264.04 kg/m3wood. As cobwork is dry, it's the dry mass of the 0.000614 m3 of chips that has been used to calculate the biogenic C content of cobwork. That is, 0.1158 kg (Wet mass/(1+water content)). C content of dry mass is 0.494 kgC/kg dry wood (table 9.3 & 9.4 ecoinvent v2.2 report 6_IX).
  property carbon content, fossil 0
    Raw materials are listed in Tab 5.2, ecoinvent v2.2 report 7, part XVII. C content is calculated after C content of raw materials
  property carbon content 0.0572054
    carbon content on a dry matter basis (reserved; not for manual entry)
  properties: water content 0, dry mass 1 kg, wet mass 1 kg, water in wet mass 0 kg, carbon allocation 0.0572054 kg

## Inputs from technosphere
- diesel, burned in building machine: 0.00895 MJ; lognormal variance with pedigree 0.102, pedigree (3,5,5,5,1)
  EcoSpold01Location=GLO
  properties: heating value, net 1 MJ
- tap water: 0 kg; name tap_water_input; pedigree (1,1,1,1,1)
  EcoSpold01Location=RER
  estimated
  properties: carbon content, fossil 0.00178991, water content 2962.17, dry mass 0.000337476 kg, wet mass 1 kg
  note on carbon content, fossil: Bicarbonate content is 2.93 mol/m3. CO2 content is 0.1 mol/m3 (ecoinvent v2.2 report 8, Tab 93.1).
- wood chips, dry, measured as dry mass: 0.103766 kg; lognormal variance with pedigree 0.692, pedigree (1,1,5,5,1)
  estimated
  EcoSpold01Location=RER
  properties: heating value, net 9.99 MJ, water content 0.4, carbon content, non-fossil 0.494, wet mass 1.4 kg, dry mass 1 kg
  note on carbon content, non-fossil: C content of dry mass is 0.494 kgC/kg dry wood (ecoinvent v2.2 report 9).
- electricity, medium voltage: 0 kWh; pedigree (1,1,1,1,1)
  EcoSpold01Location=DE
- tap water: 0.00105589, 0.000127101, 0.000210055, 0.0451671, 0.00529675, 0.000137794, 0.000391952, 0.0606134 kg (8 entries); lognormal variance with pedigree 0.692, pedigree (1,1,5,5,1)
  EcoSpold01Location=RER
  estimated
- electricity, medium voltage: 1.80037e-5, 3.45233e-6, 7.9271e-5, 0.000262452, 5.79575e-5, 0.00084294, 0.000118813, 0.00038711 kWh (8 entries); lognormal variance with pedigree 0.102, pedigree (3,5,5,5,1)
  EcoSpold01Location=DE

## Inputs from nature
- Clay, bentonite, in ground [natural resource, in ground]: 1.01 kg; lognormal variance with pedigree 0.692, pedigree (1,1,5,5,1)
  estimated

## Emissions to nature
- Water [water, unspecified]: 9.605e-5 m3; name water_to_water_unspecified; lognormal variance with pedigree 0.0827, pedigree (2,2,5,5,1)
  Calculated value based on literature values and expert opinion. See comments in the parametres' comment field.
  property carbon content, fossil 0; name C_content_fossil
  property dry mass 0 kg; name DM
  property fraction, origin: unspecified 0; name fraction_origin_unspecified_Ww
  property fraction, origin: fresh water 1; name fraction_origin_fresh_water_Ww
  property fraction, origin: salt water 0; name fraction_origin_salt_water_Ww
  property carbon content, non-fossil 0; name C_content_non_fossil
  property wet mass 1000 kg; name WM
  property water in wet mass 1000 kg; name WWM
- Water [air, unspecified]: 1.695e-5 m3; name water_to_air_unspecified; lognormal variance with pedigree 0.0827, pedigree (2,2,5,5,1)
  (same comment as for Water)
  property fraction, origin: fresh water 1; name fraction_origin_fresh_water
  property fraction, origin: unspecified 0; name fraction_origin_unspecified
  property fraction, origin: salt water 0; name fraction_origin_salt_water

## Sampling procedure
Literature

## Extrapolations
See geography This dataset has been copied from an original dataset covering the geography CH. The uncertainty has been adjusted accordingly.

## Review by Roberto Dones 2004-04-05
passed
