# treatment of waste wood, post-consumer, sorting and shredding

Dataset: EcoSpold 2, unit process
Geography: RoW
Time period: 2004-01-01 to 2021-12-31
Technology level: current
Classification: ISIC rev.4 ecoinvent: 3830:Materials recovery
Classification: EcoSpold01Categories: wood energy/fuels
Tags: ConvertedDataset
Scenario: Business-as-Usual
System model: Allocation, cut-off by classification
Share of production covered: 1 %
Generated by: Edgard Gnansounou
Published in: Jungbluth N. 2007
Database: ecoinvent
isCopyrightProtected: true
accessRestrictedTo: 1

## General comment
The distribution of wood qualities between hard and soft wood is 28% hard wood and 72% soft wood. The volume refers to the bulked volume. The bulk density of wood chips is 239 and 169 kg/m3 of dry mass, for hard and soft wood respectively (i.e.188.6 kg/m3 of dry mass overall). Lower heating value = 3640 MJ/m3. Waste wood does not go through a specific treatment process.
[This dataset was already contained in the ecoinvent database version 2. It was not individually updated during the transfer to ecoinvent version 3. Life Cycle Impact Assessment results may still have changed, as they are affected by changes in the supply chain, i.e. in other datasets. This dataset was generated following the ecoinvent quality guidelines for version 2. It may have been subject to central changes described in the ecoinvent version 3 change report (http://www.ecoinvent.org/database/ecoinvent-version-3/reports-of-changes/), and the results of the central updates were reviewed extensively. The changes added e.g. consistent water flows and other information throughout the database. The documentation of this dataset can be found in the ecoinvent reports of version 2, which are still available via the ecoinvent website. The change report linked above covers all central changes that were made during the conversion process.]

## Included activities end
This process includes transport of waste urban and demolition wood to the chopping facility (50 km), infrastructure, chopping of the wood into chips in the sawmill, consumption of water and disposal of effluents and wastes from sorting. Includes also the carbon dioxide credit. No specific treatment of the wood is considered. The gross calorific value of the biomass is not included as the product comes from waste.

## Geography
Data for Austria (process) and Switzerland (mix) used for central Europe

## Technology
Chopping of industrial residual wood in stationary electric chopper.

## Parameters
- fraction, process water, to air: 0 dimensionless
- fraction, tap water, to air: 0 dimensionless

## Reference product
- waste wood, post-consumer: 0 kg; CPC 3928: Sawdust and wood waste and scrap; By-product classification Recyclable
  production volume 0 kg; name wood_RP_PV; = (1/0.008417)* 200000
    Calculated production volume (PV) based on knowledge of the regional production volumes. The PV of the global activity has been extrapolated using the nominal GDP of 2005 (source: United Nations, http://data.un.org/Glossary.aspx?q=GDP+%28current+US%24%29, accessed 20130726 and 20130312).
  property heating value, net 9.99 MJ
    LHV is calculated based on the Carbon content of the product. More details can be found on the respective documentation.
  property price 0.079 EUR2005
    Temporary price data. Calculated as 90% of purchasers price based on: 2005 import prices (total trades (USD) divided by total weight (kg) in biggest economies of the world: EU27, USA, Brasil, China, India, Japan and Russia) from UN Commodity Trade Statistics Database (http://data.un.org/Explorer.aspxDatabase [Accessed 2011.06.23]). Commodity: Sawdust, wood waste or scrap
  property carbon content 0.494
    carbon content on a dry matter basis (reserved; not for manual entry)
  properties: carbon content, fossil 0, dry mass 1 kg, wet mass 1.4 kg, water content 0.4, carbon content, non-fossil 0.494, water in wet mass 0.4 kg, carbon allocation 0.494 kg
- wood chips, from post-consumer wood, measured as dry mass: 1 kg; name wood_chips_ByP; By-product classification allocatable product; CPC 3928: Sawdust and wood waste and scrap
  EcoSpold01Location=CH
  production volume 2.35614e7 kg; = ABS( wood_chips_ByP/ wood_RP)* wood_RP_PV
  properties: water in wet mass 0.4 kg, price 0.107 EUR2005, heating value, net 9.99 MJ, carbon content, fossil 0, wet mass 1.4 kg, carbon content, non-fossil 0.494, water content 0.4, dry mass 1 kg, carbon content 0.494, carbon allocation 0.494 kg

## By-products
- wood chips, from post-consumer wood, measured as dry mass: 0 kg; By-product classification allocatable product; CPC 3928: Sawdust and wood waste and scrap
  EcoSpold01Location=CH
  production volume 0 kg; = ABS( wood_chips_ByP/ wood_RP)* wood_RP_PV
    Extrapolated from Swiss data using proportional GDP (i.e. multiplying by 120)
  property price 0.107 EUR2005
    Expert judgement (Urs Luginbühl, Swiss Sawmilling industry, personal communication in June 2014). Wood chips from softwood should have a price of 0.101 EUR/kg. Woodchips from hardwood should have a price of 0.112 EUR/kg. Average of these two values is used. Cross-reference; FAOSTAT database; http://faostat.fao.org/site/626/DesktopDefault.aspx?PageID=626#ancor; Average import/export prices of EU for 'chips and particles'. Price: 48.76 Euro/m3. The density of the wood chips is 650 kg/m3. The price is recalculated accordingly.
  property heating value, net 9.99 MJ
    (same comment as for waste wood, post-consumer)
  property carbon content, non-fossil 0.494
    C content of dry mass is 0.494 kgC/kg dry wood (ecoinvent v2.2 report 6_IX & ecoinvent v2.2 report 9).
  property carbon content 0.494
    carbon content on a dry matter basis (reserved; not for manual entry)
  properties: water in wet mass 0.4 kg, carbon content, fossil 0, wet mass 1.4 kg, water content 0.4, dry mass 1 kg, carbon allocation 0.494 kg

## Inputs from technosphere
- wastewater from particleboard production: -4.35546e-5 m3; name wastewater_output; lognormal variance with pedigree 0.054, pedigree (1,4,5,5,1)
  Based on the data from a producer of waste wood chips in CH.
  EcoSpold01Location=CH
  Uncertainty: Based on the data from a producer of waste wood chips in CH.
  production volume 1026.21 m3; = ABS( wastewater_output/ wood_RP)* wood_RP_PV
    Calculated from the production volume of waste wood, 40% water on dry mass basis in proportion to the respective output amounts.
  property price 0 EUR2005; name wastewater_output_price_EUR2005
  properties: wet mass 1000 kg, carbon content, non-fossil 0.377131, dry mass 0.337476 kg, water content 2962.17
  note on carbon content, non-fossil: BOD= 0.196 kg/m3 (Tab A.17, ecoinvent v2.2 report 13_I). BOD was converted to TOC, using conversion factors in Tab 4.10 (ecoinvent v2.2 report 13_IV). TOC was considered as Total Carbon.
- wood chipping, industrial residual wood, stationary electric chipper: 1 kg; lognormal variance with pedigree 0.038, pedigree (3,5,4,5,3)
  Expert estimate
  EcoSpold01Location=RER
  Uncertainty: Expert estimate
- tap water: 0 kg; pedigree (1,1,1,1,1)
  (same comment as for wastewater from particleboard production)
  properties: water content 2962.17, wet mass 1 kg, dry mass 0.000337476 kg, carbon content, fossil 0.00178991
  note on carbon content, fossil: Bicarbonate content is 2.93 mol/m3. CO2 content is 0.1 mol/m3 (ecoinvent v2.2 report 8, Tab 93.1).
- sawmill: 4.13568e-11 unit; lognormal variance with pedigree 0.354, pedigree (1,4,5,5,1)
  EcoSpold01Location=RER
  Based on the data from a producer of waste wood chips in CH.
  Uncertainty: Based on the data from a producer of waste wood chips in CH.
- waste building wood, chrome preserved: -0.00150186 kg; name waste_building_ByP; lognormal variance with pedigree 0.054, pedigree (1,4,5,5,1)
  (same comment as for wastewater from particleboard production)
  production volume 35385.9 kg; = ABS(waste_building_ByP/ wood_RP)* wood_RP_PV
    (same comment as for wastewater from particleboard production)
  property price 0 EUR2005; name waste_building_ByP_price_EUR2005
  properties: carbon content, non-fossil 0.484262, wet mass 1 kg, water content 0.25, dry mass 0.8 kg, heating value, net 11.63 MJ
  note on carbon content, non-fossil: C content per kg DM was calculated using information in Tab A.4, ecoinvent v2.2 report 13_I
- waste wood, post-consumer: 1 kg
  production volume 2.35614e7 kg
  properties: dry mass 1 kg, heating value, net 9.99 MJ, wet mass 1.4 kg, water content 0.4, carbon content, non-fossil 0.494, price 0.079 EUR2005
- tap water: 2.1579e-6, 2.59754e-7, 4.29286e-7, 9.23072e-5, 1.08249e-5, 2.81607e-7, 8.01026e-7, 0.000123875 kg (8 entries); lognormal variance with pedigree 0.054, pedigree (1,4,5,5,1)
  (same comment as for wastewater from particleboard production)

## Emissions to nature
- Water [air, unspecified]: 0 m3
- Water [water, unspecified]: 0 m3
  property dry mass 0 kg; name DM
  property wet mass 1000 kg; name WM
  property carbon content, non-fossil 0; name C_content_non_fossil
  property water in wet mass 1000 kg; name WWM
  property carbon content, fossil 0; name C_content_fossil

## Sampling procedure
Federal office of statistics (CH) and IEA task 33 country reports.

## Extrapolations
none This dataset has been copied from an original dataset covering the geography CH. The uncertainty has been adjusted accordingly.

## Review by Niels Jungbluth 2006-10-17
Passed.
none
