# foam glass factory construction

Dataset: EcoSpold 2, unit process
Geography: BE
Time period: 2005-01-01 to 2021-12-31
Technology level: current
Classification: ISIC rev.4 ecoinvent: 4290:Construction of other civil engineering projects
Classification: EcoSpold01Categories: insulation materials/production
Tags: ConvertedDataset
Scenario: Business-as-Usual
System model: Allocation, cut-off by classification
Share of production covered: 100 %
Generated by: Philpp Thalmann
Published in: Kellenberger D. 2007
Database: ecoinvent
isCopyrightProtected: true
accessRestrictedTo: 1

## General comment
[This dataset was already contained in the ecoinvent database version 2. It was not individually updated during the transfer to ecoinvent version 3. Life Cycle Impact Assessment results may still have changed, as they are affected by changes in the supply chain, i.e. in other datasets. This dataset was generated following the ecoinvent quality guidelines for version 2. It may have been subject to central changes described in the ecoinvent version 3 change report (http://www.ecoinvent.org/database/ecoinvent-version-3/reports-of-changes/), and the results of the central updates were reviewed extensively. The changes added e.g. consistent water flows and other information throughout the database. The documentation of this dataset can be found in the ecoinvent reports of version 2, which are still available via the ecoinvent website. The change report linked above covers all central changes that were made during the conversion process.]

## Included activities end
Includes the buildings, and machines in belgium

## Geography
Data are from one company in Belgium which covers nearly 100% of the European foam glass market. For some exchanges RER-, CH- and GLO-modules are used as proxy. No energy certificates are accounted

## Technology
All data refer to the year 2005.

## Reference product
- foam glass factory: 1 unit; By-product classification allocatable product; CPC 53269: Other constructions for manufacturing
  EcoSpold01Location=BE
  production volume 0.0330197 unit
    This is a placeholder value that does not reflect real-world production volumes. This dataset does not currently require a real-world production volume to work in the database framework, and no actual data were collected yet. This has no negative effect on the results of the ecoinvent database. The placeholder value of this activity was scaled according to the nominal GDP of 2005 (source: United Nations, http://data.un.org/Glossary.aspx?q=GDP+%28current+US%24%29, accessed 20130726) to reflect an appropriate share of the global production volume, which is also a placeholder value.
  property price 7.50028e6 EUR2005
    Calculated based on inputs: The price of the product has been calculated as a sum of the values of the material and energy inputs for this product. This value is therefore a rough estimation. It may underestimate the real price since there are additional expenses when producing any product. These expences can include for example labour costs, treatment of waste materials and profit for the producer. Please consider carefully whether this level of data quality is acceptable for your application.

## Inputs from technosphere
- building, multi-storey: 5400 m3; lognormal variance with pedigree 0.4221, pedigree (3,2,5,1,4)
  activityLink introduced to establish a direct link to the corresponding regional supply of this product
  EcoSpold01Location=RER
- conveyor belt: 1000 m; lognormal variance with pedigree 0.4207, pedigree (2,2,5,1,4)
  (same comment as for building, multi-storey)
- industrial machine, heavy, unspecified: 3e6 kg; lognormal variance with pedigree 0.4221, pedigree (3,2,5,1,4)
  EcoSpold01Location=RER
  activityLink introduced to establish a direct link to the corresponding regional supply of this product
- building, hall: 35826 m2; lognormal variance with pedigree 0.4221, pedigree (3,2,5,1,4)
  EcoSpold01Location=CH

## Inputs from nature
- Transformation, from unspecified [natural resource, land]: 171100 m2; lognormal variance with pedigree 0.2421, pedigree (3,2,5,1,4)
- Occupation, industrial area [natural resource, land]: 171100 m2*year; lognormal variance with pedigree 0.1621, pedigree (3,2,5,1,4)
- Transformation, to industrial area [natural resource, land]: 126865 m2; lognormal variance with pedigree 0.2421, pedigree (3,2,5,1,4)
- Transformation, to traffic area, road network [natural resource, land]: 44197 m2; lognormal variance with pedigree 0.2421, pedigree (3,2,5,1,4)

## Sampling procedure
survey

## Extrapolations
This dataset has been extrapolated from year 2005 to the year of the calculation (2021). The uncertainty has been adjusted accordingly.

## Review by Hans-Jörg Althaus 2007-08-13
passed
