# landed hake to generic market for marine fish

Dataset: EcoSpold 2, unit process
Geography: GLO
Time period: 2017-01-01 to 2021-12-31
Technology level: current
Classification: ISIC rev.4 ecoinvent: 0311:Marine fishing
Scenario: Business-as-Usual
System model: Allocation, cut-off by classification
Generated by: Avraam Symeonidis
Database: ecoinvent
isCopyrightProtected: true
accessRestrictedTo: 1

## General comment
This is a linking (transfering) activity which links landed hake, to the generic market for marine fish.

## Included activities start
The activity starts with the reception of landed hake.

## Included activities end
The activity models the part of hake which contributes to the generic market for marine fish.

## Reference product
- marine fish: 1 kg; By-product classification allocatable product; CPC 04211: Wild freshwater fish, live, fresh or chilled
  production volume 8.64583e7 kg
    Production volume calculated based on the global production volume that is supplying this this linking activity:
    hake, capture by trawler and landing whole, fresh
  property price 3.28 EUR2005
    Temporary price. Calulated as the average of the price of tuna and hake.
  property protein content 0.233359
    Value has been weighted averaged based on the production volume of the five different fish adn their respective properties.
    Namely: 1. landed hake by-catch, fresh - PV: 5518600 kg
    2. landed anchovy, fresh - PV: 110000000 kg
    3. landed hake, fresh - PV: 86458333 kg
    4. landed tuna, frozen, EPO - PV: 554761905 kg
    5. landed tuna by-catch, fresh, EPO - PV: 23115079.38 kg
  property fat content 0.0325441
    (same comment as for marine fish)
  property energy content 5.92472 MJ
    (same comment as for marine fish)
  property ash content 0.0154835 kg
    (same comment as for marine fish)
  property carbon content, non-fossil 0.469101
    (same comment as for marine fish)
  property carbon content 0.469101
    carbon content on a dry matter basis (reserved; not for manual entry)
  properties: water in wet mass 0.507636 kg, wet mass 1 kg, water content 1.03102, dry mass 0.492364 kg, carbon allocation 0.230968 kg

## Inputs from technosphere
- landed hake, fresh: 1 kg
  Peruvian hake (Merluccius gayi peruanus)
  property ash content 0.013 kg; name ash
  property fat content 0.012; name fat
  property protein content 0.166; name protein
  properties: carbon content, non-fossil 0.457294, wet mass 1 kg, energy content 4.3 MJ, dry mass 0.18 kg, water content 4.55556
  note on carbon content, non-fossil: Calculated from C_content = polysaccharids*0.444+protein*0.535+lipids*0.774 and polysaccharids = 1-(protein+lipids+ash)

## Extrapolations
This dataset has been extrapolated from year 2017 to the year of the calculation (2021). The uncertainty has been adjusted accordingly.
