# treatment of biowaste, municipal incineration with fly ash extraction

Dataset: EcoSpold 2, unit process
Geography: CH
Time period: 2006-01-01 to 2021-12-31
Technology level: current
Classification: ISIC rev.4 ecoinvent: 3821:Treatment and disposal of non-hazardous waste
Synonyms: Siedlungsabfallverbrennung; Kehrichtverbrennung; municipal waste incineration
Scenario: Business-as-Usual
System model: Allocation, cut-off by classification
Share of production covered: 100 %
Generated by: Gabor Doka
Published in: Doka G. 2015
Database: ecoinvent
isCopyrightProtected: true
accessRestrictedTo: 1

## General comment
This dataset represents the activity of waste disposal of biowaste in a municipal solid waste incinerator (MSWI) // Recommended use of this dataset: For average biowaste (mixture of garden, yard, food/kitchen waste) which goes to disposal as part of communal waste mixture. // // Waste composition (wet, in ppm): upper heating value 6.087 MJ/kg; lower heating value 4.289 MJ/kg; H2O 650000; O 110270; H 18556; C 141650; S 1307.7; N 3488.9; P 985.61; B 8.9315; Cl 3488.9; Br 5.2333; F 174.44; I 0.047972; Ag n.a.; As 1.7444; Ba n.a.; Cd 0.12037; Co 4.3611; Cr 6.9778; Cu 15.7; Hg 0.061055; Mn 3.7505; Mo 0.34889; Ni 4.7274; Pb 16.188; Sb n.a.; Se 0.4359; Sn 6.9744; V 2.6154; Zn 50.798; Be n.a.; Sc n.a.; Sr n.a.; Ti n.a.; Tl n.a.; W n.a.; Si 34872; Fe 523.33; Ca 19014; Al 8717.9; K 3052.8; Mg 2459.7; Na 1308.3; // Share of carbon in waste that is biogenic 100%. // Share of metals in waste not oxidised and bulk-recyclable (exclude very small or thin parts) Iron: 0%; Alu: 0%; Copper: 0%. // Recovery of metal scrap from bottom ash to recycling: 0g iron scrap, 0g aluminium scrap, 0g copper scrap. From this waste, the FLUWA process in the technology mix recovers 0.000724kg (DM) of a hydroxide sludge to be recycled in zinc furnaces. // Ultimately one kg of this waste produces 0.1427 kg of bottom ash (can include some washed ash) and 0.0132 kg of residues, which are landfilled (technology mix). Additional solidification of residues with 0.005282 kg of cement.Net energy production: 0.42MJ/kg electric energy and 1.01MJ/kg thermal energy. //

## Included activities start
waste incineration from waste reception gate and delivery into waste bunker at incinerator plant site (without transports to the incinerator)

## Included activities end
Waste-specific short-term emissions to water from leachate. Long-term emissions from landfill to ground water.

## Geography
Specific to the technology mix encountered in Switzerland in 2012.

## Technology
average Swiss MSWI plants in 2010 (grate incinerators) with electrostatic precipitator for fly ash (ESP), wet flue gas scrubber and 25% SNCR , 42.77% SCR-high dust , 32.68% SCR-low dust -DeNOx facilities and 0% without Denox (weighted according to mass of burnt waste, representing Swiss average). Efficiency of iron scrap separation from slag : 58%. Efficiency of non-ferrous scrap separation from slag : 31%. The technology mix for this dataset includes a filter ash treatment (FLUWA) of a share of 46.22%. Gross electric efficiency technology mix 15.84% and Gross thermal efficiency technology mix 28.51%

## Time period
Waste composition as given in literature reference, theoretical data or other source. Transfer coefficients for modern MSWI.

## Reference product
- biowaste: -1 kg; name RP_amount_1; By-product classification Waste; CPC 391: Wastes from food and tobacco industry
  Main reference product of this activity (supply of disposal service).
  production volume 1.0273e9 kg; name RP_PV_1
    based on corresponding global production volume of MSW fraction in conventional MSWI (wo fly ash extraction) and scaled down to annual Swiss incinerated MSW mass of 3.02 mio. tonnes.
  property price 0 EUR2005
    Waste products are assigned a price of zero as they are assumed to require further treatment.
  property heating value, net 4.29 MJ
    Value taken from the general comment of the treatment dataset.
  property carbon content 0.40471
    carbon content on a dry matter basis (reserved; not for manual entry)
  properties: zinc content 0.00014514, manganese content 1.0716e-5, cobalt content 1.246e-5, iron content 0.0014952, calcium content 0.054327, nickel content 1.3507e-5, selenium content 1.2454e-6, sodium content 0.0037381, wet mass 1 kg, lead content 4.6253e-5, vanadium content 7.4725e-6, magnesium content 0.0070276, potassium content 0.0087222, carbon content, non-fossil 0.40471, water in wet mass 0.65 kg, aluminium content 0.024908, water content 1.8571, dry mass 0.35 kg, nitrogen content 0.0099682, sulfur content 0.0037363, chlorine content 0.0099682, oxygen content 0.31506, hydrogen content 0.053017, arsenic content 4.9841e-6, mercury content 1.7444e-7, molybdenum content 9.9682e-7, phosphorus content 0.002816, iodine content 1.3706e-7, boron content 2.5519e-5, fluorine content 0.00049841, copper content 4.4857e-5, silicon content 0.099634, cadmium content 3.439e-7, bromine content 1.4952e-5, tin content 1.9927e-5, chromium content 1.9936e-5, carbon allocation 0.141649 kg

## By-products
- electricity, for reuse in municipal waste incineration only: 0 kWh; name E_el_prod_MSWI; CPC 17100: Electrical energy; By-product classification allocatable product; pedigree (1,1,1,1,1)
  Net electricity generated from this waste and used in internal MSWI plant energy redistribution.
  Uncertainty: uncertainty is calculated from uncertainties in waste composition and uncertainties in energy efficiency and the uncertainty in internal energy demand
  production volume 1.1864e8 kWh
    calculated in proportion to reference product waste input to incinerator
  property price 0.1 EUR2005; name E_el_prod_MSWI_price_EUR2005
    Estimated to be the same price as in case of electricity, medium voltage.
  property true value relation 3.6; name E_el_prod_MSWI_true_value_relation
    property to calculate "true value" from
  property exergy 3.6 MJ; name E_el_prod_MSWI_exergy
    This exergy property is based on the exergy content of the product.
- metalliferous hydroxide sludge: 0 kg; By-product classification Recyclable; CPC 1429: Other non-ferrous metal ores and concentrates (other than uranium or thorium ores and concentrates); pedigree (1,1,1,1,1)
  Metalliferous hydroxide sludge from filter ash leaching (FLUWA).
  Uncertainty: uncertainty is calculated from uncertainties in waste composition and transfer coefficients to filter ash in incinerator and the uncertainty of the transfer coefficients of the FLUWA process.
  production volume 0 kg
    calculated in proportion to reference product waste input to incinerator
  property heating value, net 0 MJ
    Non combustible products are assumed to have an LHV equal to zero (0).
  property price 0.0042 EUR2005
    World market value of manure, deflated with barley world market price and consumer price index, based on [http://www.gov.pe.ca/photos/original/af_NM_manconv.pdf].
  property carbon content 0.010169
    carbon content on a dry matter basis (reserved; not for manual entry)
  properties: phosphorus content 0.026703, oxygen content 0.40386, chlorine content 0.1161, fluorine content 0.0035125, arsenic content 2.2308e-5, sulfur content 0.111, boron content 0.00020587, bromine content 0.00014266, manganese content 5.2905e-6, mercury content 1.5356e-7, vanadium content 2.0562e-5, lead content 0.00040339, cadmium content 5.6607e-5, copper content 9.0036e-6, chromium content 4.6162e-5, molybdenum content 2.9513e-5, iodine content 1.5964e-6, cobalt content 0.0001485, zinc content 0.012366, calcium content 0.26474, magnesium content 0.0053333, tin content 8.4941e-6, iron content 7.9703e-5, selenium content 6.3897e-6, aluminium content 0.00083034, potassium content 0.026803, nickel content 6.0738e-6, water in wet mass 0.75 kg, wet mass 1 kg, silicon content 0.0025499, water content 3, carbon content, non-fossil 0.010169, dry mass 0.25 kg, sodium content 0.014833, carbon allocation 0.00254225 kg
- heat, for reuse in municipal waste incineration only: 0 MJ; name E_th_prod_MSWI; By-product classification allocatable product; CPC 17300: Steam and hot water; pedigree (1,1,1,1,1)
  Net useful heat generated from this waste and used in internal MSWI plant energy redistribution.
  Uncertainty: uncertainty is calculated from uncertainties in waste composition and uncertainties in energy efficiency and the uncertainty in internal energy demand
  production volume 1.0335e9 MJ
    calculated in proportion to reference product waste input to incinerator
  property true value relation 0.1842; name E_th_prod_MSWI_true_value_relation
    property to calculate "true value" from
  property price 0.0106 EUR2005; name E_th_prod_MSWI_price_EUR2005
    Average European district heat price from Ecoheatcool and Euroheat 2005-2006, Ecoheat Work package 1: The European heat market. Final report. 10.6 EUR/GJ i s the price of district heat. http://www.solarthermalworld.org/files/Ecoheatcool%20WP1%20Web.pdf?download
  property exergy 0.1842 MJ; name E_th_prod_MSWI_exergy
    This exergy property is based on the exergy content of the product.

## Inputs from technosphere
- chemical, inorganic: 7.2479e-5 kg; lognormal variance with pedigree 0.31949, pedigree (1,1,4,1,1)
  Auxilliary inputs for the wastewater treatment stage of the incinerator plant. Proxy for Polyelectrolyte.
  Uncertainty: uncertainty calculated from uncertainty in average Polyelectrolyte input, of transfer coefficients in the incinerator, and the uncertainty of the waste composition of this waste
  properties: dry mass 1 kg, carbon content, fossil 0.003, wet mass 1 kg
- hydrogen peroxide, without water, in 50% solution state: 0.00093148 kg; lognormal variance with pedigree 0.047464, pedigree (1,1,4,1,1)
  Auxilliary oxidising agent for filter ash treatment (FLUWA).
  Uncertainty: uncertainty calculated from uncertainty in of transfer coefficients in the incinerator, and the uncertainty of the waste composition of this waste
  properties: wet mass 1 kg, dry mass 1 kg, heating value, net 7.13 MJ
- cement, unspecified: 0.0052819 kg; lognormal variance with pedigree 0.045809, pedigree (1,1,4,1,1)
  Cement required for solidification of landfilled residual material.
  Uncertainty: Uncertainty calculated from uncertainty of the waste composition of this waste, of transfer coefficients in the incinerator and of the solidification recipe.
  properties: dry mass 1 kg, wet mass 1 kg
- slag landfill: 2.5363e-10 unit; lognormal variance with pedigree 0.049063, pedigree (1,1,4,1,1)
  Landfill infrastructure required for landfilling of bottom ash.
  Uncertainty: uncertainty is calculated from uncertainties in waste composition and transfer coefficients in incinerator
- waste cement, hydrated: -0.013205 kg; lognormal variance with pedigree 0.045809, pedigree (1,1,4,1,1)
  Hydrated cement output for solidification of landfilled residual material.
  Uncertainty: Uncertainty calculated from uncertainty of the waste composition of this waste and transfer coefficients in the incinerator and of the solidification recipe.
  production volume 1.3565e7 kg
    calculated in proportion to reference product waste input to incinerator
  properties: dry mass 1 kg, wet mass 1 kg
- sodium hydroxide, without water, in 50% solution state: 0.0010809 kg; lognormal variance with pedigree 0.1596, pedigree (1,1,4,1,1)
  Auxilliary inputs for the flue gas treatment stage of the incinerator plant, and partially in the filter ash treatment (FLUWA).
  Uncertainty: uncertainty calculated from uncertainty in average NaOH input, of transfer coefficients in the incinerator, and the uncertainty of the waste composition of this waste
  properties: heating value, net 3.03 MJ, dry mass 1 kg, wet mass 1 kg
- water, decarbonised: 0.85923 kg; lognormal variance with pedigree 0.40844, pedigree (1,1,4,1,1)
  Incinerator process water used in flue gas scrubber stage.
  Uncertainty: uncertainty calculated from uncertainty in average water input, and the uncertainty of the waste composition of this waste
  properties: wet mass 1 kg
- cationic resin: 3.0944e-7 kg; lognormal variance with pedigree 1.9284, pedigree (1,1,4,1,1)
  Auxilliary input for mercury removal in filter ash treatment (FLUWA).
  Uncertainty: uncertainty calculated from uncertainty in of transfer coefficients in the incinerator, and the uncertainty of the waste composition of this waste
  properties: carbon content, fossil 0.521606, wet mass 1 kg, heating value, net 6.68 MJ, water content 1, dry mass 0.5 kg
- transport, freight, lorry, unspecified: 0.0065292 metric ton*km; lognormal variance with pedigree 0.039815, pedigree (1,1,4,1,1)
  Transport services to transport incineration residues to landfills and filter ash to external treatments (FLUWA).
  Uncertainty: uncertainty calculated from uncertainty of the waste composition of this waste, uncertainty of transfer coefficients and the uncertainty in generic transportation distances
- spent activated carbon with mercury: -3.2572e-7 kg; name BP_amount_1; lognormal variance with pedigree 1.9284, pedigree (1,1,4,1,1)
  Spent ion exchanger charged with mercury, from FLUWA filter ash treatment, approximated here with Spent activated carbon with mercury, deposited undergound in a polyethylene Big Bag.
  Uncertainty: uncertainty calculated from uncertainty in of transfer coefficients in the incinerator, and the uncertainty of the waste composition of this waste.
  production volume 334.612 kg; = ABS(RP_PV_1 * (BP_amount_1 / RP_amount_1))
    Calculated from production volume of reference product using the relative outputs.
  property price 0 EUR2005; name BP_amount_1_price_EUR2005
  properties: dry mass 1 kg, carbon content, fossil 0.6, wet mass 1 kg, heating value, net 18.18 MJ
- quicklime, milled, packed: 0.00138 kg; lognormal variance with pedigree 0.70424, pedigree (1,1,4,1,1)
  Auxilliary inputs for the flue gas treatment stage of the incinerator plant.
  Uncertainty: uncertainty calculated from uncertainty in average CaO input, of transfer coefficients in the incinerator, and the uncertainty of the waste composition of this waste
  properties: wet mass 1 kg, water content 0.010101, dry mass 0.99 kg
- process-specific burdens, slag landfill: 0.14267 kg; lognormal variance with pedigree 0.049063, pedigree (1,1,4,1,1)
  Mass-specific expenditures required for landfilling of bottom ash.;activityLink introduced to establish a direct link to the corresponding regional supply of this product
  Uncertainty: uncertainty is calculated from uncertainties in waste composition and transfer coefficients in incinerator
- municipal waste incineration facility: 2.5e-10 unit
  Demands per kilogram waste.
- ammonia, anhydrous, liquid: 0.00053649 kg; lognormal variance with pedigree 0.92776, pedigree (1,1,4,1,1)
  Input to DeNOx stage (100% NH3).
  Uncertainty: uncertainty calculated from uncertainty in average DeNOx input, uncertainty in the share of thermal NOx, uncertainty of nitrogen content in average municipal waste and the uncertainty in nitrogen content in *this* waste.
  properties: dry mass 1 kg, wet mass 1 kg
- hydrochloric acid, without water, in 30% solution state: 0.00038503 kg; lognormal variance with pedigree 0.044339, pedigree (1,1,4,1,1)
  Auxilliary inputs for the wastewater treatment stage of the incinerator plant.
  Uncertainty: uncertainty calculated from uncertainty in average HCl input, of transfer coefficients in the incinerator, and the uncertainty of the waste composition of this waste
  properties: heating value, net 3.32 MJ, dry mass 1 kg, wet mass 1 kg
- titanium dioxide: 3.3613e-5 kg; lognormal variance with pedigree 1.3142, pedigree (1,1,4,1,1)
  Input to DeNOx stage (TiO2 catalyst carrier)
  Uncertainty: uncertainty calculated from uncertainty in average DeNOx input, uncertainty in the share of thermal NOx, uncertainty of nitrogen content in average municipal waste and the uncertainty in nitrogen content in *this* waste.
  properties: wet mass 1 kg, dry mass 1 kg
- process-specific burdens, residual material landfill: 0.026327 kg; lognormal variance with pedigree 0.036725, pedigree (1,1,4,1,1)
  Mass-specific expenditures required for landfilling of incineration residues.;activityLink introduced to establish a direct link to the corresponding regional supply of this product
  Uncertainty: uncertainty is calculated from uncertainties in waste composition and transfer coefficients in incinerator
- chromium oxide, flakes: 6.8597e-7 kg; lognormal variance with pedigree 1.3142, pedigree (1,1,4,1,1)
  Input to DeNOx stage. Active component in SCR catalyst (vanadium pentoxide, V2O5), here approximated with the available chromium trioxide.
  Uncertainty: uncertainty calculated from uncertainty in average DeNOx input, uncertainty in the share of thermal NOx, uncertainty of nitrogen content in average municipal waste and the uncertainty in nitrogen content in *this* waste.
  properties: wet mass 1 kg, dry mass 1 kg
- heat, district or industrial, natural gas: 0.10032 MJ; lognormal variance with pedigree 0.92776, pedigree (1,1,4,1,1)
  Input to DeNOx stage, to heat up flue gas in low-dust SCR.
  Uncertainty: uncertainty calculated from uncertainty in average DeNOx input, uncertainty in the share of thermal NOx, uncertainty of nitrogen content in average municipal waste and the uncertainty in nitrogen content in *this* waste.
  properties: heating value, net 1 MJ
- iron (III) chloride, without water, in 40% solution state: 1.0877e-6 kg; lognormal variance with pedigree 0.40844, pedigree (1,1,4,1,1)
  Auxilliary inputs for the wastewater treatment stage of the incinerator plant.
  Uncertainty: uncertainty calculated from uncertainty in average FeCl3 input, of transfer coefficients in the incinerator, and the uncertainty of the waste composition of this waste
  properties: dry mass 1 kg, wet mass 1 kg
- residual material landfill: 5.4848e-11 unit; lognormal variance with pedigree 0.036725, pedigree (1,1,4,1,1)
  Landfill infrastructure required for landfilling of incineration residues.
  Uncertainty: uncertainty is calculated from uncertainties in waste composition and transfer coefficients in incinerator
- chemical, organic: 5.6061e-7 kg; lognormal variance with pedigree 1.88, pedigree (1,1,4,1,1)
  Auxilliary inputs for the wastewater treatment stage of the incinerator plant. Proxy for (pure) Trisodium-trimercapto-s-triazine (CAS 17766-26-6), used as 15% diluted solution, aka TMT15.
  Uncertainty: uncertainty calculated from uncertainty in average TMT15 input, of transfer coefficients in the incinerator, and the uncertainty of the waste composition of this waste
  properties: wet mass 1 kg, carbon content, fossil 0.628, dry mass 1 kg, heating value, net 19.03 MJ
- metalliferous hydroxide sludge: -0.0028979 kg; lognormal variance with pedigree 0.046244, pedigree (1,1,4,1,1)
  (same comment as for metalliferous hydroxide sludge)
  production volume 2.977e6 kg
  properties: phosphorus content 0.026703, oxygen content 0.40386, chlorine content 0.1161, sulfur content 0.111, zinc content 0.012366, calcium content 0.26474, potassium content 0.026803, wet mass 1 kg, water content 3, carbon content, non-fossil 0.010169, dry mass 0.25 kg, sodium content 0.014833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

## Inputs from nature
- Oxygen [natural resource, in air]: 0.48058 kg; lognormal variance with pedigree 0.067384, pedigree (1,1,4,1,1)
  Oxygen from ambient air needed to combust and oxidise this waste. Net demand, i.e. without O2 leaving the plant in flue gas uncombusted.
  Uncertainty: uncertainty is calculated from uncertainties in waste composition and transfer coefficients to flue gas and soild residues in incinerator

## Emissions to nature
- Chromium VI [water, surface water]: 1.1529e-7 kg; lognormal variance with pedigree 1.3909, pedigree (1,1,4,1,1)
  Emissions to water from waste composition and transfer coefficients in incinerator and landfills.
  Uncertainty: uncertainty is calculated from uncertainties in waste composition and transfer coefficients in incinerator and landfills
- Bromine [air, urban air close to ground]: 2.614e-9 kg; lognormal variance with pedigree 1.3827, pedigree (1,1,4,1,1)
  Emission to air from waste composition and transfer coefficients.
  Uncertainty: uncertainty is calculated from uncertainties in waste composition and transfer coefficients in incinerator
- Lead [water, ground-, long-term]: 1.1398e-5 kg; lognormal variance with pedigree 2.7626, pedigree (1,1,4,1,1)
  Long-term emissions from landfilling of incineration residues.
  Uncertainty: uncertainty is calculated from uncertainties in waste composition and transfer coefficients in incinerator and landfills.
- Copper, ion [water, surface water]: 1.3617e-9 kg; lognormal variance with pedigree 1.3236, pedigree (1,1,4,1,1)
  (same comment as for Chromium VI)
- Hydrogen fluoride [air, urban air close to ground]: 1.1769e-6 kg; lognormal variance with pedigree 0.9071, pedigree (1,1,4,1,1)
  (same comment as for Bromine)
- Antimony [water, ground-, long-term]: 8.0743e-10 kg; lognormal variance with pedigree 0.013413, pedigree (1,1,4,1,1)
  (same comment as for Lead)
- Mercury [water, surface water]: 3.2489e-10 kg; lognormal variance with pedigree 2.0938, pedigree (1,1,4,1,1)
  (same comment as for Chromium VI)
- Iodine [air, urban air close to ground]: 2.6625e-11 kg; lognormal variance with pedigree 1.9506, pedigree (1,1,4,1,1)
  (same comment as for Bromine)
- Selenium [water, ground-, long-term]: 3.345e-7 kg; lognormal variance with pedigree 1.1224, pedigree (1,1,4,1,1)
  (same comment as for Lead)
- Manganese [water, surface water]: 4.6993e-10 kg; lognormal variance with pedigree 1.3303, pedigree (1,1,4,1,1)
  (same comment as for Chromium VI)
- Arsenic [air, urban air close to ground]: 1.3665e-8 kg; lognormal variance with pedigree 1.5128, pedigree (1,1,4,1,1)
  (same comment as for Bromine)
- Tin, ion [water, ground-, long-term]: 4.629e-6 kg; lognormal variance with pedigree 1.4217, pedigree (1,1,4,1,1)
  (same comment as for Lead)
- Molybdenum [water, surface water]: 5.8053e-8 kg; lognormal variance with pedigree 1.1373, pedigree (1,1,4,1,1)
  (same comment as for Chromium VI)
- Cadmium [air, urban air close to ground]: 6.1352e-11 kg; lognormal variance with pedigree 1.8742, pedigree (1,1,4,1,1)
  (same comment as for Bromine)
- Vanadium, ion [water, ground-, long-term]: 1.0216e-6 kg; lognormal variance with pedigree 1.2805, pedigree (1,1,4,1,1)
  (same comment as for Lead)
- Nickel, ion [water, surface water]: 3.2016e-9 kg; lognormal variance with pedigree 1.9536, pedigree (1,1,4,1,1)
  (same comment as for Chromium VI)
- Cobalt [air, urban air close to ground]: 7.9314e-9 kg; lognormal variance with pedigree 1.4045, pedigree (1,1,4,1,1)
  (same comment as for Bromine)
- Zinc, ion [water, ground-, long-term]: 2.2812e-5 kg; lognormal variance with pedigree 1.88, pedigree (1,1,4,1,1)
  (same comment as for Lead)
- Lead [water, surface water]: 1.103e-9 kg; lognormal variance with pedigree 0.9916, pedigree (1,1,4,1,1)
  (same comment as for Chromium VI)
- Chromium [air, urban air close to ground]: 6.0931e-9 kg; lognormal variance with pedigree 1.3464, pedigree (1,1,4,1,1)
  (same comment as for Bromine)
- Thallium [water, ground-, long-term]: 9.8701e-10 kg; lognormal variance with pedigree 0.26601, pedigree (1,1,4,1,1)
  (same comment as for Lead)
- Antimony [water, surface water]: 4.3987e-10 kg; lognormal variance with pedigree 0.037563, pedigree (1,1,4,1,1)
  (same comment as for Chromium VI)
- Copper [air, urban air close to ground]: 1.438e-9 kg; lognormal variance with pedigree 1.2515, pedigree (1,1,4,1,1)
  (same comment as for Bromine)
- Silicon [water, ground-, long-term]: 0.002575 kg; lognormal variance with pedigree 5.1538, pedigree (1,1,4,1,1)
  (same comment as for Lead)
- Selenium [water, surface water]: 8.6848e-8 kg; lognormal variance with pedigree 1.2162, pedigree (1,1,4,1,1)
  (same comment as for Chromium VI)
- Mercury [air, urban air close to ground]: 1.7311e-9 kg; lognormal variance with pedigree 1.9367, pedigree (1,1,4,1,1)
  (same comment as for Bromine)
- Iron, ion [water, ground-, long-term]: 0.00026839 kg; lognormal variance with pedigree 2.561, pedigree (1,1,4,1,1)
  (same comment as for Lead)
- Tin, ion [water, surface water]: 6.3049e-9 kg; lognormal variance with pedigree 1.2186, pedigree (1,1,4,1,1)
  (same comment as for Chromium VI)
- Manganese [air, urban air close to ground]: 7.1627e-10 kg; lognormal variance with pedigree 1.4335, pedigree (1,1,4,1,1)
  (same comment as for Bromine)
- Calcium, ion [water, ground-, long-term]: 0.016141 kg; lognormal variance with pedigree 0.28228, pedigree (1,1,4,1,1)
  (same comment as for Lead)
- Vanadium, ion [water, surface water]: 3.8415e-9 kg; lognormal variance with pedigree 1.293, pedigree (1,1,4,1,1)
  (same comment as for Chromium VI)
- Molybdenum [air, urban air close to ground]: 4.5906e-10 kg; lognormal variance with pedigree 1.7339, pedigree (1,1,4,1,1)
  (same comment as for Bromine)
- Aluminium [water, ground-, long-term]: 0.0067301 kg; lognormal variance with pedigree 0.37156, pedigree (1,1,4,1,1)
  (same comment as for Lead)
- Zinc, ion [water, surface water]: 3.1079e-9 kg; lognormal variance with pedigree 0.89256, pedigree (1,1,4,1,1)
  (same comment as for Chromium VI)
- Nickel [air, urban air close to ground]: 5.9387e-9 kg; lognormal variance with pedigree 1.39, pedigree (1,1,4,1,1)
  (same comment as for Bromine)
- Potassium, ion [water, ground-, long-term]: 0.0021905 kg; lognormal variance with pedigree 0.32705, pedigree (1,1,4,1,1)
  (same comment as for Lead)
- Thallium [water, surface water]: 1.6478e-12 kg; lognormal variance with pedigree 0.72642, pedigree (1,1,4,1,1)
  (same comment as for Chromium VI)
- Lead [air, urban air close to ground]: 1.3337e-9 kg; lognormal variance with pedigree 1.2442, pedigree (1,1,4,1,1)
  (same comment as for Bromine)
- Magnesium [water, ground-, long-term]: 0.0022908 kg; lognormal variance with pedigree 0.53871, pedigree (1,1,4,1,1)
  (same comment as for Lead)
- Silicon [water, surface water]: 8.2638e-6 kg; lognormal variance with pedigree 0.41236, pedigree (1,1,4,1,1)
  (same comment as for Chromium VI)
- Selenium [air, urban air close to ground]: 5.2002e-9 kg; lognormal variance with pedigree 1.6914, pedigree (1,1,4,1,1)
  (same comment as for Bromine)
- Sodium, ion [water, ground-, long-term]: 0.00085628 kg; lognormal variance with pedigree 0.41323, pedigree (1,1,4,1,1)
  (same comment as for Lead)
- Iron, ion [water, surface water]: 1.1017e-8 kg; lognormal variance with pedigree 1.113, pedigree (1,1,4,1,1)
  (same comment as for Chromium VI)
- Tin [air, urban air close to ground]: 4.5557e-12 kg; lognormal variance with pedigree 1.3972, pedigree (1,1,4,1,1)
  (same comment as for Bromine)
- NMVOC, non-methane volatile organic compounds, unspecified origin [air, urban air close to ground]: 1.894e-6 kg; lognormal variance with pedigree 0.089782, pedigree (1,1,4,1,1)
  Incomplete combustion product emitted to air.
  Uncertainty: uncertainty calculated from uncertainty in average operation emissions, and the uncertainty of the flue gas volume from this waste.
- Calcium, ion [water, surface water]: 0.00034176 kg; lognormal variance with pedigree 0.14141, pedigree (1,1,4,1,1)
  (same comment as for Chromium VI)
- Vanadium [air, urban air close to ground]: 5.5469e-8 kg; lognormal variance with pedigree 1.4624, pedigree (1,1,4,1,1)
  (same comment as for Bromine)
- Particulates, < 2.5 um [air, urban air close to ground]: 4.9688e-6 kg; lognormal variance with pedigree 0.40812, pedigree (1,1,4,1,1)
  (same comment as for NMVOC, non-methane volatile organic compounds, unspecified origin)
- Aluminium [water, surface water]: 6.4753e-7 kg; lognormal variance with pedigree 0.76288, pedigree (1,1,4,1,1)
  (same comment as for Chromium VI)
- Zinc [air, urban air close to ground]: 3.4048e-8 kg; lognormal variance with pedigree 1.0828, pedigree (1,1,4,1,1)
  (same comment as for Bromine)
- Particulates, > 2.5 um, and < 10um [air, urban air close to ground]: 2.4969e-8 kg; lognormal variance with pedigree 0.19274, pedigree (1,1,4,1,1)
  (same comment as for NMVOC, non-methane volatile organic compounds, unspecified origin)
- Potassium, ion [water, surface water]: 0.00082781 kg; lognormal variance with pedigree 0.18932, pedigree (1,1,4,1,1)
  (same comment as for Chromium VI)
- Silicon [air, urban air close to ground]: 5.4313e-8 kg; lognormal variance with pedigree 0.30212, pedigree (1,1,4,1,1)
  (same comment as for Bromine)
- Dioxins, measured as 2,3,7,8-tetrachlorodibenzo-p-dioxin [air, urban air close to ground]: 8.323e-14 kg; lognormal variance with pedigree 0.40812, pedigree (1,1,4,1,1)
  (same comment as for NMVOC, non-methane volatile organic compounds, unspecified origin)
- Magnesium [water, surface water]: 1.8623e-5 kg; lognormal variance with pedigree 0.48866, pedigree (1,1,4,1,1)
  (same comment as for Chromium VI)
- Iron [air, urban air close to ground]: 9.379e-10 kg; lognormal variance with pedigree 0.81829, pedigree (1,1,4,1,1)
  (same comment as for Bromine)
- Benzene [air, urban air close to ground]: 4.1618e-8 kg; lognormal variance with pedigree 0.089782, pedigree (1,1,4,1,1)
  (same comment as for NMVOC, non-methane volatile organic compounds, unspecified origin)
- Sodium, ion [water, surface water]: 0.00043057 kg; lognormal variance with pedigree 0.19891, pedigree (1,1,4,1,1)
  (same comment as for Chromium VI)
- Calcium [air, urban air close to ground]: 0.00014964 kg; lognormal variance with pedigree 0.30844, pedigree (1,1,4,1,1)
  (same comment as for Bromine)
- Toluene [air, urban air close to ground]: 8.3235e-8 kg; lognormal variance with pedigree 0.089782, pedigree (1,1,4,1,1)
  (same comment as for NMVOC, non-methane volatile organic compounds, unspecified origin)
- Chromium, ion [water, surface water]: 9.0589e-10 kg; lognormal variance with pedigree 0.88942, pedigree (1,1,4,1,1)
  (same comment as for Chromium VI)
- Aluminium [air, urban air close to ground]: 7.1079e-9 kg; lognormal variance with pedigree 0.46085, pedigree (1,1,4,1,1)
  (same comment as for Bromine)
- Benzene, pentachloro- [air, urban air close to ground]: 2.1988e-10 kg; lognormal variance with pedigree 0.089782, pedigree (1,1,4,1,1)
  (same comment as for NMVOC, non-methane volatile organic compounds, unspecified origin)
- BOD5, Biological Oxygen Demand [water, ground-, long-term]: 0.00034335 kg; lognormal variance with pedigree 0.083363, pedigree (1,1,4,1,1)
  (same comment as for Lead)
- Potassium [air, urban air close to ground]: 1.5082e-5 kg; lognormal variance with pedigree 0.53733, pedigree (1,1,4,1,1)
  (same comment as for Bromine)
- Benzene, hexachloro- [air, urban air close to ground]: 8.7021e-11 kg; lognormal variance with pedigree 0.089782, pedigree (1,1,4,1,1)
  (same comment as for NMVOC, non-methane volatile organic compounds, unspecified origin)
- COD, Chemical Oxygen Demand [water, ground-, long-term]: 0.0010497 kg; lognormal variance with pedigree 0.083363, pedigree (1,1,4,1,1)
  (same comment as for Lead)
- Magnesium [air, urban air close to ground]: 2.5944e-6 kg; lognormal variance with pedigree 0.57263, pedigree (1,1,4,1,1)
  (same comment as for Bromine)
- Phenol, pentachloro- [air, urban air close to ground]: 1.8124e-11 kg; lognormal variance with pedigree 0.089782, pedigree (1,1,4,1,1)
  (same comment as for NMVOC, non-methane volatile organic compounds, unspecified origin)
- DOC, Dissolved Organic Carbon [water, ground-, long-term]: 0.00041536 kg; lognormal variance with pedigree 0.083363, pedigree (1,1,4,1,1)
  (same comment as for Lead)
- Sodium [air, urban air close to ground]: 1.0742e-5 kg; lognormal variance with pedigree 0.64402, pedigree (1,1,4,1,1)
  (same comment as for Bromine)
- Benzo(a)pyrene [air, urban air close to ground]: 9.2613e-13 kg; lognormal variance with pedigree 0.40812, pedigree (1,1,4,1,1)
  (same comment as for NMVOC, non-methane volatile organic compounds, unspecified origin)
- TOC, Total Organic Carbon [water, ground-, long-term]: 0.00041536 kg; lognormal variance with pedigree 0.083363, pedigree (1,1,4,1,1)
  (same comment as for Lead)
- BOD5, Biological Oxygen Demand [water, surface water]: 0.00010538 kg; lognormal variance with pedigree 0.090504, pedigree (1,1,4,1,1)
  (same comment as for Chromium VI)
- Heat, waste [air, urban air close to ground]: 4.4436 MJ; lognormal variance with pedigree 0.10966, pedigree (1,1,4,1,1)
  Waste heat generated from heating value of this waste plus any electricity required to process it.
  Uncertainty: uncertainty is calculated from uncertainties in waste composition and uncertainties in energy efficiency and the uncertainty in internal energy demand
- Sulfate [water, ground-, long-term]: 0.0031266 kg; lognormal variance with pedigree 0.45797, pedigree (1,1,4,1,1)
  (same comment as for Lead)
- COD, Chemical Oxygen Demand [water, surface water]: 0.00010768 kg; lognormal variance with pedigree 0.087126, pedigree (1,1,4,1,1)
  (same comment as for Chromium VI)
- Water [air, urban air close to ground]: 0.00135483 m3; lognormal variance with pedigree 1.2189, pedigree (1,1,4,1,1)
  Water vapour from waste humidity, hydrogen oxidation and part of the process water.
  Uncertainty: Uncertainty calculated from uncertainty in waste composition, process water input and the uncertainty of fraction to air.
- Nitrate [water, ground-, long-term]: 0.00012513 kg; lognormal variance with pedigree 0.51382, pedigree (1,1,4,1,1)
  (same comment as for Lead)
- DOC, Dissolved Organic Carbon [water, surface water]: 4.6969e-5 kg; lognormal variance with pedigree 0.087533, pedigree (1,1,4,1,1)
  (same comment as for Chromium VI)
- Heat, waste [water, surface water]: 1.4911 MJ; lognormal variance with pedigree 0.10966, pedigree (1,1,4,1,1)
  (same comment as for Heat, waste)
- Phosphate [water, ground-, long-term]: 8.8641e-5 kg; lognormal variance with pedigree 5.039, pedigree (1,1,4,1,1)
  (same comment as for Lead)
- TOC, Total Organic Carbon [water, surface water]: 4.6969e-5 kg; lognormal variance with pedigree 0.087533, pedigree (1,1,4,1,1)
  (same comment as for Chromium VI)
- Boron [water, ground-, long-term]: 7.3757e-6 kg; lognormal variance with pedigree 1.2032, pedigree (1,1,4,1,1)
  (same comment as for Lead)
- Bromine [water, ground-, long-term]: 2.713e-7 kg; lognormal variance with pedigree 1.3609, pedigree (1,1,4,1,1)
  (same comment as for Lead)
- Sulfate [water, surface water]: 0.00053438 kg; lognormal variance with pedigree 0.31857, pedigree (1,1,4,1,1)
  (same comment as for Chromium VI)
- Water [water, surface water]: 0.000290286 m3; lognormal variance with pedigree 1.7072, pedigree (1,1,4,1,1)
  Process water released to surface water.
  Uncertainty: uncertainty calculated from uncertainty in process water input and the uncertainty of fraction to surface water.
- Chloride [water, ground-, long-term]: 0.00043947 kg; lognormal variance with pedigree 0.49487, pedigree (1,1,4,1,1)
  (same comment as for Lead)
- Fluoride [water, ground-, long-term]: 0.00011638 kg; lognormal variance with pedigree 0.54298, pedigree (1,1,4,1,1)
  (same comment as for Lead)
- Nitrate [water, surface water]: 4.4824e-5 kg; lognormal variance with pedigree 0.33913, pedigree (1,1,4,1,1)
  (same comment as for Chromium VI)
- Carbon monoxide, non-fossil [air, urban air close to ground]: 7.0745e-5 kg; lognormal variance with pedigree 0.79648, pedigree (1,1,4,1,1)
  (same comment as for NMVOC, non-methane volatile organic compounds, unspecified origin)
- Iodide [water, ground-, long-term]: 0 kg; pedigree (1,1,1,1,1)
  (same comment as for Lead)
- Phosphate [water, surface water]: 1.4675e-6 kg; lognormal variance with pedigree 0.32063, pedigree (1,1,4,1,1)
  (same comment as for Chromium VI)
- Carbon dioxide, non-fossil [air, urban air close to ground]: 0.51614 kg; lognormal variance with pedigree 0.099696, pedigree (1,1,4,1,1)
  (same comment as for Bromine)
- Arsenic, ion [water, ground-, long-term]: 1.0635e-6 kg; lognormal variance with pedigree 1.5058, pedigree (1,1,4,1,1)
  (same comment as for Lead)
- Boron [water, surface water]: 9.251e-8 kg; lognormal variance with pedigree 1.277, pedigree (1,1,4,1,1)
  (same comment as for Chromium VI)
- Methane, non-fossil [air, urban air close to ground]: 6.2427e-7 kg; lognormal variance with pedigree 0.089782, pedigree (1,1,4,1,1)
  (same comment as for NMVOC, non-methane volatile organic compounds, unspecified origin)
- Cobalt [water, ground-, long-term]: 3.8189e-6 kg; lognormal variance with pedigree 1.341, pedigree (1,1,4,1,1)
  (same comment as for Lead)
- Chloride [water, surface water]: 0.0029634 kg; lognormal variance with pedigree 0.19765, pedigree (1,1,4,1,1)
  (same comment as for Chromium VI)
- Sulfur dioxide [air, urban air close to ground]: 1.3907e-5 kg; lognormal variance with pedigree 0.6426, pedigree (1,1,4,1,1)
  (same comment as for Bromine)
- Cadmium, ion [water, ground-, long-term]: 1.9305e-8 kg; lognormal variance with pedigree 5.869, pedigree (1,1,4,1,1)
  (same comment as for Lead)
- Bromine [water, surface water]: 4.8561e-6 kg; lognormal variance with pedigree 0.48425, pedigree (1,1,4,1,1)
  (same comment as for Chromium VI)
- Nitrogen oxides [air, urban air close to ground]: 0.00019975 kg; lognormal variance with pedigree 0.9884, pedigree (1,1,4,1,1)
  Sum of fuel-Nox and thermal-NOx emitted to air after DeNOx stage.
  Uncertainty: uncertainty calculated from uncertainty in average N-emissions and uncertainty in the share of thermal NOx and the uncertainty in nitrogen content in *this* waste.
- Chromium VI [water, ground-, long-term]: 3.977e-7 kg; lognormal variance with pedigree 2.6311, pedigree (1,1,4,1,1)
  (same comment as for Lead)
- Fluoride [water, surface water]: 5.0771e-5 kg; lognormal variance with pedigree 0.57118, pedigree (1,1,4,1,1)
  (same comment as for Chromium VI)
- Ammonia [air, urban air close to ground]: 6.3078e-7 kg; lognormal variance with pedigree 0.9884, pedigree (1,1,4,1,1)
  Nitrogen species emitted to air after DeNOx stage.
  Uncertainty: uncertainty calculated from uncertainty in average N-emissions and uncertainty in the share of thermal NOx and the uncertainty in nitrogen content in *this* waste.
- Copper, ion [water, ground-, long-term]: 1.4793e-5 kg; lognormal variance with pedigree 1.204, pedigree (1,1,4,1,1)
  (same comment as for Lead)
- Iodide [water, surface water]: 4.6789e-8 kg; lognormal variance with pedigree 0.96479, pedigree (1,1,4,1,1)
  (same comment as for Chromium VI)
- Dinitrogen monoxide [air, urban air close to ground]: 5.2036e-5 kg; lognormal variance with pedigree 1.2791, pedigree (1,1,4,1,1)
  (same comment as for Ammonia)
- Mercury [water, ground-, long-term]: 1.2828e-8 kg; lognormal variance with pedigree 1.9196, pedigree (1,1,4,1,1)
  (same comment as for Lead)
- Arsenic, ion [water, surface water]: 7.0065e-7 kg; lognormal variance with pedigree 1.3876, pedigree (1,1,4,1,1)
  (same comment as for Chromium VI)
- Cyanide [air, urban air close to ground]: 1.1179e-5 kg; lognormal variance with pedigree 1.2791, pedigree (1,1,4,1,1)
  (same comment as for Ammonia)
- Manganese [water, ground-, long-term]: 2.9806e-6 kg; lognormal variance with pedigree 2.2084, pedigree (1,1,4,1,1)
  (same comment as for Lead)
- Cadmium, ion [water, surface water]: 2.1406e-11 kg; lognormal variance with pedigree 1.7305, pedigree (1,1,4,1,1)
  (same comment as for Chromium VI)
- Phosphorus [air, urban air close to ground]: 1.0016e-6 kg; lognormal variance with pedigree 0.68727, pedigree (1,1,4,1,1)
  (same comment as for Bromine)
- Molybdenum [water, ground-, long-term]: 2.6899e-7 kg; lognormal variance with pedigree 1.7122, pedigree (1,1,4,1,1)
  (same comment as for Lead)
- Cobalt [water, surface water]: 7.2474e-10 kg; lognormal variance with pedigree 1.8846, pedigree (1,1,4,1,1)
  (same comment as for Chromium VI)
- Hydrogen chloride [air, urban air close to ground]: 1.9909e-6 kg; lognormal variance with pedigree 0.52835, pedigree (1,1,4,1,1)
  (same comment as for Bromine)
- Nickel, ion [water, ground-, long-term]: 4.6654e-6 kg; lognormal variance with pedigree 1.3441, pedigree (1,1,4,1,1)
  (same comment as for Lead)

## Extrapolations
This dataset has been extrapolated from year 2012 to the year of the calculation (2021). The uncertainty has been adjusted accordingly.
