# electricity production, oil

Dataset: EcoSpold 2, unit process
Geography: DE
Time period: 1980-01-01 to 2021-12-31
Technology level: current
Classification: EcoSpold01Categories: oil/power plants
Classification: ISIC rev.4 ecoinvent: 3510:Electric power generation, transmission and distribution
Synonyms: heavy fuel oil; petroleum
Tags: fossil fuels; oil power
Scenario: Business-as-Usual
System model: Allocation, cut-off by classification
Generated by: Karin Treyer
Published in: Jungbluth, N. 2007
Database: ecoinvent
isCopyrightProtected: true
accessRestrictedTo: 1

## General comment
Emissions, materials use, infrastructure, etc. for oil input to power plants
This dataset represents the production of high voltage electricity at a grid-connected oil power plant with a capacity of 500 MW in Germany in 2012.
Comments:
- sulfur content of the oil is not adapted to local/average conditions.
- CO2 emissions are presented for the combustion and for the flue gas treatment
- Extensive comments on emissions can be found in Jungbluth 2007, on which this dataset is based on.
Emissions to the water are from flue gas treatment. Most of these data come from two power plants in Portugal (EDP 2001) and data from Slowakia
EDP (2001) Environmental Report 2000. Electricidade de Portugal, S.A., Lisboa, PT, retrieved from: www.edp.pt.
Slovenské elektrárne (2002) Environment Report 2001, Bratislave, SK, retrieved from: www.seas.sk.
IEA/OECD. 2010. Electricity Information 2010. International Energy Agency (IEA), Paris Cedex (FR). Part IV. Detailed OECD Electricity And Heat Data.

## Included activities start
From the constructed power plant ready to produce electricity and from the fuel ready to be used.

## Included activities end
All energy use, use of chemicals, emissions to air and water including treatment of flue gasses and effluents.

## Geography
Estimation for the country.

## Technology
Estimation for average technology.

## Time period
The Annual Production Volume is valid for the year 2012.

## Parameters
- fraction, water, decarbonised, to air: 0.0118019 dimensionless; name fraction_WDC_to_air; = fraction_CW_to_air; lognormal variance with pedigree 0.041425, pedigree (2,3,2,2,1)
  Calculated value. See comments in the other parametres present in this dataset. Decarbonised water is considered to be always used as cooling water, thus cooling water fractions to air are applied to all carbonised water input flows to calculate the amount of water consumed in the processes.
  nan
- water withdrawal, electricity production from oil, once-T and coolingP CS: 0.098 m3/kWh; name WWithdrawal_EP_oil_onceT_andCP_CS; lognormal variance with pedigree 0.092025, pedigree (4,4,3,2,4)
  Estimated based on literature (Scown, 2011, Water Footprint of U.S. Transportation Fuels, SI).
  nan
- factor: input of MJ for the production of 1 kWh: 9.65147 MJ/kWh; name factor_MJ_kWh; = 1*3.6/efficiency_oil_country; lognormal variance with pedigree 0.0006, pedigree (1,1,1,1,1)
  Calculated value. 3.6 MJ = 1kWh.
  nan
- fraction, water, completely softened, to air: 0.15 dimensionless; name fraction_WCS_to_air; = fraction_PW_to_air; lognormal variance with pedigree 0.092025, pedigree (4,4,3,2,4)
  Calculated value. See comment in the other parametres present in this dataset. Water, completely softened is considered to be always used as process water, thus process water fractions to air are applied to all water, completely softened input flows to calculate the amount of water consumed in the processes.
  nan
- water consumption, electricity production from oil, recirculating CS: 0.0018 m3/kWh; name WConsumption_EP_oil_recirculatingCS; lognormal variance with pedigree 0.092025, pedigree (4,4,3,2,4)
  (same comment as for water withdrawal, electricity production from oil, once-T and coolingP)
- average efficiency of oil power plants, country: 0.373 dimensionless; name efficiency_oil_country; lognormal variance with pedigree 0.003325, pedigree (3,2,1,2,2)
  Literature value/calculated value. Net electrical efficiency based on the lower heating value (LHV).
  For all OECD countries, the IEA Electricity information 2014 provides data for the year 2012 on fuel input (TJ, Net calorific value NCV) and gross electricity production (GWh) as well as heat production (TJ) in tables 8 and 9 for each country for electricity only and Combined Heat and Power (CHP) plants each. Together with the information on own use (see parameter "losses"), the net electrical efficiency based on the NCV is calculated.
  For all non-OECD countries, data from the IEA Energy balances of non-OECD countries 2014 have been used. These tables do not always provide information on how much of the electricity has been produced in electricity only and in CHP plants, but often give the total value only.
  IEA. 2014. Electricity Information 2014. ISBN 978-92-64-21692-1. International Energy Agency (IEA), Paris Cedex (FR).
  IEA/OECD. 2014. Energy balances of non-OECD countries 2014. International Energy Agency (IEA), Paris Cedex (FR).
  nan
- losses from gross electricity production: 0.07 dimensionless; name losses_gross_net; lognormal variance with pedigree 0.003525, pedigree (3,2,2,2,2)
  Calculated value. Own use of electricity plants in this country in 2012. For the OECD countries, the OECD iLibrary provides gross and net electricity values for the specific sector \"Total Fuel Combustion\", from which the loss value is being calculated. This value is then applied to all fossil fuel datasets, as no data on a more detailed level were available.
  OECD. 2014. IEA Electricity Information Statistics: OECD - Electricity and heat generation. OECD iLibrary. Online database. DOI : 10.1787/elect-data-en
  nan
  Uncertainty: g
- water consumption, electricity production from oil, once-T and coolingP CS: 0.0005 m3/kWh; name WConsumption_EP_oil_onceT_andCP_CS; lognormal variance with pedigree 0.092025, pedigree (4,4,3,2,4)
  (same comment as for water withdrawal, electricity production from oil, once-T and coolingP)
- recirculating cooling system as a fraction of all cooling systems: 0.27 dimensionless; name recirculating_CS_fraction_from_allCS; lognormal variance with pedigree 0.092025, pedigree (4,4,3,2,4)
  Calculated as an average of data available for Europe (Floerke, 2008, Future changes of freshwater needs in the electricity production sector) and USA (NERL, 2011, Estimating freshwater needs to meet future thermoelectric generation requirements).
  nan
- fraction, process water, to air: 0.15 dimensionless; name fraction_PW_to_air; lognormal variance with pedigree 0.092025, pedigree (4,4,3,2,4)
  Literature value. In case when no industry/process specific data are available, default evaporation fraction value is used. This value is 15% and is based on literature (Statistics Canada, 2007 & Shaffer, K.H., 2008, Consumptive water use in the Great Lakes Basin, USGS & Shiklomanov, 2003, World Water Resources at the Beginning of the 21st Century) and has been approved by an expert.
  nan
- fraction, cooling water, to air: 0.0118019 dimensionless; name fraction_CW_to_air; lognormal variance with pedigree 0.041425, pedigree (2,3,2,2,1)
  Calculated value
  nan
- relation between the global and the country's efficiency of oil power plants: 0.991957 dimensionless; name relation_global_country; = efficiency_oil_global/ efficiency_oil_country; undefined min 1, max 1, standardDeviation95 0, pedigree (1,1,1,1,1)
  Parameter not needed in this dataset but present due to parent child relationship.
  nan
- average efficiency of oil power plants, global: 0.37 dimensionless; name efficiency_oil_global; lognormal variance with pedigree 0.003325, pedigree (3,2,1,2,2)
  (same comment as for average efficiency of oil power plants, country)
- once-through and cooling pond cooling systems as a fraction of all cooling syste: 0.73 dimensionless; name once_through_andCP_CS_fractio_from_allCS; lognormal variance with pedigree 0.092025, pedigree (4,4,3,2,4)
  (same comment as for recirculating cooling system as a fraction of all cooling systems)
- water withdrawal, electricity production from oil, recirculating CS: 0.0021 m3/kWh; name WWithdrawal_EP_oil_recirculating_CS; lognormal variance with pedigree 0.092025, pedigree (4,4,3,2,4)
  (same comment as for water withdrawal, electricity production from oil, once-T and coolingP)
- gross electricity production: 4.703e9 kWh; name gross_electricity; lognormal variance with pedigree 0.0012, pedigree (2,1,1,1,1)
  Literature value/statistics. For all OECD countries, gross electricity production 2012 with oil electricity only and CHP plants was taken from the IEA electricity information 2014, country tables 8 and 9. For all non-OECD countries, the values were found in the IEA energy balances of non-OECD countries 2014.
  IEA. 2014. Electricity Information 2014. ISBN 978-92-64-21692-1. International Energy Agency (IEA), Paris Cedex (FR).
  IEA/OECD. 2014. Energy balances of non-OECD countries 2014. International Energy Agency (IEA), Paris Cedex (FR).
  nan

## Reference product
- electricity, high voltage: 1 kWh; name electricity; By-product classification allocatable product; CPC 17100: Electrical energy
  production volume 4.37379e9 kWh; name apv_electricity; = gross_electricity* (1-losses_gross_net)
    Calculated value.
  property price 0.0977 EUR2005
    Temporary price data. Calculated as 90% of purchasers price based on: 94% of the average price (to account for a 6% loss in transformation and transmission) for electricity for industrial consumersin 2005 (excluded taxes). From IEA.
  properties: Corresponding fuel use 12.5 MJ

## By-products
- bilge oil: 0 kg; name bilge_oil; source Jungbluth, N. 2007; CPC 39: Wastes or scraps; By-product classification Waste
  Exchange present due to parent child relationship
  production volume 0 kg; = apv_electricity * bilge_oil
    Calculated from the production volume of electricity produced in proportion to the respective output amounts.
  property price 0 EUR2005; name bilge_oil_price_EUR2005
    Waste products are assigned a price of zero as they are assumed to require further treatment.
  property carbon content, fossil 0.84
    Tab A.6, ecoinvent v2.2 report 13_I. C content has been calculated after data in the tables, and then referred to 1 kg DM
  property heating value, net 1.92 MJ
    Value taken from the general comment of the treatment dataset.
  property carbon content 0.84
    carbon content on a dry matter basis (reserved; not for manual entry)
  properties: water content 9, carbon content, non-fossil 0, water in wet mass 0.9 kg, dry mass 0.1 kg, wet mass 1 kg, carbon allocation 0.084 kg
- waste mineral oil: 0 kg; name waste_oil; source Jungbluth, N. 2007; CPC 39990: Other wastes n.e.c.; By-product classification Waste
  Exchange present due to parent child relationship
  production volume 0 kg; = apv_electricity *waste_oil
    (same comment as for bilge oil)
  property heating value, net 34.7 MJ
    Value taken from the general comment of the treatment dataset.
  property price 0 EUR2005; name waste_oil_price_EUR2005
    (same comment as for bilge oil)
  property carbon content, fossil 0.864444
    (same comment as for bilge oil)
  property carbon content 0.864444
    carbon content on a dry matter basis (reserved; not for manual entry)
  properties: dry mass 0.9 kg, water content 0.111111, carbon content, non-fossil 0, water in wet mass 0.1 kg, wet mass 1 kg, carbon allocation 0.778 kg
- municipal solid waste: 0 kg; name municipal_waste; source Jungbluth, N. 2007; CPC 39910: Municipal waste; By-product classification Waste
  Exchange present due to parent child relationship
  production volume 0 kg; = apv_electricity * municipal_waste
    (same comment as for bilge oil)
  property price 0 EUR2005; name municipal_waste_price_EUR2005
    (same comment as for bilge oil)
  property heating value, net 11.74 MJ
    Value taken from the general comment of the treatment dataset.
  property carbon content, fossil 0.171549
    MSW composition in tab 4.1, ecoinvent v2.2 report 13_I. C content referred to 1 kg DM
  property carbon content, non-fossil 0.261655
    MSW composition in tab 4.1, ecoinvent v2.2 report 13_I. C content referred to 1 kg DM
  property carbon content 0.433204
    carbon content on a dry matter basis (reserved; not for manual entry)
  properties: dry mass 0.771 kg, wet mass 1 kg, water in wet mass 0.229 kg, water content 0.297017, carbon allocation 0.334 kg
- lignite ash: 0 kg; name lignite_ash; source Jungbluth, N. 2007; CPC 39: Wastes or scraps; By-product classification Waste
  Exchange present due to parent child relationship
  production volume 0 kg; = apv_electricity * lignite_ash
    (same comment as for bilge oil)
  property price 0 EUR2005; name lignite_ash_price_EUR2005
    (same comment as for bilge oil)
  property carbon content 0
    carbon content on a dry matter basis (reserved; not for manual entry)
  properties: heating value, net 0 MJ, water in wet mass 0 kg, carbon content, non-fossil 0, carbon content, fossil 0, dry mass 1 kg, water content 0, wet mass 1 kg, carbon allocation 0 kg

## Inputs from technosphere
- limestone, crushed, washed: 0.0132824 kg; = 0.0013762 * factor_MJ_kWh; source Jungbluth, N. 2007, p. Tab. 12.11 p. 228; lognormal variance with pedigree 0.0147, pedigree (2,4,3,3,1)
  IPPC 2001 for flue gas treatment
  Amount was scaled to the amount of reference product.
  properties: dry mass 0.998 kg, carbon content, fossil 0.117257, wet mass 1 kg, water content 0.00200401
  note on carbon content, fossil: Table 3.1, ecoinvent v2.2 report 7, part VII, pg 3. MW CaCO3=100, MW MgCO3=84. C content of limestone is 0.117257 kg/kg DM
- ammonia, anhydrous, liquid: 0.000610031 kg; = 6.3206E-05 * factor_MJ_kWh; source Jungbluth, N. 2007, p. Tab. 12.11 p. 228; lognormal variance with pedigree 0.0147, pedigree (2,4,3,3,1)
  IPPC 2001 for flue gas treatment
  Amount was scaled to the amount of reference product.
  properties: wet mass 1 kg, dry mass 1 kg
- water, decarbonised: 0.482574 kg; name water_decarbonised_input; = 0.05 * factor_MJ_kWh; source Jungbluth, N. 2007, p. Tab. 12.10 p. 228; lognormal variance with pedigree 0.0027, pedigree (2,2,3,1,1)
  Literature data for this country
  Amount was scaled to the amount of reference product.
  Literature data for this country
  Amount was scaled to the amount of reference product.
  properties: wet mass 1 kg
- residue from cooling tower: -2.31635e-5 kg; name cooling_tower; = (2.4E-06 * factor_MJ_kWh)*-1; source Jungbluth, N. 2007, p. Tab. 12.27, p. 238; lognormal variance with pedigree 0.0027, pedigree (2,2,3,1,1)
  Literature data for this country
  Amount was scaled to the amount of reference product.
  production volume 101312 kg; = apv_electricity * cooling_tower
    (same comment as for bilge oil)
  property price 0 EUR2005; name cooling_tower_price_EUR2005
  properties: carbon content, fossil 0.0544233, wet mass 1 kg, water content 0.428571, dry mass 0.7 kg
- heavy fuel oil: 0.234261 kg; = 0.024272 * factor_MJ_kWh; source Jungbluth, N. 2007; lognormal variance with pedigree 0.0027, pedigree (2,2,3,1,1)
  Literature data for heating value
  Amount was scaled to the amount of reference product.
  properties: heating value, net 41.2 MJ, carbon content, fossil 0.849, wet mass 1 kg, dry mass 1 kg
- fly ash and scrubber sludge: -0.000122574 kg; name fly_ash; = (1.27E-05 * factor_MJ_kWh)*-1; source Jungbluth, N. 2007, p. Tab. 12.27, p. 238; lognormal variance with pedigree 0.0027, pedigree (2,2,3,1,1)
  Literature data for this country
  Amount was scaled to the amount of reference product.
  production volume 536112 kg; = apv_electricity * fly_ash
    (same comment as for bilge oil)
  property price 0 EUR2005; name fly_ash_price_EUR2005
  properties: dry mass 0.1 kg, carbon content, fossil 0.167, water content 9, wet mass 1 kg
  note on carbon content, fossil: Tab A.6, ecoinvent v2.2 report 13_I. C content has been calculated after data in the tables, and then referred to 1 kg DM
- oil power plant, 500MW: 1.19283e-11 unit; = 1.2359E-12 * factor_MJ_kWh; source Jungbluth, N. 2007; lognormal variance with pedigree 0.3506, pedigree (2,5,5,5,1)
  Estimation based on case study
- oil power plant, 500MW: 0 unit; source Jungbluth, N. 2007
  Estimation based on case study
- water, completely softened: 0.0965147 kg; name water_softened_input; = 0.01 * factor_MJ_kWh; source Jungbluth, N. 2007, p. Tab. 12.10 p. 228; lognormal variance with pedigree 0.0027, pedigree (2,2,3,1,1)
  (same comment as for water, decarbonised)
  properties: wet mass 1 kg

## Inputs from nature
- Water, cooling, unspecified natural origin [natural resource, in water]: 0.0925683 m3; name water_cooling_UNO_input; source Scown, C.D., et al. 2011, p. Tab. 12.10 p. 228; lognormal variance with pedigree 0.130025, pedigree (4,4,5,2,4)
  Estimation with literature data, basic uncertainty estimated = 3
  Amount was scaled to the amount of reference product.
  Calculated based on literature (Scown, C.D., et al., 2011, Water Footprint of U.S. Trasportation Fuels;Scown, C.D., et al., 2011, Water Footprint of U.S. Trasportation Fuels (SI); Stiegel, 2008, Estimating Freshwater Needs to Meet Future Thermoelectric Generation Requirements; Floerke, M., 2009, Future changes of freshwater needs in the electricity production sector), (Vionnet, S., Quantis Water Database - Technical Report, 2012). Water use in this process is modelled based on literature (see references). The process boundaries are given by the boundaries of the power plant. The process ends when the energy (MJ) is produced and ready to be used for electricity production (kWh).
  Calculated based on literature data. 9.7 MJ is calculated efficiency of the electricity production, average of all available regions.

## Emissions to nature
- Particulates, > 10 um [air, urban air close to ground]: 6.52383e-5 kg; = 6.57672660175277E-05 * relation_global_country; source Jungbluth, N. 2007, p. Tab. 12.17 / Tab. 12.18; lognormal variance with pedigree 0.0907, pedigree (2,2,5,5,3)
  Literature value/estimation. Compilation from different sources - see Tab. 12.17 fo details. Particle emissions mainly depend on the composition of the fuel, the type of combustion and the combustion conditions.
  Particle size fractions are adopted from Berdowski et al .2002 (see Tab. 12.18).
  Berdowski J., Visschedijk A., Creemers E. and Pulles T. (2002) The Coordinated European Programme on Particulate Matter Emission Inventories, Projections and Guidance (CEPMEIP) Database. TNO-MEP, Apeldoorn, NL, retrieved from: www.air.sk/tno/cepmeip/
- Acetone [air, urban air close to ground]: 1.76014e-6 kg; = 1.8237E-07 * factor_MJ_kWh; source Jungbluth, N. 2007; lognormal variance with pedigree 0.092, pedigree (1,1,3,1,1)
  Calculation based on VOC emission. Deviation calculated from ranges
  Amount was scaled to the amount of reference product.
- Mercury [air, urban air close to ground]: 1.44772e-9 kg; = 1.5E-10 * factor_MJ_kWh; source Jungbluth, N. 2007; lognormal variance with pedigree 1.632, pedigree (1,1,3,1,1)
  Calculation from ranges
  Amount was scaled to the amount of reference product.
- Selenium [air, urban air close to ground]: 1.54424e-8 kg; = 1.6E-09 * factor_MJ_kWh; source Jungbluth, N. 2007; lognormal variance with pedigree 1.212, pedigree (1,1,3,1,1)
  Calculation based on particle emission. Deviation calculated from ranges
  Amount was scaled to the amount of reference product.
- Zinc, ion [water, surface water]: 6.09008e-8 kg; = 6.31E-09 * factor_MJ_kWh; source Jungbluth, N. 2007, p. Tab. 12.26, p. 238; lognormal variance with pedigree 0.262, pedigree (1,1,3,1,1)
  Mean of values for Europe, range of concentrations
  Amount was scaled to the amount of reference product.
- Acetaldehyde [air, urban air close to ground]: 1.76014e-6 kg; = 1.8237E-07 * factor_MJ_kWh; source Jungbluth, N. 2007; lognormal variance with pedigree 0.092, pedigree (1,1,3,1,1)
  (same comment as for Acetone)
- Chromium [air, urban air close to ground]: 3.31316e-8 kg; = 3.4328E-09 * factor_MJ_kWh; source Jungbluth, N. 2007, p. Tab. 12.23, Tab. 12.24; lognormal variance with pedigree 1.462, pedigree (1,1,3,1,1)
  (same comment as for Selenium)
- Water [air, unspecified]: 0.00111265 m3; name water_to_air_unspecified; = (water_softened_input/1000)*fraction_WCS_to_air+(water_decarbonised_input/1000)*fraction_WDC_to_air+water_cooling_UNO_input*fraction_CW_to_air; lognormal variance with pedigree 0.0427, pedigree (2,2,3,1,1)
  Calculated value based on literature values and expert opinion. See comments in the parametres" comment field.
  property fraction, origin: fresh water 0.023356; name fraction_origin_fresh_water
  property fraction, origin: unspecified 0.976644; name fraction_origin_unspecified
  property fraction, origin: salt water 0; name fraction_origin_salt_water
- Mercury [water, surface water]: 1.21049e-9 kg; = 1.2542E-10 * factor_MJ_kWh; source Jungbluth, N. 2007, p. Tab. 12.26, p. 238; lognormal variance with pedigree 0.562, pedigree (1,1,3,1,1)
  (same comment as for Zinc, ion)
- Particulates, < 2.5 um [air, urban air close to ground]: 5.14742e-5 kg; = 5.3333E-06 * factor_MJ_kWh; source Jungbluth, N. 2007, p. Tab. 12.17 / Tab. 12.18; lognormal variance with pedigree 0.3027, pedigree (2,2,3,1,1)
  Literature data for this country
  Amount was scaled to the amount of reference product.
- Chromium, ion [water, surface water]: 2.95509e-8 kg; = 3.0618E-09 * factor_MJ_kWh; source Jungbluth, N. 2007, p. Tab. 12.26, p. 238; lognormal variance with pedigree 0.632, pedigree (1,1,3,1,1)
  (same comment as for Zinc, ion)
- Hypochlorite [water, surface water]: 5.69437e-6 kg; = 5.9E-07 * factor_MJ_kWh; source Jungbluth, N. 2007; lognormal variance with pedigree 0.1021, pedigree (3,4,5,3,3)
  Literature
  Amount was scaled to the amount of reference product.
- Methanol [air, urban air close to ground]: 3.59363e-6 kg; = 3.7234E-07 * factor_MJ_kWh; source Jungbluth, N. 2007; lognormal variance with pedigree 0.092, pedigree (1,1,3,1,1)
  (same comment as for Acetone)
- Phosphorus [water, surface water]: 1.78687e-7 kg; = 1.8514E-08 * factor_MJ_kWh; source Jungbluth, N. 2007, p. Tab. 12.26, p. 238; lognormal variance with pedigree 0.002, pedigree (1,1,3,1,1)
  (same comment as for Zinc, ion)
- Lead [air, urban air close to ground]: 1.05008e-7 kg; = 1.088E-08 * factor_MJ_kWh; source Jungbluth, N. 2007; lognormal variance with pedigree 1.212, pedigree (1,1,3,1,1)
  (same comment as for Selenium)
- Acetic acid [air, urban air close to ground]: 7.18726e-6 kg; = 7.4468E-07 * factor_MJ_kWh; source Jungbluth, N. 2007; lognormal variance with pedigree 0.092, pedigree (1,1,3,1,1)
  (same comment as for Acetone)
- BOD5, Biological Oxygen Demand [water, surface water]: 1.62145e-5 kg; = 1.68E-06 * factor_MJ_kWh; source Jungbluth, N. 2007, p. Tab. 12.26, p. 238; lognormal variance with pedigree 0.292, pedigree (1,1,3,1,1)
  (same comment as for Zinc, ion)
- Benzo(a)pyrene [air, urban air close to ground]: 1.44772e-10 kg; = 1.5E-11 * factor_MJ_kWh; source Jungbluth, N. 2007; lognormal variance with pedigree 0.3707, pedigree (3,3,5,3,3)
  Literature
  Amount was scaled to the amount of reference product.
- Sulfate [water, surface water]: 0.00192808 kg; = 0.00019977 * factor_MJ_kWh; source Jungbluth, N. 2007, p. Tab. 12.26, p. 238; lognormal variance with pedigree 0.022, pedigree (1,1,3,1,1)
  (same comment as for Zinc, ion)
- Calcium [air, urban air close to ground]: 2.89544e-7 kg; = 3E-08 * factor_MJ_kWh; source Jungbluth, N. 2007, p. Tab. 12.25; lognormal variance with pedigree 0.1007, pedigree (3,3,5,3,3)
  Literature
  Amount was scaled to the amount of reference product.
- Hydrocarbons, unspecified [water, surface water]: 3.58166e-7 kg; = 3.711E-08 * factor_MJ_kWh; source Jungbluth, N. 2007, p. Tab. 12.26, p. 238; lognormal variance with pedigree 0.042, pedigree (1,1,3,1,1)
  (same comment as for Zinc, ion)
- Iron [air, urban air close to ground]: 6.75603e-7 kg; = 7E-08 * factor_MJ_kWh; source Jungbluth, N. 2007; lognormal variance with pedigree 0.7107, pedigree (3,3,5,3,3)
  Literature
  Amount was scaled to the amount of reference product.
- Thallium [water, surface water]: 3.57375e-8 kg; = 3.7028E-09 * factor_MJ_kWh; source Jungbluth, N. 2007, p. Tab. 12.26, p. 238; lognormal variance with pedigree 0.002, pedigree (1,1,3,1,1)
  (same comment as for Zinc, ion)
- Nickel [air, urban air close to ground]: 8.52418e-7 kg; = 8.832E-08 * factor_MJ_kWh; source Jungbluth, N. 2007; lognormal variance with pedigree 1.212, pedigree (1,1,3,1,1)
  (same comment as for Selenium)
- Lead [water, surface water]: 4.81493e-8 kg; = 4.9888E-09 * factor_MJ_kWh; source Jungbluth, N. 2007, p. Tab. 12.26, p. 238; lognormal variance with pedigree 0.502, pedigree (1,1,3,1,1)
  (same comment as for Zinc, ion)
- Suspended solids, unspecified [water, surface water]: 1.46789e-5 kg; = 1.5209E-06 * factor_MJ_kWh; source Jungbluth, N. 2007, p. Tab. 12.26, p. 238; lognormal variance with pedigree 0.052, pedigree (1,1,3,1,1)
  (same comment as for Zinc, ion)
- Hydrogen chloride [air, urban air close to ground]: 4.35282e-7 kg; = 4.51E-08 * factor_MJ_kWh; source Jungbluth, N. 2007, p. Tab. 12.25; lognormal variance with pedigree 0.0612, pedigree (2,3,3,1,3)
  Literature
  Amount was scaled to the amount of reference product.
- Benzene [air, urban air close to ground]: 3.59363e-7 kg; = 3.7234E-08 * factor_MJ_kWh; source Jungbluth, N. 2007; lognormal variance with pedigree 0.092, pedigree (1,1,3,1,1)
  (same comment as for Acetone)
- Arsenic [air, urban air close to ground]: 2.03839e-8 kg; = 2.112E-09 * factor_MJ_kWh; source Jungbluth, N. 2007, p. Tab. 12.23, Tab. 12.24; lognormal variance with pedigree 1.212, pedigree (1,1,3,1,1)
  (same comment as for Selenium)
- Nitrogen [water, surface water]: 7.88139e-5 kg; = 8.166E-06 * factor_MJ_kWh; source Jungbluth, N. 2007, p. Tab. 12.26, p. 238; lognormal variance with pedigree 0.032, pedigree (1,1,3,1,1)
  (same comment as for Zinc, ion)
- Particulates, > 2.5 um, and < 10um [air, urban air close to ground]: 1.02952e-5 kg; = 1.0667E-06 * factor_MJ_kWh; source Jungbluth, N. 2007, p. Tab. 12.17 / Tab. 12.18; lognormal variance with pedigree 0.1227, pedigree (2,2,3,1,1)
  Literature data for this country
  Amount was scaled to the amount of reference product.
- Molybdenum [air, urban air close to ground]: 2.34724e-8 kg; = 2.432E-09 * factor_MJ_kWh; source Jungbluth, N. 2007; lognormal variance with pedigree 1.212, pedigree (1,1,3,1,1)
  (same comment as for Selenium)
- Sodium [air, urban air close to ground]: 2.89544e-6 kg; = 3E-07 * factor_MJ_kWh; source Jungbluth, N. 2007, p. Tab. 12.25; lognormal variance with pedigree 0.1007, pedigree (3,3,5,3,3)
  Literature
  Amount was scaled to the amount of reference product.
- Hydrocarbons, aliphatic, unsaturated [air, urban air close to ground]: 3.59363e-7 kg; = 3.7234E-08 * factor_MJ_kWh; source Jungbluth, N. 2007; lognormal variance with pedigree 0.092, pedigree (1,1,3,1,1)
  (same comment as for Acetone)
- PAH, polycyclic aromatic hydrocarbons [air, urban air close to ground]: 1.73727e-8 kg; = 1.8E-09 * factor_MJ_kWh; source Jungbluth, N. 2007, p. Tab. 12.21, p. 235; lognormal variance with pedigree 0.3147, pedigree (2,4,3,3,1)
  Literature
  Amount was scaled to the amount of reference product.
- Dinitrogen monoxide [air, urban air close to ground]: 9.65147e-6 kg; = 1E-06 * factor_MJ_kWh; source Jungbluth, N. 2007, p. Tab. 12.16 p. 232; lognormal variance with pedigree 0.0427, pedigree (2,2,3,1,1)
  Literature data for this country
  Amount was scaled to the amount of reference product.
- Chloride [water, surface water]: 0.000235863 kg; = 2.4438E-05 * factor_MJ_kWh; source Jungbluth, N. 2007, p. Tab. 12.26, p. 238; lognormal variance with pedigree 0.892, pedigree (1,1,3,1,1)
  (same comment as for Zinc, ion)
- Hydrocarbons, aromatic [air, urban air close to ground]: 7.18726e-8 kg; = 7.4468E-09 * factor_MJ_kWh; source Jungbluth, N. 2007; lognormal variance with pedigree 0.092, pedigree (1,1,3,1,1)
  (same comment as for Acetone)
- Zinc [air, urban air close to ground]: 7.41233e-8 kg; = 7.68E-09 * factor_MJ_kWh; source Jungbluth, N. 2007; lognormal variance with pedigree 1.212, pedigree (1,1,3,1,1)
  (same comment as for Selenium)
- Cobalt [air, urban air close to ground]: 1.08097e-7 kg; = 1.12E-08 * factor_MJ_kWh; source Jungbluth, N. 2007, p. Tab. 12.23, Tab. 12.24; lognormal variance with pedigree 1.212, pedigree (1,1,3,1,1)
  (same comment as for Selenium)
- Cadmium [air, urban air close to ground]: 9.75957e-9 kg; = 1.0112E-09 * factor_MJ_kWh; source Jungbluth, N. 2007, p. Tab. 12.23, Tab. 12.24; lognormal variance with pedigree 1.212, pedigree (1,1,3,1,1)
  (same comment as for Selenium)
- Fluoride [water, surface water]: 1.95983e-6 kg; = 2.0306E-07 * factor_MJ_kWh; source Jungbluth, N. 2007, p. Tab. 12.26, p. 238; lognormal variance with pedigree 0.762, pedigree (1,1,3,1,1)
  (same comment as for Zinc, ion)
- Carbon dioxide, fossil [air, urban air close to ground]: 0.752815 kg; = 0.078 * factor_MJ_kWh; source Jungbluth, N. 2007, p. Tab. 12.12, p. 229; lognormal variance with pedigree 0.0027, pedigree (2,2,3,1,1)
  Literature data for this country
  Amount was scaled to the amount of reference product.
- Manganese [air, urban air close to ground]: 3.39732e-8 kg; = 3.52E-09 * factor_MJ_kWh; source Jungbluth, N. 2007, p. Tab. 12.23, Tab. 12.24; lognormal variance with pedigree 1.212, pedigree (1,1,3,1,1)
  (same comment as for Selenium)
- COD, Chemical Oxygen Demand [water, surface water]: 1.77346e-5 kg; = 1.8375E-06 * factor_MJ_kWh; source Jungbluth, N. 2007, p. Tab. 12.26, p. 238; lognormal variance with pedigree 0.482, pedigree (1,1,3,1,1)
  (same comment as for Zinc, ion)
- Arsenic, ion [water, surface water]: 1.15277e-9 kg; = 1.1944E-10 * factor_MJ_kWh; source Jungbluth, N. 2007, p. Tab. 12.26, p. 238; lognormal variance with pedigree 0.002, pedigree (1,1,3,1,1)
  (same comment as for Zinc, ion)
- Sulfite [water, surface water]: 1.74074e-5 kg; = 1.8036E-06 * factor_MJ_kWh; source Jungbluth, N. 2007, p. Tab. 12.26, p. 238; lognormal variance with pedigree 0.032, pedigree (1,1,3,1,1)
  (same comment as for Zinc, ion)
- Copper [air, urban air close to ground]: 1.45158e-7 kg; = 1.504E-08 * factor_MJ_kWh; source Jungbluth, N. 2007, p. Tab. 12.23, Tab. 12.24; lognormal variance with pedigree 1.312, pedigree (1,1,3,1,1)
  (same comment as for Selenium)
- Propane [air, urban air close to ground]: 3.59363e-7 kg; = 3.7234E-08 * factor_MJ_kWh; source Jungbluth, N. 2007, p. Tab. 12.19, Tab. 12.20; lognormal variance with pedigree 0.092, pedigree (1,1,3,1,1)
  (same comment as for Acetone)
- Cobalt [water, surface water]: 2.30564e-9 kg; = 2.3889E-10 * factor_MJ_kWh; source Jungbluth, N. 2007, p. Tab. 12.26, p. 238; lognormal variance with pedigree 0.002, pedigree (1,1,3,1,1)
  (same comment as for Zinc, ion)
- Formaldehyde [air, urban air close to ground]: 5.39045e-6 kg; = 5.5851E-07 * factor_MJ_kWh; source Jungbluth, N. 2007, p. Tab. 12.19, Tab. 12.20; lognormal variance with pedigree 0.092, pedigree (1,1,3,1,1)
  (same comment as for Acetone)
- Manganese [water, surface water]: 3.45841e-8 kg; = 3.5833E-09 * factor_MJ_kWh; source Jungbluth, N. 2007, p. Tab. 12.26, p. 238; lognormal variance with pedigree 0.002, pedigree (1,1,3,1,1)
  (same comment as for Zinc, ion)
- Sulfide [water, surface water]: 5.18767e-7 kg; = 5.375E-08 * factor_MJ_kWh; source Jungbluth, N. 2007, p. Tab. 12.26, p. 238; lognormal variance with pedigree 0.272, pedigree (1,1,3,1,1)
  (same comment as for Zinc, ion)
- AOX, Adsorbable Organic Halogen as Cl [water, surface water]: 4.09251e-8 kg; = 4.2403E-09 * factor_MJ_kWh; source Jungbluth, N. 2007, p. Tab. 12.26, p. 238; lognormal variance with pedigree 0.002, pedigree (1,1,3,1,1)
  (same comment as for Zinc, ion)
- Ethanol [air, urban air close to ground]: 3.59363e-6 kg; = 3.7234E-07 * factor_MJ_kWh; source Jungbluth, N. 2007; lognormal variance with pedigree 0.092, pedigree (1,1,3,1,1)
  (same comment as for Acetone)
- Methane, fossil [air, urban air close to ground]: 3.59363e-5 kg; = 3.7234E-06 * factor_MJ_kWh; source Jungbluth, N. 2007, p. Tab. 12.19, Tab. 12.20; lognormal variance with pedigree 0.092, pedigree (1,1,3,1,1)
  (same comment as for Acetone)
- Sulfur dioxide [air, urban air close to ground]: 0.00133383 kg; = 0.0001382 * factor_MJ_kWh; source Jungbluth, N. 2007, p. Tab. 12.14 p. 230; lognormal variance with pedigree 0.0027, pedigree (2,2,3,1,1)
  Literature data for this country
  Amount was scaled to the amount of reference product.
- Hydrocarbons, aliphatic, alkanes, unspecified [air, urban air close to ground]: 7.18726e-6 kg; = 7.4468E-07 * factor_MJ_kWh; source Jungbluth, N. 2007; lognormal variance with pedigree 0.092, pedigree (1,1,3,1,1)
  (same comment as for Acetone)
- Nickel, ion [water, surface water]: 1.70551e-7 kg; = 1.7671E-08 * factor_MJ_kWh; source Jungbluth, N. 2007, p. Tab. 12.26, p. 238; lognormal variance with pedigree 0.342, pedigree (1,1,3,1,1)
  (same comment as for Zinc, ion)
- DOC, Dissolved Organic Carbon [water, surface water]: 9.91399e-6 kg; = 1.0272E-06 * factor_MJ_kWh; source Jungbluth, N. 2007; lognormal variance with pedigree 0.002, pedigree (1,1,3,1,1)
  Calculated as equal to TOC.
  Amount was scaled to the amount of reference product.
- Vanadium [air, urban air close to ground]: 3.08847e-6 kg; = 3.2E-07 * factor_MJ_kWh; source Jungbluth, N. 2007; lognormal variance with pedigree 1.392, pedigree (1,1,3,1,1)
  (same comment as for Selenium)
- Oils, unspecified [water, surface water]: 5.46988e-7 kg; = 5.6674E-08 * factor_MJ_kWh; source Jungbluth, N. 2007, p. Tab. 12.26, p. 238; lognormal variance with pedigree 0.032, pedigree (1,1,3,1,1)
  (same comment as for Zinc, ion)
- Beryllium [air, urban air close to ground]: 5.38282e-10 kg; = 5.5772E-11 * factor_MJ_kWh; source Jungbluth, N. 2007; lognormal variance with pedigree 0.6927, pedigree (3,3,5,3,1)
  Literature
  Amount was scaled to the amount of reference product.
- Dioxins, measured as 2,3,7,8-tetrachlorodibenzo-p-dioxin [air, urban air close to ground]: 9.65147e-14 kg; = 1E-14 * factor_MJ_kWh; source Jungbluth, N. 2007, p. Tab. 12.22 p. 235; lognormal variance with pedigree 0.3147, pedigree (2,4,3,3,1)
  Literature
  Amount was scaled to the amount of reference product.
- Carbon dioxide, fossil [air, unspecified]: 0.00596374 kg; = 0.00061791 * factor_MJ_kWh; source Jungbluth, N. 2007, p. Tab. 12.29, Tab. 12.30; lognormal variance with pedigree 0.0206, pedigree (2,5,3,1,1)
  Calculation for limestone use
  Amount was scaled to the amount of reference product.
- Tin, ion [water, surface water]: 1.15277e-9 kg; = 1.1944E-10 * factor_MJ_kWh; source Jungbluth, N. 2007, p. Tab. 12.26, p. 238; lognormal variance with pedigree 0.002, pedigree (1,1,3,1,1)
  (same comment as for Zinc, ion)
- Carbon monoxide, fossil [air, urban air close to ground]: 6.27346e-5 kg; = 6.5E-06 * factor_MJ_kWh; source Jungbluth, N. 2007, p. Tab. 12.13, p. 229; lognormal variance with pedigree 0.6527, pedigree (2,2,3,1,1)
  Literature data for this country
  Amount was scaled to the amount of reference product.
- TOC, Total Organic Carbon [water, surface water]: 9.91399e-6 kg; = 1.0272E-06 * factor_MJ_kWh; source Jungbluth, N. 2007, p. Tab. 12.26, p. 238; lognormal variance with pedigree 0.002, pedigree (1,1,3,1,1)
  (same comment as for Zinc, ion)
- Cadmium, ion [water, surface water]: 2.8052e-9 kg; = 2.9065E-10 * factor_MJ_kWh; source Jungbluth, N. 2007, p. Tab. 12.26, p. 238; lognormal variance with pedigree 0.422, pedigree (1,1,3,1,1)
  (same comment as for Zinc, ion)
- Vanadium, ion [water, surface water]: 3.48698e-7 kg; = 3.6129E-08 * factor_MJ_kWh; source Jungbluth, N. 2007, p. Tab. 12.26, p. 238; lognormal variance with pedigree 0.672, pedigree (1,1,3,1,1)
  (same comment as for Zinc, ion)
- Chromium VI [air, urban air close to ground]: 3.00364e-9 kg; = 3.1121E-10 * factor_MJ_kWh; source Jungbluth, N. 2007, p. Tab. 12.23, Tab. 12.24; lognormal variance with pedigree 2.2927, pedigree (3,3,5,3,1)
  Literature, basic uncertainity = 20
  Amount was scaled to the amount of reference product.
- Iron, ion [water, surface water]: 1.2128e-6 kg; = 1.2566E-07 * factor_MJ_kWh; source Jungbluth, N. 2007, p. Tab. 12.26, p. 238; lognormal variance with pedigree 0.242, pedigree (1,1,3,1,1)
  (same comment as for Zinc, ion)
- Copper, ion [water, surface water]: 2.44781e-8 kg; = 2.5362E-09 * factor_MJ_kWh; source Jungbluth, N. 2007, p. Tab. 12.26, p. 238; lognormal variance with pedigree 0.722, pedigree (1,1,3,1,1)
  (same comment as for Zinc, ion)
- Nitrogen oxides [air, urban air close to ground]: 0.000534692 kg; = 5.54E-05 * factor_MJ_kWh; source Jungbluth, N. 2007, p. Tab. 12.15 p. 231; lognormal variance with pedigree 0.0427, pedigree (2,2,3,1,1)
  Literature data for this country
  Amount was scaled to the amount of reference product.
- Water [water, unspecified]: 0.0920347 m3; name water_to_water_unspecified; = (water_softened_input/1000)*(1-fraction_WCS_to_air)+(water_decarbonised_input/1000)*(1-fraction_WDC_to_air)+water_cooling_UNO_input*(1-fraction_CW_to_air); lognormal variance with pedigree 0.0427, pedigree (2,2,3,1,1)
  (same comment as for Water)
  property fraction, origin: salt water 0; name fraction_origin_salt_water_Ww
  property carbon content, non-fossil 0; name C_content_non_fossil
  property wet mass 1000 kg; name WM
  property fraction, origin: unspecified 0.992149; name fraction_origin_unspecified_Ww
  property carbon content, fossil 0; name C_content_fossil
  property fraction, origin: fresh water 0.00785115; name fraction_origin_fresh_water_Ww
  property water in wet mass 1000 kg; name WWM
  property dry mass 0 kg; name DM
- Ammonia [air, urban air close to ground]: 9.65147e-7 kg; = 1E-07 * factor_MJ_kWh; source Jungbluth, N. 2007, p. p.232; lognormal variance with pedigree 1.102, pedigree (1,1,3,1,1)
  Calculation from ranges
  Amount was scaled to the amount of reference product.
- Hydrogen fluoride [air, urban air close to ground]: 2.90509e-7 kg; = 3.01E-08 * factor_MJ_kWh; source Jungbluth, N. 2007, p. Tab. 12.25; lognormal variance with pedigree 0.0612, pedigree (2,3,3,1,3)
  Literature
  Amount was scaled to the amount of reference product.
- Hypochlorite [water, ocean]: 1.06166e-6 kg; = 1.1E-07 * factor_MJ_kWh; source Jungbluth, N. 2007; lognormal variance with pedigree 0.1021, pedigree (3,4,5,3,3)
  Literature
  Amount was scaled to the amount of reference product.

## Sampling procedure
Literature, environmental reports and questionnaires

## Extrapolations
This dataset has been extrapolated from year 2015 to the year of the calculation (2021). The uncertainty has been adjusted accordingly.

## Review by Carl Vadenbo 2015-07-14
The update of the whole electricity sector for the ecoinvent v3.2 database consist of hundreds of datasets. All these datasets have passed through a streamlined review processes where the underlying modelling of production volumes, technology shares and efficiencies was reviewed in detail prior to the datasets being submitted to the database.
