# anode production, prebake, for aluminium electrolysis

Dataset: EcoSpold 2, unit process
Geography: IAI Area, South America
Time period: 2015-01-01 to 2021-12-31
Technology level: current
Classification: EcoSpold01Categories: metals/extraction
Classification: ISIC rev.4 ecoinvent: 2790:Manufacture of other electrical equipment
Scenario: Business-as-Usual
System model: Allocation, cut-off by classification
Share of production covered: 68 %
Generated by: Linlin Wu
Published in: International Aluminium Insitute 2015
Database: ecoinvent
isCopyrightProtected: false
accessRestrictedTo: 1

## General comment
Industry average of prebake anodes for use in the Hall-Héroult process using prebake technology.
[This dataset is meant to replace the following datasets:]

## Included activities start
The unit process begins with the unloading of process materials to the storage areas on site. The operations associated with this unit process include:
* anode mix preparation, anode block forming and baking;
* rodding of baked anodes;
* maintenance and repair of plant and equipment; and
* treatment of process air, liquids and solids.
The original data also accounts for recovery of spent anode materials (anode butts). However, these are recycled in closed loop and are not explicitly accounted for in the inventory, although inputs and outputs of other flows are influenced by this recycling.
Treatment of scrubber sludges are excluded, as there is no corresponding waste treatment in the ecoinvent database.

## Included activities end
The output of this process is rodded anodes to be transported to electrolysis plants employing prebake technology.

## Geography
Data mostly from global surveys by IAI.

## Reference product
- anode, prebake, for aluminium electrolysis: 1 kg; name anodePrebakeAmount; CPC 42950: Wire, rods, tubes, plates, electrodes and similar products, of base metal or of metal carbides, coated or core[…]; By-product classification allocatable product
  production volume 4.84e8 kg; name anodePrebakeProductionVolume_sa
    Calculated value based on reported data, scaled up to correspond with Annual Production Volume of aluminium using Prebake technology.
  property price 0.15 EUR2005; name anodePrebakeAmount_price_EUR2005
    Literature value; U.S. Department of Energy (Inert Anode Roadmap, 1998, http://www1.eere.energy.gov/manufacturing/industries_technologies/aluminum/pdfs/inertroad.pdf).
  property carbon content 0.875012
    carbon content on a dry matter basis (reserved; not for manual entry)
  properties: carbon content, non-fossil 0, wet mass 1 kg, carbon content, fossil 0.875012, water content 0, water in wet mass 0 kg, dry mass 1 kg, carbon allocation 0.875012 kg

## Inputs from technosphere
- scrap steel: -0.0021 kg; name wasteSteelAmount; source International Aluminium Insitute 2015; lognormal variance with pedigree 0.0032, pedigree (1,3,3,1,1)
  Reported as scrap steel.
  production volume 1.0164e6 kg; = wasteSteelAmount* anodePrebakeProductionVolume_sa
    Calculated from the production volume of anode and output of waste per reference flow.
  property price 0 EUR2005; name wasteSteelAmount_price_EUR2005
  properties: wet mass 1 kg, dry mass 1 kg
- cast iron: 0.00068 kg; source International Aluminium Insitute 2015; lognormal variance with pedigree 0.0032, pedigree (1,3,3,1,1)
  Reported as Steel in IAI report
  EcoSpold01Location=RER
  properties: carbon content, fossil 0.04, wet mass 1 kg, dry mass 1 kg
  note on carbon content, fossil: Cast iron is made by remelting pig iron in small furnaces (e.g. cupola furnaces or electric arc furnaces) and poured into moulds to make castings. It usually contains 2% to 6% carbon (ecoinvent v2.2 report 10_partII). An average content of 4% was considered
- anode factory: 2.5e-10 unit; source Classen M. 2008; lognormal variance with pedigree 0.5, pedigree (5,5,5,5,5)
  Rough estimate
  EcoSpold01Location=RER
  Uncertainty: rough guess
- waste asphalt: -0.0136 kg; name wasteCarbonAmount; source International Aluminium Insitute 2015; lognormal variance with pedigree 0.0032, pedigree (1,3,3,1,1)
  EcoSpold01Location=CH
  Proxy for treatment of waste carbon
  production volume 6.5824e6 kg; = wasteCarbonAmount*anodePrebakeProductionVolume_sa
    Calculated from the production volume of anode and output of waste per reference flow.
  property price 0 EUR2005; name wasteCarbonAmount_price_EUR2005
  properties: water content 0.001001, wet mass 1 kg, carbon content, fossil 0.0440796, dry mass 0.999 kg
  note on carbon content, fossil: The waste contains 94.7% inert material (see Tab A.5 for details) 5.3% bitumen (see Tab A.6 for details), ecoinvent v2.2 report 13_I
- refractory, fireclay, packed: 0.000186 kg; source International Aluminium Insitute 2015; lognormal variance with pedigree 0.0032, pedigree (1,3,3,1,1)
  Reported as "Refractory material" in IAI Survey
  properties: dry mass 1 kg, wet mass 1 kg
- fly ash and scrubber sludge: -4.7e-5 kg; name BP_amount_1; source International Aluminium Insitute 2015; lognormal variance with pedigree 0.2106, pedigree (5,5,5,5,5)
  Used as a weak proxy for treatment of scrubber sludges
  production volume 22748 kg; = anodePrebakeProductionVolume_sa * (BP_amount_1 / anodePrebakeAmount)
    Calculated from production volume of reference product using the relative outputs.
  property price 0 EUR2005; name BP_amount_1_price_EUR2005
  properties: dry mass 0.1 kg, carbon content, fossil 0.167, wet mass 1 kg, water content 9
  note on carbon content, fossil: Tab A.6, ecoinvent v2.2 report 13_I. C content has been calculated after data in the tables, and then referred to 1 kg DM
- electricity, medium voltage: 0 kWh; source International Aluminium Insitute 2015; pedigree (1,1,1,1,1)
  EcoSpold01Location=UCTE
- pitch: 0.128 kg; source International Aluminium Insitute 2015; lognormal variance with pedigree 0.0027, pedigree (1,2,3,1,1)
  EcoSpold01Location=RER
  Reported as Pitch in IAI report
  properties: heating value, net 28 MJ, wet mass 1 kg, dry mass 1 kg, carbon content, fossil 0.83
- petroleum coke: 0.45 kg; source International Aluminium Insitute 2015; lognormal variance with pedigree 0.0027, pedigree (1,2,3,1,1)
  EcoSpold01Location=RER
  properties: carbon content, fossil 0.885, wet mass 1 kg, dry mass 1 kg, heating value, net 35 MJ
- inert waste, for final disposal: -0.025989 kg; name wasteInertAmount; = (wasteI_nonspecifiedWasteToLandfillAmou_0 +wasteI_refractoryWasteToRecyclingAmoun_0 +wasteI_refractoryWasteToLandfillAmount_0 +wasteI_nonspecifiedByproductsToRecycli_0 )*-1; source International Aluminium Insitute 2015; lognormal variance with pedigree 0.002, pedigree (1,1,3,1,1)
  Amount includes "Byproducts for external recycling", "Refractory material for external recycling", "Refractory (excluding SPL) sent to landfill" and "Other landfilled waste" in IAI report. If it becomes possible to specify byproducts and other landfilled waste, then these should be broken out of this total. Currently, no recycling process exists in ecoinvent for refractory material, and hence these are modelled as sent to landfill.
  EcoSpold01Location=CH
  Uncertainty: Uncertainty based entirely on uncertainty ofunderlying parameters.
  production volume 1.25787e7 kg; = wasteInertAmount* anodePrebakeProductionVolume_sa
    Calculated from the production volume of anode and output of waste per reference flow.
  property amount of non-specified waste to recycling 0.0257 kg; name wasteI_nonspecifiedByproductsToRecycli_0
  property amount of non-specified waste to landfill 0 kg; name wasteI_nonspecifiedWasteToLandfillAmou_0
  property amount of refractory material sent to landfill 0.000165 kg; name wasteI_refractoryWasteToLandfillAmount_0
  property amount of refractory material sent to recycling 0.000124 kg; name wasteI_refractoryWasteToRecyclingAmoun_0
  property price 0 EUR2005; name wasteInertAmount_price_EUR2005
  properties: dry mass 0.995 kg, wet mass 1 kg, water content 0.00502513
- heat, district or industrial, other than natural gas: 1.55745 MJ; = Net_Heat_Value_HFO*40.0 * kgFuel_Input_HFO /fuel_use_HFO; source International Aluminium Insitute 2015; lognormal variance with pedigree 0.002, pedigree (1,1,3,1,1)
  Heavy oil combustion.
  property Corresponding fuel use 1.053 MJ; name fuel_use_HFO
  property fuel input in physical units, kg 0.041 kg; name kgFuel_Input_HFO
  property heating value, net 1 MJ; name Net_Heat_Value_HFO
  note on Corresponding fuel use: Lower heating value of the fuel input related to the heat/electricity output
- electricity, medium voltage: 0.0173369, 0.131392, 0.0272711 kWh (3 entries); source International Aluminium Insitute 2015; lognormal variance with pedigree 0.0027, pedigree (1,2,3,1,1)
  EcoSpold01Location=UCTE

## Inputs from nature
- Water, salt, ocean [natural resource, in water]: 0.00157 m3; source International Aluminium Insitute 2015; lognormal variance with pedigree 0.2106, pedigree (5,5,5,5,5)
- Water, cooling, unspecified natural origin [natural resource, in water]: 0.00027 m3; source International Aluminium Insitute 2015; lognormal variance with pedigree 0.0032, pedigree (1,3,3,1,1)
  Specified as freshwater in IAI report.

## Emissions to nature
- Particulates, > 2.5 um, and < 10um [air, unspecified]: 2.9744e-5 kg; = PM_total_3 * PM_btw_2_5_and_10um; source International Aluminium Insitute 2015; lognormal variance with pedigree 0.0033, pedigree (2,2,3,1,1)
  Total amount from IAI survey, distributed among three class sizes using CEPMEIP database emission factors for Production of primary aluminium. Abatement level: medium.
  property ratio of particulates between 2.5 and 10 microns 0.44; name PM_btw_2_5_and_10um; = (3.2-1.44)/4
  property total particulates 6.76e-5 kg; name PM_total_3
- Water [water, ocean]: 0.0016 m3; source International Aluminium Insitute 2015; lognormal variance with pedigree 0.2106, pedigree (5,5,5,5,5)
- Water [water, surface water]: 0.0017 m3; lognormal variance with pedigree 0.2106, pedigree (5,5,5,5,5)
  Reported as Fresh Water
- Oils, unspecified [water, unspecified]: 7.29e-5 kg; source International Aluminium Insitute 2015; lognormal variance with pedigree 0.0046, pedigree (1,4,3,1,1)
- Benzo(a)pyrene [air, unspecified]: 5e-8 kg; name BaPAmount; source International Aluminium Institute 2015; lognormal variance with pedigree 0.2106, pedigree (5,5,5,5,5)
- Particulates, > 10 um [air, unspecified]: 1.352e-5 kg; = PM_total_2 *PM_greater_10um; source International Aluminium Insitute 2015; lognormal variance with pedigree 0.0033, pedigree (2,2,3,1,1)
  (same comment as for Particulates, > 2.5 um, and < 10um)
  property total particulates 6.76e-5 kg; name PM_total_2
  property ratio pf particulates greater than 10 microns 0.2; name PM_greater_10um; = (4-3.2)/4
- Nitrogen oxides [air, unspecified]: 6.67e-6 kg; source International Aluminium Insitute 2015; lognormal variance with pedigree 0.0426, pedigree (1,3,3,1,1)
- PAH, polycyclic aromatic hydrocarbons [air, unspecified]: 5.3e-5 kg; source International Aluminium Insitute 2015; lognormal variance with pedigree 0.2106, pedigree (5,5,5,5,5)
- Particulates, < 2.5 um [air, unspecified]: 2.4336e-5 kg; = PM_total_1* PM2_5; source International Aluminium Insitute 2015; lognormal variance with pedigree 0.0033, pedigree (2,2,3,1,1)
  (same comment as for Particulates, > 2.5 um, and < 10um)
  property ratio of total particulates less than 2.5 microns 0.36; name PM2_5; = 1.44/4
  property total particulates 6.76e-5 kg; name PM_total_1
- Water [air, unspecified]: 0.00027 m3; source International Aluminium Insitute 2015; lognormal variance with pedigree 0.2106, pedigree (5,5,5,5,5)
  IAI data reported as "Fresh Water Consumption" plus "Sea Water consumption"
- Hydrogen fluoride [air, unspecified]: 4.6e-5 kg; source International Aluminium Insitute 2015; lognormal variance with pedigree 0.0426, pedigree (1,3,3,1,1)
  Reported as F in IAI data,sum of particulate F and gaseous F
- Suspended solids, unspecified [water, unspecified]: 9e-5 kg; source International Aluminium Institute 2015; lognormal variance with pedigree 0.2106, pedigree (5,5,5,5,5)
- Sulfur dioxide [air, unspecified]: 7.2e-5 kg; source International Aluminium Insitute 2015; lognormal variance with pedigree 0.0027, pedigree (1,2,3,1,1)
- Fluoride [water, unspecified]: 9e-6 kg; source International Aluminium Insitute 2015; lognormal variance with pedigree 0.2106, pedigree (5,5,5,5,5)
- PAH, polycyclic aromatic hydrocarbons [water, unspecified]: 1e-8 kg; source International Aluminium Insitute 2015; lognormal variance with pedigree 0.2106, pedigree (5,5,5,5,5)
  Reported as PAH (6 Borneff components)

## Sampling procedure
2015 data is included where available from annual IAI surveys (electricity, fuel, petrol coke & pitch inputs). Other flows are based on a life cycle inventory survey carried out by IAI for its member and non member companies. The survey was conducted in 2016 for 2015 data. Total percent representativeness is based on 2015 LCI data, using 2015 production volumes.

## Extrapolations
This dataset has been extrapolated from year 2015 to the year of the calculation (2021). The uncertainty has been adjusted accordingly.
