# treatment of residue from mechanical treatment, liquid crystal display, municipal waste incineration

Dataset: EcoSpold 2, unit process
Geography: RoW
Time period: 2006-01-01 to 2021-12-31
Technology level: current
Classification: ISIC rev.4 ecoinvent: 3821:Treatment and disposal of non-hazardous waste
Synonyms: municipal waste incineration; Kehrichtverbrennung; Siedlungsabfallverbrennung
Scenario: Business-as-Usual
System model: Allocation, cut-off by classification
Share of production covered: 1.8 %
Generated by: Gabor Doka
Published in: Doka G. 2013
Database: ecoinvent
isCopyrightProtected: true
accessRestrictedTo: 1

## General comment
This dataset represents the activity of waste disposal of residue from mechanical treatment, liquid crystal display in a municipal solid waste incinerator (MSWI) // Recommended use of this dataset: Only for incineration of shredder residues generated in the recycling (mechanical treatment) of LCD screens (Liquid Crystal Display screen residue) // Inventoried waste contains 1.95% rubber; 47.7% Plastics from electronic consumer goods; 47.7% Plastics from electronic industrial goods; 0.0121% MSWI iron scrap; 2.22% Alu in MSW; 0.0336% Glass; 0.358% wiring copper; 0.00595% Pb in ASR inert; 0.00302% silver; . // Waste composition (wet, in ppm): upper heating value 35.17 MJ/kg; lower heating value 33.72 MJ/kg; H2O 8758.3; O 49320; H 72691; C 793850; S 406.13; N 12691; P 477.22; B n.a.; Cl 6556; Br 5248.3; F 238.56; I n.a.; Ag 30.203; As 7.1568; Ba 168.9; Cd 143.84; Co 28.129; Cr 50.345; Cu 6626.7; Hg 0.81112; Mn 6.8754; Mo 2.8627; Ni 478.2; Pb 200.83; Sb 4575.8; Se 1.8699; Sn 193.79; V 0.74601; Zn 732.6; Be 0.44521; Sc n.a.; Sr 78.803; Ti 4272.1; Tl 0.35617; W n.a.; Si 2953.8; Fe 1604.7; Ca 2994.1; Al 24344; K 111.65; Mg n.a.; Na 154.79; // Share of carbon in waste that is biogenic 0%. // Share of metals in waste not oxidised and bulk-recyclable (exclude very small or thin parts) Iron: 6.16%; Alu: 90.6%; Copper: 53.98%. // One kg of this waste produces 0.06722 kg of slag and 0.02164 kg of residues, which are landfilled. Additional solidification with 0.008658 kg of cement. // Net energy production: 4.33MJ/kg electric energy and 8.4MJ/kg thermal energy. // Recovery of metal scrap to recycling: 0.055725g iron scrap, 6.7217g aluminium scrap, 1.0522g copper scrap.

## Included activities start
waste incineration from waste reception gate and delivery into waste bunker at incinerator plant site (without transports to the incinerator)

## Included activities end
Waste-specific short-term emissions to water from leachate. Long-term emissions from landfill to ground water.

## Geography
Specific to the technology mix encountered in Switzerland in 2010. Well applicable to modern incineration practices in Europe, North America or Japan.

## Technology
average Swiss MSWI plants in 2010 (grate incinerators) with electrostatic precipitator for fly ash (ESP), wet flue gas scrubber and 25% SNCR , 42.77% SCR-high dust , 32.68% SCR-low dust -DeNOx facilities and 0% without Denox (weighted according to mass of burnt waste, representing Swiss average). Efficiency of iron scrap separation from slag : 58%. Efficiency of non-ferrous scrap separation from slag : 31%. Gross electric efficiency technology mix 15.84% and Gross thermal efficiency technology mix 28.51%

## Time period
Waste composition as given in literature reference, theoretical data or other source. Transfer coefficients for modern MSWI.

## Reference product
- residue from mechanical treatment, liquid crystal display: -1 kg; CPC 39: Wastes or scraps; By-product classification Waste
  Main reference product of this activity (supply of disposal service).
  production volume 1.9842e8 kg
    based on estimate on MSW in WTE globally and estimate of share of WEEE residues in Swiss MSW based on unqualified estimate of LCD waste in CH and rate of this residue waste per device (from Hischier et al. 2007-V)
  property price 0 EUR2005
    Waste products are assigned a price of zero as they are assumed to require further treatment.
  property heating value, net 33.72 MJ
    Value taken from the general comment of the treatment dataset.
  property carbon content 0.809363
    carbon content on a dry matter basis (reserved; not for manual entry)
  properties: water in wet mass 0 kg, dry mass 1 kg, carbon content, fossil 0.809363, water content 0, wet mass 1 kg, carbon content, non-fossil 0, carbon allocation 0.809363 kg

## By-products
All rows: pedigree (1,1,1,1,1)
- iron scrap, sorted, pressed: 0 kg; CPC 39310: Slag, dross, scalings and other waste from the manufacture of iron or steel; By-product classification Recyclable
  Iron scrap recovered from this waste.
  Uncertainty: uncertainty calculated from uncertainty in waste composition, uncertainty of share of recyclable metal, uncertainty of transfer coefficient to bottom ash, uncertainty of the efficiency of scrap removal in MSWI plant.
  production volume 0 kg
    calculated in proportion to reference product waste input to incinerator
  property price 0.175 EUR2005
    Temporary price data. Calculated as 90% of purchasers price based on: 2005 import and export prices (total trades (USD) divided by total weight (kg) in biggest economies of the world: EU27, USA, Brasil, China, India, Japan and Russia) from UN Commodity Trade Statistics Database (http://data.un.org/Explorer.aspxDatabase [Accessed 2011.06.20]). Commodity: Waste or scrap, of cast iron
  property carbon content 0
    carbon content on a dry matter basis (reserved; not for manual entry)
  properties: carbon content, fossil 0, wet mass 1 kg, carbon content, non-fossil 0, dry mass 1 kg, water in wet mass 0 kg, water content 0, carbon allocation 0 kg
- aluminium scrap, post-consumer, prepared for melting: 0 kg; By-product classification Recyclable; CPC 39363: Waste and scrap of aluminium
  Aluminium scrap recovered from this waste.
  Uncertainty: uncertainty calculated from uncertainty in waste composition, uncertainty of share of recyclable metal, uncertainty of transfer coefficient to bottom ash, uncertainty of the efficiency of scrap removal in MSWI plant.
  production volume 0 kg
    calculated in proportion to reference product waste input to incinerator
  property price 0.806 EUR2005
    Temporary price data. Calculated as 90% of purchasers price based on: 2005 import and export prices (total trades (USD) divided by total weight (kg) in biggest economies of the world: EU27, USA, Brasil, China, India, Japan and Russia) from UN Commodity Trade Statistics Database (http://data.un.org/Explorer.aspxDatabase [Accessed 2011.06.17]). Commodity: Waste or scrap, aluminium
  property carbon content 0
    carbon content on a dry matter basis (reserved; not for manual entry)
  properties: carbon content, fossil 0, water content 0, carbon content, non-fossil 0, water in wet mass 0 kg, dry mass 1 kg, wet mass 1 kg, carbon allocation 0 kg
- heat, for reuse in municipal waste incineration only: 0 MJ; name E_th_prod_MSWI; By-product classification allocatable product; CPC 17300: Steam and hot water
  Net electricity generated from this waste and used in internal MSWI plant energy redistribution.
  Uncertainty: uncertainty is calculated from uncertainties in waste composition and uncertainties in energy efficiency and the uncertainty in internal energy demand
  production volume 1.6665e9 MJ
    calculated in proportion to reference product waste input to incinerator
  property exergy 0.1842 MJ; name E_th_prod_MSWI_exergy
    This exergy property is based on the exergy content of the product.
  property true value relation 0.1842; name E_th_prod_MSWI_true_value_relation
    property to calculate "true value" from
  property price 0.0106 EUR2005; name E_th_prod_MSWI_price_EUR2005
    Average European district heat price from Ecoheatcool and Euroheat 2005-2006, Ecoheat Work package 1: The European heat market. Final report. 10.6 EUR/GJ i s the price of district heat. http://www.solarthermalworld.org/files/Ecoheatcool%20WP1%20Web.pdf?download
- electricity, for reuse in municipal waste incineration only: 0 kWh; name E_el_prod_MSWI; CPC 17100: Electrical energy; By-product classification allocatable product
  (same comment as for heat, for reuse in municipal waste incineration only)
  production volume 2.3868e8 kWh
    calculated in proportion to reference product waste input to incinerator
  property true value relation 3.6; name E_el_prod_MSWI_true_value_relation
    property to calculate "true value" from
  property price 0.1 EUR2005; name E_el_prod_MSWI_price_EUR2005
    Estimated to be the same price as in case of electricity, medium voltage.
  property exergy 3.6 MJ; name E_el_prod_MSWI_exergy
    This exergy property is based on the exergy content of the product.
- copper scrap, sorted, pressed: 0 kg; CPC 39361: Waste and scrap of copper; By-product classification Recyclable
  Copper scrap recovered from this waste.
  Uncertainty: uncertainty calculated from uncertainty in waste composition, uncertainty of share of recyclable metal, uncertainty of transfer coefficient to bottom ash, uncertainty of the efficiency of scrap removal in MSWI plant.
  production volume 0 kg
    calculated in proportion to reference product waste input to incinerator
  property price 2.84 EUR2005
    Temporary price data. Calculated as 90% of purchasers price based on: Source: USGS Mineral Yearbook 2007, Table 1 in <http://minerals.usgs.gov/minerals/pubs/commodity/recycle/myb1-2007-recyc.pdf>
  property carbon content 0
    carbon content on a dry matter basis (reserved; not for manual entry)
  properties: carbon content, non-fossil 0, water content 0, wet mass 1 kg, dry mass 1 kg, water in wet mass 0 kg, carbon content, fossil 0, carbon allocation 0 kg

## Inputs from technosphere
- chemical, organic: 5.1268e-5 kg; lognormal variance with pedigree 0.75086, pedigree (1,1,4,1,1)
  Auxilliary inputs for the wastewater treatment stage of the incinerator plant. Proxy for (pure) Trisodium-trimercapto-s-triazine (CAS 17766-26-6), used as 15% diluted solution, aka TMT15.
  Uncertainty: uncertainty calculated from uncertainty in average TMT15 input, of transfer coefficients in the incinerator, and the uncertainty of the waste composition of this waste
  properties: wet mass 1 kg, dry mass 1 kg, carbon content, fossil 0.628, heating value, net 19.03 MJ
- municipal waste incineration facility: 2.5e-10 unit
  Demands per kilogram waste.
- ammonia, anhydrous, liquid: 0 kg; pedigree (1,1,1,1,1)
  Input to DeNOx stage (100% NH3).
  Uncertainty: uncertainty calculated from uncertainty in average DeNOx input, uncertainty in the share of thermal NOx, uncertainty of nitrogen content in average municipal waste and the uncertainty in nitrogen content in *this* waste.
  properties: wet mass 1 kg, dry mass 1 kg
- titanium dioxide: 0.00014143 kg; lognormal variance with pedigree 1.0319, pedigree (1,1,4,1,1)
  Input to DeNOx stage (TiO2 catalyst carrier)
  Uncertainty: uncertainty calculated from uncertainty in average DeNOx input, uncertainty in the share of thermal NOx, uncertainty of nitrogen content in average municipal waste and the uncertainty in nitrogen content in *this* waste.
  properties: dry mass 1 kg, wet mass 1 kg
- water, decarbonised: 0 kg; pedigree (1,1,1,1,1)
  Incinerator process water used in flue gas scrubber stage.
  Uncertainty: uncertainty calculated from uncertainty in average water input, and the uncertainty of the waste composition of this waste
  properties: wet mass 1 kg
- slag landfill: 1.1667e-10 unit; lognormal variance with pedigree 0.052579, pedigree (1,1,4,1,1)
  Landfill infrastructure required for landfilling of bottom ash.
  Uncertainty: uncertainty is calculated from uncertainties in waste composition and transfer coefficients in incinerator
- chemical, inorganic: 0.00030949 kg; lognormal variance with pedigree 0.21875, pedigree (1,1,4,1,1)
  Auxilliary inputs for the wastewater treatment stage of the incinerator plant. Proxy for Polyelectrolyte.
  Uncertainty: uncertainty calculated from uncertainty in average Polyelectrolyte input, of transfer coefficients in the incinerator, and the uncertainty of the waste composition of this waste
  properties: carbon content, fossil 0.003, dry mass 1 kg, wet mass 1 kg
- iron (III) chloride, without water, in 40% solution state: 0.00013241 kg; lognormal variance with pedigree 0.26167, pedigree (1,1,4,1,1)
  Auxilliary inputs for the wastewater treatment stage of the incinerator plant.
  Uncertainty: uncertainty calculated from uncertainty in average FeCl3 input, of transfer coefficients in the incinerator, and the uncertainty of the waste composition of this waste
  properties: wet mass 1 kg, dry mass 1 kg
- waste cement, hydrated: 0 kg; pedigree (1,1,1,1,1)
  Hydrated cement output for solidification of landfilled residual material.
  Uncertainty: Uncertainty calculated from uncertainty of the waste composition of this waste and transfer coefficients in the incinerator and of the solidification recipe.
  production volume 0 kg
    calculated in proportion to reference product waste input to incinerator
  properties: dry mass 1 kg, wet mass 1 kg
- cement, unspecified: 0 kg; pedigree (1,1,1,1,1)
  Cement required for solidification of landfilled residual material.
  Uncertainty: Uncertainty calculated from uncertainty of the waste composition of this waste, of transfer coefficients in the incinerator and of the solidification recipe.
  properties: wet mass 1 kg, dry mass 1 kg
- hydrochloric acid, without water, in 30% solution state: 8.1348e-5 kg; lognormal variance with pedigree 0.21875, pedigree (1,1,4,1,1)
  Auxilliary inputs for the wastewater treatment stage of the incinerator plant.
  Uncertainty: uncertainty calculated from uncertainty in average HCl input, of transfer coefficients in the incinerator, and the uncertainty of the waste composition of this waste
  properties: dry mass 1 kg, heating value, net 3.32 MJ, wet mass 1 kg
- residual material landfill: 4.5092e-11 unit; lognormal variance with pedigree 0.062328, pedigree (1,1,4,1,1)
  Landfill infrastructure required for landfilling of incineration residues.
  Uncertainty: uncertainty is calculated from uncertainties in waste composition and transfer coefficients in incinerator
- sodium hydroxide, without water, in 50% solution state: 0.00092252 kg; lognormal variance with pedigree 0.2574, pedigree (1,1,4,1,1)
  Auxilliary inputs for the flue gas treatment stage of the incinerator plant.
  Uncertainty: uncertainty calculated from uncertainty in average NaOH input, of transfer coefficients in the incinerator, and the uncertainty of the waste composition of this waste
  properties: dry mass 1 kg, wet mass 1 kg, heating value, net 3.03 MJ
- heat, district or industrial, natural gas: 0 MJ; pedigree (1,1,1,1,1)
  Input to DeNOx stage, to heat up flue gas in low-dust SCR.
  Uncertainty: uncertainty calculated from uncertainty in average DeNOx input, uncertainty in the share of thermal NOx, uncertainty of nitrogen content in average municipal waste and the uncertainty in nitrogen content in *this* waste.
  properties: heating value, net 1 MJ
- process-specific burdens, residual material landfill: 0 kg; pedigree (1,1,1,1,1)
  Mass-specific expenditures required for landfilling of incineration residues.
  Uncertainty: uncertainty is calculated from uncertainties in waste composition and transfer coefficients in incinerator
- chromium oxide, flakes: 2.8864e-6 kg; lognormal variance with pedigree 1.0319, pedigree (1,1,4,1,1)
  Input to DeNOx stage.
  Uncertainty: uncertainty calculated from uncertainty in average DeNOx input, uncertainty in the share of thermal NOx, uncertainty of nitrogen content in average municipal waste and the uncertainty in nitrogen content in *this* waste.
  properties: dry mass 1 kg, wet mass 1 kg
- transport, freight, lorry, unspecified: 0 metric ton*km; pedigree (1,1,1,1,1)
  Transport services to transport incineration residues to landfills.
  Uncertainty: uncertainty calculated from uncertainty of the waste composition of this waste, uncertainty of transfer coefficients and the uncertainty in generic transportation distances
- quicklime, milled, packed: 0.0040921 kg; lognormal variance with pedigree 0.32756, pedigree (1,1,4,1,1)
  Auxilliary inputs for the flue gas treatment stage of the incinerator plant.
  Uncertainty: uncertainty calculated from uncertainty in average CaO input, of transfer coefficients in the incinerator, and the uncertainty of the waste composition of this waste
  properties: water content 0.010101, wet mass 1 kg, dry mass 0.99 kg
- process-specific burdens, slag landfill: 0 kg; pedigree (1,1,1,1,1)
  Mass-specific expenditures required for landfilling of bottom ash.
  Uncertainty: uncertainty is calculated from uncertainties in waste composition and transfer coefficients in incinerator
- iron scrap, sorted, pressed: -5.5725e-5 kg; lognormal variance with pedigree 0.61418, pedigree (1,1,4,1,1)
  (same comment as for iron scrap, sorted, pressed)
  production volume 11057 kg
  properties: price 0.175 EUR2005, wet mass 1 kg, dry mass 1 kg
- aluminium scrap, post-consumer, prepared for melting: -0.0067217 kg; lognormal variance with pedigree 0.28212, pedigree (1,1,4,1,1)
  (same comment as for aluminium scrap, post-consumer, prepared for melting)
  production volume 1.3337e6 kg
  properties: dry mass 1 kg, price 0.806 EUR2005, wet mass 1 kg
- copper scrap, sorted, pressed: -0.0010522 kg; lognormal variance with pedigree 0.43521, pedigree (1,1,4,1,1)
  (same comment as for copper scrap, sorted, pressed)
  production volume 208790 kg
  properties: price 2.84 EUR2005, wet mass 1 kg, dry mass 1 kg
- ammonia, anhydrous, liquid: 0.00047318, 4.06755e-5, 6.32807e-5, 0.000125381, 0.000122841, 1.2875e-5, 5.75561e-5, 0.00136161 kg (8 entries); lognormal variance with pedigree 0.67494, pedigree (1,1,4,1,1)
  (same comment as for ammonia, anhydrous, liquid)
- water, decarbonised: 0.0330842, 0.086085, 0.347201, 0.0847847, 0.0170922, 0.0562023, 0.0031027, 0.0442129, 0.10299, 0.646028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 kg (12 entries); lognormal variance with pedigree 0.26167, pedigree (1,1,4,1,1)
  (same comment as for water, decarbonised)
- waste cement, hydrated: -0.00612253, -0.0155215 kg (2 entries); lognormal variance with pedigree 0.071412, pedigree (1,1,4,1,1)
  (same comment as for waste cement, hydrated)
  production volume 4.2947e6 kg
- cement, unspecified: 0.00125014, 0.000260116, 1.90517e-5, 5.43036e-5, 0.00122809, 3.61464e-5, 0.000396994, 4.80319e-5, 0.00536483 kg (9 entries); lognormal variance with pedigree 0.071412, pedigree (1,1,4,1,1)
  (same comment as for cement, unspecified)
- heat, district or industrial, natural gas: 0.00469848, 0.112585, 0.304857 MJ (3 entries); lognormal variance with pedigree 0.67494, pedigree (1,1,4,1,1)
  (same comment as for heat, district or industrial, natural gas)
- process-specific burdens, residual material landfill: 0.00612253, 0.0155215 kg (2 entries); lognormal variance with pedigree 0.062328, pedigree (1,1,4,1,1)
  (same comment as for process-specific burdens, residual material landfill)
- transport, freight, lorry, unspecified: 0.000399501, 6.25472e-5, 0.00302885 metric ton*km (3 entries); lognormal variance with pedigree 0.036759, pedigree (1,1,4,1,1)
  (same comment as for transport, freight, lorry, unspecified)
- process-specific burdens, slag landfill: 0.0185645, 0.0470635 kg (2 entries); lognormal variance with pedigree 0.052579, pedigree (1,1,4,1,1)
  (same comment as for process-specific burdens, slag landfill)

## Inputs from nature
- Oxygen [natural resource, in air]: 2.7387 kg; lognormal variance with pedigree 0.0171759, pedigree (1,1,4,1,1)
  Oxygen from ambient air needed to combust and oxidise this waste. Net demand, i.e. without O2 leaving the plant in flue gas uncombusted.
  Uncertainty: uncertainty is calculated from uncertainties in waste composition and transfer coefficients to flue gas and soild residues in incinerator

## Emissions to nature
- Strontium [air, urban air close to ground]: 7.8803e-9 kg; lognormal variance with pedigree 1.0387, pedigree (1,1,4,1,1)
  Emission to air from waste composition and transfer coefficients.
  Uncertainty: uncertainty is calculated from uncertainties in waste composition and transfer coefficients in incinerator
- Beryllium [water, ground-, long-term]: 4.0689e-7 kg; lognormal variance with pedigree 1.6012, pedigree (1,1,4,1,1)
  Long-term emissions from landfilling of incineration residues.
  Uncertainty: uncertainty is calculated from uncertainties in waste composition and transfer coefficients in incinerator and landfills.
- Arsenic, ion [water, surface water]: 4.9576e-6 kg; lognormal variance with pedigree 1.2131, pedigree (1,1,4,1,1)
  Emissions to water from waste composition and transfer coefficients in incinerator and landfills.
  Uncertainty: uncertainty is calculated from uncertainties in waste composition and transfer coefficients in incinerator and landfills
- Strontium [water, surface water]: 4.9617e-8 kg; lognormal variance with pedigree 1.7134, pedigree (1,1,4,1,1)
  (same comment as for Arsenic, ion)
- Nitrogen oxides [air, urban air close to ground]: 0.00084048 kg; lognormal variance with pedigree 0.73009, pedigree (1,1,4,1,1)
  Sum of fuel-Nox and thermal-NOx emitted to air after DeNOx stage.
  Uncertainty: uncertainty calculated from uncertainty in average N-emissions and uncertainty in the share of thermal NOx and the uncertainty in nitrogen content in *this* waste.
- Sulfur dioxide [air, urban air close to ground]: 4.318e-6 kg; lognormal variance with pedigree 0.79587, pedigree (1,1,4,1,1)
  (same comment as for Strontium)
- Nitrate [water, ground-, long-term]: 0.00045647 kg; lognormal variance with pedigree 0.3549, pedigree (1,1,4,1,1)
  (same comment as for Beryllium)
- Tin, ion [water, surface water]: 5.126e-9 kg; lognormal variance with pedigree 1.5516, pedigree (1,1,4,1,1)
  (same comment as for Arsenic, ion)
- Heat, waste [air, urban air close to ground]: 25.895 MJ; lognormal variance with pedigree 0.023186, pedigree (1,1,4,1,1)
  Waste heat generated from heating value of this waste plus any electricity required to process it.
  Uncertainty: uncertainty is calculated from uncertainties in waste composition and uncertainties in energy efficiency and the uncertainty in internal energy demand
- Chromium [air, urban air close to ground]: 4.3746e-8 kg; lognormal variance with pedigree 1.0828, pedigree (1,1,4,1,1)
  (same comment as for Strontium)
- Phosphate [water, surface water]: 2.6824e-7 kg; lognormal variance with pedigree 0.5681, pedigree (1,1,4,1,1)
  (same comment as for Arsenic, ion)
- Chloride [water, ground-, long-term]: 0.001509 kg; lognormal variance with pedigree 0.41888, pedigree (1,1,4,1,1)
  (same comment as for Beryllium)
- DOC, Dissolved Organic Carbon [water, surface water]: 0.00040554 kg; lognormal variance with pedigree 0.032673, pedigree (1,1,4,1,1)
  (same comment as for Arsenic, ion)
- Calcium, ion [water, surface water]: 3.2982e-5 kg; lognormal variance with pedigree 0.40674, pedigree (1,1,4,1,1)
  (same comment as for Arsenic, ion)
- Chromium, ion [water, surface water]: 3.8899e-9 kg; lognormal variance with pedigree 1.0972, pedigree (1,1,4,1,1)
  (same comment as for Arsenic, ion)
- Chromium VI [water, ground-, long-term]: 4.5972e-6 kg; lognormal variance with pedigree 1.5396, pedigree (1,1,4,1,1)
  (same comment as for Beryllium)
- Benzene [air, urban air close to ground]: 1.299e-8 kg; lognormal variance with pedigree 0.074458, pedigree (1,1,4,1,1)
  Incomplete combustion product emitted to air.
  Uncertainty: uncertainty calculated from uncertainty in average operation emissions, and the uncertainty of the flue gas volume from this waste.
- Strontium [water, ground-, long-term]: 7.87e-5 kg; lognormal variance with pedigree 1.00127, pedigree (1,1,4,1,1)
  (same comment as for Beryllium)
- Nickel, ion [water, surface water]: 3.213e-7 kg; lognormal variance with pedigree 1.3248, pedigree (1,1,4,1,1)
  (same comment as for Arsenic, ion)
- Aluminium [water, surface water]: 4.4898e-7 kg; lognormal variance with pedigree 0.87753, pedigree (1,1,4,1,1)
  (same comment as for Arsenic, ion)
- Sulfate [water, surface water]: 0.00020601 kg; lognormal variance with pedigree 0.38055, pedigree (1,1,4,1,1)
  (same comment as for Arsenic, ion)
- Silicon [air, urban air close to ground]: 4.4067e-9 kg; lognormal variance with pedigree 0.59394, pedigree (1,1,4,1,1)
  (same comment as for Strontium)
- Dinitrogen monoxide [air, urban air close to ground]: 0.00018929 kg; lognormal variance with pedigree 1.1211, pedigree (1,1,4,1,1)
  Nitrogen species emitted to air after DeNOx stage.
  Uncertainty: uncertainty calculated from uncertainty in average N-emissions and uncertainty in the share of thermal NOx and the uncertainty in nitrogen content in *this* waste.
- Silicon [water, surface water]: 6.9828e-7 kg; lognormal variance with pedigree 0.72452, pedigree (1,1,4,1,1)
  (same comment as for Arsenic, ion)
- TOC, Total Organic Carbon [water, ground-, long-term]: 0.002359 kg; lognormal variance with pedigree 0.021408, pedigree (1,1,4,1,1)
  (same comment as for Beryllium)
- Vanadium, ion [water, ground-, long-term]: 3.3658e-7 kg; lognormal variance with pedigree 1.2551, pedigree (1,1,4,1,1)
  (same comment as for Beryllium)
- Manganese [water, ground-, long-term]: 4.353e-6 kg; lognormal variance with pedigree 2.2012, pedigree (1,1,4,1,1)
  (same comment as for Beryllium)
- Molybdenum [water, surface water]: 7.8186e-7 kg; lognormal variance with pedigree 1.00463, pedigree (1,1,4,1,1)
  (same comment as for Arsenic, ion)
- Molybdenum [water, ground-, long-term]: 2.0771e-6 kg; lognormal variance with pedigree 1.4386, pedigree (1,1,4,1,1)
  (same comment as for Beryllium)
- Cadmium [air, urban air close to ground]: 7.328e-8 kg; lognormal variance with pedigree 0.94306, pedigree (1,1,4,1,1)
  (same comment as for Strontium)
- Cadmium, ion [water, surface water]: 1.3814e-8 kg; lognormal variance with pedigree 0.7993, pedigree (1,1,4,1,1)
  (same comment as for Arsenic, ion)
- Copper, ion [water, ground-, long-term]: 0.005249 kg; lognormal variance with pedigree 0.4201, pedigree (1,1,4,1,1)
  (same comment as for Beryllium)
- Arsenic, ion [water, ground-, long-term]: 2.1431e-6 kg; lognormal variance with pedigree 1.3207, pedigree (1,1,4,1,1)
  (same comment as for Beryllium)
- Chloride [water, surface water]: 0.0050434 kg; lognormal variance with pedigree 0.33301, pedigree (1,1,4,1,1)
  (same comment as for Arsenic, ion)
- Bromine [water, surface water]: 0.0047398 kg; lognormal variance with pedigree 0.19031, pedigree (1,1,4,1,1)
  (same comment as for Arsenic, ion)
- Potassium, ion [water, surface water]: 2.4303e-5 kg; lognormal variance with pedigree 0.58699, pedigree (1,1,4,1,1)
  (same comment as for Arsenic, ion)
- Barium [water, surface water]: 2.2733e-8 kg; lognormal variance with pedigree 1.199, pedigree (1,1,4,1,1)
  (same comment as for Arsenic, ion)
- COD, Chemical Oxygen Demand [water, ground-, long-term]: 0.0059615 kg; lognormal variance with pedigree 0.021408, pedigree (1,1,4,1,1)
  (same comment as for Beryllium)
- Benzene, hexachloro- [air, urban air close to ground]: 2.7162e-11 kg; lognormal variance with pedigree 0.074458, pedigree (1,1,4,1,1)
  (same comment as for Benzene)
- Particulates, < 2.5 um [air, urban air close to ground]: 1.5509e-6 kg; lognormal variance with pedigree 0.37326, pedigree (1,1,4,1,1)
  (same comment as for Benzene)
- BOD5, Biological Oxygen Demand [water, surface water]: 0.0009167 kg; lognormal variance with pedigree 0.033181, pedigree (1,1,4,1,1)
  (same comment as for Arsenic, ion)
- Barium [water, ground-, long-term]: 8.5061e-5 kg; lognormal variance with pedigree 2.2594, pedigree (1,1,4,1,1)
  (same comment as for Beryllium)
- Sodium, ion [water, ground-, long-term]: 0.00011488 kg; lognormal variance with pedigree 0.5373, pedigree (1,1,4,1,1)
  (same comment as for Beryllium)
- Antimony [air, urban air close to ground]: 3.6655e-9 kg; lognormal variance with pedigree 0.54436, pedigree (1,1,4,1,1)
  (same comment as for Strontium)
- Copper, ion [water, surface water]: 4.8266e-7 kg; lognormal variance with pedigree 0.69809, pedigree (1,1,4,1,1)
  (same comment as for Arsenic, ion)
- Titanium [air, urban air close to ground]: 3.5444e-6 kg; lognormal variance with pedigree 0.50235, pedigree (1,1,4,1,1)
  (same comment as for Strontium)
- Potassium, ion [water, ground-, long-term]: 8.6791e-5 kg; lognormal variance with pedigree 0.5301, pedigree (1,1,4,1,1)
  (same comment as for Beryllium)
- Sodium, ion [water, surface water]: 3.8813e-5 kg; lognormal variance with pedigree 0.47055, pedigree (1,1,4,1,1)
  (same comment as for Arsenic, ion)
- Mercury [water, ground-, long-term]: 5.1661e-8 kg; lognormal variance with pedigree 3.1614, pedigree (1,1,4,1,1)
  (same comment as for Beryllium)
- Silver, ion [water, surface water]: 1.0486e-9 kg; lognormal variance with pedigree 2.225, pedigree (1,1,4,1,1)
  (same comment as for Arsenic, ion)
- Lead [air, urban air close to ground]: 1.159e-8 kg; lognormal variance with pedigree 0.91365, pedigree (1,1,4,1,1)
  (same comment as for Strontium)
- Vanadium, ion [water, surface water]: 1.1561e-9 kg; lognormal variance with pedigree 1.5635, pedigree (1,1,4,1,1)
  (same comment as for Arsenic, ion)
- Carbon monoxide, fossil [air, urban air close to ground]: 2.2082e-5 kg; lognormal variance with pedigree 0.74722, pedigree (1,1,4,1,1)
  (same comment as for Benzene)
- Tin, ion [water, ground-, long-term]: 7.4218e-5 kg; lognormal variance with pedigree 1.762, pedigree (1,1,4,1,1)
  (same comment as for Beryllium)
- Thallium [water, ground-, long-term]: 2.0783e-7 kg; lognormal variance with pedigree 1.2847, pedigree (1,1,4,1,1)
  (same comment as for Beryllium)
- Chromium VI [water, surface water]: 1.4001e-6 kg; lognormal variance with pedigree 1.142, pedigree (1,1,4,1,1)
  (same comment as for Arsenic, ion)
- Lead [water, surface water]: 1.4555e-8 kg; lognormal variance with pedigree 0.76701, pedigree (1,1,4,1,1)
  (same comment as for Arsenic, ion)
- Potassium [air, urban air close to ground]: 5.5159e-7 kg; lognormal variance with pedigree 0.96512, pedigree (1,1,4,1,1)
  (same comment as for Strontium)
- Selenium [water, ground-, long-term]: 1.2145e-6 kg; lognormal variance with pedigree 1.0978, pedigree (1,1,4,1,1)
  (same comment as for Beryllium)
- Thallium [water, surface water]: 2.1819e-10 kg; lognormal variance with pedigree 1.8837, pedigree (1,1,4,1,1)
  (same comment as for Arsenic, ion)
- Antimony [water, surface water]: 0.0015771 kg; lognormal variance with pedigree 0.48465, pedigree (1,1,4,1,1)
  (same comment as for Arsenic, ion)
- Methane, fossil [air, urban air close to ground]: 1.9485e-7 kg; lognormal variance with pedigree 0.074458, pedigree (1,1,4,1,1)
  (same comment as for Benzene)
- Titanium, ion [water, ground-, long-term]: 0.0012771 kg; lognormal variance with pedigree 0.63603, pedigree (1,1,4,1,1)
  (same comment as for Beryllium)
- Zinc, ion [water, surface water]: 6.6056e-8 kg; lognormal variance with pedigree 0.608, pedigree (1,1,4,1,1)
  (same comment as for Arsenic, ion)
- Sulfate [water, ground-, long-term]: 0.0010059 kg; lognormal variance with pedigree 0.46369, pedigree (1,1,4,1,1)
  (same comment as for Beryllium)
- Bromine [water, ground-, long-term]: 0.00050585 kg; lognormal variance with pedigree 0.46302, pedigree (1,1,4,1,1)
  (same comment as for Beryllium)
- Cobalt [water, surface water]: 5.0962e-9 kg; lognormal variance with pedigree 1.4532, pedigree (1,1,4,1,1)
  (same comment as for Arsenic, ion)
- Antimony [water, ground-, long-term]: 0.0029099 kg; lognormal variance with pedigree 0.45465, pedigree (1,1,4,1,1)
  (same comment as for Beryllium)
- Particulates, > 2.5 um, and < 10um [air, urban air close to ground]: 7.7937e-9 kg; lognormal variance with pedigree 0.16931, pedigree (1,1,4,1,1)
  (same comment as for Benzene)
- Mercury [air, urban air close to ground]: 2.2998e-8 kg; lognormal variance with pedigree 1.6132, pedigree (1,1,4,1,1)
  (same comment as for Strontium)
- Iron, ion [water, ground-, long-term]: 0.00078211 kg; lognormal variance with pedigree 0.77678, pedigree (1,1,4,1,1)
  (same comment as for Beryllium)
- Phosphate [water, ground-, long-term]: 6.3935e-5 kg; lognormal variance with pedigree 4.8816, pedigree (1,1,4,1,1)
  (same comment as for Beryllium)
- Manganese [water, surface water]: 1.0398e-9 kg; lognormal variance with pedigree 1.1423, pedigree (1,1,4,1,1)
  (same comment as for Arsenic, ion)
- Nickel, ion [water, ground-, long-term]: 0.00045902 kg; lognormal variance with pedigree 0.73895, pedigree (1,1,4,1,1)
  (same comment as for Beryllium)
- TOC, Total Organic Carbon [water, surface water]: 0.00040554 kg; lognormal variance with pedigree 0.032673, pedigree (1,1,4,1,1)
  (same comment as for Arsenic, ion)
- Cobalt [air, urban air close to ground]: 5.1157e-8 kg; lognormal variance with pedigree 1.1563, pedigree (1,1,4,1,1)
  (same comment as for Strontium)
- Lead [water, ground-, long-term]: 0.00012816 kg; lognormal variance with pedigree 2.9791, pedigree (1,1,4,1,1)
  (same comment as for Beryllium)
- Hydrogen chloride [air, urban air close to ground]: 3.6801e-6 kg; lognormal variance with pedigree 0.44996, pedigree (1,1,4,1,1)
  (same comment as for Strontium)
- Aluminium [water, ground-, long-term]: 0.014181 kg; lognormal variance with pedigree 0.27798, pedigree (1,1,4,1,1)
  (same comment as for Beryllium)
- Iron [air, urban air close to ground]: 2.6986e-9 kg; lognormal variance with pedigree 0.67282, pedigree (1,1,4,1,1)
  (same comment as for Strontium)
- Mercury [water, surface water]: 8.809e-10 kg; lognormal variance with pedigree 1.1339, pedigree (1,1,4,1,1)
  (same comment as for Arsenic, ion)
- Phosphorus [air, urban air close to ground]: 4.8487e-7 kg; lognormal variance with pedigree 0.78174, pedigree (1,1,4,1,1)
  (same comment as for Strontium)
- Bromine [air, urban air close to ground]: 2.6215e-6 kg; lognormal variance with pedigree 0.47462, pedigree (1,1,4,1,1)
  (same comment as for Strontium)
- Nickel [air, urban air close to ground]: 6.0057e-7 kg; lognormal variance with pedigree 0.78174, pedigree (1,1,4,1,1)
  (same comment as for Strontium)
- Vanadium [air, urban air close to ground]: 1.5179e-8 kg; lognormal variance with pedigree 1.6203, pedigree (1,1,4,1,1)
  (same comment as for Strontium)
- NMVOC, non-methane volatile organic compounds, unspecified origin [air, urban air close to ground]: 5.9119e-7 kg; lognormal variance with pedigree 0.074458, pedigree (1,1,4,1,1)
  (same comment as for Benzene)
- Cyanide [air, urban air close to ground]: 4.0667e-5 kg; lognormal variance with pedigree 1.1211, pedigree (1,1,4,1,1)
  (same comment as for Dinitrogen monoxide)
- Phenol, pentachloro- [air, urban air close to ground]: 5.6571e-12 kg; lognormal variance with pedigree 0.074458, pedigree (1,1,4,1,1)
  (same comment as for Benzene)
- Silicon [water, ground-, long-term]: 0.00028682 kg; lognormal variance with pedigree 5.2412, pedigree (1,1,4,1,1)
  (same comment as for Beryllium)
- Heat, waste [water, surface water]: 5.958 MJ; lognormal variance with pedigree 0.023186, pedigree (1,1,4,1,1)
  (same comment as for Heat, waste)
- BOD5, Biological Oxygen Demand [water, ground-, long-term]: 0.00195 kg; lognormal variance with pedigree 0.021408, pedigree (1,1,4,1,1)
  (same comment as for Beryllium)
- Zinc, ion [water, ground-, long-term]: 0.00022325 kg; lognormal variance with pedigree 2.8301, pedigree (1,1,4,1,1)
  (same comment as for Beryllium)
- Molybdenum [air, urban air close to ground]: 3.7667e-9 kg; lognormal variance with pedigree 1.4624, pedigree (1,1,4,1,1)
  (same comment as for Strontium)
- Selenium [air, urban air close to ground]: 2.2308e-8 kg; lognormal variance with pedigree 1.5056, pedigree (1,1,4,1,1)
  (same comment as for Strontium)
- Cadmium, ion [water, ground-, long-term]: 1.0558e-5 kg; lognormal variance with pedigree 6.3738, pedigree (1,1,4,1,1)
  (same comment as for Beryllium)
- DOC, Dissolved Organic Carbon [water, ground-, long-term]: 0.002359 kg; lognormal variance with pedigree 0.021408, pedigree (1,1,4,1,1)
  (same comment as for Beryllium)
- Thallium [air, urban air close to ground]: 3.5617e-10 kg; lognormal variance with pedigree 1.7339, pedigree (1,1,4,1,1)
  (same comment as for Strontium)
- Sodium [air, urban air close to ground]: 1.0929e-6 kg; lognormal variance with pedigree 0.921, pedigree (1,1,4,1,1)
  (same comment as for Strontium)
- Fluoride [water, ground-, long-term]: 0.00021389 kg; lognormal variance with pedigree 0.47741, pedigree (1,1,4,1,1)
  (same comment as for Beryllium)
- Nitrate [water, surface water]: 0.00016178 kg; lognormal variance with pedigree 0.25023, pedigree (1,1,4,1,1)
  (same comment as for Arsenic, ion)
- Beryllium [water, surface water]: 2.7885e-10 kg; lognormal variance with pedigree 2.1956, pedigree (1,1,4,1,1)
  (same comment as for Arsenic, ion)
- Cobalt [water, ground-, long-term]: 2.2913e-5 kg; lognormal variance with pedigree 1.0638, pedigree (1,1,4,1,1)
  (same comment as for Beryllium)
- Water [water, surface water]: 0.00047269 m3; lognormal variance with pedigree 1.1201, pedigree (1,1,4,1,1)
  Process water released to surface water.
  Uncertainty: uncertainty calculated from uncertainty in process water input and the uncertainty of fraction to surface water.
- Titanium, ion [water, surface water]: 1.5928e-6 kg; lognormal variance with pedigree 0.40073, pedigree (1,1,4,1,1)
  (same comment as for Arsenic, ion)
- Aluminium [air, urban air close to ground]: 1.8645e-9 kg; lognormal variance with pedigree 0.36661, pedigree (1,1,4,1,1)
  (same comment as for Strontium)
- Silver, ion [water, ground-, long-term]: 3.0202e-5 kg; lognormal variance with pedigree 1.1294, pedigree (1,1,4,1,1)
  (same comment as for Beryllium)
- Toluene [air, urban air close to ground]: 2.5981e-8 kg; lognormal variance with pedigree 0.074458, pedigree (1,1,4,1,1)
  (same comment as for Benzene)
- Benzene, pentachloro- [air, urban air close to ground]: 6.8632e-11 kg; lognormal variance with pedigree 0.074458, pedigree (1,1,4,1,1)
  (same comment as for Benzene)
- Tin [air, urban air close to ground]: 1.2653e-10 kg; lognormal variance with pedigree 0.95777, pedigree (1,1,4,1,1)
  (same comment as for Strontium)
- Barium [air, urban air close to ground]: 6.6294e-7 kg; lognormal variance with pedigree 0.91365, pedigree (1,1,4,1,1)
  (same comment as for Strontium)
- Carbon dioxide, fossil [air, urban air close to ground]: 2.8932 kg; lognormal variance with pedigree 0.009675, pedigree (1,1,4,1,1)
  (same comment as for Strontium)
- Hydrogen fluoride [air, urban air close to ground]: 1.6095e-6 kg; lognormal variance with pedigree 0.86553, pedigree (1,1,4,1,1)
  (same comment as for Strontium)
- Iron, ion [water, surface water]: 3.9946e-8 kg; lognormal variance with pedigree 0.88958, pedigree (1,1,4,1,1)
  (same comment as for Arsenic, ion)
- Dioxins, measured as 2,3,7,8-tetrachlorodibenzo-p-dioxin [air, urban air close to ground]: 2.5979e-14 kg; lognormal variance with pedigree 0.37326, pedigree (1,1,4,1,1)
  (same comment as for Benzene)
- Calcium, ion [water, ground-, long-term]: 0.0022363 kg; lognormal variance with pedigree 0.48867, pedigree (1,1,4,1,1)
  (same comment as for Beryllium)
- Manganese [air, urban air close to ground]: 1.2574e-9 kg; lognormal variance with pedigree 1.3536, pedigree (1,1,4,1,1)
  (same comment as for Strontium)
- Copper [air, urban air close to ground]: 2.7916e-7 kg; lognormal variance with pedigree 0.46773, pedigree (1,1,4,1,1)
  (same comment as for Strontium)
- Ammonia [air, urban air close to ground]: 2.6541e-6 kg; lognormal variance with pedigree 0.73009, pedigree (1,1,4,1,1)
  (same comment as for Dinitrogen monoxide)
- COD, Chemical Oxygen Demand [water, surface water]: 0.00092863 kg; lognormal variance with pedigree 0.032608, pedigree (1,1,4,1,1)
  (same comment as for Arsenic, ion)
- Arsenic [air, urban air close to ground]: 5.6061e-8 kg; lognormal variance with pedigree 1.3318, pedigree (1,1,4,1,1)
  (same comment as for Strontium)
- Selenium [water, surface water]: 6.3168e-7 kg; lognormal variance with pedigree 1.1916, pedigree (1,1,4,1,1)
  (same comment as for Arsenic, ion)
- Water [air, urban air close to ground]: 0.0014963 m3; lognormal variance with pedigree 0.73526, pedigree (1,1,4,1,1)
  Water vapour from waste humidity, hydrogen oxidation and part of the process water.
  Uncertainty: Uncertainty calculated from uncertainty in waste composition, process water input and the uncertainty of fraction to air.
- Calcium [air, urban air close to ground]: 2.337e-5 kg; lognormal variance with pedigree 0.53733, pedigree (1,1,4,1,1)
  (same comment as for Strontium)
- Benzo(a)pyrene [air, urban air close to ground]: 2.8908e-13 kg; lognormal variance with pedigree 0.37326, pedigree (1,1,4,1,1)
  (same comment as for Benzene)
- Fluoride [water, surface water]: 1.8241e-5 kg; lognormal variance with pedigree 0.52613, pedigree (1,1,4,1,1)
  (same comment as for Arsenic, ion)
- Zinc [air, urban air close to ground]: 4.9059e-7 kg; lognormal variance with pedigree 0.73076, pedigree (1,1,4,1,1)
  (same comment as for Strontium)
