# cement production, alternative constituents 45%

Dataset: EcoSpold 2, unit process
Geography: RoW
Time period: 2014-01-01 to 2021-12-31
Technology level: current
Classification: ISIC rev.4 ecoinvent: 2394:Manufacture of cement, lime and plaster
Synonyms: General Use according to NTC 121/ASTM C1157; Uso General according to NTC 121/ASTM C1157
Tags: combined production
Scenario: Business-as-Usual
System model: Allocation, cut-off by classification
Share of production covered: 81 %
Generated by: Simon Gmünder
Published in: Silva, F. B. 2017
Database: ecoinvent
isCopyrightProtected: true
accessRestrictedTo: 1

## General comment
The dataset describes the production of cement type general use (uso general) according to technical norm NTC 121 (Icontec, 2014), which is based on the standard specification for hydraulic cement (ASTM standard n° C1157).
This dataset is a copy of the corresponding CO dataset.
The weight composition of the cement is: 55% clinker, 2.2% gypsum, 14.3% blast funrace slag, 14.3% fly ash and 14.3% limestone (rounded numbers).
The cement density is 3g/ml and the resitance is 24-30MPa according to the NTC 220 (Cemex and Argos).

## Included activities start
This activity starts with the reception of raw materials.

## Included activities end
This activity ends with the cement produced in the cement mill. The dataset includes packaging in cement bags. No production waste is assumed.

## Geography
This dataset is a copy of the corresponding CO dataset. Uncertainty has been adjusted accordingly.

## Technology
This dataset is a copy of the corresponding CO dataset. Technology is considered valid worldwide.

## Time period
The production volume of 2016 is considered. Data from sustainability reports of 2014 to 2017 is used.

## Reference product
- cement, alternative constituents 45%: 1 kg; name cement; CPC 374: Plaster, lime and cement; By-product classification allocatable product
  Refernce product with a density between 3-3.15 g/ml.
  production volume 1.12922e10 kg; name cement_PV
    The global production volume was calculated as follows:
    1) The total production volume of each country was calculated
    2) The production volume was scaled based construction output (*)
    3) The average of the results was assumed to be the GLO PV
    4) The share of each different technology per country was calculated
    5) The weighted average of the shares for each country was used to split the GLO PV into different technologies
    (*)
    Construction output assumed per country
    Country Share
    CO 1%
    PE 0%
    BR 2%
    ZA 1%
    IN 10%
    US 8%
    CA-QC 0%
    CH 0%
    Europe without Switzerland 20%
    Source:
    OECD. 2018. Input-Output Tables. http://www.oecd.org/trade/input-outputtables.htm.
    United Nations Statistics Division. 2019. UN data. A world of information. http://data.un.org/.
    Timmer, M.P., E. Dietzenbacher, B. Los, R. Stehrer, and G.J. de Vries. 2015. An Illustrated User Guide to the World Input-Output Database: the Case of Global Automotive Production. Review of International Economics 23(3): 575-605. http://doi.wiley.com/10.1111/roie.12178.
    The data was adjusted based on PPP, data from:
    The World Bank. 2019. World Bank Open Data. https://data.worldbank.org/
  property water content 0; name cement_water_content
  property carbon content, fossil 0; name cement_C_content_fossil
    fossil carbon content on a dry matter basis
  property water in wet mass 0 kg; name cement_WWM
  property price 0.0615 EUR2005; name cement_price_EUR2005
    2005 import and export prices (total trades (USD) divided by total weight (kg) in China, India, USA, Japan, Russia and Europe, major producers and consumers (http://www.cementchina.net/freport/showfre.asp?id=749) from UN Commodity Trade Statistics Database (http://data.un.org/Explorer.aspxDatabase [Accessed 2 July 2010]). Commodity: Cement (portland, aluminious, slag or hydraulic)
  property wet mass 1 kg; name cement_WM
  property carbon content, non-fossil 0; name cement_C_content_non_fossil
    biogene carbon content on a dry matter basis
  property dry mass 1 kg; name cement_DM
  property carbon content 0
    carbon content on a dry matter basis (reserved; not for manual entry)
  properties: carbon allocation 0 kg
- hard coal ash: 0 kg; name ash; By-product classification Waste; CPC 39: Wastes or scraps
  Calculated Value. An equal repartition by mass of principal supplementary cementitious used in Colombia (clay, slag and fly ash). (Dir. Lascarro, 2017; Ing. Pimentel, 2017).The mathematical relation used to calculate the value is: -(1-clinker-gypsum)/3
  production volume 0 kg
    Calculated from production volume of reference product using the relative outputs.
  property price 0 EUR2005; name ash_price_EUR2005
    Waste products are assigned a price of zero as they are assumed to require further treatment.
  property carbon content 0
    carbon content on a dry matter basis (reserved; not for manual entry)
  properties: carbon content, non-fossil 0, dry mass 1 kg, carbon content, fossil 0, water in wet mass 0 kg, water content 0, wet mass 1 kg, carbon allocation 0 kg

## Inputs from technosphere
- clay: 0.142667 kg; = 0.142666666666667*cement; lognormal variance with pedigree 0.0206, pedigree (3,5,4,5,1)
  Calculated Value. An equal repartition by mass of principal supplementary cementitious used in Colombia (clay, slag and fly ash). (Dir. Lascarro, 2017; Ing. Pimentel, 2017).The mathematical relation used to calculate the value is: -(1-clinker-gypsum)/3
  Uncertainty: Variance of log-transformed data was taken from ecoinvent report no 1, table 10.3. Value represents demand of products, electricity etc. for input/output group c.
  properties: water content 0.0362694, dry mass 0.965 kg, wet mass 1 kg
- clinker: 0 kg; source Nicholas Myers 2017; pedigree (1,1,1,1,1)
  Estimated value.The cement type GU, represents 75% of sales and have an average clinker amount of 55% (Ing. Pimentel, 2017).
  Uncertainty: Variance of log-transformed data was taken from ecoinvent report no 1, table 10.3. Value represents demand of products, electricity etc. for input/output group c.
  properties: wet mass 1 kg, dry mass 1 kg
- gypsum, mineral: 0 kg; name gypsum; source Manuel Lascarro 2017; pedigree (1,1,1,1,1)
  Literature Value. 4% of gypsum per clinker mass is used according to the Colombian cement association, ASOCRETO. The mathematical relation used to calculate the value is: clinker*0.04* cement
  Uncertainty: Variance of log-transformed data was taken from ecoinvent report no 1, table 10.3. Value represents demand of products, electricity etc. for input/output group c.
  properties: wet mass 1 kg, dry mass 1 kg
- cement factory: 5.36e-11 unit; = 0.0000000000536*cement; lognormal variance with pedigree 0.0146, pedigree (3,5,3,5,1)
  Literature Value. From the global dataset " alternative constituents 21-35%" (retrieved 2018/01/04)
  Uncertainty: Variance of log-transformed data was taken from ecoinvent report no 1, table 10.3. Value represents demand of products, electricity etc. for input/output group c.
- steel, low-alloyed: 0.00011 kg; name steel; = 0.00011*cement; source Kellenberger D. 2007; lognormal variance with pedigree 0.0146, pedigree (3,5,3,5,1)
  Literature value. As no data from Colombian producer was founded, the value of Global datastet (cement production, alternative constituents 21-35%) has been used.
  Source: 2007, Kellenberger D., Althaus H.-J., Jungbluth N., Künniger T., Life Cycle Inventories of Building Products, Final report ecoinvent data v2.0, 7, Dübendorf, CH, Swiss Centre for LCI, Empa - TSL, 3 - SeparatePublication, CD-ROM (Accessed on october 15th 2017)
  Uncertainty: Variance of log-transformed data was taken from ecoinvent report no 1, table 10.3. Value represents demand of products, electricity etc. for input/output group c.
  properties: wet mass 1 kg, dry mass 1 kg, carbon content, fossil 0.005
- kraft paper: 0.00031 kg; = 0.00031*cement; lognormal variance with pedigree 0.0132, pedigree (3,3,4,5,1)
  Calculated value. The cement used in the self-construction sector is typically packaged in kraft paper bags. The most common cement bags in Colombia weight 50 kg. The kraft paper weight is 92g/m2.
  Uncertainty: Variance of log-transformed data was taken from ecoinvent report no 1, table 10.3. Value represents demand of products, electricity etc. for input/output group c.
  properties: carbon content, non-fossil 0.41662, dry mass 0.945 kg, wet mass 1 kg, water content 0.0582011, heating value, net 14.11 MJ, carbon content, fossil 0.0020219
  note on carbon content, non-fossil: Biogenic C content was calculated after biogenic C contents of chemicals used in the production of the paper (in Tab 9.4 ecoinvent v2.2 report 11_III, part 9). The cellulose content in 1 kg of paper (on a wet mas basis) was estimated as (1-chemical content), C content of cellulose was considered 0.44 kgC/kg dry mass (ecoinvent v2.2 report, n 15a, pg 40)
  note on carbon content, fossil: Fossil C content was calculated after fossil C contents of chemicals used in the production of the paper (in Tab 9.4 ecoinvent v2.2 report 11_III, part 9).
- ethylene glycol: 0.00031 kg; = 0.00031*cement; source Kellenberger D. 2007; lognormal variance with pedigree 0.0206, pedigree (3,5,4,5,1)
  Literature value. Ancillary product for grinding the value of Global datastet (cement production, alternative constituents 21-35%) has been used.
  Source: 2007, Kellenberger D., Althaus H.-J., Jungbluth N., Künniger T., Life Cycle Inventories of Building Products, Final report ecoinvent data v2.0, 7, Dübendorf, CH, Swiss Centre for LCI, Empa - TSL, 3 - SeparatePublication, CD-ROM (Accessed on october 15th 2017)
  Uncertainty: Variance of log-transformed data was taken from ecoinvent report no 1, table 10.3. Value represents demand of products, electricity etc. for input/output group c.
  properties: carbon content, fossil 0.387097, wet mass 1 kg, dry mass 1 kg, heating value, net 23.44 MJ
- electricity, medium voltage: 0 kWh; name electricity; pedigree (1,1,1,1,1)
  Literature value. the electricity considered for cement production is 37kWh per ton of cement, which is aligned with the current ecoinvent datasets.
  Source: Boesch & Hellweg 2010, 2010, Boesch, M.E., Hellweg, S., Identifying Improvement Potentials in Cement Production with Life Cycle Assessment, Environmental Science & Technology, 44, 23, 9143-9149, 1 - Article, Supporting information is available via http://pubs.acs.org (accessed on october 15th 2017)
  Uncertainty: Variance of log-transformed data was taken from ecoinvent report no 1, table 10.3. Value represents demand of products, electricity etc. for input/output group c.
- ground granulated blast furnace slag: 0 kg; name GGBFS; source Manuel Lascarro 2017; pedigree (1,1,1,1,1)
  (same comment as for clay)
  properties: dry mass 0.99 kg, wet mass 1 kg
- clinker: 0.104581, 0.0220284, 0.00159469, 0.0977388, 0.00392034, 0.00655029, 0.313587 kg (7 entries); source Nicholas Myers 2017; lognormal variance with pedigree 0.0206, pedigree (3,5,4,5,1)
  (same comment as for clinker)
- gypsum, mineral: 0.0165987, 0.00167326, 0.00372802 kg (3 entries); source Manuel Lascarro 2017; lognormal variance with pedigree 0.0206, pedigree (3,5,4,5,1)
  (same comment as for gypsum, mineral)
- electricity, medium voltage: 3.13992e-5, 0.000222904, 0.000376528, 1.50927e-5, 0.000119546, 1.85144e-5, 3.06884e-5, 1.18051e-6, 2.54897e-5, 3.86304e-5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 kWh (30 entries); lognormal variance with pedigree 0.0206, pedigree (3,5,4,5,1)
  (same comment as for electricity, medium voltage)
- ground granulated blast furnace slag: 0.110352, 0.0266868, 0.00562795 kg (3 entries); source Manuel Lascarro 2017; lognormal variance with pedigree 0.0206, pedigree (3,5,4,5,1)
  (same comment as for clay)

## Sampling procedure
The data is compiled based on different data sources, including sustainability reports, literature values and expert judgements. Most data is derived from sustainability reports of the three principal concrete producers of Colombia (Argos, Cemex and Holcim). The data is checked, completed and validated by local experts. In total, it is estimated that the data considered is representative for 81% of cement production in all the country (market share of the three main cement producers).
Unit flows were calculated by dividing the amounts of inputs and outputs by the total clinker production in mass.
The amount of the exchanges were calculated considering the arithmetic [weighted] average of the sample. No conversion to the geometric mean of the lognormal distribution was done, for consistency reasons with other Ecoinvent datasets.

## Extrapolations
This dataset is a copy of the corresponding CO dataset. The life cycle inventory model is based on the PCR for cement and concrete (Environdec, 2010), as well as on the LCA core model of the WBCSD-CSI EPD tool (Dauriat et al., 2014).

Dauriat, A., Porté, C., Delerce, C., Guignard, C., & Adams, A. (2014). WBCSD CSI tool for EPDs of concrete and cement: LCA core model and database report.

Environdec. (2010). Product category rules of UN CPC 3744 Cement.
