# heavy water production

Dataset: EcoSpold 2, unit process
Geography: CA
Time period: 2000-01-01 to 2021-12-31
Technology level: old
Classification: ISIC rev.4 ecoinvent: 2029:Manufacture of other chemical products n.e.c.
Synonyms: Deuterium oxide
Scenario: Business-as-Usual
System model: Allocation, cut-off by classification
Generated by: Pablo Tirado
Database: ecoinvent
isCopyrightProtected: true
accessRestrictedTo: 1

## General comment
This dataset represents the production of heavy water in Canada. Heavy water is the common name for D2O, deuterium oxide. Its composition is similar to water except that the hydrogen atom in each water molecule is replaced by "heavy" hydrogen (deuterium) It is used as moderator in the CANDU nuclear technology. For bulk commercial production, several process exist (distillation, electrolysis or based on chemical exchanges). The technology described here is a two step process. FIrst, the "Girdler-Sulphide (G-S)" process, tha consists on an texchange of liquid water with hydrogen sulfide (H2S) gas in a dual-temperature cycle and enriches the heavy water to 30% and secondly, a distillation that enriches the water up to 100%.

Source: http://www.nuclearfaq.ca/cnf_sectionA.htm#e

## Included activities start
Activity starts with the reception of materials in the production plant

## Included activities end
Activity ends with the product at the gate of the production facility.
It includes:
-Main material inputs and energy;

it doesn"t include:
-Infrastructures;
-Emissions
-Secondary inputs

## Geography
Data from canadian producers. Uncertainty has been adjusted accordingly

## Technology
For bulk commercial production, the primary extraction process to date, the "Girdler-Sulphide (G-S)" process, exploits the temperature-dependence of the exchange of deuterium between water and hydrogen-sulphide gas (H2S) and is combined with a distillation process to attain a 100% purity of heavy water. The G-S process, while capable of supplying the massive CANDU build programme from the late 1960s to the late 1980s, is expensive and requires large quantities of toxic H2S gas. It is thus a poor match for current market and regulatory conditions, and the last G-S plant in Canada shut down in 1997.
Source: http://www.nuclearfaq.ca/cnf_sectionA.htm#e
Energy required for distillation is estimated from an alcohol production process (benzyl alcohol)

## Reference product
- heavy water: 1 kg; name amountRP; CPC 34260: Isotopes n.e.c. and compounds thereof (including heavy water); By-product classification allocatable product; CAS 7789-20-0
  production volume 2e6 kg; name RP_PV_1
    Literature value.
    Around 1980, four Canadian plants were operating very successfully, producing over 2000 tonnes of D2O a year.
    Source: http://media.cns-snc.ca/Bulletin/A_Miller_Heavy_Water.pdf
  property price 620 EUR2005; name amountRP_price_EUR2005
    Estimated value based on research on different producers. The price calculated based on the amount and price of materials and energy needed to produce heavy water is around 100 Euro. The price calculated like that is considered underestimated.

## Inputs from technosphere
- water, deionised: 340000 kg; name water; source Department of Defense 1988; lognormal variance with pedigree 0.0893, pedigree (5,5,5,3,2)
  Literature value. The production of a single pound of heavy water requires 340,000 pounds of feed water.
  Source: http://www.fas.org/irp/threat/mctl98-2/p2sec05.pdf
  properties: wet mass 1 kg
- chemical factory, organics: 3.6e-10 unit; lognormal variance with pedigree 0.448, pedigree (4,5,5,5,5)
  Estimation. The infrastructure is estimated based on the module "chemical plant, organics". This module assumes a built area of about 4.2 ha, an average output of 50"000 t/a, and plant life of fifty years
  Uncertainty: E
- heat, from steam, in chemical industry: 10000 MJ; source Alistair I. Miller  2001; lognormal variance with pedigree 0.0893, pedigree (5,5,5,3,2)
  Literature value. Steam energy used 10 Mg/kg D2O (about 27 GJ/kg)
  Other source quantifies the energy required per kg of D20 at 25 GJ of thermal energy and 700 kWh of electrical energy
  Source: http://www.media.cns-snc.ca/Bulletin/A_Miller_Heavy_Water.pdf
  http://pubs.acs.org/doi/pdf/10.1021/bk-1978-0068.ch001
  properties: heating value, net 1 MJ
- heat, district or industrial, natural gas: 3.1095 MJ; lognormal variance with pedigree 0.2106, pedigree (5,5,5,5,5)
  Estimated value. Energy required for distillation. Estimated from benzyl alcohol produciton process.
  properties: heating value, net 1 MJ
- electricity, medium voltage: 0.115309 kWh; lognormal variance with pedigree 0.2106, pedigree (5,5,5,5,5)
  (same comment as for heat, district or industrial, natural gas)
- heat, district or industrial, other than natural gas: 1.73561 MJ; lognormal variance with pedigree 0.2106, pedigree (5,5,5,5,5)
  (same comment as for heat, district or industrial, natural gas)
  properties: corresponding fuel use, propane, furnace >100kW 1.05263 MJ, heating value, net 1 MJ
  note on corresponding fuel use, propane, furnace >100kW: Lower heating value of the fuel input related to the heat/electricity output, taken directly from ecoinvent v3.0 dataset "heat production, natural gas, at industrial furnace >100kW, GLO 2000".
- hydrogen sulfide: 3.33333 kg; name H2S; = 800/240; lognormal variance with pedigree 0.0893, pedigree (5,5,5,3,2)
  Estimated value. A plant producing 240t D2O/yr needs 800t H2O/yr
  Source: Heavy Water for the Savannah River Site
  http://www.c-n-t-a.com/srs50_files/011morris.pdf
  properties: heating value, net 7.11 MJ, dry mass 1 kg, wet mass 1 kg
- hazardous waste, for incineration: -3.33267 kg; name BP_amount_1; = (H2S-H2S_to_air)*-1; lognormal variance with pedigree 0.04, pedigree (1,1,5,1,1)
  Estimated value. It corresponds to the H2S.
  production volume 6.66533e6 kg; = RP_PV_1 * (BP_amount_1 / amountRP)
    Calculated from production volume of reference product using the relative outputs.
  property price 0 EUR2005; name BP_amount_1_price_EUR2005
  properties: dry mass 0.75 kg, carbon content, fossil 0.554667, wet mass 1 kg, water content 0.333333, heating value, net 17 MJ
  note on carbon content, fossil: Tab A.6, ecoinvent v2.2 report 13_I. C content has been calculated after data in the tables, and then referred to 1 kg DM
  note on heating value, net: Value taken from the general comment of the treatment dataset.

## Emissions to nature
- Water [air, unspecified]: 170 m3; = water*0.5/1000; lognormal variance with pedigree 0.25, pedigree (5,5,5,5,5)
  Estimated value. It is assumed that 50% of water entering the system is evaporated and 50% is emited to water ecosystems
- Water [water, unspecified]: 170 m3; = water*0.5/1000; lognormal variance with pedigree 0.25, pedigree (5,5,5,5,5)
  (same comment as for Water)
- Hydrogen sulfide [air, unspecified]: 0.000666667 kg; name H2S_to_air; = H2S* H2S_to_air_emitted_fraction; lognormal variance with pedigree 0.218, pedigree (4,5,5,5,5)
  Estimated value. It"s assumed that 0.02% of total H2S escapes to air.
  property emitted fraction 0.0002; name H2S_to_air_emitted_fraction

## Sampling procedure
Literature and extrapolations

## Extrapolations
This dataset has been extrapolated from year 2000 to the year of the calculation (2021). The uncertainty has been adjusted accordingly.

## Review by Emilia Moreno Ruiz 2015-10-05
PV adjusted
