# sodium nitrate production, unrefined from caliche ore mining

Dataset: EcoSpold 2, unit process
Geography: CL
Time period: 2015-01-01 to 2021-12-31
Technology level: current
Classification: ISIC rev.4 ecoinvent: 2012:Manufacture of fertilizers and nitrogen compounds
Scenario: Business-as-Usual
System model: Allocation, cut-off by classification
Generated by: Yvonne Baeuerle
Database: ecoinvent
isCopyrightProtected: true
accessRestrictedTo: 1

## General comment
This activity represents the production of sodium nitrate from caliche ore mining in Chile. The largest natural accumulation of sodium nitrate in mineral deposits can be found in the Atacama Desert in northern Chile as a result of its unique arid climate going back to the middle Miocene epoch. These mineral deposits, called “caliche ore”, are mined for the production of sodium nitrate and iodine. The application of a leaching process leads to a solution rich in sodium nitrate and iodine (100 grams per litre (gpl) of concentration). To extract iodine, an optional by-product in this case, further sevaral processes in a separate plant need to be performed which are not included in the present modelling. The solid remainders of the leaching process are landfilled. The leaching mother liquid is kept in a loop, i.e. reused, so that initial input of the liquid is neglected in this dataset.

## Included activities start
The activity starts with the mining of caliche ore from seams that are between 0.2 and 5 m thick on the surface under a layer of overburden material (0.5 – 1.5 m) using drilling machines, explosives, and bulldozers, etc. Sodium nitrate can then be dissolved after further crushing of the caliche ore (about 12 mm in diameter) and the application of a heated leaching process in big vats (at about 40°C). The leaching solution is mainly composed of the mother liquor from the nitrate crystallization process, weak brines generated in the washing stages of the leaching cycle, and fresh water to selectively dissolve the sodium nitrate. The solution rich in NaNO3 is sent to a crystallization process to separate sodium nitrate from the mother liquor by a centrifuge.

## Included activities end
The activity ends with the crystallization and separation of sodium nitrate reaching a grade of about 50%. This sodium nitrate is than used in the production of potassium nitrate or further procecced to higher purities.

## Geography
The production facilities are located in the Atacama Desert in northern Chile where the chemicals are produced from natural resources by the global producer and supplier SQM.

## Technology
SQM continueously improves this process to increase production volume and its efficiency.

## Time period
Process data provided are from 2014/2015 and are valid for today's and near future production at SQM in Chile.

## Reference product
- sodium nitrate, unrefined: 1 kg; name RP_amount_1; By-product classification allocatable product; CPC 16390: Other minerals n.e.c.; CAS 7631-99-4
  production volume 1.85e9 kg; name RP_PV_1
    Average production volume from 2014/2015 provided by experts from SQM.
  property price 0.23 EUR2005; name RP_amount_1_price_EUR2005
    Calculated value based on data from United Nations Commodity Trade Statistics Database (comtrade.un.org). UN comtrade category: 310250 Sodium nitrate, in packs > 10 kg. Year 2005. Using exchange rate of 1EURO = 1.209 USD. Average of price of import into 5 main markets (EU, US, JP, IN and CN).
  property carbon content 0
    carbon content on a dry matter basis (reserved; not for manual entry)
  properties: water in wet mass 0 kg, carbon content, non-fossil 0, carbon content, fossil 0, water content 0, dry mass 1 kg, wet mass 1 kg, carbon allocation 0 kg

## Inputs from technosphere
- transport, freight, lorry 16-32 metric ton, EURO3: 0.01145 metric ton*km; = 0.0025* 4.58; lognormal variance with pedigree 0.1202, pedigree (1,1,2,1,1)
  Transportation of caliche ore (4.58 kg per kg of output) from crushing site to train (2.5 km)
- heat, district or industrial, other than natural gas: 0.22 MJ; lognormal variance with pedigree 0.0008, pedigree (1,1,2,1,1)
  Used in the vat leaching process
  properties: heating value, net 1 MJ, corresponding fuel use, propane, furnace >100kW 1.05263 MJ
  note on corresponding fuel use, propane, furnace >100kW: Lower heating value of the fuel input related to the heat/electricity output, taken directly from ecoinvent v3.0 dataset "heat production, natural gas, at industrial furnace >100kW, GLO 2000".
- tap water: 2.4 kg; name water; lognormal variance with pedigree 0.0008, pedigree (1,1,2,1,1)
  The water is generally kept in closed loops for the leaching and washing process. Due to general losses (evaporation, leaching), 2.4 kg of river, and tap water need to be added per kg of sodium nitrate produced.
  properties: carbon content, fossil 0.00178991, dry mass 0.000337476 kg, water content 2962.17, wet mass 1 kg
  note on carbon content, fossil: Bicarbonate content is 2.93 mol/m3. CO2 content is 0.1 mol/m3 (ecoinvent v2.2 report 8, Tab 93.1).
- inert waste, for final disposal: -4.1678 kg; name BP_amount_1; = (magnesium+sodium_chloride+sodium_sulphate+gangue)*-1; lognormal variance with pedigree 0.1222, pedigree (3,1,2,1,1)
  The solid remainders, e.g. resiual gangue, magnesium of the leaching process are landfilled.
  production volume 7.71043e9 kg; = RP_PV_1 * (BP_amount_1 / RP_amount_1)
    Calculated from production volume of reference product using the relative outputs.
  property price 0 EUR2005; name BP_amount_1_price_EUR2005
  properties: dry mass 0.995 kg, wet mass 1 kg, water content 0.00502513
- electricity, medium voltage: 0.02 kWh; lognormal variance with pedigree 0.0008, pedigree (1,1,2,1,1)
  Used in the crushing, vat leaching, and crystallization process
- heat, district or industrial, natural gas: 5.5 MJ; lognormal variance with pedigree 0.0008, pedigree (1,1,2,1,1)
  Used in the vat leaching process
  properties: heating value, net 1 MJ
- diesel, burned in building machine: 0.11 MJ; lognormal variance with pedigree 0.0008, pedigree (1,1,2,1,1)
  Fuel used in machines to harvest the salts
  properties: heating value, net 1 MJ
- transport, freight train: 0.1374 metric ton*km; = 0.030*4.58; lognormal variance with pedigree 0.1202, pedigree (1,1,2,1,1)
  Transportation of caliche ore (4.58 kg per kg of output) from mining (Pedro de Valdivia) to vat leaching and crystallization process (Coya Sur) (30 km)
- blasting: 0.000354034 kg; = 0.0000773*4.58; lognormal variance with pedigree 0.0109, pedigree (3,1,2,3,3)
  Caliche ore (4.58 kg per kg of output) quarry operation estimated from proxy limestone quarry operation

## Inputs from nature
- Sodium nitrate, in ground [natural resource, in ground]: 0.4122 kg; name sodium_nitrate; = 0.09*4.58; lognormal variance with pedigree 0.0432, pedigree (1,4,5,1,2)
  Caliche ore mineral component. 1kg of caliche ore consists of 0.09 kg of sodium nitrate based on average spectroscopy measurements. In total 4.58 kg of caliche ore is required to produce 1kg of sodium nitrate, purity 50%
- Transformation, from unspecified, natural (non-use) [natural resource, land]: 1.4e-7 m2; name land_transformation; lognormal variance with pedigree 0.1222, pedigree (3,1,2,1,1)
  According to estimates, the Atacama Desert occupies 105,000 km2. Most of the desert is composed of stony terrain, salt lakes (salares), sand, and is extremly arid. The desert has rich deposits of copper and other minerals and the world's largest natural supply of sodium nitrate.
- Transformation, to mineral extraction site [natural resource, land]: 1.4e-7 m2; lognormal variance with pedigree 0.1222, pedigree (3,1,2,1,1)
  (same comment as for Transformation, from unspecified, natural (non-use))
- Gangue, in ground [natural resource, in ground]: 2.9312 kg; name gangue; = 0.64*4.58; lognormal variance with pedigree 0.0432, pedigree (1,4,5,1,2)
  Caliche ore mineral component. 1kg of caliche ore consists of 0.64 kg of gangue material based on average spectroscopy measurements. In total 4.58 kg of caliche ore is required to produce 1kg of sodium nitrate, purity 50%
- Occupation, mineral extraction site [natural resource, land]: 4.2e-6 m2*year; = land_transformation*30; lognormal variance with pedigree 0.1222, pedigree (3,1,2,1,1)
  Communication by SQM: If production levels are equivalent to current ones, confirmed reserves of the salar that belong to SQM will last at least for 30 more years.
- Sodium chloride, in ground [natural resource, in ground]: 0.3664 kg; name sodium_chloride; = 0.08*4.58; lognormal variance with pedigree 0.0432, pedigree (1,4,5,1,2)
  Caliche ore mineral component. 1kg of caliche ore consists of 0.08 kg of sodium chloride based on average spectroscopy measurements. In total 4.58 kg of caliche ore is required to produce 1kg of sodium nitrate, purity 50%
- Sodium sulphate, various forms, in ground [natural resource, in ground]: 0.6412 kg; name sodium_sulphate; = 0.14*4.58; lognormal variance with pedigree 0.0432, pedigree (1,4,5,1,2)
  Caliche ore mineral component. 1kg of caliche ore consists of 0.14 kg of sodium sulphate based on average spectroscopy measurements. In total 4.58 kg of caliche ore is required to produce 1kg of sodium nitrate, purity 50%
- Magnesium, in ground [natural resource, in ground]: 0.229 kg; name magnesium; = 0.05*4.58; lognormal variance with pedigree 0.0432, pedigree (1,4,5,1,2)
  Caliche ore mineral component. 1kg of caliche ore consists of 0.05 kg of magnesium minerals based on average spectroscopy measurements. In total 4.58 kg of caliche ore is required to produce 1kg of sodium nitrate, purity 50%

## Emissions to nature
- Water [water, unspecified]: 0.0024 m3; = water/1000; lognormal variance with pedigree 0.1222, pedigree (3,1,2,1,1)
  (same comment as for tap water)

## Sampling procedure
Data have been provided by the producer SQM in Chile. SQM is a global producer and supplier of plant nutrients, iodine, lithium and industrial chemicals. The production facilities are located in the Atacama Desert where the chemicals are produced from natural resources via mining, crystalization and refining processes. Initially, some data and process information has been exchanged via questionaires. Further, more specific data were provided via intensive direct contact with experts at SQM.

## Extrapolations
This dataset has been extrapolated from year 2018 to the year of the calculation (2021). The uncertainty has been adjusted accordingly.
