# potash salt production

Dataset: EcoSpold 2, unit process
Geography: RER
Time period: 2011-01-01 to 2021-12-31
Technology level: current
Classification: ISIC rev.4 ecoinvent: 0891:Mining of chemical and fertilizer minerals
Scenario: Business-as-Usual
System model: Allocation, cut-off by classification
Generated by: Anna Kounina
Database: ecoinvent
isCopyrightProtected: true
accessRestrictedTo: 1

## General comment
This dataset represents the production of 1 kg of potash salt, with 10% K2O, at the mine. Commercial potash deposits come originally from evaporite deposits and are often buried deep below the earth's surface. Potash ores are rich in potassium chloride (KCl), sodium chloride (NaCl) and other salts and clays, and are obtained by conventional shaft mining with the extracted ore ground into a powder. Other methods include dissolution mining and evaporation methods from brines. In the evaporation method, hot water is injected into the potash which is dissolved and then pumped to the surface where it is concentrated by solar induced evaporation. Amine reagents are then added to either the mined or evaporated solutions. In this dataset, shaft mining technology is assumed.
Potash salt is used as potassium (K) containing fertiliser.
Data on ore extraction and fuel used where collected from Fertilizers Europe. Infrastructure were assumed similar to those of dolomite production as per Althaus et al (2007).
The main data source for this dataset is Fertilizers Europe (2014), complemented by Althaus et al (2007).
References:
Fertilizers Europe (2014): Average Emissions Year 2011. Fertilizers Europe Environmental report (internal).
Fertilizers Europe (2016): Average Emissions Year 2014. Fertilizers Europe Environmental report (internal). Used for updated energy and GHG emission in Carbon Footprint Calculator
Althaus H.-J., Chudacoff M., Hischier R., Jungbluth N., Osses M. and Primas A. (2007) Life Cycle Inventories of Chemicals. ecoinvent report No. 8, v2.0. EMPA Dübendorf, Swiss Centre for Life Cycle Inventories, Dübendorf, CH.

## Included activities start
The activity starts from potash extraction at the mine.

## Included activities end
This activites ends with the production of 1 kg of potash salt.

## Geography
The dataset is representative of potash mining in Europe

## Technology
This datasets corresponds to the technology used in Europe for potash mining.

## Time period
Primary data were collected on fertiliser production for the year 2011. These data were based on annual average data for the year 2011.

## Reference product
- potash salt: 1 kg; name RP; CPC 34639: Carnallite, sylvite and other potassic fertilizers, n.e.c.; By-product classification allocatable product
  production volume 5.0885e9 kg; name PVRP
    Kg/y, International Fertilizers Association (2014).
  property potassium content 0.0830148
    Potassium content (on a dry matter basis) of potash salt is calculated from the molecular formula of the substance ().
  property price 0.0112919 EUR2005; name RP_price_EUR2005
    Calculated based on inputs: The price of the product has been calculated as a sum of the values of the material and energy inputs for this product. This value is therefore a rough estimation. It may underestimate the real price since there are additional expenses when producing any product. These expences can include for example labour costs, treatment of waste materials and profit for the producer. Please consider carefully whether this level of data quality is acceptable for your application.
  property carbon content, fossil 0
    Carbon content, fossil is calculated based on the chemical formula of the substance.
  property oxygen content 0.0169852
    Oxygen content (on a dry matter basis) of potash salt is calculated from the molecular formula of the substance ().
  property carbon content 0
    carbon content on a dry matter basis (reserved; not for manual entry)
  properties: water content 0, dry mass 1 kg, carbon content, non-fossil 0, wet mass 1 kg, water in wet mass 0 kg, carbon allocation 0 kg

## Inputs from technosphere
- conveyor belt: 2.78e-8 m; lognormal variance with pedigree 0.3407, pedigree (2,2,5,1,1)
  Estimation, based on various data sources (Althaus et al. 2007).
- industrial machine, heavy, unspecified: 0.000231 kg; lognormal variance with pedigree 0.3407, pedigree (2,2,5,1,1)
  Estimation, based on various data sources (Althaus et al. 2007).
- diesel, burned in building machine: 0.00371504 MJ; lognormal variance with pedigree 0.0413, pedigree (2,2,5,1,1)
  Data from Fertilizer Europe (2014).
  properties: heating value, net 1 MJ
- recultivation, potash salt mine: 6.52e-6 m2; lognormal variance with pedigree 0.3407, pedigree (2,2,5,1,1)
- mine infrastructure, potash salt: 5.25e-11 unit; lognormal variance with pedigree 0.3407, pedigree (2,2,5,1,1)
  properties: lifetime capacity [kg] 1.9e10 kg
- blasting: 7.73e-5 kg; lognormal variance with pedigree 0.0413, pedigree (2,2,5,1,1)
  Estimation, based on various data sources (Althaus et al. 2007).

## Inputs from nature
- Occupation, mineral extraction site [natural resource, land]: 8.48e-5 m2*year; lognormal variance with pedigree 0.0807, pedigree (2,2,5,1,1)
  Estimation, based on various data sources (Althaus et al. 2007).
- Potassium, in ground [natural resource, in ground]: 0.0830148 kg; lognormal variance with pedigree 0.0413, pedigree (2,2,5,1,1)
  Data from Fertilizer Europe (2014).
- Transformation, to mineral extraction site [natural resource, land]: 6.52e-6 m2; lognormal variance with pedigree 0.1607, pedigree (2,2,5,1,1)
  Estimation, based on various data sources (Althaus et al. 2007).
- Transformation, from forest, unspecified [natural resource, land]: 6.52e-6 m2; lognormal variance with pedigree 0.1607, pedigree (2,2,5,1,1)
  Estimation, based on various data sources (Althaus et al. 2007).
- Gangue, in ground [natural resource, in ground]: 0.916985 kg
- Water, river [natural resource, in water]: 2.93e-5 m3; lognormal variance with pedigree 0.0413, pedigree (2,2,5,1,1)
  Estimation, based on various data sources (Althaus et al. 2007).

## Emissions to nature
- Water [air, unspecified]: 4.395e-6 m3; lognormal variance with pedigree 0.0807, pedigree (2,2,5,1,1)
  Estimation, based on various data sources (Althaus et al. 2007).
- Water [water, unspecified]: 2.4905e-5 m3; lognormal variance with pedigree 0.0807, pedigree (2,2,5,1,1)
  Estimation, based on various data sources (Althaus et al. 2007).

## Extrapolations
This dataset has been extrapolated from year 2014 to the year of the calculation (2021). The uncertainty has been adjusted accordingly.
