# fuel cell production, polymer electrolyte membrane, 2kW electrical, future

Dataset: EcoSpold 2, unit process
Geography: CH
Time period: 2000-01-01 to 2021-12-31
Technology level: current
Classification: ISIC rev.4 ecoinvent: 2790:Manufacture of other electrical equipment
Classification: EcoSpold01Categories: natural gas/cogeneration
Synonyms: polymer electrolyte fuel cell; proton exchange membrane fuel cell; PEMFC; PEFC; Membran Brennstoffzelle; Polymer Elektrolyt Membran Brennstoffzelle
Tags: ConvertedDataset
Scenario: Business-as-Usual
System model: Allocation, cut-off by classification
Generated by: Alex Primas
Published in: Primas A. 2007
Database: ecoinvent
isCopyrightProtected: true
accessRestrictedTo: 1

## General comment
The module reflects a polymer electrolyte membrane (PEM) fuel cell with 2 kW electrical output. Inventory based on information from literature for future production based on manufacturer data. Life time operation is 15 years or 80'000 h. Stack replacement every 6th. year.
[This dataset was already contained in the ecoinvent database version 2. It was not individually updated during the transfer to ecoinvent version 3. Life Cycle Impact Assessment results may still have changed, as they are affected by changes in the supply chain, i.e. in other datasets. This dataset was generated following the ecoinvent quality guidelines for version 2. It may have been subject to central changes described in the ecoinvent version 3 change report (http://www.ecoinvent.org/database/ecoinvent-version-3/reports-of-changes/), and the results of the central updates were reviewed extensively. The changes added e.g. consistent water flows and other information throughout the database. The documentation of this dataset can be found in the ecoinvent reports of version 2, which are still available via the ecoinvent website. The change report linked above covers all central changes that were made during the conversion process.]

## Included activities end
The module includes the most important materials used for production, the energy needed for production, planning and engineering. Also included is the transport of the raw materials the installation on the site.

## Geography
Process applicable in central European conditions.

## Technology
polymer electrolyte membrane (PEM) fuel cell for stationary cogeneration. Performance, stack lifetime and catalyst use according to expected future values for a serial product. Operation with connection to low pressure gas network. Electrical efficiency 32%, total efficiency 87%.

## Parameters
- fraction, process water, to air: 0.15 dimensionless; name fraction_PW_to_air; lognormal variance with pedigree 0.092025, pedigree (4,4,3,2,4)
  Literature value. In case when no industry/process specific data are available, default evaporation fraction value is used. This value is 15% and is based on literature (Statistics Canada, 2007 & Shaffer, K.H., 2008, Consumptive water use in the Great Lakes Basin, USGS & Shiklomanov, 2003, World Water Resources at the Beginning of the 21st Century) and has been approved by an expert.

## Reference product
- fuel cell, polymer electrolyte membrane, 2kW electrical, future: 1 unit; By-product classification allocatable product; CPC 46410: Primary cells and primary batteries
  production volume 0.0336675 unit
    This is a placeholder value that does not reflect real-world production volumes. This dataset does not currently require a real-world production volume to work in the database framework, and no actual data were collected yet. This has no negative effect on the results of the ecoinvent database. The placeholder value of this activity was scaled according to the nominal GDP of 2005 (source: United Nations, http://data.un.org/Glossary.aspx?q=GDP+%28current+US%24%29, accessed 20130726) to reflect an appropriate share of the global production volume, which is also a placeholder value.
  property price 575.124 EUR2005
    Calculated based on inputs: The price of the product has been calculated as a sum of the values of the material and energy inputs for this product. This value is therefore a rough estimation. It may underestimate the real price since there are additional expenses when producing any product. These expences can include for example labour costs, treatment of waste materials and profit for the producer. Please consider carefully whether this level of data quality is acceptable for your application.

## Inputs from technosphere
- polyethylene, high density, granulate: 4.8 kg; lognormal variance with pedigree 0.070625, pedigree (2,4,5,2,3)
  Value for expected serial production
  Value for expected serial production
  properties: dry mass 1 kg, carbon content, fossil 0.857143, wet mass 1 kg, heating value, net 42.47 MJ
  note on carbon content, fossil: Polyethylene is formed out of a huge amount of ethylene monomers (C2H4) (ecoinvent v2.2 report 11_II). MW=28 g/mol
- sheet rolling, aluminium: 4.6 kg; lognormal variance with pedigree 0.052625, pedigree (2,4,5,2,1)
  Based on material input
  Based on material input
- inverter, 2.5kW: 0.8 unit; lognormal variance with pedigree 0.378025, pedigree (4,4,5,2,3)
  Data from 3kWel unit for use in photovoltaics
  Data from 3kWel unit for use in photovoltaics
- activated carbon, granular: 0.5 kg; lognormal variance with pedigree 0.280025, pedigree (4,4,5,2,5)
  Same amount as initial proxy (charcoal) for activated carbon.
  property dry mass 0.97 kg; name GAC_DM
  property water in wet mass 0.03 kg; name GAC_WWM
  property water content 0.030928; name GAC_water_content
  property carbon content, non-fossil 0; name GAC_C_content_non_fossil
  property wet mass 1 kg; name GAC_WM
  property carbon content, fossil 0.81; name GAC_C_content_fossil
  properties: heating value, net 30.23 MJ
  note on carbon content, fossil: Literature value. From Biomass and Bioenergy: Processing and Properties (2014) edited by Khalid Rehman Hakeem, Mohammad Jawaid, Umer Rashid (p. 252). Carbon content is in the range of 72-90%, an average value of 81% is taken.
- polystyrene foam slab: 0.6 kg; lognormal variance with pedigree 0.070625, pedigree (2,4,5,2,3)
  Value for expected serial production
  Value for expected serial production
  properties: carbon content, fossil 0.859091, dry mass 1 kg, wet mass 1 kg, heating value, net 38.67 MJ
  note on carbon content, fossil: XPS consists in 91% of polystyrene, 7% of blowing agent and the re-maining 2% are flame retardants (bromine compounds) and other additives (ecoinvent v2.2 report 7, part XIV, pg69). The chemical formula of polystyrene is (C8H8)n. Here, the blowing agent is CO2.
- waste polyethylene/polypropylene product: -5.3 kg; lognormal variance with pedigree 0.070625, pedigree (2,4,5,2,3)
  Disposal of plastic parts
  Disposal of plastic parts
  production volume 5.3 kg
    Calculated from the production volume of fuel cell, polymer electrolyte membrane, 2kWe, future in proportion to the respective output amounts.
  properties: wet mass 1 kg, carbon content, fossil 0.748045, dry mass 0.847 kg, water content 0.180638, heating value, net 42.47 MJ
  note on carbon content, fossil: Mixed various plastics was used to estimate the C content of this waste (Tab A.2, ecoinvent v2.2 report 13_I)
- waste polystyrene isolation, flame-retardant: -0.6 kg; lognormal variance with pedigree 0.070625, pedigree (2,4,5,2,3)
  Disposal of plastic insulating material
  Disposal of plastic insulating material
  production volume 0.6 kg
    (same comment as for waste polyethylene/polypropylene product)
  properties: heating value, net 38.67 MJ, dry mass 0.998012 kg, wet mass 1 kg, water content 0.00199232, carbon content, fossil 0.918145
  note on carbon content, fossil: Polystyrene isolation (EPS) is flame-retarded with hexa-bromo-cyclo-dodecan (C12H18Br6) and contains 0.67 w% bromine (ecoinvent v2.2 report 13_I, pg 39). The rest is polystyrene: (C8H8)n.
- building, multi-storey: 0.025 m3; lognormal variance with pedigree 0.372, pedigree (4,4,5,5,1)
  Rough estimation based on company data
  Rough estimation based on company data
- sheet rolling, steel: 39.4 kg; lognormal variance with pedigree 0.052625, pedigree (2,4,5,2,1)
  Based on material input
  Based on material input
- transport, passenger car: 400 km; lognormal variance with pedigree 0.198, pedigree (4,4,5,1,3)
  Estimation
  Estimation
- titanium dioxide: 0.14 kg; lognormal variance with pedigree 0.070625, pedigree (2,4,5,2,3)
  Value for expected serial production
  Value for expected serial production
  properties: wet mass 1 kg, dry mass 1 kg
- fuel cell, stack polymer electrolyte membrane, 2kW electrical, future: 1 unit; lognormal variance with pedigree 0.37, pedigree (5,5,5,5,1)
  Material input
  Material input
- platinum: 0.0012 kg; lognormal variance with pedigree 0.072025, pedigree (3,4,5,2,3)
  Value for expected serial production
  Value for expected serial production
  properties: dry mass 1 kg, wet mass 1 kg
- sheet rolling, chromium steel: 46.2 kg; lognormal variance with pedigree 0.052625, pedigree (2,4,5,2,1)
  Based on material input
  Based on material input
- heat, district or industrial, natural gas: 435.1 MJ; lognormal variance with pedigree 0.122625, pedigree (2,4,5,2,4)
  Approximation with company data of similar branch
  Approximation with company data of similar branch
  properties: heating value, net 1 MJ
- polypropylene, granulate: 0.5 kg; lognormal variance with pedigree 0.070625, pedigree (2,4,5,2,3)
  Value for expected serial production
  Value for expected serial production
  properties: carbon content, fossil 0.857143, heating value, net 32.78 MJ, dry mass 1 kg, wet mass 1 kg
  note on carbon content, fossil: Polypropylene is formed by the polymerisation of propylene, C3H6 (ecoinvent v2.2 report 11_II)
  note on heating value, net: Value extracted from "treatment of waste polypropylene, open burning"
- electricity, low voltage: 40 kWh; lognormal variance with pedigree 0.062, pedigree (3,4,5,1,3)
  Estimation based on specific energy demand of engineering hours
  Estimation based on specific energy demand of engineering hours
- building, hall, steel construction: 0.0042 m2; lognormal variance with pedigree 0.372, pedigree (4,4,5,5,1)
  Rough estimation based on company data
  This exchange has an activity link directly to the producing activity because the product is primarily consumed in the same geographical area where it is produced.
- heat, central or small-scale, other than natural gas: 282 MJ; lognormal variance with pedigree 0.062, pedigree (3,4,5,1,3)
  (same comment as for electricity, low voltage)
  properties: heating value, net 1 MJ
- wastewater, from residence: -0.146 m3; lognormal variance with pedigree 0.140025, pedigree (4,4,5,2,4)
  Approximation for waste water treatment
  Approximation for waste water treatment
  production volume 0.146 m3
    (same comment as for waste polyethylene/polypropylene product)
  properties: wet mass 1000 kg, dry mass 0.337476 kg, water content 2962.17, carbon content, non-fossil 0.199421
  note on carbon content, non-fossil: 0.0673 kg TOC/m3 (Tab A.17, ecoinvent v2.2 report 13_I). TOC was considered as Total Carbon.
- injection moulding: 5.3 kg; lognormal variance with pedigree 0.052625, pedigree (2,4,5,2,1)
  Based on material input
  Based on material input
- cast iron: 1.6 kg; lognormal variance with pedigree 0.070625, pedigree (2,4,5,2,3)
  Value for expected serial production
  Value for expected serial production
  properties: carbon content, fossil 0.04, dry mass 1 kg, wet mass 1 kg
  note on carbon content, fossil: Cast iron is made by remelting pig iron in small furnaces (e.g. cupola furnaces or electric arc furnaces) and poured into moulds to make castings. It usually contains 2% to 6% carbon (ecoinvent v2.2 report 10_partII). An average content of 4% was considered
- steel, chromium steel 18/8, hot rolled: 46.2 kg; lognormal variance with pedigree 0.070625, pedigree (2,4,5,2,3)
  Value for expected serial production
  Value for expected serial production
  properties: carbon content, fossil 0.0008, dry mass 1 kg, wet mass 1 kg
  note on carbon content, fossil: Stainless steel model is the grade 304 steel (18/8 stainless, 18% chromium 8% nickel; max. 0.08% C)
- steel, low-alloyed, hot rolled: 39.4 kg; lognormal variance with pedigree 0.070625, pedigree (2,4,5,2,3)
  Value for expected serial production
  Value for expected serial production
  properties: carbon content, fossil 0.005, wet mass 1 kg, dry mass 1 kg
  note on carbon content, fossil: Low alloyed steel composition given in Tab. 3.2 ecoinvent v2.2 report 10_partII. Steel assumed to have a C content of 0.5%
- electricity, medium voltage: 64 kWh; lognormal variance with pedigree 0.122625, pedigree (2,4,5,2,4)
  (same comment as for heat, district or industrial, natural gas)
- heating and sanitary equipment, mini CHP plant: 0.65 unit; lognormal variance with pedigree 0.39, pedigree (4,4,5,5,3)
  Approximation based on similar process
  This exchange has an activity link directly to the producing activity because the product is primarily consumed in the same geographical area where it is produced.
- aluminium, wrought alloy: 4.6 kg; lognormal variance with pedigree 0.070625, pedigree (2,4,5,2,3)
  Value for expected serial production
  Value for expected serial production
  properties: dry mass 1 kg, wet mass 1 kg

## Inputs from nature
- Occupation, industrial area [natural resource, land]: 0.75 m2*year; lognormal variance with pedigree 0.112, pedigree (4,4,5,5,1)
  Rough estimation based on company data
- Transformation, from unspecified [natural resource, land]: 0.015 m2; lognormal variance with pedigree 0.192, pedigree (4,4,5,5,1)
  Rough estimation based on company data
- Water, unspecified natural origin [natural resource, in water]: 0.146 m3; name water_UNO_input; lognormal variance with pedigree 0.122625, pedigree (2,4,5,2,4)
  Approximation with company data of similar branch
- Transformation, to industrial area [natural resource, land]: 0.015 m2; lognormal variance with pedigree 0.192, pedigree (4,4,5,5,1)
  Rough estimation based on company data

## Emissions to nature
- Water [air, unspecified]: 0.0219 m3; name water_to_air_unspecified; = (water_UNO_input*fraction_PW_to_air); lognormal variance with pedigree 0.0807, pedigree (2,2,5,1,1)
  Calculated value based on literature values and expert opinion. See comments in the parametres' comment field.
  property fraction, origin: fresh water 0; name fraction_origin_fresh_water
  property fraction, origin: salt water 0; name fraction_origin_salt_water
  property fraction, origin: unspecified 1; name fraction_origin_unspecified

## Sampling procedure
Literature data and manufacturer information

## Extrapolations
This dataset has been extrapolated from year 2005 to the year of the calculation (2021). The uncertainty has been adjusted accordingly.

## Review by Rolf Frischknecht 2007-08-13
passed
none
