# beam, hardwood, raw, kiln drying to u=20%

Dataset: EcoSpold 2, unit process
Geography: Europe without Switzerland
Time period: 2011-01-01 to 2021-12-31
Technology level: current
Classification: ISIC rev.4 ecoinvent: 1610:Sawmilling and planing of wood
Tags: Swiss brush-up completed
Scenario: Business-as-Usual
System model: Allocation, cut-off by classification
Generated by: Frank Werner
Published in: Bauer, C. 2007
Database: ecoinvent
isCopyrightProtected: true
accessRestrictedTo: 1

## General comment
This dataset represents the service of kiln drying of one m3 sawn hardwood beam. The wood chip used in the process is considered to be supplied internally which are generated from slabs and sidings when sawing. Characteristics of the of wood chips to be burned: dry wood density 640 kg/m3; the low heating value 4208 MJ/m3, humidity when burned is estimated to be around 50 %, which is achieved after some weeks of drying in the storage. Wood chips will be able to supply the entire thermal demand for drying, Air emission factors as well as the boiler efficiency represent average annual operation including start and stop (warm-up and shut-down). The boiler used is considered to be 300 kW and emission profile refers to the facility. Shrinkage ratio of between the moisture content of u=30% - 0% is 0.004 %/%.
Within ecoinvent, three products - boards, beams and laths - are distinguished:

## Included activities start
Kiln drying process starting from sawn hardwood, at the sawmill site, assumed to lose some water before the start of the kiln drying process.

## Included activities end
This activity ends with kiln dried hardwood beam, at sawmill. The dataset includes kiln drying of wet wood assumed as u=50% down to u=20 %, and shrinkage. The dataset does not include air emissions released from the wood, as the emissions are assume to be comparable to emissions from natural drying during decomposition/rotting.

## Geography
Represents average Swiss conditions assumed to be represenative for Europe

## Parameters
- emission of ammonia: 2.30667e-6 kg/MJ; name ammonia; = 0.00000173*scaling_factor
  updated emission profile (amount of emission in kg/MJ heat) based on personal communication, PSI, 2014
- wood ash: 0.000666667 kg/MJ; name woodash; = 0.0005*scaling_factor
  generation of wood ash per MJ
- moisture content wood chip: 50 dimensionless; name moisture_woodchip
  moisture content of wood chip
- emission of Hydrocarbons, aliphatic, alkanes, unspecified: 1.21333e-6 kg/MJ; name Hydrocarbons_aliphatic_alkanes; = 0.00000091*scaling_factor
  (same comment as for emission of ammonia)
- emission of benzene, hexachloro: 9.6e-15 kg/MJ; name ben_hexa; = 0.0000000000000072*scaling_factor
  (same comment as for emission of ammonia)
- emission of carbon monoxide, non-fossil: 0.000333333 kg/MJ; name co; = 2.5E-04*scaling_factor
  (same comment as for emission of ammonia)
- emission of toluene: 4e-7 kg/MJ; name toluene; = 0.0000003*scaling_factor
  (same comment as for emission of ammonia)
- shrinkage ratio (u=30% - 0%): 0.004 dimensionless; name shrinkage_ratio
  shrinkage ratio between u=30% to 0%
- emission of Formaldehyde: 1.73333e-7 kg/MJ; name Formaldehyde; = 0.00000013*scaling_factor
  (same comment as for emission of ammonia)
- emission of Particulates >2.5 to <10: 6.66667e-6 kg/MJ; name Particulates2_5_to_10; = 5E-06 * scaling_factor
  (same comment as for emission of ammonia)
- total heat: 840 MJ; name heat_woodchip
  total thermal energy required for the drying process per m3 of output
- scaling factor: 1.33333 dimensionless; name scaling_factor; = 1/0.75; lognormal variance with pedigree 0.0016, pedigree (2,1,1,1,1)
  The scaling factor corresponds to the inverse of the average annual efficiency of the heating system, including start/stop (warm up and cool down). Therefore, this efficiency will be lower than figures provided by manufacturers. The estimated value was provided by T.Nussbaumer, Verenum, and represents the average installed boiler in this size category in Switzerland.
- emission of Particulates >10: 6.66667e-6 kg/MJ; name Particulates_higher_10; = 5E-06 * scaling_factor
  (same comment as for emission of ammonia)
- emission of arsenic: 1.33333e-9 kg/MJ; name arsenic; = 0.000000001*scaling_factor
  (same comment as for emission of ammonia)
- emission of Methane, non-fossil: 3.2e-6 kg/MJ; name Methane_nonfossil; = 0.0000024*scaling_factor
  (same comment as for emission of ammonia)
- emission of benzene: 1.21333e-6 kg/MJ; name benzene; = 0.00000091*scaling_factor
  (same comment as for emission of ammonia)
- wood density, basic: 588.8 kg/m3; name basic_wood_d; = dry_wood_d*(1-moisture_beam*shrinkage_ratio)
  kg oven-dry matter/wet volume
- emission of m-Xylene: 1.6e-7 kg/MJ; name mxylene; = 0.00000012*scaling_factor
  (same comment as for emission of ammonia)
- furnace, wood chip: 2.31481e-8 unit/MJ; name furnace_energy; = 1/(300*20*2000*3.6)
  inventory of furnace over MJ heating demand
- emission of chromium 4: 5.33333e-11 kg/MJ; name chroIV; = 0.00000000004*scaling_factor
  (same comment as for emission of ammonia)
- emission of Fluorine: 6.66667e-8 kg/MJ; name Fluorine; = 0.00000005*scaling_factor
  (same comment as for emission of ammonia)
- emission of sulfur dioxide: 3.33333e-6 kg/MJ; name so2; = 0.0000025*scaling_factor
  (same comment as for emission of ammonia)
- emission of dioxin measured as 2,3,7,8-tetrachlorodibenzo-p-dioxin: 4.13333e-14 kg/MJ; name tetrachloro; = 0.000000000000031*scaling_factor
  (same comment as for emission of ammonia)
- emission of bromine: 8e-8 kg/MJ; name bro; = 0.00000006*scaling_factor
  (same comment as for emission of ammonia)
- emission of sodium: 1.73333e-6 kg/MJ; name sodium; = 0.0000013*scaling_factor
  (same comment as for emission of ammonia)
- emission of Manganese: 2.26667e-7 kg/MJ; name manganese; = 0.00000017*scaling_factor
  (same comment as for emission of ammonia)
- wood density, dry: 640 kg/m3; name dry_wood_d
  kg oven-dry matter/oven-dry volume
- emission of cadmium: 9.33333e-10 kg/MJ; name cadmium; = 0.0000000007*scaling_factor
  (same comment as for emission of ammonia)
- emission of Mercury: 4e-10 kg/MJ; name mercury; = 0.0000000003*scaling_factor
  (same comment as for emission of ammonia)
- emission of benzo(a)pyrene: 6.66667e-10 kg/MJ; name benzo; = 0.0000000005*scaling_factor
  (same comment as for emission of ammonia)
- emission of dinitrogen monoxide: 3.06667e-6 kg/MJ; name N2O; = 2.3E-06*scaling_factor
  (same comment as for emission of ammonia)
- emission of Potassium: 3.12e-5 kg/MJ; name Potassium; = 0.0000234*scaling_factor
  (same comment as for emission of ammonia)
- moisture content beam: 20 dimensionless; name moisture_beam
  moisture content of beam
- emission of polycyclic aromatic hydrocarbons: 1.48e-8 kg/MJ; name pah; = 0.0000000111*scaling_factor
  (same comment as for emission of ammonia)
- emission of non-methane volatile organic compounds, unspecified origin: 1.4e-5 kg/MJ; name nmvoc; = 10.5E-06 * scaling_factor
  (same comment as for emission of ammonia)
- emission of benzene, ethyl: 4e-8 kg/MJ; name ben_ethyl; = 0.00000003*scaling_factor
  (same comment as for emission of ammonia)
- emission of Phosphorus: 4e-7 kg/MJ; name Phosphorus; = 0.0000003*scaling_factor
  (same comment as for emission of ammonia)
- emission of lead: 3.33333e-8 kg/MJ; name lead; = 0.000000025*scaling_factor
  (same comment as for emission of ammonia)
- emission of Nickel: 8e-9 kg/MJ; name nickel; = 0.000000006*scaling_factor
  (same comment as for emission of ammonia)
- emission of Hydrocarbons, aliphatic, unsaturated: 4.13333e-6 kg/MJ; name Hydrocarbons_aliphatic; = 0.0000031*scaling_factor
  (same comment as for emission of ammonia)
- emission of Phenol, pentachloro-: 1.08e-11 kg/MJ; name Phenol_pentachloro; = 0.0000000000081*scaling_factor
  (same comment as for emission of ammonia)
- emission of chromium: 5.28e-9 kg/MJ; name chromium; = 0.00000000396*scaling_factor
  (same comment as for emission of ammonia)
- emission of calcium: 7.8e-6 kg/MJ; name calcium; = 0.00000585*scaling_factor
  (same comment as for emission of ammonia)
- emission of acetaldehyde: 8.13333e-8 kg/MJ; name acet; = 0.000000061*scaling_factor
  (same comment as for emission of ammonia)
- emission of zinc: 4e-7 kg/MJ; name zinc; = 0.0000003*scaling_factor
  (same comment as for emission of ammonia)
- emission of Nitrogen oxides: 0.00024 kg/MJ; name no2; = 0.00018*scaling_factor
  (same comment as for emission of ammonia)
- emission of chlorine: 2.4e-7 kg/MJ; name ch; = 0.00000018*scaling_factor
  (same comment as for emission of ammonia)
- emission of Particulates 2.5: 0.00012 kg/MJ; name Particulate2_5; = 90E-06*scaling_factor
  (same comment as for emission of ammonia)
- emission of copper: 2.93333e-8 kg/MJ; name copper; = 0.000000022*scaling_factor
  (same comment as for emission of ammonia)
- emission of Magnesium: 4.8e-7 kg/MJ; name magnesium; = 0.00000036*scaling_factor
  (same comment as for emission of ammonia)

## Reference product
- sawnwood, beam, hardwood, raw, dried (u=20%): 1 m3; name beam_raw_kiln; CPC 31102: Wood, sawn or chipped lengthwise, sliced or peeled, of a thickness exceeding 6 mm, of non-coniferous wood; By-product classification allocatable product
  production volume 104373 m3; name p_sawnwood_dried; = 1340.592/1250*(98570-1250)
    Scaled from the PV estimates of the Swiss sawmilling chain based UNECE data for 2013 for the production volumes of Switzerland (1'250'000 m3) and the production volume of Europe without Switzerland ( 97'570'000 m3 - 1'250'000 m3).
  property water in wet mass 117.76 kg; name WWM_dried; = basic_wood_d*water_content
  property dry mass 588.8 kg; = basic_wood_d
  property wet mass 706.56 kg; = basic_wood_d*(1+ water_content)
  property price 265 EUR2005
    Expert judgement (Urs Luginbühl, Swiss Sawmilling industry, personal communication in June 2014). Cross-reference; FAOSTAT (accessed 20140428). The price is calculated by using data on total world import quantity (m3) and import value (1000 USD), year 2005. 25656806 m3 of Sawnwood (NC) - coniferous was imported in the world in 2005. The import value was 9652714000 USD. The calculated price is thus (9652714000/25656806=376*0.8=) 303 Euro.
  property heating value, net 8524.3 MJ
    Assumed equal to "sawnwood, beam, hardwood, dried (u=20%), planed".The property is based on a value of 12.06MJ/kg
  property water content 0.2; name water_content
  property carbon content 0.494
    carbon content on a dry matter basis (reserved; not for manual entry)
  properties: carbon content, fossil 0, carbon content, non-fossil 0.494, carbon allocation 290.867 kg

## Inputs from technosphere
- wood chips, wet, measured as dry mass: 64.2939 kg; name woodchip_hard; = heat_woodchip/woodchip_hard_Net_Heat_Value/(1+moisture_woodchip/100)*scaling_factor; lognormal variance with pedigree 0.0342, pedigree (2,1,4,4,1)
  used for heat generation; measured data from industry
  property water content 0.5; name woodchip_hard_water_content; = moisture_woodchip/100
  property heating value, gross 19.6 MJ; name woodchip_hard_Gross_Heat_Value
  property wet mass 1.5 kg; name woodchip_hard_WM; = woodchip_hard_DM + woodchip_hard_WWM
  property water in wet mass 0.5 kg; name woodchip_hard_WWM; = woodchip_hard_DM*woodchip_hard_water_content
  property dry mass 1 kg; name woodchip_hard_DM
  property heating value, net 11.6133 MJ; name woodchip_hard_Net_Heat_Value; = woodchip_hard_Gross_Heat_Value - 1.32 - 20* woodchip_hard_water_content/(1+ woodchip_hard_water_content)
  property carbon content, non-fossil 0.494; name woodchip_hard_C_content_non_fossil
  note on heating value, gross: gross (upper) heating (calorific) value according to ecoinvent guidelines 2.2
  note on heating value, net: Value based on the dataset 'softwood forestry, mixed species, sustainable forest management'
- technical wood drying facility: 3.66e-6 unit; name wooddrying; lognormal variance with pedigree 0.5587, pedigree (2,1,4,3,1)
  data taken from ecoinvent 2.2
- electricity, medium voltage: 23.3 kWh; name elec_midvol; lognormal variance with pedigree 0.0337, pedigree (2,1,4,3,1)
  electricity consumption of the drying facility
  properties: UVEK_relative_amount_1 1, UVEK_link_1 1779
  note on UVEK_relative_amount_1: to be used only in special submissions in coordination with ecoinvent and the Swiss FOEN
- sawnwood, hardwood, raw: 1.04167 m3; name sawnwood_raw; = beam_raw_kiln/(1-(30-moisture_beam)*shrinkage_ratio); source Rudi Wagenführ 2000; lognormal variance with pedigree 0.0342, pedigree (2,1,4,4,1)
  Processed internally within the sawmill
  property water in wet mass 394.24 kg; name WWM_raw
  properties: dry mass 563.2 kg, water content 0.7, wet mass 957.44 kg, carbon content, non-fossil 0.494, heating value, net 7462.65 MJ
- furnace, wood chips, with silo, 300kW: 1.94444e-5 unit; name furnace; = furnace_energy* heat_woodchip; lognormal variance with pedigree 0.5592, pedigree (2,1,4,4,1)
  infrastructure; value taken from ecoinvent 2.2 report Bauer, C. (2007): Holzenergie. In: R. Dones (ed.): Sachbilanzen von Energiesystemen: Grundlagen für den ökologischen Vergleich von Energiesystemen und den Einbezug von Energiesystemen in Ökobilanzen für die Schweiz, Final report ecoinvent 2000 No. 6, Paul Scherrer Institut Villigen, Swiss Centre for Life Cycle Inventories, Duebendorf, CH.
  properties: UVEK_relative_amount_1 1, UVEK_link_1 999999
- wood ash mixture, pure: -0.56 kg; name w_wood_ash; = (woodash* heat_woodchip)*-1; lognormal variance with pedigree 0.0337, pedigree (2,1,4,3,1)
  calculated from the input wood chips for heat production, based on an updated profile for industrial wood combustion according to PSI (CH)
  production volume 158004 kg; = 750.731519999999/60*(12688-60)
    Scaled from the PV estimates of the Swiss sawmilling chain based UNECE data for 2013 for the production volumes of Switzerland (60'000 m3) and the production volume of Europe without Switzerland ( 12'748 m3 - 60'000 m3).
  properties: UVEK_relative_amount_3 -1, carbon content, non-fossil 0.012, wet mass 1 kg, UVEK_link_1 1128, UVEK_link_2 1127, dry mass 1 kg, UVEK_link_3 1129

## Emissions to nature
- Chromium [air, urban air close to ground]: 4.4352e-6 kg; = chromium* heat_woodchip; lognormal variance with pedigree 0.8087, pedigree (2,1,4,3,1)
  calculated from the input wood chips for heat production, based on an updated emissions profile for industrial wood combustion according to PSI (CH)
- PAH, polycyclic aromatic hydrocarbons [air, urban air close to ground]: 1.2432e-5 kg; = pah* heat_woodchip; lognormal variance with pedigree 0.5587, pedigree (2,1,4,3,1)
  (same comment as for Chromium)
- Ammonia [air, urban air close to ground]: 0.0019376 kg; = ammonia* heat_woodchip; lognormal variance with pedigree 0.2087, pedigree (2,1,4,3,1)
  (same comment as for Chromium)
- Potassium [air, urban air close to ground]: 0.026208 kg; = Potassium* heat_woodchip; lognormal variance with pedigree 0.2087, pedigree (2,1,4,3,1)
  (same comment as for Chromium)
- Calcium [air, urban air close to ground]: 0.006552 kg; = calcium* heat_woodchip; lognormal variance with pedigree 0.2087, pedigree (2,1,4,3,1)
  (same comment as for Chromium)
- Toluene [air, urban air close to ground]: 0.000336 kg; = toluene* heat_woodchip; lognormal variance with pedigree 0.3587, pedigree (2,1,4,3,1)
  (same comment as for Chromium)
- Bromine [air, urban air close to ground]: 6.72e-5 kg; = bro* heat_woodchip; lognormal variance with pedigree 0.8087, pedigree (2,1,4,3,1)
  (same comment as for Chromium)
- Sodium [air, urban air close to ground]: 0.001456 kg; = sodium* heat_woodchip; lognormal variance with pedigree 0.2087, pedigree (2,1,4,3,1)
  (same comment as for Chromium)
- Chlorine [air, urban air close to ground]: 0.0002016 kg; = ch* heat_woodchip; lognormal variance with pedigree 0.2087, pedigree (2,1,4,3,1)
  (same comment as for Chromium)
- Phosphorus [air, urban air close to ground]: 0.000336 kg; = Phosphorus* heat_woodchip; lognormal variance with pedigree 0.2087, pedigree (2,1,4,3,1)
  (same comment as for Chromium)
- Hydrocarbons, aliphatic, unsaturated [air, urban air close to ground]: 0.003472 kg; = Hydrocarbons_aliphatic* heat_woodchip; lognormal variance with pedigree 0.2087, pedigree (2,1,4,3,1)
  (same comment as for Chromium)
- Nitrogen oxides [air, urban air close to ground]: 0.2016 kg; = no2* heat_woodchip; lognormal variance with pedigree 0.2087, pedigree (2,1,4,3,1)
  (same comment as for Chromium)
- Copper [air, urban air close to ground]: 2.464e-5 kg; = copper* heat_woodchip; lognormal variance with pedigree 0.2087, pedigree (2,1,4,3,1)
  (same comment as for Chromium)
- m-Xylene [air, urban air close to ground]: 0.0001344 kg; = mxylene* heat_woodchip; lognormal variance with pedigree 0.3587, pedigree (2,1,4,3,1)
  (same comment as for Chromium)
- Carbon dioxide, non-fossil [air, urban air close to ground]: 116.458 kg; = woodchip_hard*0.494/12*44; lognormal variance with pedigree 0.0337, pedigree (2,1,4,3,1)
  calculated from parameters based on wood input oven-dry x carbon content x molar relationship of CO2/C
- Water [air, unspecified]: 0.292907 m3; = (sawnwood_raw*WWM_raw-beam_raw_kiln*WWM_dried)/1000
  difference in water in wet mass in kg, converted to m3
- Zinc [air, urban air close to ground]: 0.000336 kg; = zinc* heat_woodchip; lognormal variance with pedigree 0.8087, pedigree (2,1,4,3,1)
  (same comment as for Chromium)
- Dioxins, measured as 2,3,7,8-tetrachlorodibenzo-p-dioxin [air, urban air close to ground]: 3.472e-11 kg; = tetrachloro* heat_woodchip; lognormal variance with pedigree 0.5587, pedigree (2,1,4,3,1)
  (same comment as for Chromium)
- Phenol, pentachloro- [air, urban air close to ground]: 9.072e-9 kg; = Phenol_pentachloro* heat_woodchip; lognormal variance with pedigree 0.3587, pedigree (2,1,4,3,1)
  (same comment as for Chromium)
- Benzene, hexachloro- [air, urban air close to ground]: 8.064e-12 kg; = ben_hexa* heat_woodchip; lognormal variance with pedigree 0.2087, pedigree (2,1,4,3,1)
  (same comment as for Chromium)
- Acetaldehyde [air, urban air close to ground]: 6.832e-5 kg; = acet* heat_woodchip; lognormal variance with pedigree 0.2087, pedigree (2,1,4,3,1)
  (same comment as for Chromium)
- Magnesium [air, urban air close to ground]: 0.0004032 kg; = magnesium* heat_woodchip; lognormal variance with pedigree 0.2087, pedigree (2,1,4,3,1)
  (same comment as for Chromium)
- Benzene, ethyl- [air, urban air close to ground]: 3.36e-5 kg; = ben_ethyl* heat_woodchip; lognormal variance with pedigree 0.2087, pedigree (2,1,4,3,1)
  (same comment as for Chromium)
- Hydrocarbons, aliphatic, alkanes, unspecified [air, urban air close to ground]: 0.0010192 kg; = Hydrocarbons_aliphatic_alkanes* heat_woodchip; lognormal variance with pedigree 0.2087, pedigree (2,1,4,3,1)
  (same comment as for Chromium)
- Lead [air, urban air close to ground]: 2.8e-5 kg; = lead* heat_woodchip; lognormal variance with pedigree 0.8087, pedigree (2,1,4,3,1)
  (same comment as for Chromium)
- Dinitrogen monoxide [air, urban air close to ground]: 0.002576 kg; = N2O* heat_woodchip; lognormal variance with pedigree 0.2087, pedigree (2,1,4,3,1)
  (same comment as for Chromium)
- Fluorine [air, urban air close to ground]: 5.6e-5 kg; = Fluorine* heat_woodchip; lognormal variance with pedigree 0.2087, pedigree (2,1,4,3,1)
  (same comment as for Chromium)
- Nickel [air, urban air close to ground]: 6.72e-6 kg; = nickel* heat_woodchip; lognormal variance with pedigree 0.8087, pedigree (2,1,4,3,1)
  (same comment as for Chromium)
- Cadmium [air, urban air close to ground]: 7.84e-7 kg; = cadmium* heat_woodchip; lognormal variance with pedigree 0.8087, pedigree (2,1,4,3,1)
  (same comment as for Chromium)
- Formaldehyde [air, urban air close to ground]: 0.0001456 kg; = Formaldehyde* heat_woodchip; lognormal variance with pedigree 0.2087, pedigree (2,1,4,3,1)
  (same comment as for Chromium)
- Methane, non-fossil [air, urban air close to ground]: 0.002688 kg; = Methane_nonfossil* heat_woodchip; lognormal variance with pedigree 0.2087, pedigree (2,1,4,3,1)
  (same comment as for Chromium)
- Arsenic [air, urban air close to ground]: 1.12e-6 kg; = arsenic* heat_woodchip; lognormal variance with pedigree 0.2087, pedigree (2,1,4,3,1)
  (same comment as for Chromium)
- NMVOC, non-methane volatile organic compounds, unspecified origin [air, urban air close to ground]: 0.01176 kg; = nmvoc* heat_woodchip; lognormal variance with pedigree 0.2087, pedigree (2,1,4,3,1)
  (same comment as for Chromium)
- Sulfur dioxide [air, urban air close to ground]: 0.0028 kg; = so2* heat_woodchip; lognormal variance with pedigree 0.0337, pedigree (2,1,4,3,1)
  (same comment as for Chromium)
- Carbon monoxide, non-fossil [air, urban air close to ground]: 0.28 kg; = co* heat_woodchip; lognormal variance with pedigree 0.2087, pedigree (2,1,4,3,1)
  (same comment as for Chromium)
- Particulates, > 2.5 um, and < 10um [air, unspecified]: 0.0056 kg; = Particulates2_5_to_10*heat_woodchip; lognormal variance with pedigree 0.3587, pedigree (2,1,4,3,1)
  (same comment as for Chromium)
- Benzo(a)pyrene [air, urban air close to ground]: 5.6e-7 kg; = benzo* heat_woodchip; lognormal variance with pedigree 0.5587, pedigree (2,1,4,3,1)
  (same comment as for Chromium)
- Mercury [air, urban air close to ground]: 3.36e-7 kg; = mercury* heat_woodchip; lognormal variance with pedigree 0.8087, pedigree (2,1,4,3,1)
  (same comment as for Chromium)
- Chromium VI [air, urban air close to ground]: 4.48e-8 kg; = chroIV* heat_woodchip; lognormal variance with pedigree 0.8087, pedigree (2,1,4,3,1)
  (same comment as for Chromium)
- Particulates, < 2.5 um [air, urban air close to ground]: 0.1008 kg; = Particulate2_5* heat_woodchip; lognormal variance with pedigree 0.5587, pedigree (2,1,4,3,1)
  (same comment as for Chromium)
- Benzene [air, urban air close to ground]: 0.0010192 kg; = benzene* heat_woodchip; lognormal variance with pedigree 0.2087, pedigree (2,1,4,3,1)
  (same comment as for Chromium)
- Manganese [air, urban air close to ground]: 0.0001904 kg; = manganese* heat_woodchip; lognormal variance with pedigree 0.2087, pedigree (2,1,4,3,1)
  (same comment as for Chromium)

## Sampling procedure
complementary literature and sampling from sawmills; CH data used to approximate European processes

## Extrapolations
This dataset has been extrapolated from year 2013 to the year of the calculation (2021). The uncertainty has been adjusted accordingly.
