# rice seed production, for sowing

Dataset: EcoSpold 2, unit process
Geography: RoW
Time period: 1997-01-01 to 2021-12-31
Technology level: current
Classification: ISIC rev.4 ecoinvent: 0164:Seed processing for propagation
Classification: EcoSpold01Categories: agricultural means of production/seed
Tags: ConvertedDataset
Scenario: Business-as-Usual
System model: Allocation, cut-off by classification
Share of production covered: 100 %
Generated by: Thomas Kägi
Published in: Nemecek, T. 2007
Database: ecoinvent
isCopyrightProtected: true
accessRestrictedTo: 1

## General comment
Inventory refers to 1kg rice seed, at regional storehouse.
[This dataset was already contained in the ecoinvent database version 2. It was not individually updated during the transfer to ecoinvent version 3. Life Cycle Impact Assessment results may still have changed, as they are affected by changes in the supply chain, i.e. in other datasets. This dataset was generated following the ecoinvent quality guidelines for version 2. It may have been subject to central changes described in the ecoinvent version 3 change report (http://www.ecoinvent.org/database/ecoinvent-version-3/reports-of-changes/), and the results of the central updates were reviewed extensively. The changes added e.g. consistent water flows and other information throughout the database. The documentation of this dataset can be found in the ecoinvent reports of version 2, which are still available via the ecoinvent website. The change report linked above covers all central changes that were made during the conversion process.]

## Included activities end
The seed produced at the farm is treated (pre-cleaning, cleaning, eventually drying, chemical dressing and bag filling), and stored.

## Geography
Refers to an average global production

## Technology
conventional production typical for the country

## Reference product
- rice seed, for sowing: 1 kg; CPC 01161: Rye, seed; By-product classification allocatable product
  EcoSpold01Location=US
  production volume 1.64404e10 kg
    Data for Seeds (which include the amounts of the commodity in question set aside for sowing or planting) of Rice, paddy in FAOSTAT 2005, accessed 2011.05.23
  property carbon content, non-fossil 0.464122
    Composition data obtained from Rice, white, short-grain, raw, in (http://www.nal.usda.gov/fnic/foodcomp/search/). First, composition data were refered to 1 kg dry mass. Then, C-contents were calculated considering a C-content/dry mass of 46% in carbohydrates (including fibres), 53% in proteins and 75% in fats. All data from "Evolutionary and Biochemical Aspects", A.D. Kay and T. Vrede (in Global Ecology, 2010, Elsevier B.V., S.E. Jørgensen Ed.).
  property price 0.375619 EUR2005
    Calculated based on inputs: The price of the product has been calculated as a sum of the values of the material and energy inputs for this product. This value is therefore a rough estimation. It may underestimate the real price since there are additional expenses when producing any product. These expences can include for example labour costs, treatment of waste materials and profit for the producer. Please consider carefully whether this level of data quality is acceptable for your application.
  property carbon content 0.464122
    carbon content on a dry matter basis (reserved; not for manual entry)
  properties: carbon content, fossil 0, water content 0.149425, water in wet mass 0.13 kg, wet mass 1 kg, dry mass 0.87 kg, carbon allocation 0.403786 kg

## Inputs from technosphere
- diphenylether-compound: 0.0001 kg; lognormal variance with pedigree 0.0526, pedigree (2,1,5,5,1)
  EcoSpold01Location=RER
  See chapter 'Seed Production' in "01_crop production - yields & inputs US_v1.0.pdf" - pdf-document on the dedicated talk page of ecoinvent (www.ecoinvent.org/documentation)
  properties: dry mass 1 kg, wet mass 1 kg, carbon content, fossil 0.560061
  note on carbon content, fossil: C content of diphenylether-compounds was calculated after the C content of thepesticides aclonifen and diflufenican classified as diphenylether-compound in Tab 2.25 of Sutter 2010
- electricity, low voltage: 0 kWh; pedigree (1,1,1,1,1)
  EcoSpold01Location=US
  See chapter 'Seed Production' in "01_crop production - yields & inputs US_v1.0.pdf" - pdf-document on the dedicated talk page of ecoinvent (www.ecoinvent.org/documentation)
- building, multi-storey: 2e-5 m3; lognormal variance with pedigree 0.0426, pedigree (2,1,5,5,1)
  See chapter 'Seed Production' in "01_crop production - yields & inputs US_v1.0.pdf" - pdf-document on the dedicated talk page of ecoinvent (www.ecoinvent.org/documentation)
  EcoSpold01Location=RER
- rice, non-basmati: 1 kg; lognormal variance with pedigree 0.0426, pedigree (2,1,5,5,1)
  See chapter 'Seed Production' in "01_crop production - yields & inputs US_v1.0.pdf" - pdf-document on the dedicated talk page of ecoinvent (www.ecoinvent.org/documentation)
  properties: dry mass 0.87 kg, wet mass 1 kg, water content 0.149425, carbon content, non-fossil 0.46412
- packaging, for pesticides: 0.0002 kg; lognormal variance with pedigree 0.0912, pedigree (4,3,5,5,4)
  Total amount of active substance/s of pesticides needed for the production of rice seed, for sowing is calculated to be circa 1.00E-04 kg. Pesticide/s used in this dataset is/are: 'diphenylether-compound'. The total amount of active substance/s is doubled in order to account for the packaging of the dilluted product of pesticide/s that is/are applied. Therefore, 2.00E-04 kg of packaging for pesticides is justified with this exchange.
  properties: dry mass 1 kg, wet mass 1 kg, price 0.0642 EUR2005, carbon content, fossil 0.85714, heating value, net 25.97 MJ
- electricity, low voltage: 0.000319429, 5.81618e-5, 0.00131293, 0.000936478, 0.0143779, 0.00466897, 0.0023261 kWh (7 entries); lognormal variance with pedigree 0.0426, pedigree (2,1,5,5,1)
  (same comment as for electricity, low voltage)

## Inputs from nature
- Occupation, construction site [natural resource, land]: 8e-6 m2*year; lognormal variance with pedigree 0.0826, pedigree (2,1,5,5,1)
  (same comment as for rice, non-basmati)
- Transformation, from unspecified [natural resource, land]: 4e-6 m2; lognormal variance with pedigree 0.1626, pedigree (2,1,5,5,1)
  (same comment as for rice, non-basmati)
- Occupation, industrial area [natural resource, land]: 0.0002 m2*year; lognormal variance with pedigree 0.0826, pedigree (2,1,5,5,1)
  (same comment as for rice, non-basmati)
- Transformation, to industrial area [natural resource, land]: 4e-6 m2; lognormal variance with pedigree 0.1626, pedigree (2,1,5,5,1)
  (same comment as for rice, non-basmati)

## Sampling procedure
Data come from wheat inventory and own estimation for transports.

## Extrapolations
This dataset has been copied from an original dataset covering the geography US. The uncertainty has been adjusted accordingly.

## Review by Roberto Dones 2010-02-07
Passed.
none
