# fleece production, polyethylene

Dataset: EcoSpold 2, unit process
Geography: RER
Time period: 1993-01-01 to 2021-12-31
Technology level: current
Classification: EcoSpold01Categories: plastics/polymers
Classification: ISIC rev.4 ecoinvent: 1399:Manufacture of other textiles n.e.c.
Tags: ConvertedDataset
Scenario: Business-as-Usual
System model: Allocation, cut-off by classification
Generated by: Roland Hischier
Published in: Althaus H.-J. 2007
Database: ecoinvent
isCopyrightProtected: true
accessRestrictedTo: 1

## General comment
The data represents the production of 1 kg of fleece from polyethylene. Raw materials and energy consumption are modelled with an average of available literature data. Emissions and wastes are estimated. Infrastructure is included with a default value.
[This dataset was already contained in the ecoinvent database version 2. It was not individually updated during the transfer to ecoinvent version 3. Life Cycle Impact Assessment results may still have changed, as they are affected by changes in the supply chain, i.e. in other datasets. This dataset was generated following the ecoinvent quality guidelines for version 2. It may have been subject to central changes described in the ecoinvent version 3 change report (http://www.ecoinvent.org/database/ecoinvent-version-3/reports-of-changes/), and the results of the central updates were reviewed extensively. The changes added e.g. consistent water flows and other information throughout the database. The documentation of this dataset can be found in the ecoinvent reports of version 2, which are still available via the ecoinvent website. The change report linked above covers all central changes that were made during the conversion process.]

## Included activities start
From the reception of polyethylene at the factory gate.

## Included activities end
This activity ends with 1 kg of fleece at the factory gate. The dataset includes the input materials, energy uses, infrastructure and emissions.

## Geography
data from 1 Swiss company are used for the European average

## Technology
The raw material is processed using the following process: opening of fibres, mixing, pile creation, pile deposition and feeding, needling, transport, cutting and rolling. Furthermore the fleece is heated to about 220°C resulting in a thermical solidification. For a separation of the different tracks, a mechanical cutter is used. The final packaging into cartonboard and plastics film is done manually.
Reference:
Weibel T. and Stritz A. (1995) Ökoinventare und Wirkungsbilanzen von Bauma-terialien. Grundlagen für den ökologischen Vergleich von Hochbaukonstruktio-nen., Vol. ESU-Reihe No.1/95. ETH, Zürich

## Time period
The time to which the data refers to

## Parameters
- fraction, cooling water, cooling pond system, to air: 0.032 dimensionless; name fraction_CW_CP_to_air; lognormal variance with pedigree 0.0413, pedigree (2,3,1,3,1)
  Calculated based on literature value (Scown, C.D., 2011, Water Footprint of U.S. Transportation Fuels and supplying information of the article) (Vionnet, S., Quantis Water Database - Technical Report, 2012).
- fraction, cooling water, once-through system, to air: 0.004 dimensionless; name fraction_CW_OT_to_air; lognormal variance with pedigree 0.0413, pedigree (2,3,1,3,1)
  (same comment as for fraction, cooling water, cooling pond system, to air)
- fraction, cooling water, to air: 0.3875 dimensionless; name fraction_CW_to_air; = (0.5*fraction_CW_OT_to_air)+(0.5*fraction_CW_R_to_air); lognormal variance with pedigree 0.092025, pedigree (4,4,3,2,4)
  Calculated value based on literature value (see comments of the other parametres present in this dataset) and expert opinion. In the case when no industry/literature data are available about the type of cooling or directly fraction, cooling water, to air specific for the process a default assumption is applied. It is assumed that the once-through cooling system is used in 50% of all cases and recirculating system is used in another 50% of all cases.
- fraction, cooling water, recirculating system, to air: 0.771 dimensionless; name fraction_CW_R_to_air; lognormal variance with pedigree 0.0413, pedigree (2,3,1,3,1)
  (same comment as for fraction, cooling water, cooling pond system, to air)

## Reference product
- fleece, polyethylene: 1 kg; source Weibel, T. 1995; CPC 27922: Nonwovens; By-product classification allocatable product
  Fleece is made out of different materials such as glass fibers or different types of plastics. A polyester fleece with an average weight of 200 to 400 g/m2 is used in this dataset. This specific kind of fleece is used as, for example, a sound absorber or as support for sealing tracks.
  EcoSpold01Location=RER
  production volume 1.32237 kg
    This is a placeholder value that does not reflect real-world production volumes. This dataset does not currently require a real-world production volume to work in the database framework, and no actual data were collected yet. This has no negative effect on the results of the ecoinvent database. The placeholder value of this activity was scaled according to the nominal GDP of 2005 (source: United Nations, http://data.un.org/Glossary.aspx?q=GDP+%28current+US%24%29, accessed 20130726) to reflect an appropriate share of the global production volume, which is also a placeholder value.
  property price 0.923 EUR2005
    Produced from 'Polyethylene, HDPE, granulate'. The price is assumed to be 25% higher than the price of 'Polyethylene, HDPE, granulate,'
  property carbon content, fossil 0.857143
    Polyethylene is formed out of a huge amount of ethylene monomers (C2H4) (ecoinvent v2.2 report 11_II). MW=28 g/mol
  property carbon content 0.857143
    carbon content on a dry matter basis (reserved; not for manual entry)
  properties: heating value, net 42.47 MJ, dry mass 1 kg, carbon content, non-fossil 0, water content 0, wet mass 1 kg, water in wet mass 0 kg, carbon allocation 0.857143 kg

## Inputs from technosphere
- chemical factory, organics: 4e-10 unit; source Weibel, T. 1995; lognormal variance with pedigree 0.5861, pedigree (4,5,5,3,5)
  Estimation. Data was estimated based on the dataset "chemical plant, organics". This module assumes a built area of about 4.2 ha, an average output of 50'000 t/a, and plant life of fifty years.
  EcoSpold01Location=RER
  Uncertainty: estimation
- cement, unspecified: 0 kg; pedigree (1,1,1,1,1)
  EcoSpold01Location=CH
  Literature value. Based on information from one Swiss producer for the production situation during the beginning of the 90s.
  Uncertainty: data from 1 Swiss company
  properties: dry mass 1 kg, wet mass 1 kg
- electricity, medium voltage: 0.24 kWh; source Weibel, T. 1995; lognormal variance with pedigree 0.0707, pedigree (2,4,5,3,3)
  Literature value. Based on information from one Swiss producer for the production situation during the beginning of the 90s.
  EcoSpold01Location=UCTE
  Uncertainty: data from 1 Swiss company
- packaging film, low density polyethylene: 0.023 kg; source Weibel, T. 1995; lognormal variance with pedigree 0.0707, pedigree (2,4,5,3,3)
  EcoSpold01Location=RER
  Literature value. Based on information from one Swiss producer for the production situation during the beginning of the 90s.
  Uncertainty: data from 1 Swiss company
  properties: dry mass 1 kg, wet mass 1 kg, carbon content, fossil 0.857143, heating value, net 42.47 MJ
  note on carbon content, fossil: Polyethylene is formed out of a huge amount of ethylene monomers (C2H4) (ecoinvent v2.2 report 11_II). MW=28 g/mol
- core board: 0.024 kg; source Weibel, T. 1995; lognormal variance with pedigree 0.0707, pedigree (2,4,5,3,3)
  Literature value. Based on information from one Swiss producer for the production situation during the beginning of the 90s.
  EcoSpold01Location=RER
  Uncertainty: data from 1 Swiss company
  properties: wet mass 1 kg, water content 0.0582011, dry mass 0.945 kg, carbon content, non-fossil 0.430314, heating value, net 12.19 MJ
  note on carbon content, non-fossil: Biogenic C content was calculated after biogenic C contents of chemicals used in the production of board (ecoinvent v2.2 report 11_III, part 13). The cellulose content in 1 kg of paper (on a wet mas basis) was estimated as (1-chemical content), C content of cellulose was considered 0.44 kgC/kg dry mass (ecoinvent v2.2 report, n 15a, pg 40)
- chemical, organic: 0.0055 kg; source Weibel, T. 1995; lognormal variance with pedigree 0.0707, pedigree (2,4,5,3,3)
  Literature value. Based on information from one Swiss producer for the production situation during the beginning of the 90s.
  EcoSpold01Location=GLO
  Uncertainty: data from 1 Swiss company
  properties: heating value, net 19.03 MJ, carbon content, fossil 0.628, wet mass 1 kg, dry mass 1 kg
  note on carbon content, fossil: This dataset is an unweighted average of 20 organic substances (listed in Tab 88.1, ecoinvent v2.2 report 8, part II), being part of the top100 chemicals included in this database. The C-content has also been calculated as an unweighted average of the C content of the substances composing this dataset.
- waste polyethylene: -0.1 kg; source Weibel, T. 1995; lognormal variance with pedigree 0.0707, pedigree (2,4,5,3,3)
  Literature value.
  EcoSpold01Location=CH
  Uncertainty: data from 1 Swiss company
  production volume 0.1 kg
    Calculated from the production volume of fleece, polyethylene in proportion to the respective output amounts.
  properties: wet mass 1 kg, dry mass 0.996 kg, water content 0.00401606, carbon content, fossil 0.825301, heating value, net 42.47 MJ
  note on carbon content, fossil: C content in 1 kg DM was calculated using data in Tab A.1, ecoinvent v2.2 report 13_I
  note on heating value, net: Value taken from the general comment of the treatment dataset.
- polyethylene, high density, granulate: 1.1 kg; source Weibel, T. 1995; lognormal variance with pedigree 0.0707, pedigree (2,4,5,3,3)
  Literature value. Based on information from one Swiss producer for the production situation during the beginning of the 90s. Data from high density polyethylene are used to account for both polyester and copolyester.
  EcoSpold01Location=RER
  Uncertainty: data from 1 Swiss company
  properties: wet mass 1 kg, carbon content, fossil 0.857143, dry mass 1 kg, heating value, net 42.47 MJ
- heat, district or industrial, natural gas: 2.23 MJ; source Weibel, T. 1995; lognormal variance with pedigree 0.0707, pedigree (2,4,5,3,3)
  (same comment as for core board)
  properties: heating value, net 1 MJ
- cement, unspecified: 0.000688131, 1.18688e-5 kg (2 entries); lognormal variance with pedigree 0.0707, pedigree (2,4,5,3,3)
  (same comment as for cement, unspecified)

## Inputs from nature
- Water, cooling, unspecified natural origin [natural resource, in water]: 0.024 m3; name water_cooling_UNO_input; source Gendorf 2000; lognormal variance with pedigree 0.208, pedigree (5,5,5,1,4)
  Estimation. Data approximated from a large chemical plant site in Germany producing 2.05 Mt a-1 (intermediates included) of different chemicals.
  Uncertainty: estimated with data from a large chem. Plant

## Emissions to nature
- Water [air, unspecified]: 0.0093 m3; name water_to_air_unspecified; = (water_cooling_UNO_input*fraction_CW_to_air); lognormal variance with pedigree 0.0807, pedigree (2,2,5,1,1)
  Calculated value based on literature values and expert opinion. See comments in the parametres' comment field.
  property fraction, origin: fresh water 0; name fraction_origin_fresh_water
  property fraction, origin: unspecified 1; name fraction_origin_unspecified
  property fraction, origin: salt water 0; name fraction_origin_salt_water
- Water [water, unspecified]: 0.0147 m3; name water_to_water_unspecified; = water_cooling_UNO_input*(1-fraction_CW_to_air); lognormal variance with pedigree 0.0807, pedigree (2,2,5,1,1)
  (same comment as for Water)
  property fraction, origin: salt water 0; name fraction_origin_salt_water_Ww
  property fraction, origin: unspecified 1; name fraction_origin_unspecified_Ww
  property fraction, origin: fresh water 0; name fraction_origin_fresh_water_Ww
  property carbon content, fossil 0; name C_content_fossil
  property wet mass 1000 kg; name WM
  property carbon content, non-fossil 0; name C_content_non_fossil
  property water in wet mass 1000 kg; name WWM
  property dry mass 0 kg; name DM
- Hydrocarbons, aliphatic, alkanes, unspecified [air, urban air close to ground]: 0.000275 kg; lognormal variance with pedigree 0.33, pedigree (5,5,5,5,5)
  Estimation. It is assumed that 5% of the raw materials are emitted into air as various hydrocarbons.
  Uncertainty: estimation

## Sampling procedure
Process data based on data from 1 Swiss company, used here as average data for European situation.

## Extrapolations
This dataset has been extrapolated from year 1995 to the year of the calculation (2021). The uncertainty has been adjusted accordingly.

## Review by Hans-Jörg Althaus 2003-06-28
passed
