# clay plaster production

Dataset: EcoSpold 2, unit process
Geography: CH
Time period: 1995-01-01 to 2021-12-31
Technology level: current
Classification: EcoSpold01Categories: mortar and plaster/production
Classification: ISIC rev.4 ecoinvent: 2392:Manufacture of clay building materials
Synonyms: Lehmmörtel
Tags: ConvertedDataset
Scenario: Business-as-Usual
System model: Allocation, cut-off by classification
Generated by: Daniel Kellenberger (obsolete)
Published in: Kellenberger D. 2004
Database: ecoinvent
isCopyrightProtected: true
accessRestrictedTo: 1

## General comment
The raw materials per kg ready mix product are mixed in following ratio: sand: 0.55kg, clay: 0.25kg, water: 0.2kg. After mixing it is internally transported to the packing installation and packed. Can be used without adding water. No direct process emissions are taken into account as they play a subordinate role compared to the emissions of the raw material production (e.g. drying of silica sand) and because no data are available. For inventoring the infrastructure, a yearly production amount of 150'000 tons is assumed. The lifespan of the machines is assumed to be 20 years.
Clay plaster. Image source: http://www.strawbale.com/wp-content/uploads/earth-plaster-200x300.jpg, accessed 20151211

## Included activities end
Includes the whole manufacturing process to produce clay plaster (raw material provision, raw material mixing, packing, and storage), transports to plant, and infrastructure. No requirements for administration are included. No additional buildings and land-use have been taken into account as it is assumed that the mixing process takes place in an existing building of the sand/cement industry or on the construction site

## Geography
The amount of raw materials is based on estimations. The transportation distance is an estimation. For the infrastructure RER- and for the silica sand DE-modules are used as proxy

## Technology
Assumed average current technology. The raw materials are mixed in a certain ratio, transported to the packing installation and packed.

## Parameters
- fraction, tap water, to air: 0.5 dimensionless; name fraction_TW_to_air; = fraction_PW_to_air; lognormal variance with pedigree 0.092025, pedigree (4,4,3,2,4)
  Calculated value. See comment in the other parametres present in this dataset. Tap water is considered to be always used as process water, thus process water fractions to air are applied to all tap water input flows to calculate the amount of water consumed in the processes.
- fraction, process water, to air: 0.5 dimensionless; name fraction_PW_to_air; lognormal variance with pedigree 0.092025, pedigree (4,4,3,2,4)
  Literature value (Statistics Canada, 2007 & Shaffer, K.H., 2008, Consumptive water use in the Great Lakes Basin, USGS) (Vionnet, S., Quantis Water Database - Technical Report, 2012).

## Reference product
- clay plaster: 1 kg; CPC 373: Refractory products and structural non-refractory clay products; By-product classification allocatable product
  EcoSpold01Location=CH
  production volume 1.14222e7 kg; = 19037054*0.15/0.25
    Estimated value. According to the European mineral statistics 2009-2013 (http://www.bgs.ac.uk/mineralsuk/statistics/europeanStatistics.html), Switzerland does not export Bentonite and imports 19982 tons. For Kaolin it exports 425 tons and imports 17924 tons. Similar values are reported from the Swiss statistical data (https://www.swiss-impex.admin.ch/, accessed 08.02.2016). The production volume for Switzerland are calculated based on the import volume for 2014. Code, name and import volume for CH in kg: 2508.1000 “Bentonite” 19,037,054 kg, 2508.3000 “ Fireclay (excl. expanded clays, kaolin and other kaolinic clays)” 7,608,438kg, 2508.4000 “Clays (excluding fireclay, expanded clay, and kaolin and other kaolinic clays)” 18,889,035 kg, and 2507.0000 “Kaolin and other kaolinic clays, whether or not calcined” 16,839,960 kg. The volume of produced clay is assigned to the different activities based on USGS (2015) estimates of uses in the USA (http://minerals.usgs.gov/minerals/pubs/commodity/clays/mcs-2015-clays.pdf, accessed 08.02.2016) and according to input of clay per reference product. Of common clay, 39% is used for brick (for which 50% is assumed to be used for clay bricks and 50% light clay bricks), 23% lightweight aggregate, 31% cement, and 7% other uses (USGS specifies that 9% of common clay is used for lightweight concrete block production in the 2013 Minerals yearbook http://minerals.usgs.gov/minerals/pubs/commodity/clays/myb1-2013-clays.pdf, accessed 08.02.2016). Of ball clay, 39% is used for floor and wall tiles, 17% sanitary ware, and 44% other uses. Of bentonite 26% absorbents, 24% drilling mud, 15% foundry sand bond (assumed to represent plaster clay), 11% iron ore pelletising, and 24% other uses. Of fire clay, 34% for heavy clay products, and 66% for refractory and other products. Of fuller’s earth, 70% absorbents, and 30% for other uses. The US produce 15 to 25 % of refined clays (without common clay and shale).
  property price 0.12 EUR2005
    Calculated value based on data from United Nations Commodity Trade Statistics Database (comtrade.un.org). UN comtrade category: 250810 Bentonite. Year 2005. Using exchange rate of 1EURO = 1.209 USD. Average of price of import into 5 main markets (EU, US, JP, IN and CN).
  property carbon content, non-fossil 0
    Raw materials are listed in Tab 5.2, ecoinvent v2.2 report 7, part XVII. C content is calculated after C content of raw materials
  property carbon content, fossil 0
    (same comment as for clay plaster)
  property carbon content 0
    carbon content on a dry matter basis (reserved; not for manual entry)
  properties: water in wet mass 0.2 kg, wet mass 1 kg, dry mass 0.8 kg, water content 0.25, carbon allocation 0 kg

## Inputs from technosphere
All rows: lognormal variance with pedigree 0.69, pedigree (1,1,5,1,1)
- industrial machine, heavy, unspecified: 6.67e-6 kg
  EcoSpold01Location=RER
  estimated
- silica sand: 0.55 kg
  estimated
  EcoSpold01Location=DE
  properties: wet mass 1 kg, dry mass 0.99 kg, water content 0.010101
- conveyor belt: 3.33e-8 m
  estimated
  EcoSpold01Location=RER
- clay: 0.25 kg
  estimated
  EcoSpold01Location=CH
  properties: dry mass 0.965 kg, water content 0.0362694, wet mass 1 kg
- electricity, medium voltage: 0.0278 kWh
  EcoSpold01Location=CH
  estimated
- tap water: 0.2 kg; name tap_water_input
  EcoSpold01Location=CH
  estimated
  properties: water content 2962.17, carbon content, fossil 0.00178991, wet mass 1 kg, dry mass 0.000337476 kg
  note on carbon content, fossil: Bicarbonate content is 2.93 mol/m3. CO2 content is 0.1 mol/m3 (ecoinvent v2.2 report 8, Tab 93.1).

## Emissions to nature
- Water [air, unspecified]: 0.0001 m3; name water_to_air_unspecified; = (tap_water_input/1000*fraction_TW_to_air); lognormal variance with pedigree 0.0807, pedigree (2,2,5,1,1)
  Calculated value based on literature values and expert opinion. See comments in the parametres' comment field.
  property fraction, origin: unspecified 0; name fraction_origin_unspecified
  property fraction, origin: salt water 0; name fraction_origin_salt_water
  property fraction, origin: fresh water 1; name fraction_origin_fresh_water
- Water [water, unspecified]: 0.0001 m3; name water_to_water_unspecified; = (tap_water_input/1000)*(1-fraction_TW_to_air); lognormal variance with pedigree 0.0807, pedigree (2,2,5,1,1)
  (same comment as for Water)
  property dry mass 0 kg; name DM
  property fraction, origin: fresh water 1; name fraction_origin_fresh_water_Ww
  property carbon content, fossil 0; name C_content_fossil
  property fraction, origin: salt water 0; name fraction_origin_salt_water_Ww
  property water in wet mass 1000 kg; name WWM
  property wet mass 1000 kg; name WM
  property carbon content, non-fossil 0; name C_content_non_fossil
  property fraction, origin: unspecified 0; name fraction_origin_unspecified_Ww

## Sampling procedure
estimation

## Extrapolations
This dataset has been extrapolated from year 2001 to the year of the calculation (2021). The uncertainty has been adjusted accordingly.

## Review by Roberto Dones 2004-04-05
passed
