# treatment of waste plastic, consumer electronics, municipal incineration

Dataset: EcoSpold 2, unit process
Geography: RoW
Time period: 2006-01-01 to 2021-12-31
Technology level: current
Classification: ISIC rev.4 ecoinvent: 3821:Treatment and disposal of non-hazardous waste
Synonyms: Siedlungsabfallverbrennung; Kehrichtverbrennung; municipal waste incineration
Scenario: Business-as-Usual
System model: Allocation, cut-off by classification
Share of production covered: 1.8 %
Generated by: Gabor Doka
Published in: Doka G. 2013
Database: ecoinvent
isCopyrightProtected: true
accessRestrictedTo: 1

## General comment
This dataset represents the activity of waste disposal of waste plastic, consumer electronics in a municipal solid waste incinerator (MSWI) // Recommended use of this dataset: For plastic parts from consumer electronics, which go to disposal as part of communal waste mixture, either after a separation procedure, or in small amounts as illegal disposal of a larger item of waste electronics (WEEE). // // Waste composition (wet, in ppm): upper heating value 36.29 MJ/kg; lower heating value 34.78 MJ/kg; H2O 11129; O 41000; H 75000; C 821000; S 300; N 13100; P 600; B n.a.; Cl 6300; Br 6800; F 130; I n.a.; Ag n.a.; As 10; Ba 137; Cd 115; Co 29.478; Cr 34; Cu 3194.1; Hg 1.4; Mn 4; Mo 2; Ni 703; Pb 127; Sb 4795.2; Se 1.9596; Sn 267; V 0.5; Zn 361; Be 0.46656; Sc n.a.; Sr 82.582; Ti 4187; Tl 0.37325; W n.a.; Si 3547; Fe 1483; Ca 3177; Al 2020; K 233; Mg n.a.; Na 128; // Share of carbon in waste that is biogenic 0%. // Share of metals in waste not oxidised and bulk-recyclable (exclude very small or thin parts) Iron: 0%; Alu: 0%; Copper: 0%. // One kg of this waste produces 0.04792 kg of slag and 0.02259 kg of residues, which are landfilled. Additional solidification with 0.009035 kg of cement. // Net energy production: 4.47MJ/kg electric energy and 8.66MJ/kg thermal energy. // Recovery of metal scrap to recycling: 0g iron scrap, 0g aluminium scrap, 0g copper scrap.

## Included activities start
waste incineration from waste reception gate and delivery into waste bunker at incinerator plant site (without transports to the incinerator)

## Included activities end
Waste-specific short-term emissions to water from leachate. Long-term emissions from landfill to ground water.

## Geography
Specific to the technology mix encountered in Switzerland in 2010. Well applicable to modern incineration practices in Europe, North America or Japan.

## Technology
average Swiss MSWI plants in 2010 (grate incinerators) with electrostatic precipitator for fly ash (ESP), wet flue gas scrubber and 25% SNCR , 42.77% SCR-high dust , 32.68% SCR-low dust -DeNOx facilities and 0% without Denox (weighted according to mass of burnt waste, representing Swiss average). Efficiency of iron scrap separation from slag : 58%. Efficiency of non-ferrous scrap separation from slag : 31%. Gross electric efficiency technology mix 15.84% and Gross thermal efficiency technology mix 28.51%

## Time period
Waste composition as given in literature reference, theoretical data or other source. Transfer coefficients for modern MSWI.

## Reference product
- waste plastic, consumer electronics: -1 kg; CPC 39270: Waste, parings and scrap of plastics; By-product classification Waste
  Main reference product of this activity (supply of disposal service).
  production volume 5.2351e8 kg
    based on estimate on MSW in WTE globally and estimate of share of WEEE residues in Swiss MSW based on sums of estimates of WEEE residues (from mechanical separation of desktop and laptop computers, cathode ray tube displays, liquid crystal displays, laser printers, industrial devices, IT accessories, and residues from shredder fraction from manual dismantling of WEEE) and specific plastics content in those residues (from Hischier et al. 2007-V)
  property heating value, net 34.78 MJ
    Assumed equal to "waste plastic, consumer electronics, sorted".
  property price 0 EUR2005
    Waste products are assigned a price of zero as they are assumed to require further treatment.
  property carbon content 0.830215
    carbon content on a dry matter basis (reserved; not for manual entry)
  properties: dry mass 0.847 kg, carbon content, fossil 0.830215, wet mass 1 kg, water content 0.180638, water in wet mass 0.153 kg, carbon content, non-fossil 0, carbon allocation 0.703192 kg

## By-products
- heat, for reuse in municipal waste incineration only: 0 MJ; name E_th_prod_MSWI; By-product classification allocatable product; CPC 17300: Steam and hot water; pedigree (1,1,1,1,1)
  Net electricity generated from this waste and used in internal MSWI plant energy redistribution.
  Uncertainty: uncertainty is calculated from uncertainties in waste composition and uncertainties in energy efficiency and the uncertainty in internal energy demand
  production volume 4.5316e9 MJ
    calculated in proportion to reference product waste input to incinerator
  property true value relation 0.1842; name E_th_prod_MSWI_true_value_relation
    property to calculate "true value" from
  property exergy 0.1842 MJ; name E_th_prod_MSWI_exergy
    This exergy property is based on the exergy content of the product.
  property price 0.0106 EUR2005; name E_th_prod_MSWI_price_EUR2005
    Average European district heat price from Ecoheatcool and Euroheat 2005-2006, Ecoheat Work package 1: The European heat market. Final report. 10.6 EUR/GJ i s the price of district heat. http://www.solarthermalworld.org/files/Ecoheatcool%20WP1%20Web.pdf?download
- electricity, for reuse in municipal waste incineration only: 0 kWh; name E_el_prod_MSWI; CPC 17100: Electrical energy; By-product classification allocatable product; pedigree (1,1,1,1,1)
  (same comment as for heat, for reuse in municipal waste incineration only)
  production volume 6.5004e8 kWh
    calculated in proportion to reference product waste input to incinerator
  property exergy 3.6 MJ; name E_el_prod_MSWI_exergy
    This exergy property is based on the exergy content of the product.
  property true value relation 3.6; name E_el_prod_MSWI_true_value_relation
    property to calculate "true value" from
  property price 0.1 EUR2005; name E_el_prod_MSWI_price_EUR2005
    Estimated to be the same price as in case of electricity, medium voltage.

## Inputs from technosphere
- residual material landfill: 4.7055e-11 unit; lognormal variance with pedigree 0.064759, pedigree (1,1,4,1,1)
  Landfill infrastructure required for landfilling of incineration residues.
  Uncertainty: uncertainty is calculated from uncertainties in waste composition and transfer coefficients in incinerator
- sodium hydroxide, without water, in 50% solution state: 0.00090167 kg; lognormal variance with pedigree 0.2605, pedigree (1,1,4,1,1)
  Auxilliary inputs for the flue gas treatment stage of the incinerator plant.
  Uncertainty: uncertainty calculated from uncertainty in average NaOH input, of transfer coefficients in the incinerator, and the uncertainty of the waste composition of this waste
  properties: wet mass 1 kg, dry mass 1 kg, heating value, net 3.03 MJ
- water, decarbonised: 0 kg; pedigree (1,1,1,1,1)
  Incinerator process water used in flue gas scrubber stage.
  Uncertainty: uncertainty calculated from uncertainty in average water input, and the uncertainty of the waste composition of this waste
  properties: wet mass 1 kg
- quicklime, milled, packed: 0.0041747 kg; lognormal variance with pedigree 0.31417, pedigree (1,1,4,1,1)
  Auxilliary inputs for the flue gas treatment stage of the incinerator plant.
  Uncertainty: uncertainty calculated from uncertainty in average CaO input, of transfer coefficients in the incinerator, and the uncertainty of the waste composition of this waste
  properties: dry mass 0.99 kg, water content 0.010101, wet mass 1 kg
- heat, district or industrial, natural gas: 0 MJ; pedigree (1,1,1,1,1)
  Input to DeNOx stage, to heat up flue gas in low-dust SCR.
  Uncertainty: uncertainty calculated from uncertainty in average DeNOx input, uncertainty in the share of thermal NOx, uncertainty of nitrogen content in average municipal waste and the uncertainty in nitrogen content in *this* waste.
  properties: heating value, net 1 MJ
- process-specific burdens, residual material landfill: 0 kg; pedigree (1,1,1,1,1)
  Mass-specific expenditures required for landfilling of incineration residues.
  Uncertainty: uncertainty is calculated from uncertainties in waste composition and transfer coefficients in incinerator
- waste cement, hydrated: 0 kg; pedigree (1,1,1,1,1)
  Hydrated cement output for solidification of landfilled residual material.
  Uncertainty: Uncertainty calculated from uncertainty of the waste composition of this waste and transfer coefficients in the incinerator and of the solidification recipe.
  production volume 0 kg
    calculated in proportion to reference product waste input to incinerator
  properties: dry mass 1 kg, wet mass 1 kg
- iron (III) chloride, without water, in 40% solution state: 0.00012302 kg; lognormal variance with pedigree 0.2786, pedigree (1,1,4,1,1)
  Auxilliary inputs for the wastewater treatment stage of the incinerator plant.
  Uncertainty: uncertainty calculated from uncertainty in average FeCl3 input, of transfer coefficients in the incinerator, and the uncertainty of the waste composition of this waste
  properties: dry mass 1 kg, wet mass 1 kg
- titanium dioxide: 0.00014628 kg; lognormal variance with pedigree 1.0273, pedigree (1,1,4,1,1)
  Input to DeNOx stage (TiO2 catalyst carrier)
  Uncertainty: uncertainty calculated from uncertainty in average DeNOx input, uncertainty in the share of thermal NOx, uncertainty of nitrogen content in average municipal waste and the uncertainty in nitrogen content in *this* waste.
  properties: dry mass 1 kg, wet mass 1 kg
- chemical, organic: 5.3443e-5 kg; lognormal variance with pedigree 0.84283, pedigree (1,1,4,1,1)
  Auxilliary inputs for the wastewater treatment stage of the incinerator plant. Proxy for (pure) Trisodium-trimercapto-s-triazine (CAS 17766-26-6), used as 15% diluted solution, aka TMT15.
  Uncertainty: uncertainty calculated from uncertainty in average TMT15 input, of transfer coefficients in the incinerator, and the uncertainty of the waste composition of this waste
  properties: dry mass 1 kg, carbon content, fossil 0.628, heating value, net 19.03 MJ, wet mass 1 kg
- hydrochloric acid, without water, in 30% solution state: 8.6009e-5 kg; lognormal variance with pedigree 0.20818, pedigree (1,1,4,1,1)
  Auxilliary inputs for the wastewater treatment stage of the incinerator plant.
  Uncertainty: uncertainty calculated from uncertainty in average HCl input, of transfer coefficients in the incinerator, and the uncertainty of the waste composition of this waste
  properties: heating value, net 3.32 MJ, dry mass 1 kg, wet mass 1 kg
- chromium oxide, flakes: 2.9853e-6 kg; lognormal variance with pedigree 1.0273, pedigree (1,1,4,1,1)
  Input to DeNOx stage.
  Uncertainty: uncertainty calculated from uncertainty in average DeNOx input, uncertainty in the share of thermal NOx, uncertainty of nitrogen content in average municipal waste and the uncertainty in nitrogen content in *this* waste.
  properties: wet mass 1 kg, dry mass 1 kg
- ammonia, anhydrous, liquid: 0 kg; pedigree (1,1,1,1,1)
  Input to DeNOx stage (100% NH3).
  Uncertainty: uncertainty calculated from uncertainty in average DeNOx input, uncertainty in the share of thermal NOx, uncertainty of nitrogen content in average municipal waste and the uncertainty in nitrogen content in *this* waste.
  properties: dry mass 1 kg, wet mass 1 kg
- municipal waste incineration facility: 2.5e-10 unit
  Demands per kilogram waste.
- cement, unspecified: 0 kg; pedigree (1,1,1,1,1)
  Cement required for solidification of landfilled residual material.
  Uncertainty: Uncertainty calculated from uncertainty of the waste composition of this waste, of transfer coefficients in the incinerator and of the solidification recipe.
  properties: wet mass 1 kg, dry mass 1 kg
- chemical, inorganic: 0.00032723 kg; lognormal variance with pedigree 0.20818, pedigree (1,1,4,1,1)
  Auxilliary inputs for the wastewater treatment stage of the incinerator plant. Proxy for Polyelectrolyte.
  Uncertainty: uncertainty calculated from uncertainty in average Polyelectrolyte input, of transfer coefficients in the incinerator, and the uncertainty of the waste composition of this waste
  properties: carbon content, fossil 0.003, dry mass 1 kg, wet mass 1 kg
- process-specific burdens, slag landfill: 0 kg; pedigree (1,1,1,1,1)
  Mass-specific expenditures required for landfilling of bottom ash.
  Uncertainty: uncertainty is calculated from uncertainties in waste composition and transfer coefficients in incinerator
- transport, freight, lorry, unspecified: 0 metric ton*km; pedigree (1,1,1,1,1)
  Transport services to transport incineration residues to landfills.
  Uncertainty: uncertainty calculated from uncertainty of the waste composition of this waste, uncertainty of transfer coefficients and the uncertainty in generic transportation distances
- slag landfill: 8.2256e-11 unit; lognormal variance with pedigree 0.058229, pedigree (1,1,4,1,1)
  Landfill infrastructure required for landfilling of bottom ash.
  Uncertainty: uncertainty is calculated from uncertainties in waste composition and transfer coefficients in incinerator
- water, decarbonised: 0.0349787, 0.0910144, 0.367082, 0.0896396, 0.0180709, 0.0594206, 0.00328037, 0.0467446, 0.108887, 0.68302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 kg (12 entries); lognormal variance with pedigree 0.2786, pedigree (1,1,4,1,1)
  (same comment as for water, decarbonised)
- heat, district or industrial, natural gas: 0.00485943, 0.116441, 0.315299 MJ (3 entries); lognormal variance with pedigree 0.67059, pedigree (1,1,4,1,1)
  (same comment as for heat, district or industrial, natural gas)
- process-specific burdens, residual material landfill: 0.006389, 0.016197 kg (2 entries); lognormal variance with pedigree 0.064759, pedigree (1,1,4,1,1)
  (same comment as for process-specific burdens, residual material landfill)
- waste cement, hydrated: -0.006389, -0.016197 kg (2 entries); lognormal variance with pedigree 0.073843, pedigree (1,1,4,1,1)
  (same comment as for waste cement, hydrated)
  production volume 1.1824e7 kg
- ammonia, anhydrous, liquid: 0.000489384, 4.20684e-5, 6.54476e-5, 0.000129675, 0.000127047, 1.33159e-5, 5.9527e-5, 0.00140824 kg (8 entries); lognormal variance with pedigree 0.67059, pedigree (1,1,4,1,1)
  (same comment as for ammonia, anhydrous, liquid)
- cement, unspecified: 0.00130456, 0.00027144, 1.98811e-5, 5.66676e-5, 0.00128156, 3.772e-5, 0.000414277, 5.01229e-5, 0.00559838 kg (9 entries); lognormal variance with pedigree 0.073843, pedigree (1,1,4,1,1)
  (same comment as for cement, unspecified)
- process-specific burdens, slag landfill: 0.0130883, 0.0331807 kg (2 entries); lognormal variance with pedigree 0.058229, pedigree (1,1,4,1,1)
  (same comment as for process-specific burdens, slag landfill)
- transport, freight, lorry, unspecified: 0.000315193, 4.93476e-5, 0.00238966 metric ton*km (3 entries); lognormal variance with pedigree 0.037094, pedigree (1,1,4,1,1)
  (same comment as for transport, freight, lorry, unspecified)

## Inputs from nature
- Oxygen [natural resource, in air]: 2.8313 kg; lognormal variance with pedigree 0.0167067, pedigree (1,1,4,1,1)
  Oxygen from ambient air needed to combust and oxidise this waste. Net demand, i.e. without O2 leaving the plant in flue gas uncombusted.
  Uncertainty: uncertainty is calculated from uncertainties in waste composition and transfer coefficients to flue gas and soild residues in incinerator

## Emissions to nature
- Selenium [water, surface water]: 6.6198e-7 kg; lognormal variance with pedigree 1.1862, pedigree (1,1,4,1,1)
  Emissions to water from waste composition and transfer coefficients in incinerator and landfills.
  Uncertainty: uncertainty is calculated from uncertainties in waste composition and transfer coefficients in incinerator and landfills
- Mercury [water, ground-, long-term]: 8.9167e-8 kg; lognormal variance with pedigree 3.1042, pedigree (1,1,4,1,1)
  Long-term emissions from landfilling of incineration residues.
  Uncertainty: uncertainty is calculated from uncertainties in waste composition and transfer coefficients in incinerator and landfills.
- Silicon [air, urban air close to ground]: 5.5245e-9 kg; lognormal variance with pedigree 0.57263, pedigree (1,1,4,1,1)
  Emission to air from waste composition and transfer coefficients.
  Uncertainty: uncertainty is calculated from uncertainties in waste composition and transfer coefficients in incinerator
- NMVOC, non-methane volatile organic compounds, unspecified origin [air, urban air close to ground]: 5.2868e-7 kg; lognormal variance with pedigree 0.072342, pedigree (1,1,4,1,1)
  Incomplete combustion product emitted to air.
  Uncertainty: uncertainty calculated from uncertainty in average operation emissions, and the uncertainty of the flue gas volume from this waste.
- Molybdenum [water, surface water]: 5.4624e-7 kg; lognormal variance with pedigree 1.0432, pedigree (1,1,4,1,1)
  (same comment as for Selenium)
- Sulfur dioxide [air, urban air close to ground]: 3.1903e-6 kg; lognormal variance with pedigree 0.83594, pedigree (1,1,4,1,1)
  (same comment as for Silicon)
- Selenium [air, urban air close to ground]: 2.3377e-8 kg; lognormal variance with pedigree 1.4984, pedigree (1,1,4,1,1)
  (same comment as for Silicon)
- Barium [water, surface water]: 1.8439e-8 kg; lognormal variance with pedigree 1.223, pedigree (1,1,4,1,1)
  (same comment as for Selenium)
- Ammonia [air, urban air close to ground]: 2.7451e-6 kg; lognormal variance with pedigree 0.72569, pedigree (1,1,4,1,1)
  Nitrogen species emitted to air after DeNOx stage.
  Uncertainty: uncertainty calculated from uncertainty in average N-emissions and uncertainty in the share of thermal NOx and the uncertainty in nitrogen content in *this* waste.
- Vanadium, ion [water, surface water]: 7.983e-10 kg; lognormal variance with pedigree 1.6214, pedigree (1,1,4,1,1)
  (same comment as for Selenium)
- Potassium [air, urban air close to ground]: 1.1511e-6 kg; lognormal variance with pedigree 0.86959, pedigree (1,1,4,1,1)
  (same comment as for Silicon)
- Water [water, surface water]: 0.0004738 m3; lognormal variance with pedigree 1.1878, pedigree (1,1,4,1,1)
  Process water released to surface water.
  Uncertainty: uncertainty calculated from uncertainty in process water input and the uncertainty of fraction to surface water.
- Benzene [air, urban air close to ground]: 1.1617e-8 kg; lognormal variance with pedigree 0.072342, pedigree (1,1,4,1,1)
  (same comment as for NMVOC, non-methane volatile organic compounds, unspecified origin)
- Hydrogen chloride [air, urban air close to ground]: 3.5951e-6 kg; lognormal variance with pedigree 0.45475, pedigree (1,1,4,1,1)
  (same comment as for Silicon)
- Phosphate [water, ground-, long-term]: 8.0396e-5 kg; lognormal variance with pedigree 4.8497, pedigree (1,1,4,1,1)
  (same comment as for Mercury)
- Thallium [water, surface water]: 2.2866e-10 kg; lognormal variance with pedigree 1.8782, pedigree (1,1,4,1,1)
  (same comment as for Selenium)
- Tin, ion [water, surface water]: 7.0637e-9 kg; lognormal variance with pedigree 1.5144, pedigree (1,1,4,1,1)
  (same comment as for Selenium)
- Carbon dioxide, fossil [air, urban air close to ground]: 2.9922 kg; lognormal variance with pedigree 0.0092298, pedigree (1,1,4,1,1)
  (same comment as for Silicon)
- Nitrate [water, surface water]: 0.00016699 kg; lognormal variance with pedigree 0.24782, pedigree (1,1,4,1,1)
  (same comment as for Selenium)
- Zinc [air, urban air close to ground]: 2.4197e-7 kg; lognormal variance with pedigree 0.81829, pedigree (1,1,4,1,1)
  (same comment as for Silicon)
- Thallium [water, ground-, long-term]: 2.178e-7 kg; lognormal variance with pedigree 1.2795, pedigree (1,1,4,1,1)
  (same comment as for Mercury)
- Manganese [water, surface water]: 6.2264e-10 kg; lognormal variance with pedigree 1.1927, pedigree (1,1,4,1,1)
  (same comment as for Selenium)
- Arsenic [air, urban air close to ground]: 7.8333e-8 kg; lognormal variance with pedigree 1.2881, pedigree (1,1,4,1,1)
  (same comment as for Silicon)
- Particulates, < 2.5 um [air, urban air close to ground]: 1.387e-6 kg; lognormal variance with pedigree 0.36828, pedigree (1,1,4,1,1)
  (same comment as for NMVOC, non-methane volatile organic compounds, unspecified origin)
- Heat, waste [air, urban air close to ground]: 26.701 MJ; lognormal variance with pedigree 0.022491, pedigree (1,1,4,1,1)
  Waste heat generated from heating value of this waste plus any electricity required to process it.
  Uncertainty: uncertainty is calculated from uncertainties in waste composition and uncertainties in energy efficiency and the uncertainty in internal energy demand
- TOC, Total Organic Carbon [water, surface water]: 0.00041941 kg; lognormal variance with pedigree 0.032247, pedigree (1,1,4,1,1)
  (same comment as for Selenium)
- Molybdenum [water, ground-, long-term]: 1.4511e-6 kg; lognormal variance with pedigree 1.4855, pedigree (1,1,4,1,1)
  (same comment as for Mercury)
- Nitrate [water, ground-, long-term]: 0.00047117 kg; lognormal variance with pedigree 0.35121, pedigree (1,1,4,1,1)
  (same comment as for Mercury)
- Sodium [air, urban air close to ground]: 1.0509e-6 kg; lognormal variance with pedigree 0.95041, pedigree (1,1,4,1,1)
  (same comment as for Silicon)
- TOC, Total Organic Carbon [water, ground-, long-term]: 0.0024397 kg; lognormal variance with pedigree 0.021181, pedigree (1,1,4,1,1)
  (same comment as for Mercury)
- Aluminium [water, surface water]: 2.1861e-7 kg; lognormal variance with pedigree 0.91191, pedigree (1,1,4,1,1)
  (same comment as for Selenium)
- Beryllium [water, surface water]: 2.9222e-10 kg; lognormal variance with pedigree 2.1896, pedigree (1,1,4,1,1)
  (same comment as for Selenium)
- Bromine [air, urban air close to ground]: 3.3966e-6 kg; lognormal variance with pedigree 0.44716, pedigree (1,1,4,1,1)
  (same comment as for Silicon)
- Mercury [air, urban air close to ground]: 3.9695e-8 kg; lognormal variance with pedigree 1.5416, pedigree (1,1,4,1,1)
  (same comment as for Silicon)
- Lead [air, urban air close to ground]: 1.0463e-8 kg; lognormal variance with pedigree 0.97248, pedigree (1,1,4,1,1)
  (same comment as for Silicon)
- Potassium, ion [water, surface water]: 5.072e-5 kg; lognormal variance with pedigree 0.52108, pedigree (1,1,4,1,1)
  (same comment as for Selenium)
- Tin [air, urban air close to ground]: 1.7441e-10 kg; lognormal variance with pedigree 0.91365, pedigree (1,1,4,1,1)
  (same comment as for Silicon)
- Aluminium [water, ground-, long-term]: 0.0014608 kg; lognormal variance with pedigree 0.51918, pedigree (1,1,4,1,1)
  (same comment as for Mercury)
- Iron [air, urban air close to ground]: 2.6578e-9 kg; lognormal variance with pedigree 0.68004, pedigree (1,1,4,1,1)
  (same comment as for Silicon)
- Barium [water, ground-, long-term]: 6.8996e-5 kg; lognormal variance with pedigree 2.2778, pedigree (1,1,4,1,1)
  (same comment as for Mercury)
- Nitrogen oxides [air, urban air close to ground]: 0.00086927 kg; lognormal variance with pedigree 0.72569, pedigree (1,1,4,1,1)
  Sum of fuel-Nox and thermal-NOx emitted to air after DeNOx stage.
  Uncertainty: uncertainty calculated from uncertainty in average N-emissions and uncertainty in the share of thermal NOx and the uncertainty in nitrogen content in *this* waste.
- Benzo(a)pyrene [air, urban air close to ground]: 2.5851e-13 kg; lognormal variance with pedigree 0.36828, pedigree (1,1,4,1,1)
  (same comment as for NMVOC, non-methane volatile organic compounds, unspecified origin)
- Chloride [water, ground-, long-term]: 0.0014599 kg; lognormal variance with pedigree 0.43027, pedigree (1,1,4,1,1)
  (same comment as for Mercury)
- Potassium, ion [water, ground-, long-term]: 0.00018113 kg; lognormal variance with pedigree 0.46607, pedigree (1,1,4,1,1)
  (same comment as for Mercury)
- Cobalt [water, ground-, long-term]: 2.4012e-5 kg; lognormal variance with pedigree 1.0578, pedigree (1,1,4,1,1)
  (same comment as for Mercury)
- Iron, ion [water, surface water]: 3.8986e-8 kg; lognormal variance with pedigree 0.88526, pedigree (1,1,4,1,1)
  (same comment as for Selenium)
- Mercury [water, surface water]: 1.5204e-9 kg; lognormal variance with pedigree 1.0764, pedigree (1,1,4,1,1)
  (same comment as for Selenium)
- Carbon monoxide, fossil [air, urban air close to ground]: 1.9747e-5 kg; lognormal variance with pedigree 0.74013, pedigree (1,1,4,1,1)
  (same comment as for NMVOC, non-methane volatile organic compounds, unspecified origin)
- Antimony [water, surface water]: 0.0016528 kg; lognormal variance with pedigree 0.47897, pedigree (1,1,4,1,1)
  (same comment as for Selenium)
- Cadmium [air, urban air close to ground]: 5.8616e-8 kg; lognormal variance with pedigree 0.97248, pedigree (1,1,4,1,1)
  (same comment as for Silicon)
- Lead [water, surface water]: 1.2148e-8 kg; lognormal variance with pedigree 0.78826, pedigree (1,1,4,1,1)
  (same comment as for Selenium)
- Antimony [air, urban air close to ground]: 3.8413e-9 kg; lognormal variance with pedigree 0.53733, pedigree (1,1,4,1,1)
  (same comment as for Silicon)
- Cadmium, ion [water, surface water]: 1.1022e-8 kg; lognormal variance with pedigree 0.81935, pedigree (1,1,4,1,1)
  (same comment as for Selenium)
- Phosphate [water, surface water]: 3.3732e-7 kg; lognormal variance with pedigree 0.55015, pedigree (1,1,4,1,1)
  (same comment as for Selenium)
- Vanadium, ion [water, ground-, long-term]: 2.3308e-7 kg; lognormal variance with pedigree 1.2888, pedigree (1,1,4,1,1)
  (same comment as for Mercury)
- Calcium, ion [water, surface water]: 3.5171e-5 kg; lognormal variance with pedigree 0.40114, pedigree (1,1,4,1,1)
  (same comment as for Selenium)
- Sulfate [water, ground-, long-term]: 0.00074302 kg; lognormal variance with pedigree 0.49132, pedigree (1,1,4,1,1)
  (same comment as for Mercury)
- Titanium, ion [water, ground-, long-term]: 0.0012517 kg; lognormal variance with pedigree 0.63814, pedigree (1,1,4,1,1)
  (same comment as for Mercury)
- BOD5, Biological Oxygen Demand [water, surface water]: 0.00094806 kg; lognormal variance with pedigree 0.032743, pedigree (1,1,4,1,1)
  (same comment as for Selenium)
- Methane, fossil [air, urban air close to ground]: 1.7425e-7 kg; lognormal variance with pedigree 0.072342, pedigree (1,1,4,1,1)
  (same comment as for NMVOC, non-methane volatile organic compounds, unspecified origin)
- Copper, ion [water, ground-, long-term]: 0.0028531 kg; lognormal variance with pedigree 0.50641, pedigree (1,1,4,1,1)
  (same comment as for Mercury)
- Dioxins, measured as 2,3,7,8-tetrachlorodibenzo-p-dioxin [air, urban air close to ground]: 2.3232e-14 kg; lognormal variance with pedigree 0.36828, pedigree (1,1,4,1,1)
  (same comment as for NMVOC, non-methane volatile organic compounds, unspecified origin)
- DOC, Dissolved Organic Carbon [water, ground-, long-term]: 0.0024397 kg; lognormal variance with pedigree 0.021181, pedigree (1,1,4,1,1)
  (same comment as for Mercury)
- Nickel [air, urban air close to ground]: 8.8313e-7 kg; lognormal variance with pedigree 0.73076, pedigree (1,1,4,1,1)
  (same comment as for Silicon)
- Bromine [water, surface water]: 0.0061412 kg; lognormal variance with pedigree 0.1757, pedigree (1,1,4,1,1)
  (same comment as for Selenium)
- Tin, ion [water, ground-, long-term]: 0.00010219 kg; lognormal variance with pedigree 1.7247, pedigree (1,1,4,1,1)
  (same comment as for Mercury)
- Titanium, ion [water, surface water]: 1.5611e-6 kg; lognormal variance with pedigree 0.40224, pedigree (1,1,4,1,1)
  (same comment as for Selenium)
- Water [air, urban air close to ground]: 0.0015193 m3; lognormal variance with pedigree 0.78758, pedigree (1,1,4,1,1)
  Water vapour from waste humidity, hydrogen oxidation and part of the process water.
  Uncertainty: Uncertainty calculated from uncertainty in waste composition, process water input and the uncertainty of fraction to air.
- Strontium [air, urban air close to ground]: 8.2582e-9 kg; lognormal variance with pedigree 1.0313, pedigree (1,1,4,1,1)
  (same comment as for Silicon)
- COD, Chemical Oxygen Demand [water, surface water]: 0.0009604 kg; lognormal variance with pedigree 0.032184, pedigree (1,1,4,1,1)
  (same comment as for Selenium)
- Fluoride [water, ground-, long-term]: 0.00011655 kg; lognormal variance with pedigree 0.53103, pedigree (1,1,4,1,1)
  (same comment as for Mercury)
- Calcium, ion [water, ground-, long-term]: 0.0023664 kg; lognormal variance with pedigree 0.4814, pedigree (1,1,4,1,1)
  (same comment as for Mercury)
- Selenium [water, ground-, long-term]: 1.2727e-6 kg; lognormal variance with pedigree 1.0926, pedigree (1,1,4,1,1)
  (same comment as for Mercury)
- Chromium VI [water, surface water]: 9.5024e-7 kg; lognormal variance with pedigree 1.1917, pedigree (1,1,4,1,1)
  (same comment as for Selenium)
- Hydrogen fluoride [air, urban air close to ground]: 8.7707e-7 kg; lognormal variance with pedigree 0.94621, pedigree (1,1,4,1,1)
  (same comment as for Silicon)
- Beryllium [water, ground-, long-term]: 4.2641e-7 kg; lognormal variance with pedigree 1.5953, pedigree (1,1,4,1,1)
  (same comment as for Mercury)
- Sulfate [water, surface water]: 0.00015219 kg; lognormal variance with pedigree 0.40301, pedigree (1,1,4,1,1)
  (same comment as for Selenium)
- Molybdenum [air, urban air close to ground]: 2.6316e-9 kg; lognormal variance with pedigree 1.5056, pedigree (1,1,4,1,1)
  (same comment as for Silicon)
- Toluene [air, urban air close to ground]: 2.3234e-8 kg; lognormal variance with pedigree 0.072342, pedigree (1,1,4,1,1)
  (same comment as for NMVOC, non-methane volatile organic compounds, unspecified origin)
- Lead [water, ground-, long-term]: 6.1403e-5 kg; lognormal variance with pedigree 4.0829, pedigree (1,1,4,1,1)
  (same comment as for Mercury)
- Barium [air, urban air close to ground]: 5.3773e-7 kg; lognormal variance with pedigree 0.94306, pedigree (1,1,4,1,1)
  (same comment as for Silicon)
- Thallium [air, urban air close to ground]: 3.7325e-10 kg; lognormal variance with pedigree 1.7268, pedigree (1,1,4,1,1)
  (same comment as for Silicon)
- Arsenic, ion [water, ground-, long-term]: 2.9946e-6 kg; lognormal variance with pedigree 1.2766, pedigree (1,1,4,1,1)
  (same comment as for Mercury)
- Dinitrogen monoxide [air, urban air close to ground]: 0.00019538 kg; lognormal variance with pedigree 1.1174, pedigree (1,1,4,1,1)
  (same comment as for Ammonia)
- Manganese [water, ground-, long-term]: 2.4677e-6 kg; lognormal variance with pedigree 2.3466, pedigree (1,1,4,1,1)
  (same comment as for Mercury)
- Cobalt [air, urban air close to ground]: 5.361e-8 kg; lognormal variance with pedigree 1.149, pedigree (1,1,4,1,1)
  (same comment as for Silicon)
- Sodium, ion [water, surface water]: 3.4778e-5 kg; lognormal variance with pedigree 0.50352, pedigree (1,1,4,1,1)
  (same comment as for Selenium)
- Vanadium [air, urban air close to ground]: 1.0604e-8 kg; lognormal variance with pedigree 1.6701, pedigree (1,1,4,1,1)
  (same comment as for Silicon)
- Fluoride [water, surface water]: 9.9402e-6 kg; lognormal variance with pedigree 0.58156, pedigree (1,1,4,1,1)
  (same comment as for Selenium)
- Chromium [air, urban air close to ground]: 2.9689e-8 kg; lognormal variance with pedigree 1.1343, pedigree (1,1,4,1,1)
  (same comment as for Silicon)
- Heat, waste [water, surface water]: 6.1538 MJ; lognormal variance with pedigree 0.022491, pedigree (1,1,4,1,1)
  (same comment as for Heat, waste)
- Phosphorus [air, urban air close to ground]: 6.0975e-7 kg; lognormal variance with pedigree 0.75258, pedigree (1,1,4,1,1)
  (same comment as for Silicon)
- Cadmium, ion [water, ground-, long-term]: 8.3916e-6 kg; lognormal variance with pedigree 6.4078, pedigree (1,1,4,1,1)
  (same comment as for Mercury)
- Silicon [water, surface water]: 8.6964e-7 kg; lognormal variance with pedigree 0.71331, pedigree (1,1,4,1,1)
  (same comment as for Selenium)
- Sodium, ion [water, ground-, long-term]: 9.2171e-5 kg; lognormal variance with pedigree 0.50798, pedigree (1,1,4,1,1)
  (same comment as for Mercury)
- Cyanide [air, urban air close to ground]: 4.1976e-5 kg; lognormal variance with pedigree 1.1174, pedigree (1,1,4,1,1)
  (same comment as for Ammonia)
- Zinc, ion [water, surface water]: 3.257e-8 kg; lognormal variance with pedigree 0.67458, pedigree (1,1,4,1,1)
  (same comment as for Selenium)
- COD, Chemical Oxygen Demand [water, ground-, long-term]: 0.0061654 kg; lognormal variance with pedigree 0.021181, pedigree (1,1,4,1,1)
  (same comment as for Mercury)
- Chromium VI [water, ground-, long-term]: 3.1189e-6 kg; lognormal variance with pedigree 1.5812, pedigree (1,1,4,1,1)
  (same comment as for Mercury)
- Benzene, hexachloro- [air, urban air close to ground]: 2.429e-11 kg; lognormal variance with pedigree 0.072342, pedigree (1,1,4,1,1)
  (same comment as for NMVOC, non-methane volatile organic compounds, unspecified origin)
- Manganese [air, urban air close to ground]: 7.6391e-10 kg; lognormal variance with pedigree 1.4262, pedigree (1,1,4,1,1)
  (same comment as for Silicon)
- Nickel, ion [water, ground-, long-term]: 0.0006748 kg; lognormal variance with pedigree 0.68919, pedigree (1,1,4,1,1)
  (same comment as for Mercury)
- Titanium [air, urban air close to ground]: 3.4737e-6 kg; lognormal variance with pedigree 0.50235, pedigree (1,1,4,1,1)
  (same comment as for Silicon)
- Silicon [water, ground-, long-term]: 0.00035824 kg; lognormal variance with pedigree 5.179, pedigree (1,1,4,1,1)
  (same comment as for Mercury)
- Copper [air, urban air close to ground]: 2.9255e-7 kg; lognormal variance with pedigree 0.55141, pedigree (1,1,4,1,1)
  (same comment as for Silicon)
- Particulates, > 2.5 um, and < 10um [air, urban air close to ground]: 6.9697e-9 kg; lognormal variance with pedigree 0.166, pedigree (1,1,4,1,1)
  (same comment as for NMVOC, non-methane volatile organic compounds, unspecified origin)
- Copper, ion [water, surface water]: 4.1389e-7 kg; lognormal variance with pedigree 0.55069, pedigree (1,1,4,1,1)
  (same comment as for Selenium)
- Bromine [water, ground-, long-term]: 0.00065541 kg; lognormal variance with pedigree 0.43162, pedigree (1,1,4,1,1)
  (same comment as for Mercury)
- Strontium [water, ground-, long-term]: 8.2474e-5 kg; lognormal variance with pedigree 0.99503, pedigree (1,1,4,1,1)
  (same comment as for Mercury)
- Strontium [water, surface water]: 5.1996e-8 kg; lognormal variance with pedigree 1.7071, pedigree (1,1,4,1,1)
  (same comment as for Selenium)
- Nickel, ion [water, surface water]: 4.7234e-7 kg; lognormal variance with pedigree 1.2761, pedigree (1,1,4,1,1)
  (same comment as for Selenium)
- Phenol, pentachloro- [air, urban air close to ground]: 5.059e-12 kg; lognormal variance with pedigree 0.072342, pedigree (1,1,4,1,1)
  (same comment as for NMVOC, non-methane volatile organic compounds, unspecified origin)
- Iron, ion [water, ground-, long-term]: 0.00074816 kg; lognormal variance with pedigree 0.79079, pedigree (1,1,4,1,1)
  (same comment as for Mercury)
- Calcium [air, urban air close to ground]: 2.5003e-5 kg; lognormal variance with pedigree 0.5303, pedigree (1,1,4,1,1)
  (same comment as for Silicon)
- Chromium, ion [water, surface water]: 2.64e-9 kg; lognormal variance with pedigree 1.1494, pedigree (1,1,4,1,1)
  (same comment as for Selenium)
- Antimony [water, ground-, long-term]: 0.0030494 kg; lognormal variance with pedigree 0.44904, pedigree (1,1,4,1,1)
  (same comment as for Mercury)
- Benzene, pentachloro- [air, urban air close to ground]: 6.1376e-11 kg; lognormal variance with pedigree 0.072342, pedigree (1,1,4,1,1)
  (same comment as for NMVOC, non-methane volatile organic compounds, unspecified origin)
- BOD5, Biological Oxygen Demand [water, ground-, long-term]: 0.0020167 kg; lognormal variance with pedigree 0.021181, pedigree (1,1,4,1,1)
  (same comment as for Mercury)
- Cobalt [water, surface water]: 5.3406e-9 kg; lognormal variance with pedigree 1.4477, pedigree (1,1,4,1,1)
  (same comment as for Selenium)
- Zinc, ion [water, ground-, long-term]: 0.00010978 kg; lognormal variance with pedigree 2.9242, pedigree (1,1,4,1,1)
  (same comment as for Mercury)
- Arsenic, ion [water, surface water]: 6.9271e-6 kg; lognormal variance with pedigree 1.1708, pedigree (1,1,4,1,1)
  (same comment as for Selenium)
- DOC, Dissolved Organic Carbon [water, surface water]: 0.00041941 kg; lognormal variance with pedigree 0.032247, pedigree (1,1,4,1,1)
  (same comment as for Selenium)
- Chloride [water, surface water]: 0.0048366 kg; lognormal variance with pedigree 0.34717, pedigree (1,1,4,1,1)
  (same comment as for Selenium)
- Aluminium [air, urban air close to ground]: 1.6469e-9 kg; lognormal variance with pedigree 0.64402, pedigree (1,1,4,1,1)
  (same comment as for Silicon)
