# metal working factory construction

Dataset: EcoSpold 2, unit process
Geography: RER
Time period: 2006-01-01 to 2021-12-31
Technology level: current
Classification: ISIC rev.4 ecoinvent: 4100:Construction of buildings
Classification: EcoSpold01Categories: metals/general manufacturing
Tags: ConvertedDataset
Scenario: Business-as-Usual
System model: Allocation, cut-off by classification
Share of production covered: 0 %
Generated by: Roland Steiner
Published in: Steiner, R. 2007
Database: ecoinvent
isCopyrightProtected: true
accessRestrictedTo: 1

## General comment
4.58E-10 units of this process are needed to produce 1 kg of final product. This dataset can be used in combination with the metal working factory operation to get the operation plus infrastructure of metal working without the machine processing.
[This dataset was already contained in the ecoinvent database version 2. It was not individually updated during the transfer to ecoinvent version 3. Life Cycle Impact Assessment results may still have changed, as they are affected by changes in the supply chain, i.e. in other datasets. This dataset was generated following the ecoinvent quality guidelines for version 2. It may have been subject to central changes described in the ecoinvent version 3 change report (http://www.ecoinvent.org/database/ecoinvent-version-3/reports-of-changes/), and the results of the central updates were reviewed extensively. The changes added e.g. consistent water flows and other information throughout the database. The documentation of this dataset can be found in the ecoinvent reports of version 2, which are still available via the ecoinvent website. The change report linked above covers all central changes that were made during the conversion process.]

## Included activities end
This dataset includes the infrastructure of a metal working factory. This encompasses the buildings, roads and parking spaces on the premises as well as other land occupation.

## Geography
Average data from several local to global sized companies. The main focus is on Germany and Europe.

## Technology
The companies are expected to cover the whole range of metal working.

## Reference product
- metal working factory: 1 unit; CPC 53269: Other constructions for manufacturing; By-product classification allocatable product
  EcoSpold01Location=RER
  production volume 1.32237 unit
    This is a placeholder value that does not reflect real-world production volumes. This dataset does not currently require a real-world production volume to work in the database framework, and no actual data were collected yet. This has no negative effect on the results of the ecoinvent database. The placeholder value of this activity was scaled according to the nominal GDP of 2005 (source: United Nations, http://data.un.org/Glossary.aspx?q=GDP+%28current+US%24%29, accessed 20130726) to reflect an appropriate share of the global production volume, which is also a placeholder value.
  property price 4.81654e7 EUR2005
    Calculated based on inputs: The price of the product has been calculated as a sum of the values of the material and energy inputs for this product. This value is therefore a rough estimation. It may underestimate the real price since there are additional expenses when producing any product. These expences can include for example labour costs, treatment of waste materials and profit for the producer. Please consider carefully whether this level of data quality is acceptable for your application.

## Inputs from technosphere
- building, hall: 274000 m2; lognormal variance with pedigree 0.3586, pedigree (1,3,5,1,3)
  Average value of three companies
  EcoSpold01Location=CH
  Uncertainty: average value of three companies
- road, company, internal: 1.62e7 m2*year; lognormal variance with pedigree 0.3586, pedigree (1,3,5,1,3)
  EcoSpold01Location=CH
  Average value of three companies
  Uncertainty: average value of three companies

## Inputs from nature
- Transformation, to industrial area [natural resource, land]: 692000 m2; lognormal variance with pedigree 0.1786, pedigree (1,3,5,1,3)
  Average value of three companies
  Uncertainty: average value of three companies
- Occupation, industrial area [natural resource, land]: 3.46e7 m2*year; lognormal variance with pedigree 0.0986, pedigree (1,3,5,1,3)
  Average value of three companies
  Uncertainty: average value of three companies
- Occupation, traffic area, road network [natural resource, land]: 1.62e7 m2*year; lognormal variance with pedigree 0.0986, pedigree (1,3,5,1,3)
  Average value of three companies
  Uncertainty: average value of three companies
- Transformation, to traffic area, road network [natural resource, land]: 162000 m2; lognormal variance with pedigree 0.1786, pedigree (1,3,5,1,3)
  Average value of three companies
  Uncertainty: average value of three companies
- Transformation, from unspecified [natural resource, land]: 854000 m2; lognormal variance with pedigree 0.1786, pedigree (1,3,5,1,3)
  Average value of three companies
  Uncertainty: average value of three companies

## Extrapolations
This dataset has been extrapolated from year 2007 to the year of the calculation (2021). The uncertainty has been adjusted accordingly.

## Review by Sébastien Humbert 2007-11-14
passed
none
