# vanadium-titanomagnetite mine operation and beneficiation

Dataset: EcoSpold 2, unit process
Geography: CN
Time period: 2018-01-01 to 2022-12-31
Technology level: current
Classification: ISIC rev.4 ecoinvent: 0729:Mining of other non-ferrous metal ores
Scenario: Business-as-Usual
System model: Allocation, cut-off by classification
Generated by: Efstathios Kakkos
Published in: Gao Feng 2018
Database: ecoinvent
isCopyrightProtected: true
accessRestrictedTo: 1

## General comment
This dataset refers to the production of 1 kg of high-grade titanium slag (94% TiO2) from vanadium-titanomagnetite ore in the city of Panzhihua & Xichang region in China. It includes the activities of ore mining & dressing (during which titanium concentrate is produced) and titanium slag smelting (during which high-grade titanium slag with 94% TiO2 content is produced). The dataset is based on the Gao et al (2018) publication.
For this dataset, the data for mining were taken from Table 1 and figure 2 of the abovementioned source. The waste rock reported in table 1 is not taken into account, because it is assumed that is left on-site and used as backfill material, therefore remaining within system boundaries. Data for infrastructure, land occupation & transformation as well as emissions during mining were approximated with data from the Ecoinvent dataset ''ilmenite - magnetite mine operation, GLO'' available in version 3.7.1 of the Ecoinvent database. The data for mining in table 2, column ''ore mining and dressing'' from the Gao et al (2018) publication were not considered due to mass allocation in that specific column. Nevertheless, for the titanium slag smelting process the data were taken from the respective column in table 2 of the Gao et al (2018) publication. Finally, the grade of slag is not reported in the Gao et al (2018) and was instead taken from the Liao et al (2012) publication, since it refers to production of high-grade slag (as intermediate product) in Panzhihua city. The transport distance was also taken from the Liao et al (2012) publication.

Reference 1: Gao, F., Nie, Z., Yang, D., Sun, B., Liu, Y., Gong, X., & Wang, Z. (2018). Environmental impacts analysis of titanium sponge production using Kroll process in China. Journal of Cleaner Production, 174, 771-779. doi:https://doi.org/10.1016/j.jclepro.2017.09.240.

Reference 2: Liao, W., Heijungs, R., & Huppes, G. (2012). Thermodynamic resource indicators in LCA: a case study on the titania produced in Panzhihua city, southwest China. The International Journal of Life Cycle Assessment, 17(8), 951-961. doi:10.1007/s11367-012-0429-4.

## Included activities start
The activity starts with the mining of vanadium-titanomagnetite ore.

## Included activities end
The activity ends with the production of high-grade titania slag (94% TiO2). It is assumed that waste rock is left on-site and used as backfill material. For that reason, waste rock is not included in the present dataset.

## Geography
Dataset assumed valid for the entire corresponding region.

## Technology
Natural rutile resources are scarce in China. For that reason, the production of titanium stems from high-grade titanium slag, the production of which includes 2 processes: i) ore mining & dressing process and ii) titanium slag smelting process. During the ore mining and dressing process, ilmenite concentrate (47.82% TiO2) is produced through high-intensity magnetic separation of the middling ore, which is previously produced as a byproduct during the magnetic separation sub-process of the vanadium titano-magnetite ore. During the titanium slag smelting process, the produced ilmenite concentrate from the ore mining & dressing process is mixed with petroleum coke as the reducing agent and pitch as the bonding agent. Afterwards it enters the electric arc furnace, where it is smelted, separating iron from the ilmenite concentrate and obtaining high-grade titanium slag.

## Time period
Data are considered representative of current production practices.

## Reference product
- iron ore concentrate: 1 kg; name bp4; = (7.45+0.63)*2.2; By-product classification allocatable product; CPC 14100: Iron ores and concentrates, other than roasted iron pyrites; pedigree (1,1,1,1,1)
  Gao et al (2018) reports in figure 2 reports i) 7.45 tons of iron concentrate produced as a byproduct during the magnetic separation sub-process with a content of 54.96% Fe and ii) 0.63 tons of iron concentrate produced as a byproduct during the high-intensity magnetic separation and flotation sub-process with a content of 51.22% Fe per 1 ton of produced titanium concentrate. The abovementioned sub-processes are part of the ore mining and dressing process. This value was multiplied by 2,2, since approximately 2,2 kg of ilmenite concentrate is required for the production of 1 kg of titania slag (94% TiO2) (consult titanium in ground exchange comment) .
  Reference: Gao, F., Nie, Z., Yang, D., Sun, B., Liu, Y., Gong, X., & Wang, Z. (2018). Environmental impacts analysis of titanium sponge production using Kroll process in China. Journal of Cleaner Production, 174, 771-779. doi:https://doi.org/10.1016/j.jclepro.2017.09.240.
  production volume 2.65001e9 kg; = PVRP*bp4
    Calculated from production volume of reference product using the relative outputs.
  property price 0.0467 EUR2005; name bp4_price_EUR2005
    Calculated based on literature value (UN Commodity Trade Statistics Database) using data on trade value and net weight (kg) for 5 reference countries/regions (EU-27, USA, JP, CN and IN) which weighted (by net weight) average is assumed to be a good approximation of the global price. The UN classification; 2601 Iron ores and concentrates, roasted iron pyrites (accessed 20140508). Data for the year 2005.
  property iron content 0.546684; = (7.45*0.5496 + 0.63*0.5122)/(7.45+0.63)
    During the magnetic separation process, 7.45 kg of iron concentrate with 54.96% Iron content per kg of titanium concentrate is produced while during the high-intensity magnetic separation and flotation, 0.63 kg of secondary iron concentrate is produced with 51.22% iron content per kg of titanium concentrate. Due to the fact that both concentrates are modelled with the same exchange, an equivalent iron content will be used here as best available representation. Assuming x the iron content of the total concentrate then:
    7.45*0.5496 + 0.63*0.5122 = (7.45+0.63)*x
    Therefore, the iron content of the iron concentrate is approximately 0.5467. The abovementioned values are taken from figure 2 of the Gao et al (2018) publication.
    Reference: Reference: Gao, F., Nie, Z., Yang, D., Sun, B., Liu, Y., Gong, X., & Wang, Z. (2018). Environmental impacts analysis of titanium sponge production using Kroll process in China. Journal of Cleaner Production, 174, 771-779. doi:https://doi.org/10.1016/j.jclepro.2017.09.240.
  property carbon content 0
    carbon content on a dry matter basis (reserved; not for manual entry)
  property true value 0.830139; name bp4_true_value
    allocation property applied in "true value" allocation // value calculated from revenue
  properties: carbon content, non-fossil 0, dry mass 1 kg, water in wet mass 0 kg, carbon content, fossil 0, wet mass 1 kg, water content 0, carbon allocation 0 kg
- titania slag, 94% titanium dioxide: 0 kg; By-product classification allocatable product; CPC 41601: Tungsten, molybdenum, tantalum, magnesium, cobalt, cadmium, titanium, zirconium, beryllium, gallium, hafnium, […]
  production volume 1.49078e8 kg; name PVRP; = 1.77474*84000000
    The production volume is expressed in kg and its calculation is based on the fact that for the production of 1 kg of titanium sponge, 1.77474 kg of Ti slag (94% TiO2) are required as an input (see sampling procedure). The Chinese annual production of titanium sponge is 84000000 kg. Source: https://pubs.usgs.gov/periodicals/mcs2020/mcs2020-titanium.pdf
    Note: The amount of titanium slag required for the production of 1 kg of titanium sponge (1.77474 kg) is calculated based on the following facts: i) 3.9626 kg of TiCl4 is required for the production of 1 kg of titanium sponge (consult titanium sponge production dataset) ii) approximately 0.4478723 kg of titania slag (94% TiO2) is required for the production of 1 kg of TiCl4 (consult titanium tetrachloride dataset).
  property titanium content 0.563342; = 0.94*0.5993
    The titanium content of the high-grade titanium slag is based on the following facts: i) The TiO2 content of the slag is assumed to be 94% (Source: Liao, W., Heijungs, R., & Huppes, G. (2012). Thermodynamic resource indicators in LCA: a case study on the titania produced in Panzhihua city, southwest China. The International Journal of Life Cycle Assessment, 17(8), 951-961. doi:10.1007/s11367-012-0429-4) and ii) the titanium content in TiO2 is 59.93% (Source: https://www.lenntech.com/calculators/molecular/molecular-weight-calculator.htm).
  property price 0.457885 EUR2005
    Price approximated with the price of slag (80% to 95% TiO2) reported in the USGS Mineral Commodity Summaries for Titanium Mineral Concentrates from 2009 to 2018 (https://www.usgs.gov/centers/nmic/titanium-statistics-and-information). A lower bound and upper bound are given for the price each year. The upper bound is assumed to be representative of the price of titania slag with 94% TiO2 content. The prices given in USD were converted to EUR based on the annual exchange rates published by the European Central Bank (https://sdw.ecb.europa.eu/quickview.do?SERIES_KEY=120.EXR.A.USD.EUR.SP00.A), and then adjusted for inflation relative to 2005 by using the Harmonised Index of Consumer Prices (HICP) of the euro area, published by eurostat (https://ec.europa.eu/eurostat/databrowser/view/PRC_HICP_AIND/default/table).
  property carbon content 0
    carbon content on a dry matter basis (reserved; not for manual entry)
  property true value 0.457885
    allocation property applied in "true value" allocation // value calculated from revenue
  properties: water in wet mass 0 kg, carbon content, non-fossil 0, dry mass 1 kg, carbon content, fossil 0, wet mass 1 kg, water content 0, carbon allocation 0 kg

## By-products
- pig iron: 0 kg; name bp5; By-product classification allocatable product; CPC 41111: Pig iron and spiegeleisen in pigs, blocks or other primary forms; pedigree (1,1,1,1,1)
  The amount of pig iron produced as a byproduct is based on the following stoichiometric equation: FeTiO3 + C -> Fe + TiO2 + CO, meaning that for the production of1 kg of titanium slag, approximately 0.7 kg of pig iron is produced as byproduct. The stoichiometric equation was taken from equation 1 of the Gao et al (2018) publication.
  Reference: Gao, F., Nie, Z., Yang, D., Sun, B., Liu, Y., Gong, X., & Wang, Z. (2018). Environmental impacts analysis of titanium sponge production using Kroll process in China. Journal of Cleaner Production, 174, 771-779. doi:https://doi.org/10.1016/j.jclepro.2017.09.240.
  production volume 1.04355e8 kg; = PVRP*bp5
    Calculated from production volume of reference product using the relative outputs.
  property heating value, net 0 MJ
    Non combustible products are assumed to have an LHV equal to zero (0).
  property price 0.243 EUR2005; name bp5_price_EUR2005
    From Undata http://data.un.org/Data.aspx?q=pig+iron&d=ComTrade&f=_l1Code%3a73%3bcmdCode%3a720120; assumed to be pig iron non-alloy with >0.5% phosphorus because there is no refining process involved in this product. 2003 data includes only EU, China and India - no data from USA and Japan in the UN database for this year.
  property carbon content 0.045
    carbon content on a dry matter basis (reserved; not for manual entry)
  property true value 0.1701; name bp5_true_value
    allocation property applied in "true value" allocation // value calculated from revenue
  properties: water in wet mass 0 kg, water content 0, carbon content, non-fossil 0, wet mass 1 kg, carbon content, fossil 0.045, dry mass 1 kg, carbon allocation 0.045 kg

## Inputs from technosphere
- inert waste: -0.000750729 kg; name bp3; = (41.6/1000/1.77473)*-1; lognormal variance with pedigree 0.0014, pedigree (1,3,2,1,1)
  Gao et al (2018) reports in Table 2 41.6 kg of other residue (approximated here as inert waste) produced as a byproduct during the titanium slag smelting process per kg of produced titanium sponge. This value was divided by 1.77473, since approximately 1.77473 kg of titanium slag 94% TiO2 is required for the production of 1 kg of titanium sponge.
  Note: The amount of titanium slag required for the production of 1 kg of titanium sponge (1.77473 kg) is calculated based on the following facts: i) 3.9626 kg of TiCl4 is required for the production of 1 kg of titanium sponge (consult titanium sponge production dataset) ii) approximately 0.44787 kg of titania slag (94% TiO2) is required for the production of 1 kg of TiCl4 (consult titanium tetrachloride dataset).
  Reference: Gao, F., Nie, Z., Yang, D., Sun, B., Liu, Y., Gong, X., & Wang, Z. (2018). Environmental impacts analysis of titanium sponge production using Kroll process in China. Journal of Cleaner Production, 174, 771-779. doi:https://doi.org/10.1016/j.jclepro.2017.09.240.
  production volume 3.49442e6 kg; = PVRP * bp3
    Calculated from production volume of reference product using the relative outputs.
  property price 0 EUR2005; name bp3_price_EUR2005
  properties: dry mass 1 kg, wet mass 1 kg
- mine infrastructure, open cast, ilmenite from hard-rock ore: 3.97137e-12 unit; = 3.0769E-11*4.03; lognormal variance with pedigree 0.3054, pedigree (2,4,2,5,2)
  Due to the fact that the infrastructure is not reported in table 2 of Gao et al (2018) publication and has to be included for compliance with the Ecoivent quality guidelines, the value for mine infrastructure (3.0769E-11 unit) is taken from the Ecoinvent dataset ''ilmenite - magnetite mine operation, GLO'' available in version 3.7.1 of the Ecoinvent database. Due to the structure of the dataset, the abovementioned value in that dataset is multiplied by a scaling factor, which is based on the titanium that is extracted from the ground. This scaling factor equals the ratio of titanium extracted from the ground in order to produce 1 kg of titanium slag with 94% TiO2 (2.29 kg - see titanium, in ground exchange comment) to the amount of titanium extracted from the ground based on the abovementioned dataset (0.56824 kg). Therefore, the scaling factor is equal to 4.03.
  Reference 1: Gao, F., Nie, Z., Yang, D., Sun, B., Liu, Y., Gong, X., & Wang, Z. (2018). Environmental impacts analysis of titanium sponge production using Kroll process in China. Journal of Cleaner Production, 174, 771-779. doi:https://doi.org/10.1016/j.jclepro.2017.09.240.
  properties: lifetime 100 year, lifetime capacity [kg] 1.33656e11 kg
  note on lifetime: There are in total two ilmenite hard-rock mines; Tellnes in Norway which is in operation since approximatelly 1920 (Norwegian Society for Geology, http://www.ngu.no/prosjekter/GEODE/Tellnes/Images/production%201916-1999.jpg) and Lac Allard which is in operation since 1946 (http://apps1.gdr.nrcan.gc.ca/gsc_minerals/gquerycache/vticanada/DP/dp51.html). Since boths mines are in operation for more than 50 years and there are no signs that they are planned to be closed it is assumed that the lifetime of such a mine is 100 years.
  note on lifetime capacity [kg]: According to literature (Korneliussen, 2000) the ore reserves of Tellnes mine (Norway) are 57 Mt of TiO2, respective 105 Mt if recalculated for ilmenite. According to Norwegian society for geology (http://www.ngu.no/prosjekter/GEODE/Tellnes/Images/production%201916-1999.jpg) since 1916 till 2000 in total approximately 28 Mt of ilmenite had been mined.
- blasting: 1.99543e-5 kg; = 1.546E-04*4.03; lognormal variance with pedigree 0.006, pedigree (2,4,2,5,2)
  Due to the fact that blasting input is not reported in table 2 of Gao et al (2018) publication and has to be included as part of the mining process, the value for blasting (1.546E-04 kg) is taken from the Ecoinvent dataset ''ilmenite - magnetite mine operation, GLO'' available in version 3.7.1 of the Ecoinvent database. Due to the structure of the dataset, the abovementioned value in that dataset is multiplied by a scaling factor, which is based on the titanium that is extracted from the ground. This scaling factor equals the ratio of titanium extracted from the ground in order to produce 1 kg of titanium slag with 94% TiO2 (2.29 kg - see titanium, in ground exchange comment) to the amount of titanium extracted from the ground based on the abovementioned dataset (0.56824 kg). Therefore, the scaling factor is equal to 4.03.
  Reference 1: Gao, F., Nie, Z., Yang, D., Sun, B., Liu, Y., Gong, X., & Wang, Z. (2018). Environmental impacts analysis of titanium sponge production using Kroll process in China. Journal of Cleaner Production, 174, 771-779. doi:https://doi.org/10.1016/j.jclepro.2017.09.240.
- pitch: 0.00503494 kg; = (279/1000)/1.77473; lognormal variance with pedigree 0.0014, pedigree (1,3,2,1,1)
  The original amount of pitch required in the titanium slag smelting process is 279 kg and represents the amount required for the production of 1 metric ton of titanium sponge. This value was taken from Table 2, column ''titanium slag smelting'' of the following publication: Gao, F., Nie, Z., Yang, D., Sun, B., Liu, Y., Gong, X., & Wang, Z. (2018). Environmental impacts analysis of titanium sponge production using Kroll process in China. Journal of Cleaner Production, 174, 771-779. doi:https://doi.org/10.1016/j.jclepro.2017.09.240. This value was adjusted to represent the production of 1 kg of Ti slag (94% TiO2) (by dividing by 1000 and then by diving again by 1.77474 based on the fact that for the production of 1 kg of Ti Sponge, 1.77474 kg of Ti slag (94% TiO2), are needed - more information on the titanium slag exchange comment).
  Note: The amount of titanium slag required for the production of 1 kg of titanium sponge (1.77473 kg) is calculated based on the following facts: i) 3.9626 kg of TiCl4 is required for the production of 1 kg of titanium sponge (consult titanium sponge production dataset) ii) approximately 0.4478723 kg of titania slag (94% TiO2) is required for the production of 1 kg of TiCl4 (consult titanium tetrachloride dataset).
  properties: wet mass 1 kg, carbon content, fossil 0.83, dry mass 1 kg, heating value, net 28 MJ
- diesel, burned in building machine: 0.0415857 MJ; = (0.013*2.2)*45.4; lognormal variance with pedigree 0.0014, pedigree (1,3,2,1,1)
  The original amount of diesel required in the ore mining and dressing process (after aggregation of the ore mining, magnetic separation and high-intensity magnetic separation and flotation process and adjustment of all inputs presented in Table 1 listed in the following publication to refer to the production of 1 kg of titanium concentrate) is 0.013 kg per kg of concentrate. The value was taken from the following publication: Gao, F., Nie, Z., Yang, D., Sun, B., Liu, Y., Gong, X., & Wang, Z. (2018). Environmental impacts analysis of titanium sponge production using Kroll process in China. Journal of Cleaner Production, 174, 771-779. doi:https://doi.org/10.1016/j.jclepro.2017.09.240.
  The abovementioned value was adjusted to correspond to the production of 1 kg of Ti slag (by multiplying by 2.2 based on the fact that for the production of 1 kg of Ti slag (94% TiO2), 2.2 kg of ilmenite concentrate are needed (consult titanium in ground exchange comment for more information). The energy from diesel is calculated by multiplying the previously calculated amount of diesel with gross calorific value of diesel (45.4 MJ/kg according to Table 5.1, chapter 5.6.3, page 35 of the data quality guidelines of Ecoinvent version 3).
  Note: The value of crude oil reported in table 1 in the column ''ore mining and dressing'' of Gao et al (2018) publication was not taken into account because the inventory in that column has been mass-allocated. This is why the diesel amount reported in Table 1 (after aggregation of the 3 subprocesses of mining and dressing) was instead considered here.
  properties: heating value, net 1 MJ
- non-sulfidic tailing, off-site: -1.31258 kg; name bp1; = (13.04*2.2/0.7)*-1; lognormal variance with pedigree 0.0014, pedigree (1,3,2,1,1)
  Gao et al (2018) reports in figure 2 a total of 13.04 kg of tailings (approximated here as non-sulfidic tailings) produced as a byproduct during the ore mining and dressing process per kg of titanium concentrate (ilmenite). At first, this value was multiplied by 2,2, since approximately 2,2 kg of ilmenite concentrate is required for the production of 1 kg of titania slag (94% TiO2) (consult titanium in ground exchange comment). Furthermore, it is assumed that the mass of the tailings reported in the Gao et al (2018) publication represents the dry mass of the tailings. This means that the amount of the tailings will be divided by 0.7 (due to the fact that 70% of the tailings' mass is dry mass in the corresponding treatment dataset).
  Note 1: The value of tailings reported in table 2 in the column ''ore mining and dressing'' of Gao et al (2018) publication was not taken into account because the inventory in that column has been mass-allocated. This is why the amount of tailings in figure 2 were considered.
  Reference: Gao, F., Nie, Z., Yang, D., Sun, B., Liu, Y., Gong, X., & Wang, Z. (2018). Environmental impacts analysis of titanium sponge production using Kroll process in China. Journal of Cleaner Production, 174, 771-779. doi:https://doi.org/10.1016/j.jclepro.2017.09.240.
  production volume 6.10965e9 kg; = PVRP * bp1
    Calculated from production volume of reference product using the relative outputs.
  property price 0 EUR2005; name bp1_price_EUR2005
  properties: wet mass 1 kg, water content 0.428571, dry mass 0.7 kg
- recultivation, ilmenite mine: 1.07025e-5 m2; = 8.292E-05*4.03; lognormal variance with pedigree 0.1254, pedigree (2,4,2,5,2)
  Due to the fact that the infrastructure is not reported in table 2 of Gao et al (2018) publication and has to be included for compliance with the Ecoivent quality guidelines, the value for mine recultivation (8.292E-05 m2) is taken from the Ecoinvent dataset ''ilmenite - magnetite mine operation, GLO'' available in version 3.7.1 of the Ecoinvent database. Due to the structure of the dataset, the abovementioned value in that dataset is multiplied by a scaling factor, which is based on the titanium that is extracted from the ground. This scaling factor equals the ratio of titanium extracted from the ground in order to produce 1 kg of titanium slag with 94% TiO2 (2.29 kg - see titanium, in ground exchange comment) to the amount of titanium extracted from the ground based on the abovementioned dataset (0.56824 kg). Therefore, the scaling factor is equal to 4.03.
  Reference 1: Gao, F., Nie, Z., Yang, D., Sun, B., Liu, Y., Gong, X., & Wang, Z. (2018). Environmental impacts analysis of titanium sponge production using Kroll process in China. Journal of Cleaner Production, 174, 771-779. doi:https://doi.org/10.1016/j.jclepro.2017.09.240.
- petrol, unleaded, burned in machinery: 1.46654e-5 MJ; = 4.615E-06*2.2*45.1; lognormal variance with pedigree 0.0014, pedigree (1,3,2,1,1)
  The original amount of gasoline (approximated here as petrol) required during the ore mining and dressing (after aggregation of the ore mining, magnetic separation and high-intensity magnetic separation and flotation process and adjustment of all inputs presented in Table 1 of the Gao et al (2018) to refer to the production of 1 kg of titanium concentrate) is approximately 4.615E-06 kg.
  The abovementioned value was first adjusted to correspond to the production of 1 kg of Ti slag (by multiplying by 2.2 based on the fact that for the production of 1 kg of Ti slag (94% TiO2), 2.2 kg of ilmenite concentrate are needed (consult titanium in ground exchange comment for more information). The energy from gasoline is calculated by multiplying the previously calculated amount of gasoline with gross calorific value of gasoline (45.1 MJ/kg according to Table 5.1, chapter 5.6.3, page 35 of the data quality guidelines of Ecoinvent version 3).
  Reference: Gao, F., Nie, Z., Yang, D., Sun, B., Liu, Y., Gong, X., & Wang, Z. (2018). Environmental impacts analysis of titanium sponge production using Kroll process in China. Journal of Cleaner Production, 174, 771-779. doi:https://doi.org/10.1016/j.jclepro.2017.09.240.
  properties: heating value, net 1 MJ
- petroleum coke: 0.00905928 kg; = (502/1000)/1.77473; lognormal variance with pedigree 0.0014, pedigree (1,3,2,1,1)
  The original amount of petroleum coke required in the titanium slag smelting process is 502 kg and represents the amount required for the production of 1 metric ton of titanium sponge. This value was taken from Table 2, column ''titanium slag smelting'' of the following publication: Gao, F., Nie, Z., Yang, D., Sun, B., Liu, Y., Gong, X., & Wang, Z. (2018). Environmental impacts analysis of titanium sponge production using Kroll process in China. Journal of Cleaner Production, 174, 771-779. doi:https://doi.org/10.1016/j.jclepro.2017.09.240. This value was adjusted to represent the production of 1 kg of Ti slag (94% TiO2) (by dividing by 1000 and then by diving again by 1.77474 based on the fact that for the production of 1 kg of Ti Sponge, 1.77474 kg of Ti slag (94% TiO2) are needed.
  Note: The amount of titanium slag required for the production of 1 kg of titanium sponge (1.77473 kg) is calculated based on the following facts: i) 3.9626 kg of TiCl4 is required for the production of 1 kg of titanium sponge (consult titanium sponge production dataset) ii) approximately 0.44787 kg of titania slag (94% TiO2) is required for the production of 1 kg of TiCl4 (consult titanium tetrachloride dataset).
  properties: carbon content, fossil 0.885, wet mass 1 kg, dry mass 1 kg, heating value, net 35 MJ
- graphite: 0.0012073 kg; = (66.9/1000)/1.77473; lognormal variance with pedigree 0.0014, pedigree (1,3,2,1,1)
  The original amount of graphite electrode (approximated here as battery-grade graphite) required in the titanium slag smelting process is 66.9 kg and represents the amount required for the production of 1 metric ton of titanium sponge. This value was taken from Table 2 of the following publication: Gao, F., Nie, Z., Yang, D., Sun, B., Liu, Y., Gong, X., & Wang, Z. (2018). Environmental impacts analysis of titanium sponge production using Kroll process in China. Journal of Cleaner Production, 174, 771-779. doi:https://doi.org/10.1016/j.jclepro.2017.09.240. This value was adjusted to represent the production of 1 kg of Ti slag (94% TiO2) (by dividing by 1000 and then by diving again by 1.77473 based on the fact that for the production of 1 kg of Ti Sponge, 1.77473 kg of Ti slag (94% TiO2) are needed.
  Note: The amount of titanium slag required for the production of 1 kg of titanium sponge (1.77473 kg) is calculated based on the following facts: i) 3.9626 kg of TiCl4 is required for the production of 1 kg of titanium sponge (consult titanium sponge production dataset) ii) approximately 0.4478723 kg of titania slag (94% TiO2) is required for the production of 1 kg of TiCl4 (consult titanium tetrachloride dataset).
  properties: wet mass 1 kg, carbon content, fossil 1, dry mass 1 kg, heating value, net 30.3 MJ
- conveyor belt: 7.17633e-9 m; = 5.56E-08*4.03; lognormal variance with pedigree 0.3054, pedigree (2,4,2,5,2)
  Due to the fact that the infrastructure is not reported in table 2 of Gao et al (2018) publication and has to be included for compliance with the Ecoivent quality guidelines, the value for conveyor belt (5.56E-08 m) is taken from the Ecoinvent dataset ''ilmenite - magnetite mine operation, GLO'' available in version 3.7.1 of the Ecoinvent database. Due to the structure of the dataset, the abovementioned value in that dataset is multiplied by a scaling factor, which is based on the titanium that is extracted from the ground. This scaling factor equals the ratio of titanium extracted from the ground in order to produce 1 kg of titanium slag with 94% TiO2 (2.29 kg - see titanium, in ground exchange comment) to the amount of titanium extracted from the ground based on the abovementioned dataset (0.56824 kg). Therefore, the scaling factor is equal to 4.03.
  Reference 1: Gao, F., Nie, Z., Yang, D., Sun, B., Liu, Y., Gong, X., & Wang, Z. (2018). Environmental impacts analysis of titanium sponge production using Kroll process in China. Journal of Cleaner Production, 174, 771-779. doi:https://doi.org/10.1016/j.jclepro.2017.09.240.
- wastewater from pig iron production: -0.000728046 m3; name bp2; = (0.85*water_input-0.3*(bp1*-1)/1000)*-1; lognormal variance with pedigree 0.0014, pedigree (1,3,2,1,1)
  The amount of wastewater is based on water balance and is calculated by subtracting the amount of water emitted to air (15% of water input - consult water emission to air exchange comment) and the amount of water contained in the tailings (30% of the mass of tailings since 70% of the tailings is dry mass - consult non-sulfidic tailings exchange comment) from the amount of water required (0.0412 m3 - consult water unspecified natural origin exchange comment).
  Note: The amount of wastewater reported in table 2 in the column ''ore mining and dressing'' of Gao et al (2018) publication was not taken into account because the inventory in that column has been mass-allocated. This is why the calculation of wastewater based on water balance was preferred instead.
  Reference: Gao, F., Nie, Z., Yang, D., Sun, B., Liu, Y., Gong, X., & Wang, Z. (2018). Environmental impacts analysis of titanium sponge production using Kroll process in China. Journal of Cleaner Production, 174, 771-779. doi:https://doi.org/10.1016/j.jclepro.2017.09.240.
  production volume 3.38884e6 m3; = PVRP * bp2
    Calculated from production volume of reference product using the relative outputs.
  property price 0 EUR2005; name bp2_price_EUR2005
  properties: dry mass 0.337476 kg, water content 2962.17, wet mass 1000 kg, carbon content, fossil 1.2149e-5
- electricity, medium voltage: 0.144428 kWh; = (846/1000)*2.2+(4700/1000)/(3.9626*0.44787); lognormal variance with pedigree 0.0014, pedigree (1,3,2,1,1)
  The original amount of electricity required in the ore mining and dressing (after aggregation of the ore mining, magnetic separation and high-intensity magnetic separation and flotation process and adjustment of all inputs presented in Table 1 listed in the following publication to refer to the production of 1 kg of titanium concentrate) & titanium slag smelting process are 846 kWh per ton of concentrate and 4700 kWh per ton of titanium sponge respectively. The second value was taken from Table2, column ''titanium slag smelting'' of the same following publication: Gao, F., Nie, Z., Yang, D., Sun, B., Liu, Y., Gong, X., & Wang, Z. (2018). Environmental impacts analysis of titanium sponge production using Kroll process in China. Journal of Cleaner Production, 174, 771-779. doi:https://doi.org/10.1016/j.jclepro.2017.09.240.
  The first value was multiplied by 2.2, since approximately 2.2 kg of ilmenite concentrate is required for the production of 1 kg of titania slag (94% TiO2) (consult titanium in ground exchange comment). The second value was calculated based on the following facts: i) 3.9626 kg of TiCl4 is required for the production of 1 kg of titanium sponge (consult titanium sponge production dataset) ii) approximately 0.44787 kg of titania slag (94% TiO2) is required for the production of 1 kg of TiCl4 (consult titanium tetrachloride dataset). These two adjusted values were summed in order to obtain the amount of electricity required during the production of 1 kg of Ti slag (94% TiO2) for both processes.
  Note: The value of electricity reported in table 1 in the column ''ore mining and dressing'' of Gao et al (2018) publication was not taken into account because the inventory in that column has been mass-allocated. This is why the electricity amount reported in Table 1 (after aggregation of the 3 subprocesses of mining and dressing) was instead considered here.
- heat, district or industrial, other than natural gas: 0.470292 MJ; = ((569/1000)/1.77473)*45.8; lognormal variance with pedigree 0.0014, pedigree (1,3,2,1,1)
  The original amount of crude oil required in the titanium slag smelting process is 569 kg per ton of titanium sponge respectively. The abovementioned value was taken from Table2, column ''titanium slag smelting'' of the following publication: Gao, F., Nie, Z., Yang, D., Sun, B., Liu, Y., Gong, X., & Wang, Z. (2018). Environmental impacts analysis of titanium sponge production using Kroll process in China. Journal of Cleaner Production, 174, 771-779. doi:https://doi.org/10.1016/j.jclepro.2017.09.240.
  The value was adjusted to correspond to the production of 1 kg of Ti slag (by dividing by 1000 to represent the per kg of Ti sponge requirement of crude oil and then by diving by 1.77473, based on the fact that for the production of 1 kg of Ti Sponge, 1.77473 kg of Ti slag (94% TiO2) are needed). Finally, the energy from crude oil is calculated by multiplying the previously calculated amount of crude oil with gross calorific value of crude oil (45.8 MJ/kg according to Table 5.1, chapter 5.6.3, page 35 of the data quality guidelines of Ecoinvent version 3).
  Note 1: The value of diesel reported in table 2 in the column ''ore mining and dressing'' of Gao et al (2018) publication was not taken into account because the inventory in that column has been mass-allocated.
  Note 2: The amount of titanium slag required for the production of 1 kg of titanium sponge (1.77473 kg) is calculated based on the following facts: i) 3.9626 kg of TiCl4 is required for the production of 1 kg of titanium sponge (consult titanium sponge production dataset) ii) approximately 0.44787 kg of titania slag (94% TiO2) is required for the production of 1 kg of TiCl4 (consult titanium tetrachloride dataset).
  properties: corresponding fuel use, propane, furnace >100kW 1.05263 MJ, heating value, net 1 MJ
  note on corresponding fuel use, propane, furnace >100kW: Lower heating value of the fuel input related to the heat/electricity output, taken directly from ecoinvent v3.0 dataset "heat production, natural gas, at industrial furnace >100kW, GLO 2000".
- heat, district or industrial, natural gas: 0.0276978 MJ; = (0.177/1000*2.2*40.3)+(29.9/1000/1.77473*50.4); lognormal variance with pedigree 0.0014, pedigree (1,3,2,1,1)
  This exchange represents the amount of heat produced from the combustion of natural gas. Gao et al (2018) reports in Table 1 0.177 m3 of natural gas consumption per ton of produced titanium concentrate during the ore mining and dressing process and 29.9 kg per ton of produced titanium sponge during the titanium slag smelting process. Both values were first adjusted to represent the production per kg of Ti concentrate and sponge respectively (division by 1000).
  After this adjustment, the first value was first multiplied by 2.2, since approximately 2.2 kg of ilmenite concentrate is required for the production of 1 kg of titania slag (94% TiO2) (consult titanium in ground exchange comment) and then multiplied again by 40.3, since the gross calorific value of natural gas is 40.3 MJ/m3. The second value was first divided by 1.77473, based on the fact that for the production of 1 kg of Ti Sponge, 1.77473 kg of Ti slag (94% TiO2) are needed and then multiplied by 50.4, since the gross calorific value of natural gas is 50.4 MJ/kg. The resulting values are summed, therefore obtaining the thermal energy from natural gas.
  Note 1: The value of natural gas reported in table 1 in the column ''ore mining and dressing'' of Gao et al (2018) publication was not taken into account because the inventory in that column has been mass-allocated. This is why the amount of natural gas in table 1 was considered instead.
  Note 2: The gross calorific values of natural gas (40.3 MJ/m3 and 50.4 MJ/kg) were taken from Table 5.1, chapter 5.6.3, page 35 of the data quality guidelines of Ecoinvent version 3.
  Note 3: The amount of titanium slag required for the production of 1 kg of titanium sponge (1.77473 kg) is calculated based on the following facts: i) 3.9626 kg of TiCl4 is required for the production of 1 kg of titanium sponge (consult titanium sponge production dataset) ii) approximately 0.44787 kg of titania slag (94% TiO2) is required for the production of 1 kg of TiCl4 (consult titanium tetrachloride dataset).
  properties: heating value, net 1 MJ
- industrial machine, heavy, unspecified: 1.57982e-6 kg; = 1.224E-05*4.03; lognormal variance with pedigree 0.3054, pedigree (2,4,2,5,2)
  Due to the fact that the infrastructure is not reported in table 2 of Gao et al (2018) publication and has to be included for compliance with the Ecoivent quality guidelines, the value for industrial machine (1.224E-05 kg) is taken from the Ecoinvent dataset ''ilmenite - magnetite mine operation, GLO'' available in version 3.7.1 of the Ecoinvent database. Due to the structure of the dataset, the abovementioned value in that dataset is multiplied by a scaling factor, which is based on the titanium that is extracted from the ground. This scaling factor equals the ratio of titanium extracted from the ground in order to produce 1 kg of titanium slag with 94% TiO2 (2.29 kg - see titanium, in ground exchange comment) to the amount of titanium extracted from the ground based on the abovementioned dataset (0.56824 kg). Therefore, the scaling factor is equal to 4.03.
  Reference 1: Gao, F., Nie, Z., Yang, D., Sun, B., Liu, Y., Gong, X., & Wang, Z. (2018). Environmental impacts analysis of titanium sponge production using Kroll process in China. Journal of Cleaner Production, 174, 771-779. doi:https://doi.org/10.1016/j.jclepro.2017.09.240.
- transport, freight, lorry, unspecified: 0.00563683 metric ton*km; = 2.2*80/1000; lognormal variance with pedigree 6.0032, pedigree (2,3,3,1,1)
  According to Liao et al (2012), the transport distance between the ilmenite concentrate and the processing plant is 80 km. The amount of ilmenite concentrate required for the production of 1 kg of titanium slag, 94% TiO2 is 2.2 kg (consult titanium in ground exchange comment for more information). This exchange was not present in the Gao et al (2018) publication, on which this dataset is based.
  Reference 1: Gao, F., Nie, Z., Yang, D., Sun, B., Liu, Y., Gong, X., & Wang, Z. (2018). Environmental impacts analysis of titanium sponge production using Kroll process in China. Journal of Cleaner Production, 174, 771-779. doi:https://doi.org/10.1016/j.jclepro.2017.09.240.
  Reference 2: Liao, W., Heijungs, R., & Huppes, G. (2012). Thermodynamic resource indicators in LCA: a case study on the titania produced in Panzhihua city, southwest China. The International Journal of Life Cycle Assessment, 17(8), 951-961. doi:10.1007/s11367-012-0429-4.
- chemical, organic: 0.000620796 kg; = (34.4/1000)/1.77473; lognormal variance with pedigree 0.0028, pedigree (1,4,2,1,1)
  The original amount of flotation agent (approximated here as an organic chemical) required in the ore mining and dressing is 34.4 kg and represents the amount required for the production of 1 metric ton of titanium sponge. These values were taken from Table 2 of the following publication: Gao, F., Nie, Z., Yang, D., Sun, B., Liu, Y., Gong, X., & Wang, Z. (2018). Environmental impacts analysis of titanium sponge production using Kroll process in China. Journal of Cleaner Production, 174, 771-779. doi:https://doi.org/10.1016/j.jclepro.2017.09.240. The value was adjusted to represent the production of 1 kg of Ti slag (94% TiO2) (by dividing by 1000 and then by diving again by 1.77473 based on the fact that for the production of 1 kg of Ti Sponge, 1.77473 kg of Ti slag (94% TiO2) are needed - more information on the titanium slag exchange comment).
  Note 1: The amount of titanium slag required for the production of 1 kg of titanium sponge (1.77473 kg) is calculated based on the following facts: i) 3.9626 kg of TiCl4 is required for the production of 1 kg of titanium sponge (consult titanium sponge production dataset) ii) approximately 0.44787 kg of titania slag (94% TiO2) is required for the production of 1 kg of TiCl4 (consult titanium tetrachloride dataset).
  Note 2: Exchanges reported in table 1 in the column ''ore mining and dressing'' of Gao et al (2018) publication were not taken into account because the inventory in that column has been mass-allocated. However, due to lack of data, the amount reported in the Gao et al (2018) publication in that specific column is considered as the best available source of information.
  Reference 1: Gao, F., Nie, Z., Yang, D., Sun, B., Liu, Y., Gong, X., & Wang, Z. (2018). Environmental impacts analysis of titanium sponge production using Kroll process in China.
  properties: dry mass 1 kg, wet mass 1 kg, carbon content, fossil 0.628, heating value, net 19.03 MJ
  note on carbon content, fossil: This dataset is an unweighted average of 20 organic substances (listed in Tab 88.1, ecoinvent v2.2 report 8, part II), being part of the top100 chemicals included in this database. The C-content has also been calculated as an unweighted average of the C content of the substances composing this dataset.

## Inputs from nature
- Gangue, in ground [natural resource, in ground]: 1.07822 kg; = 48.88-Fe_in_ground-Ti_in_ground; lognormal variance with pedigree 0.0014, pedigree (1,3,2,1,1)
  Gangue is calculated by subtracting the amount of titanium extracted from the ground and the amount of iron extracted from ground from the amount of vanadium titano-magnetite ore extracted from ground (48.88 kg).
  Note:The original amount of extracted vanadium titano-magnetite ore during the ore mining and dressing process is 22.15 tons and represents the amount required for the production of 1 ton of titanium concentrate (ilmenite). This value was calculated based on the aggregation of the ore mining, magnetic separation and high-intensity magnetic separation and flotation process and adjustment of all inputs presented in table 1 of the Gao et al (2018) publication to refer to the production of 1 kg of titanium concentrate.
  The amount of ilmenite (FeTiO3) required for the production of 1 kg of titanium slag (94% TiO2) is based on the following facts: i) the ilmenite concentrate has a grade of 47.62% TiO2, according to figure 1 of the abovementioned source ii) the produced high-grade titanium slag has a grade of 94% TiO2 (based on data from Liao et al (2012) from Panzhihua city - data taken from that source because Gao et al 2018 does not mention the grade of high-grade titanium slag produced) and iii) due to absence of data regarding the recovery of titanium during that process, the recovery rate from leaching process is assumed here as the best available approximation, which is 89.45% according to Li et al (2021).
  After adjusting for the ore grade, approximately 2.2 kg of ilmenite concentrate is required for the production of 1 kg of titania slag (94% TiO2). This means that approximately 48.88 kg of vanadium titano-magnetite ore is required in the end for the production of 1 kg of titania slag (94% TiO2).
  Reference 1: Gao, F., Nie, Z., Yang, D., Sun, B., Liu, Y., Gong, X., & Wang, Z. (2018). Environmental impacts analysis of titanium sponge production using Kroll process in China. Journal of Cleaner Production, 174, 771-779. doi:https://doi.org/10.1016/j.jclepro.2017.09.240.
  Reference 2: Liao, W., Heijungs, R., & Huppes, G. (2012). Thermodynamic resource indicators in LCA: a case study on the titania produced in Panzhihua city, southwest China. The International Journal of Life Cycle Assessment, 17(8), 951-961. doi:10.1007/s11367-012-0429-4.
  Reference 3: Li, Y., Chen, S., & Duan, H. (2021). A New Process of Extracting Titanium from Vanadium-Titanium Magnetite. Crystals, 11(4), 327.
- Transformation, from forest, unspecified [natural resource, land]: 1.07025e-5 m2; = 8.292E-05*4.03; lognormal variance with pedigree 0.1254, pedigree (2,4,2,5,2)
  Due to the fact that the land transformation is not reported in table 2 of Gao et al (2018) publication and has to be included for completeness purposes, the value for land transformation (8.292E-05 m2) is taken from the Ecoinvent dataset ''ilmenite - magnetite mine operation, GLO'' available in version 3.7.1 of the Ecoinvent database. Due to the structure of the dataset, the abovementioned value in that dataset is multiplied by a scaling factor, which is based on the titanium that is extracted from the ground. This scaling factor equals the ratio of titanium extracted from the ground in order to produce 1 kg of titanium slag with 94% TiO2 (2.29 kg - see titanium, in ground exchange comment) to the amount of titanium extracted from the ground based on the abovementioned dataset (0.56824 kg). Therefore, the scaling factor is equal to 4.03.
  Reference 1: Gao, F., Nie, Z., Yang, D., Sun, B., Liu, Y., Gong, X., & Wang, Z. (2018). Environmental impacts analysis of titanium sponge production using Kroll process in China. Journal of Cleaner Production, 174, 771-779. doi:https://doi.org/10.1016/j.jclepro.2017.09.240.
- Occupation, mineral extraction site [natural resource, land]: 0.000321076 m2*year; = 0.0024876*4.03; lognormal variance with pedigree 0.0454, pedigree (2,4,2,5,2)
  Due to the fact that the land occupation is not reported in table 2 of Gao et al (2018) publication and has to be included for completeness purposes, the value for land occupation (0.0024876 m2*year) is taken from the Ecoinvent dataset ''ilmenite - magnetite mine operation, GLO'' available in version 3.7.1 of the Ecoinvent database. Due to the structure of the dataset, the abovementioned value in that dataset is multiplied by a scaling factor, which is based on the titanium that is extracted from the ground. This scaling factor equals the ratio of titanium extracted from the ground in order to produce 1 kg of titanium slag with 94% TiO2 (2.29 kg - see titanium, in ground exchange comment) to the amount of titanium extracted from the ground based on the abovementioned dataset (0.56824 kg). Therefore, the scaling factor is equal to 4.03.
  Reference 1: Gao, F., Nie, Z., Yang, D., Sun, B., Liu, Y., Gong, X., & Wang, Z. (2018). Environmental impacts analysis of titanium sponge production using Kroll process in China. Journal of Cleaner Production, 174, 771-779. doi:https://doi.org/10.1016/j.jclepro.2017.09.240.
- Transformation, to mineral extraction site [natural resource, land]: 1.07025e-5 m2; = 8.292E-05*4.03; lognormal variance with pedigree 0.1254, pedigree (2,4,2,5,2)
  (same comment as for Transformation, from forest, unspecified)
- Iron, in ground [natural resource, in ground]: 0.413919 kg; name Fe_in_ground; = 48.88*0.2644; lognormal variance with pedigree 0.0014, pedigree (1,3,2,1,1)
  The iron extracted from the ground is based on the following facts: i) The original amount of ore extracted from the ground is 48.88 kg per kg of slag ii) the Fe content in the ore is 26.44% (Source: Figure 2 of the following publication).
  Note: The original amount of extracted vanadium titano-magnetite ore during the ore mining and dressing process is 22.15 tons and represents the amount required for the production of 1 ton of titanium concentrate (ilmenite). This value was calculated based on the aggregation of the ore mining, magnetic separation and high-intensity magnetic separation and flotation process and adjustment of all inputs presented in table 1 of the Gao et al (2018) publication to refer to the production of 1 kg of titanium concentrate.
  The amount of ilmenite (FeTiO3) required for the production of 1 kg of titanium slag (94% TiO2) is based on the following facts: i) the ilmenite concentrate has a grade of 47.62% TiO2, according to figure 1 of the abovementioned source ii) the produced high-grade titanium slag has a grade of 94% TiO2 (based on data from Liao et al (2012) from Panzhihua city - data taken from that source because Gao et al 2018 does not mention the grade of high-grade titanium slag produced) and iii) due to absence of data regarding the recovery of titanium during that process, the recovery rate from leaching process is assumed here as the best available approximation, which is 89.45% according to Li et al (2021).
  After adjusting for the ore grade, approximately 2.2 kg of ilmenite concentrate is required for the production of 1 kg of titania slag (94% TiO2). This means that approximately 48.88 kg of vanadium titano-magnetite ore is required in the end for the production of 1 kg of titania slag (94% TiO2).
  Reference 1: Gao, F., Nie, Z., Yang, D., Sun, B., Liu, Y., Gong, X., & Wang, Z. (2018). Environmental impacts analysis of titanium sponge production using Kroll process in China. Journal of Cleaner Production, 174, 771-779. doi:https://doi.org/10.1016/j.jclepro.2017.09.240.
  Reference 2: Liao, W., Heijungs, R., & Huppes, G. (2012). Thermodynamic resource indicators in LCA: a case study on the titania produced in Panzhihua city, southwest China. The International Journal of Life Cycle Assessment, 17(8), 951-961. doi:10.1007/s11367-012-0429-4.
  Reference 3: Li, Y., Chen, S., & Duan, H. (2021). A New Process of Extracting Titanium from Vanadium-Titanium Magnetite. Crystals, 11(4), 327.
- Water, unspecified natural origin [natural resource, in water]: 0.00131979 m3; name water_input; = ((15.84*2.2)+6.36)/1000; lognormal variance with pedigree 0.0014, pedigree (1,3,2,1,1)
  The amounts of water consumption during the mining and titanium slag production process are 15.84 kg per kg of titanium concentrate and 6.36 kg per kg of titanium slag respectively. These values were taken from table S2 and S4 of the supplemetary materials of Liao et al (2012) publication. The first value was multiplied by 2.2, since approximately 2.2 kg of ilmenite concentrate is required for the production of 1 kg of titania slag (94% TiO2) (for more information consult the titanium in ground exchange comment). Assumed density of water: 1000 kg/m3.
  Note: The value of water reported in table 1 in the column ''ore mining and dressing'' of Gao et al (2018) publication was not taken into account because the inventory in that column has been mass-allocated. Because of that, the amount reported in the Gao et al (2018) publication was not considered. Furthermore, no water input is reported in the Gao publication for the titanium slag smelting process. As a worst-case scenario, the water from the Liao publication was instead considered here.
  Reference: Liao, W., Heijungs, R., & Huppes, G. (2012). Thermodynamic resource indicators in LCA: a case study on the titania produced in Panzhihua city, southwest China. The International Journal of Life Cycle Assessment, 17(8), 951-961. doi:10.1007/s11367-012-0429-4
  Reference: Gao, F., Nie, Z., Yang, D., Sun, B., Liu, Y., Gong, X., & Wang, Z. (2018). Environmental impacts analysis of titanium sponge production using Kroll process in China. Journal of Cleaner Production, 174, 771-779. doi:https://doi.org/10.1016/j.jclepro.2017.09.240.
- Titanium, in ground [natural resource, in ground]: 0.0733677 kg; name Ti_in_ground; = 48.88*0.0782*0.5993; lognormal variance with pedigree 0.0014, pedigree (1,3,2,1,1)
  The titanium extracted from the ground is based on the following facts: i) The original amount of ore extracted from the ground is 48.88 kg per kg of slag ii) the TiO2 content in the ore is 7.82% (Source: Figure 2 of the following publication) and iii) The % of titanium in TiO2 is 59.93% (Source: https://www.lenntech.com/calculators/molecular/molecular-weight-calculator.htm).
  Note: The original amount of extracted vanadium titano-magnetite ore during the ore mining and dressing process is 22.15 tons and represents the amount required for the production of 1 ton of titanium concentrate (ilmenite). This value was calculated based on the aggregation of the ore mining, magnetic separation and high-intensity magnetic separation and flotation process and adjustment of all inputs presented in table 1 of the Gao et al (2018) publication to refer to the production of 1 kg of titanium concentrate.
  The amount of ilmenite (FeTiO3) required for the production of 1 kg of titanium slag (94% TiO2) is based on the following facts: i) the ilmenite concentrate has a grade of 47.62% TiO2, according to figure 2 of the abovementioned source ii) the produced high-grade titanium slag has a grade of 94% TiO2 (based on data from Liao et al (2012) from Panzhihua city - data taken from that source because Gao et al 2018 does not mention the grade of high-grade titanium slag produced) and iii) due to absence of data regarding the recovery of titanium during that process, the recovery rate from leaching process is assumed here as the best available approximation, which is 89.45% according to Li et al (2021).
  After adjusting for the ore grade, approximately 2.2 kg of ilmenite concentrate is required for the production of 1 kg of titania slag (94% TiO2). This means that approximately 48.88 kg of vanadium titano-magnetite ore is required in the end for the production of 1 kg of titania slag (94% TiO2).
  Reference 1: Gao, F., Nie, Z., Yang, D., Sun, B., Liu, Y., Gong, X., & Wang, Z. (2018). Environmental impacts analysis of titanium sponge production using Kroll process in China. Journal of Cleaner Production, 174, 771-779. doi:https://doi.org/10.1016/j.jclepro.2017.09.240.
  Reference 2: Liao, W., Heijungs, R., & Huppes, G. (2012). Thermodynamic resource indicators in LCA: a case study on the titania produced in Panzhihua city, southwest China. The International Journal of Life Cycle Assessment, 17(8), 951-961. doi:10.1007/s11367-012-0429-4.
  Reference 3: Li, Y., Chen, S., & Duan, H. (2021). A New Process of Extracting Titanium from Vanadium-Titanium Magnetite. Crystals, 11(4), 327.

## Emissions to nature
- Carbon monoxide, fossil [air, low population density, long-term]: 0.0284429 kg; lognormal variance with pedigree 0.6508, pedigree (1,3,2,1,1)
  Only the direct carbon monoxide emissions are included here. The amount of CO is based on carbon balance. More specifically, the amount of carbon contained in petroleum coke and pitch should equal the amount of carbon present in the carbon monoxide that is emitted. Reason for this approach is that petroleum coke and pitch are essential inputs for the smelting of titania slag and carbon monoxide the essential carbon-based output, during that process.
- Particulates, > 2.5 um, and < 10um [air, low population density, long-term]: 1.23495e-5 kg; = 9.568E-05*4,03; lognormal variance with pedigree 0.1254, pedigree (2,4,2,5,2)
  Due to the fact that the emissions reported in table 2 of Gao et al (2018) publication are aggregated (i.e emissions from electricity production and fuel burning) the emissions from mining are taken from the Ecoinvent dataset ''ilmenite - magnetite mine operation, GLO'' available in version 3.7.1 of the Ecoinvent database. Due to the structure of the dataset, the emissions provided in that dataset are multiplied by a scaling factor, which is based on the titanium that is extracted from the ground. This scaling factor equals the ratio of titanium extracted from the ground in order to produce 1 kg of titanium slag with 94% TiO2 (2.29 kg - see titanium, in ground exchange comment) to the amount of titanium extracted from the ground based on the abovementioned dataset (0.56824 kg). Therefore, the scaling factor is equal to 4.03.The PM>2,5 and < 10 emission amount from the abovementioned dataset is 9.568E-05 kg.
  Reference : Gao, F., Nie, Z., Yang, D., Sun, B., Liu, Y., Gong, X., & Wang, Z. (2018). Environmental impacts analysis of titanium sponge production using Kroll process in China. Journal of Cleaner Production, 174, 771-779. doi:https://doi.org/10.1016/j.jclepro.2017.09.240.
- Particulates, < 2.5 um [air, low population density, long-term]: 2.28997e-6 kg; = 1.7742E-05*4,03; lognormal variance with pedigree 0.3054, pedigree (2,4,2,5,2)
  Due to the fact that the emissions reported in table 2 of Gao et al (2018) publication are aggregated (i.e emissions from electricity production and fuel burning) the emissions from mining are taken from the Ecoinvent dataset ''ilmenite - magnetite mine operation, GLO'' available in version 3.7.1 of the Ecoinvent database. Due to the structure of the dataset, the emissions provided in that dataset are multiplied by a scaling factor, which is based on the titanium that is extracted from the ground. This scaling factor equals the ratio of titanium extracted from the ground in order to produce 1 kg of titanium slag with 94% TiO2 (2.29 kg - see titanium, in ground exchange comment) to the amount of titanium extracted from the ground based on the abovementioned dataset (0.56824 kg). Therefore, the scaling factor is equal to 4.03.The PM<2.5 emission amount from the abovementioned dataset is 1.7742E-05 kg.
  Reference : Gao, F., Nie, Z., Yang, D., Sun, B., Liu, Y., Gong, X., & Wang, Z. (2018). Environmental impacts analysis of titanium sponge production using Kroll process in China. Journal of Cleaner Production, 174, 771-779. doi:https://doi.org/10.1016/j.jclepro.2017.09.240.
- Water [air, low population density, long-term]: 0.000197968 m3; = water_input*0.15; lognormal variance with pedigree 0.0454, pedigree (2,4,2,5,2)
  It is assumed that 15% of the water used for the production of the slag, is emitted to air, while the rest lands in wastewater. The assumption of is taken from the dataset ''ilmenite - magnetite mine operation, GLO'' available in version 3.7.1 of Ecoinvent. This assumption is considered acceptable, as the Ecoinvent dataset corresponds to the one provided in the Gao et al (2018) publication. However, this exchange was not present in the Gao et al (2018) publication, on which this dataset is based and has been assumed for water balance purposes.
  Reference: Gao, F., Nie, Z., Yang, D., Sun, B., Liu, Y., Gong, X., & Wang, Z. (2018). Environmental impacts analysis of titanium sponge production using Kroll process in China. Journal of Cleaner Production, 174, 771-779. doi:https://doi.org/10.1016/j.jclepro.2017.09.240.
- Particulates, > 10 um [air, low population density, long-term]: 3.11602e-5 kg; = 2.4142E-04*4,03; lognormal variance with pedigree 0.0454, pedigree (2,4,2,5,2)
  Due to the fact that the emissions reported in table 2 of Gao et al (2018) publication are aggregated (i.e emissions from electricity production and fuel burning) the emissions from mining are taken from the Ecoinvent dataset ''ilmenite - magnetite mine operation, GLO'' available in version 3.7.1 of the Ecoinvent database. Due to the structure of the dataset, the emissions provided in that dataset are multiplied by a scaling factor, which is based on the titanium that is extracted from the ground. This scaling factor equals the ratio of titanium extracted from the ground in order to produce 1 kg of titanium slag with 94% TiO2 (2.29 kg - see titanium, in ground exchange comment) to the amount of titanium extracted from the ground based on the abovementioned dataset (0.56824 kg). Therefore, the scaling factor is equal to 4.03.The PM>10 emission amount from the abovementioned dataset is 2,4142E-04 kg.
  Reference : Gao, F., Nie, Z., Yang, D., Sun, B., Liu, Y., Gong, X., & Wang, Z. (2018). Environmental impacts analysis of titanium sponge production using Kroll process in China. Journal of Cleaner Production, 174, 771-779. doi:https://doi.org/10.1016/j.jclepro.2017.09.240.

## Sampling procedure
This dataset is an aggregation of the ore mining and dressing process and the titanium slag smelting process as described in Gao et al (2018). According to the authors of the publication used as a source for this dataset, data for the average vanadium-titanomagnetite ore were collected through on-site surveys of several representative mining companies in China’s Panzhihua and Xichang region.

The data are assumed to represent the average production of high-grade titanium slag in China. The majority of the data is based on the work of Gao et al (2018). For this dataset, the inputs/outputs for the ore mining & dressing process were based on Table 1 and figure 2 of the abovementioned source. The waste rock reported in table 1 is not taken into account, because it is assumed that is left on-site and used as backfill material, therefore remaining within system boundaries. The data for mining in table 2, column ''ore mining and dressing'' from the Gao et al (2018) publication were not considered due to mass allocation in that specific column. Nevertheless, for the titanium slag smelting process the data were taken from the respective column in table 2 of the Gao et al (2018) publication, since there is no indication of mass allocation in that column.

Data for infrastructure, land occupation & transformation as well as emissions during mining were approximated with data from the Ecoinvent dataset ''ilmenite - magnetite mine operation, GLO'' available in version 3.7.1 of the Ecoinvent database. Finally, the grade of slag is not reported in the Gao et al and was instead taken from the Liao et al (2012) publication, since it refers to production of high-grade slag (as intermediate product) in Panzhihua city.
The fuels (raw coal, natural gas, crude oil, diesel and gasoline) have been linked with the respective Ecoinvent heat production datasets (check individual exchange comments). Calculation of the thermal energy is also available in the respective comments. The individual emissions listed in table 2 (CO2, SO2, NOx, CO, CH4, N2O, NMVOC, As, Cd, Cr, Hg, Ni, Pb, V, Zn and Particulates) are not considered here because they represent indirect emissions from the combustion of the abovementioned fuels and electricity production that are already included in the respective Ecoinvent exchanges. Therefore, those emissions are not included in order to avoid double counting. However, the direct carbon monoxide emissions are included here based on the stoichiometric equations of the titanium slag smelting process (more information on exchange comment section of each emission), as these are direct process emissions (stoichiometric equation: FeTiO3 + C -> Fe + TiO2 + CO).

Reference 1: Gao, F., Nie, Z., Yang, D., Sun, B., Liu, Y., Gong, X., & Wang, Z. (2018). Environmental impacts analysis of titanium sponge production using Kroll process in China. Journal of Cleaner Production, 174, 771-779. doi:https://doi.org/10.1016/j.jclepro.2017.09.240.

Reference 2: Liao, W., Heijungs, R., & Huppes, G. (2012). Thermodynamic resource indicators in LCA: a case study on the titania produced in Panzhihua city, southwest China. The International Journal of Life Cycle Assessment, 17(8), 951-961. doi:10.1007/s11367-012-0429-4.
