# sewer grid construction, 4.7E10l/year, 583 km

Dataset: EcoSpold 2, unit process
Geography: CH
Time period: 1996-01-01 to 2021-12-31
Technology level: current
Classification: ISIC rev.4 ecoinvent: 4220:Construction of utility projects
Classification: EcoSpold01Categories: waste management/wastewater treatment
Synonyms: municipal sewer infrastructure for capacity class 1
Tags: ConvertedDataset
Scenario: Business-as-Usual
System model: Allocation, cut-off by classification
Generated by: Gabor Doka (obsolete)
Published in: Doka G. 2007
Database: ecoinvent
isCopyrightProtected: true
accessRestrictedTo: 1

## General comment
Sewer system for municipal wastewater treatment plant WWTP capacity class 1 with an average per-captia equivalent PCE (Einwohnergleichwert) of 233'225. Average length 583 km. The lifetime is 100 years including a renovation after 70 years.
[This dataset was already contained in the ecoinvent database version 2. It was not individually updated during the transfer to ecoinvent version 3. Life Cycle Impact Assessment results may still have changed, as they are affected by changes in the supply chain, i.e. in other datasets. This dataset was generated following the ecoinvent quality guidelines for version 2. It may have been subject to central changes described in the ecoinvent version 3 change report (http://www.ecoinvent.org/database/ecoinvent-version-3/reports-of-changes/), and the results of the central updates were reviewed extensively. The changes added e.g. consistent water flows and other information throughout the database. The documentation of this dataset can be found in the ecoinvent reports of version 2, which are still available via the ecoinvent website. The change report linked above covers all central changes that were made during the conversion process.]

## Included activities end
Infrastructure materials for municipal sewer system, transports, dismantling.

## Geography
Specific to the technology mix and human settlement structure encountered in Switzerland around 1996.

## Technology
Underground sewer system with pipes

## Parameters
- fraction, tap water, to air: 0.15 dimensionless; name fraction_TW_to_air; = fraction_PW_to_air; lognormal variance with pedigree 0.092025, pedigree (4,4,3,2,4)
  Calculated value. See comment in the other parametres present in this dataset. Tap water is considered to be always used as process water, thus process water fractions to air are applied to all tap water input flows to calculate the amount of water consumed in the processes.
- fraction, process water, to air: 0.15 dimensionless; name fraction_PW_to_air; lognormal variance with pedigree 0.092025, pedigree (4,4,3,2,4)
  Literature value. In case when no industry/process specific data are available, default evaporation fraction value is used. This value is 15% and is based on literature (Statistics Canada, 2007 & Shaffer, K.H., 2008, Consumptive water use in the Great Lakes Basin, USGS & Shiklomanov, 2003, World Water Resources at the Beginning of the 21st Century) and has been approved by an expert.

## Reference product
- sewer grid, 4.7E10l/year, 583 km: 1 km; CPC 53253: Sewage and water treatment plants; By-product classification allocatable product
  EcoSpold01Location=CH
  production volume 0.0336675 km
    This is a placeholder value that does not reflect real-world production volumes. This dataset does not currently require a real-world production volume to work in the database framework, and no actual data were collected yet. This has no negative effect on the results of the ecoinvent database. The placeholder value of this activity was scaled according to the nominal GDP of 2005 (source: United Nations, http://data.un.org/Glossary.aspx?q=GDP+%28current+US%24%29, accessed 20130726) to reflect an appropriate share of the global production volume, which is also a placeholder value.
  property price 243900 EUR2005
    Calculated based on literature value (PE-80 Pipe Systems: 17 Years of Successful Application in teh Public Sewer Network System of Göttingen, Pipeline Technology 2006 Conferece, http://www.pipeline-conference.com/sites/default/files/papers/124%20Fiedler.pdf). In general the costs for construction and maintenance of sewer grid varies significantly from region to region. In Göttingen app. 700 km of sewers are being managed. The annual investments in maintenance, renewal and construction of new sewer grid are 16 mio. Euro. With a lifetime of 100 years the cost of 1km of sewer grid is estimated to be (16000000*100/700=) 2.29E+06 Euro/km.

## Inputs from technosphere
All rows: lognormal variance with pedigree 0.3607, pedigree (2,2,5,1,1)
- polyvinylchloride, emulsion polymerised: 241.277 kg
  Data from one inventory study (Labhardt 1996)
  EcoSpold01Location=RER
  Uncertainty: & basic uncertainty of 3; Data from one inventory study (Labhardt 1996)
  properties: heating value, net 21.5 MJ, wet mass 1 kg, dry mass 1 kg, carbon content, fossil 0.387097
  note on carbon content, fossil: Monomer is vynyl chloride, C2H3Cl (ecoinvent v2.2 report 11_II). MW=62 g/mol
- polyethylene, high density, granulate: 43300 kg
  EcoSpold01Location=RER
  Data from one inventory study (Labhardt 1996)
  Uncertainty: & basic uncertainty of 3; Data from one inventory study (Labhardt 1996)
  properties: heating value, net 42.47 MJ, carbon content, fossil 0.857143, dry mass 1 kg, wet mass 1 kg
  note on carbon content, fossil: Polyethylene is formed out of a huge amount of ethylene monomers (C2H4) (ecoinvent v2.2 report 11_II). MW=28 g/mol
- reinforcing steel: 51800 kg
  (same comment as for polyethylene, high density, granulate)
  properties: carbon content, fossil 0.004, dry mass 1 kg, wet mass 1 kg
- gravel, round: 662020 kg
  EcoSpold01Location=CH
  Data from one inventory study (Labhardt 1996)
  Uncertainty: & basic uncertainty of 3; Data from one inventory study (Labhardt 1996)
  properties: wet mass 1 kg, dry mass 1 kg
- polypropylene, granulate: 1890 kg
  (same comment as for polyvinylchloride, emulsion polymerised)
  properties: carbon content, fossil 0.857143, dry mass 1 kg, wet mass 1 kg, heating value, net 32.78 MJ
  note on carbon content, fossil: Polypropylene is formed by the polymerisation of propylene, C3H6 (ecoinvent v2.2 report 11_II)
  note on heating value, net: Value extracted from "treatment of waste polypropylene, open burning"
- waste polyethylene: -45200 kg
  (same comment as for gravel, round)
  production volume 45200 kg
    Calculated from the production volume of sewer grid, 4.7E10l/year, 583 km in proportion to the respective output amounts.
  properties: carbon content, fossil 0.825301, water content 0.00401606, wet mass 1 kg, dry mass 0.996 kg, heating value, net 42.47 MJ
  note on carbon content, fossil: C content in 1 kg DM was calculated using data in Tab A.1, ecoinvent v2.2 report 13_I
  note on heating value, net: Value taken from the general comment of the treatment dataset.
- tap water: 2.21e7 kg; name tap_water_input
  (same comment as for polyethylene, high density, granulate)
  properties: carbon content, fossil 0.00178991, wet mass 1 kg, water content 2962.17, dry mass 0.000337476 kg
  note on carbon content, fossil: Bicarbonate content is 2.93 mol/m3. CO2 content is 0.1 mol/m3 (ecoinvent v2.2 report 8, Tab 93.1).
- excavation, hydraulic digger: 8320 m3
  (same comment as for polyethylene, high density, granulate)
- cement, unspecified: 150000 kg
  (same comment as for gravel, round)
  properties: dry mass 1 kg, wet mass 1 kg
- gravel, crushed: 175980 kg
  (same comment as for gravel, round)
  properties: wet mass 1 kg, dry mass 1 kg
- waste concrete, not reinforced: -2.03e6 kg
  (same comment as for gravel, round)
  production volume 2.03e6 kg
    (same comment as for waste polyethylene)
  properties: wet mass 1 kg, dry mass 1 kg
- cast iron: 8760 kg
  (same comment as for polyvinylchloride, emulsion polymerised)
  properties: carbon content, fossil 0.04, wet mass 1 kg, dry mass 1 kg
  note on carbon content, fossil: Cast iron is made by remelting pig iron in small furnaces (e.g. cupola furnaces or electric arc furnaces) and poured into moulds to make castings. It usually contains 2% to 6% carbon (ecoinvent v2.2 report 10_partII). An average content of 4% was considered
- waste polyvinylchloride: -1890 kg
  (same comment as for gravel, round)
  production volume 1890 kg
    (same comment as for waste polyethylene)
  properties: carbon content, fossil 0.440882, water content 0.00200401, wet mass 1 kg, dry mass 0.998 kg, heating value, net 21.51 MJ
- steel, chromium steel 18/8, hot rolled: 18000 kg
  (same comment as for polyvinylchloride, emulsion polymerised)
  properties: carbon content, fossil 0.0008, dry mass 1 kg, wet mass 1 kg
  note on carbon content, fossil: Stainless steel model is the grade 304 steel (18/8 stainless, 18% chromium 8% nickel; max. 0.08% C)
- polyvinylchloride, suspension polymerised: 1648.72 kg
  (same comment as for polyvinylchloride, emulsion polymerised)
  properties: heating value, net 21.5 MJ, wet mass 1 kg, carbon content, fossil 0.387097, dry mass 1 kg
- sand: 464000 kg
  Data from one inventory study (Labhardt 1996)
  EcoSpold01Location=CH
  Uncertainty: & basic uncertainty of 3; Data from one inventory study (Labhardt 1996)
  properties: dry mass 1 kg, wet mass 1 kg
- electricity, medium voltage: 18800 kWh
  (same comment as for sand)
- synthetic rubber: 473 kg
  (same comment as for polyethylene, high density, granulate)
  properties: wet mass 1 kg, dry mass 1 kg, carbon content, fossil 0.871949, heating value, net 26.42 MJ
  note on carbon content, fossil: EPDM (Ethylene-propene-diene terpolymer) rubber is a terpolymer of ethylene, propene, and a diene with the residual unsaturated portion of the diene in the side chain (ecoinvent v2.2 report 7-part XX & Ullmann). Chemical formula (deduced from Evidences of Solvent-Induced Miscibility in Polychloroprene-co-Ethylene-Propene Diene Terpolymer Blends, Dubey et al., Journal of Applied Polymer Science, 2009, 111:1884–1891): C20H35
- diesel, burned in building machine: 31000 MJ
  Data from one inventory study (Labhardt 1996)
  EcoSpold01Location=GLO
  Uncertainty: & basic uncertainty of 3; Data from one inventory study (Labhardt 1996)
  properties: heating value, net 1 MJ
- waste rubber, unspecified: -473 kg
  (same comment as for sand)
  production volume 473 kg
    (same comment as for waste polyethylene)
  properties: carbon content, fossil 0.853, wet mass 1 kg, dry mass 1 kg, heating value, net 27.19 MJ
- concrete, sole plate and foundation: 474 m3
  (same comment as for sand)
  properties: dry mass 2205 kg, water content 0.0816327, wet mass 2385 kg

## Emissions to nature
- Water [water, unspecified]: 18785 m3; name water_to_water_unspecified; = (tap_water_input/1000)*(1-fraction_TW_to_air); lognormal variance with pedigree 0.0807, pedigree (2,2,5,1,1)
  Calculated value based on literature values and expert opinion. See comments in the parametres' comment field.
  property fraction, origin: salt water 0; name fraction_origin_salt_water_Ww
  property fraction, origin: fresh water 1; name fraction_origin_fresh_water_Ww
  property fraction, origin: unspecified 0; name fraction_origin_unspecified_Ww
  property wet mass 1000 kg; name WM
  property water in wet mass 1000 kg; name WWM
  property dry mass 0 kg; name DM
  property carbon content, fossil 0; name C_content_fossil
  property carbon content, non-fossil 0; name C_content_non_fossil
- Water [air, unspecified]: 3315 m3; name water_to_air_unspecified; = (tap_water_input/1000*fraction_TW_to_air); lognormal variance with pedigree 0.0807, pedigree (2,2,5,1,1)
  (same comment as for Water)
  property fraction, origin: fresh water 1; name fraction_origin_fresh_water
  property fraction, origin: unspecified 0; name fraction_origin_unspecified
  property fraction, origin: salt water 0; name fraction_origin_salt_water

## Sampling procedure
data from literature

## Extrapolations
This dataset has been extrapolated from year 1996 to the year of the calculation (2021). The uncertainty has been adjusted accordingly.

## Review by Niels Jungbluth 2003-06-11
Passed.
