# maize starch production

Dataset: EcoSpold 2, unit process
Geography: DE
Time period: 2002-01-01 to 2021-12-31
Technology level: current
Classification: ISIC rev.4 ecoinvent: 1062:Manufacture of starches and starch products
Classification: EcoSpold01Categories: agricultural production/plant production
Tags: ConvertedDataset
Scenario: Business-as-Usual
System model: Allocation, cut-off by classification
Share of production covered: 100 %
Generated by: Thomas Nemecek
Published in: Nemecek, T. 2007
Database: ecoinvent
isCopyrightProtected: true
accessRestrictedTo: 1

## General comment
This dataset represents the production of 1 kg of maize starch with a water content of 14% by weight.
[This dataset was already contained in the ecoinvent database version 2. It was not individually updated during the transfer to ecoinvent version 3. Life Cycle Impact Assessment results may still have changed, as they are affected by changes in the supply chain, i.e. in other datasets. This dataset was generated following the ecoinvent quality guidelines for version 2. It may have been subject to central changes described in the ecoinvent version 3 change report (http://www.ecoinvent.org/database/ecoinvent-version-3/reports-of-changes/), and the results of the central updates were reviewed extensively. The changes added e.g. consistent water flows and other information throughout the database. The documentation of this dataset can be found in the ecoinvent reports of version 2, which are still available via the ecoinvent website. The change report linked above covers all central changes that were made during the conversion process.]

## Included activities start
From reception of the maize grain at the factory gate.

## Included activities end
This activity ends with the production of starch from maize. This dataset includes the production steps required to obtain maize starch from maize corns such as mechanical separation, swelling in process water, milling of the swelled corns, desiccation and drying of the extracted starch. Processing of process water and infrastructure use were included. This dataset doesn't include emissions to air and waste generation as no data related to these emissions was found.

## Geography
Values refer to the situation in Germany.

## Technology
Refers to typical maize starch production in Germany. This technology includes the following manufacturing steps: mechanical separation of impurities; soaking of the maize grains for about 40 hours in 50 °C warm process water; milling of the soaked maize and separation of the germ. The germ is dried and pressed into corn oil; mechanical separation of starch from other components; mechanical desiccation and thermal drying of the extracted starch to obtain a final product with a maximum water content of 14% by weight; evaporation of the process water to obtain the by-products of maize such as gluten and maize-gluten feed.
References
Würdinger E., Roth U., Wegener A. & Peche R. (2003) Kunststoffe aus Nachwachsenden Rohstoffen: Vergleichende Ökobilanz für Loose-fill-Packmittel aus Stärke bzw. aus Polystyrol". Final report. BIfA, IFEU, Flo-Pak (eds.), Projektförderung: Deutsche Bundesstiftung Umwelt; Augsburg, März 2003, 514 p.

## Time period
Year when the data for this inventory was delivered.

## Parameters
- fraction, process water, to air: 0.9 dimensionless; name fraction_PW_to_air; lognormal variance with pedigree 0.092025, pedigree (4,4,3,2,4)
  Literature value (Statistics Canada, 2007 & Shaffer, K.H., 2008, Consumptive water use in the Great Lakes Basin, USGS) (Vionnet, S., Quantis Water Database - Technical Report, 2012).
- fraction, tap water, to air: 0.9 dimensionless; name fraction_TW_to_air; = fraction_PW_to_air; lognormal variance with pedigree 0.092025, pedigree (4,4,3,2,4)
  Calculated value. See comment in the other parametres present in this dataset. Tap water is considered to be always used as process water, thus process water fractions to air are applied to all tap water input flows to calculate the amount of water consumed in the processes.

## Reference product
- maize starch: 1 kg; source Würdinger E. 2003; CPC 23220: Starches; inulin; wheat gluten; dextrins and other modified starches; By-product classification allocatable product
  EcoSpold01Location=DE
  Literature Value.
  production volume 2.7e8 kg
    460'000 tons in Germany (1998)
    Page 21 in LCM International (2002). Evaluation of the Community Policy for Starch and Starch Products <http://ec.europa.eu/agriculture/eval/reports/amidon/chap2.pdf>
  property heating value, net 11.64 MJ
    LHV is calculated based on the Carbon content of the product. More details can be found on the respective documentation.
  property carbon content, non-fossil 0.46
    C-content of starch is considered 46% on dry mass basis (from "Evolutionary and Biochemical Aspects", A.D. Kay and T. Vrede (in Global Ecology, 2010, Elsevier B.V., S.E. Jørgensen Ed.)).
  property carbon content 0.46
    carbon content on a dry matter basis (reserved; not for manual entry)
  properties: water content 0.162791, water in wet mass 0.14 kg, dry mass 0.86 kg, wet mass 1 kg, price 0.115 EUR2005, carbon content, fossil 0, carbon allocation 0.3956 kg

## Inputs from technosphere
- electricity, medium voltage: 0.25444 kWh; source Würdinger E. 2003; lognormal variance with pedigree 0.0407, pedigree (2,2,5,1,1)
  EcoSpold01Location=DE
  Literature Value.
- heat, district or industrial, natural gas: 3.988 MJ; source Würdinger E. 2003; lognormal variance with pedigree 0.0407, pedigree (2,2,5,1,1)
  Literature Value.
  EcoSpold01Location=RER
  properties: heating value, net 1 MJ
- tap water: 1.956 kg; name tap_water_input; source Würdinger E. 2003; lognormal variance with pedigree 0.0407, pedigree (2,2,5,1,1)
  Literature Value.
  EcoSpold01Location=RER
  properties: dry mass 0.000337476 kg, wet mass 1 kg, carbon content, fossil 0.00178991, water content 2962.17
  note on carbon content, fossil: Bicarbonate content is 2.93 mol/m3. CO2 content is 0.1 mol/m3 (ecoinvent v2.2 report 8, Tab 93.1).
- maize grain: 1.261 kg; source Würdinger E. 2003; lognormal variance with pedigree 0.0407, pedigree (2,2,5,1,1)
  Literature Value.
  properties: carbon content, non-fossil 0.46957, dry mass 0.86 kg, water content 0.162791, wet mass 1 kg
- wastewater from maize starch production: -0.000691 m3; name wastewater_output; source Würdinger E. 2003; lognormal variance with pedigree 0.0407, pedigree (2,2,5,1,1)
  Literature Value.
  EcoSpold01Location=CH
  production volume 186570 m3
    Calculated from the production volume of maize starch in proportion to the respective output amounts.
  property price 0 EUR2005; name wastewater_output_price_EUR2005
  properties: water content 258.64, dry mass 3.85149 kg, wet mass 1000 kg, carbon content, non-fossil 0.825003
  note on carbon content, non-fossil: COD= 7.34 kg/m3 (Tab A.19, ecoinvent v2.2 report 13_I). COD was converted to TOC, using conversion factors in Tab 4.10 (ecoinvent v2.2 report 13_IV). TOC was considered as Total Carbon.
- chemical factory, organics: 4e-10 unit; lognormal variance with pedigree 0.3407, pedigree (2,2,5,1,1)
  EcoSpold01Location=RER
  Estimation. No data was found on the use of infrastructure. Therefore “chemical factory, organics” was used as a proxy.

## Emissions to nature
- Water [air, unspecified]: 0.0011385 m3; name water_to_air_unspecified; lognormal variance with pedigree 0.0807, pedigree (2,2,5,1,1)
  Calculated value based on literature values and expert opinion. See comments in the parametres' comment field.
  property fraction, origin: salt water 0; name fraction_origin_salt_water
  property fraction, origin: fresh water 1; name fraction_origin_fresh_water
  property fraction, origin: unspecified 0; name fraction_origin_unspecified
- Water [water, unspecified]: 0.0001265 m3; name water_to_water_unspecified; lognormal variance with pedigree 1.21, pedigree (5,5,5,5,5)
  (same comment as for Water)
  property carbon content, fossil 0; name C_content_fossil
  property carbon content, non-fossil 0; name C_content_non_fossil
  property water in wet mass 1000 kg; name WWM
  property fraction, origin: unspecified 0; name fraction_origin_unspecified_Ww
  property fraction, origin: salt water 0; name fraction_origin_salt_water_Ww
  property fraction, origin: fresh water 1; name fraction_origin_fresh_water_Ww
  property wet mass 1000 kg; name WM
  property dry mass 0 kg; name DM

## Sampling procedure
Data based on a detailed literature study.

## Extrapolations
This dataset has been extrapolated from year 2002 to the year of the calculation (2021). The uncertainty has been adjusted accordingly.

## Review by Emilia Moreno Ruiz 2012-03-29
trainee DS; ok, Diego Lima Medeiros

## Review by Maggie Osses 2007-10-24
Passed.
