# tungsten carbide powder production

Dataset: EcoSpold 2, unit process
Geography: CN
Time period: 2014-01-01 to 2021-12-31
Technology level: current
Classification: ISIC rev.4 ecoinvent: 2420:Manufacture of basic precious and other non-ferrous metals
Synonyms: WC-powder
Scenario: Business-as-Usual
System model: Allocation, cut-off by classification
Generated by: Nora Minas
Published in: Ma X. 2017
Database: ecoinvent
isCopyrightProtected: false
accessRestrictedTo: 1

## General comment
This dataset is based on a published inventory representing Chinese tungsten carbide production (Ma et al.,2017). No direct emissions are reported in this inventory and thus direct emission were taken from a publishes inventory by Furberg et al. (2019) which represents tungsten carbide production outside of China assuming that direct emissions are roughly the same. Specific information on the technology used for Chinese tungsten carbide production were not available in the publication by Ma et al. (2017) and thus it is assumed that the process is similar to the one described in the global dataset. Due to this lack of information the reasons for the differences in energy consumption and different inputs of gases (N2 vs H2, in the Chines and global dataset, respectively) remains unclear.
Furberg, A., Arvidsson, R., Molander, S., 2019. Environmental life cycle assessment of cemented carbide (WC-Co) production. J. Clean. Prod. 209, 1126–1138. https://doi.org/10.1016/j.jclepro.2018.10.272
2017, Ma X., Qi C., Ye L., Yang D., Hong J., Life cycle assessment of tungsten carbide powder production: A case study in China, Journal of Cleaner Production, 149, 936-944, 1 - Article

## Included activities start
The activity starts when the raw material enters the process

## Included activities end
This activity ends with the production of 1 Kg WC-powder

## Geography
This dataset represent tungsten carbide powder production in China. The dataset is based on a published inventory by Ma et al. (2017) which represents tungsten mining and tungsten carbide sites located in Jiangsu (CN) and Jiangxi Province (CN), respectively. It is unclear how many productions sites were taken into account for this study. Annual tungsten mining and tungsten carbide production capacities were reported to be 5.0 *10^5 and 1.5 _*10^3 t, respectively in 2014.

## Technology
It is assumed that the technology is identical to the one described in the global dataset with the ex-ception of the use of N2 gas instead of H2 gas.
Furberg, A., Arvidsson, R., Molander, S., 2019. Environmental life cycle assessment of cemented carbide (WC-Co) production. J. Clean. Prod. 209, 1126–1138. https://doi.org/10.1016/j.jclepro.2018.10.272

## Reference product
- tungsten carbide powder: 1 kg; By-product classification allocatable product; CPC 41601: Tungsten, molybdenum, tantalum, magnesium, cobalt, cadmium, titanium, zirconium, beryllium, gallium, hafnium, […]; CAS 12070-12-1
  production volume 19740.2 kg
    Chinese Tungsten Carbide production was 19.740 t in 2010 according to Liedtke and Schmidt (2014)
  property price 32.39 EUR2005
    Geometric mean of prices from manufacturers' listings on Alibaba (05/06/2020); long term market data were not available.
  property carbon content 0.061
    carbon content on a dry matter basis (reserved; not for manual entry)
  properties: carbon content, fossil 0.061, water content 0, wet mass 1 kg, tungsten content 0.939, water in wet mass 0 kg, dry mass 1 kg, carbon allocation 0.061 kg

## Inputs from technosphere
- electricity, medium voltage: 15.51 kWh; source Ma X. 2017; lognormal variance with pedigree 0.0518, pedigree (2,5,5,5,2)
- ammonium paratungstate: 1.3072 kg; lognormal variance with pedigree 0.012, pedigree (2,5,2,5,2)
  Amount calculated based on the tungsten balance. Assumption W content of APT 0.702, tungsten content of tungsten carbide powder 0.939.
  properties: wet mass 1 kg, tungsten content 0.718327, dry mass 0.977 kg, water content 0.0235415
  note on tungsten content: tungsten content on a dry matter basis. According to Ma et al. (2017) APT has a WO3 content of 0.885. The conversion factor from WO3 to W is 0.793
- nitrogen, liquid: 0.0508639 kg; name input_nitrogen; = 1.165*(43.66/1000); source Ma X. 2017; lognormal variance with pedigree 0.0052, pedigree (2,4,3,1,1)
  Conversion from m3 on Kg by assuming a density of 1.165 Kg/m3 at 20 °C and 1 atm
  properties: wet mass 1 kg, dry mass 1 kg
- compressed air, 700 kPa gauge: 0.10549 m3; source Ma X. 2017; lognormal variance with pedigree 0.0052, pedigree (2,4,3,1,1)
- carbon black: 0.07 kg; source Ma X. 2017; lognormal variance with pedigree 0.0518, pedigree (2,5,5,5,2)
  Used for carburization
  properties: carbon content, fossil 1, dry mass 1 kg, wet mass 1 kg, heating value, net 25.76 MJ

## Inputs from nature
- Water, unspecified natural origin [natural resource, in water]: 0.00126 m3; source Ma X. 2017; lognormal variance with pedigree 0.0052, pedigree (2,4,3,1,1)

## Emissions to nature
- Carbon dioxide, fossil [air, non-urban air or from high stacks]: 0.013 kg; source Furberg A.  2019; lognormal variance with pedigree 0.0499, pedigree (2,5,5,3,2)
- Ammonia [air, non-urban air or from high stacks]: 0.094 kg; source Furberg A.  2019; lognormal variance with pedigree 0.0912, pedigree (2,5,5,5,2)
- Nitrogen [air, unspecified]: 0.00340788 kg; = input_nitrogen*0.067; lognormal variance with pedigree 0.0506, pedigree (5,5,3,1,1)
  Same fugitive loss is assumed for N2 as for H2 in the global dataset (6.7 %)
- Water [air, non-urban air or from high stacks]: 0.00126 m3; lognormal variance with pedigree 0.0512, pedigree (5,5,3,1,2)
  Assumption: all water is assumed to evaporate.

## Sampling procedure
Literature

## Extrapolations
This dataset has been extrapolated from year 2020 to the year of the calculation (2021). The uncertainty has been adjusted accordingly.

## Review by Louis Brimacombe 2020-03-11
Review had one question regarding data comparison CN v GLO datasets but source did not answer.
