# treatment of residue from mechanical treatment, laser printer, municipal incineration with fly ash extraction

Dataset: EcoSpold 2, unit process
Geography: CH
Time period: 2006-01-01 to 2021-12-31
Technology level: current
Classification: ISIC rev.4 ecoinvent: 3821:Treatment and disposal of non-hazardous waste
Synonyms: Siedlungsabfallverbrennung; municipal waste incineration; Kehrichtverbrennung
Scenario: Business-as-Usual
System model: Allocation, cut-off by classification
Share of production covered: 100 %
Generated by: Gabor Doka
Published in: Doka G. 2015
Database: ecoinvent
isCopyrightProtected: true
accessRestrictedTo: 1

## General comment
This dataset represents the activity of waste disposal of residue from mechanical treatment, laser printer in a municipal solid waste incinerator (MSWI) // Recommended use of this dataset: Only for incineration of shredder residues generated in the recycling (mechanical treatment) of laser printers // Inventoried waste contains 1.92% rubber; 47.1% Plastics from electronic consumer goods; 47.1% Plastics from electronic industrial goods; 1.42% MSWI iron scrap; 0.151% Alu in MSW; 2.25% wiring copper; . // Waste composition (wet, in ppm): upper heating value 34.74 MJ/kg; lower heating value 33.3 MJ/kg; H2O 8644.9; O 50262; H 71805; C 784170; S 411.86; N 12537; P 482.64; B n.a.; Cl 6388.1; Br 5184.3; F 235.65; I n.a.; Ag n.a.; As 7.0695; Ba 166.84; Cd 142.06; Co 27.785; Cr 66.493; Cu 25690; Hg 0.80123; Mn 40.518; Mo 2.8278; Ni 487.12; Pb 144.39; Sb 4523; Se 1.8471; Sn 200.84; V 4.2501; Zn 725.91; Be 0.43978; Sc n.a.; Sr 77.842; Ti 4220; Tl 0.35183; W n.a.; Si 3233.4; Fe 13043; Ca 2933.4; Al 3901.8; K 110.28; Mg n.a.; Na 131.49; // Share of carbon in waste that is biogenic 0%. // Share of metals in waste not oxidised and bulk-recyclable (exclude very small or thin parts) Iron: 88.6%; Alu: 38.39%; Copper: 87.53%. // Recovery of metal scrap from bottom ash to recycling: 6.6787g iron scrap, 0.41595g aluminium scrap, 6.8803g copper scrap. From this waste, the FLUWA process in the technology mix recovers 0.000882kg (DM) of a hydroxide sludge to be recycled in zinc furnaces. // Ultimately one kg of this waste produces 0.08557 kg of bottom ash (can include some washed ash) and 0.0115 kg of residues, which are landfilled (technology mix). Additional solidification of residues with 0.0046 kg of cement.Net energy production: 4.28MJ/kg electric energy and 8.29MJ/kg thermal energy. //

## Included activities start
waste incineration from waste reception gate and delivery into waste bunker at incinerator plant site (without transports to the incinerator)

## Included activities end
Waste-specific short-term emissions to water from leachate. Long-term emissions from landfill to ground water.

## Geography
Specific to the technology mix encountered in Switzerland in 2012.

## Technology
average Swiss MSWI plants in 2010 (grate incinerators) with electrostatic precipitator for fly ash (ESP), wet flue gas scrubber and 25% SNCR , 42.77% SCR-high dust , 32.68% SCR-low dust -DeNOx facilities and 0% without Denox (weighted according to mass of burnt waste, representing Swiss average). Efficiency of iron scrap separation from slag : 58%. Efficiency of non-ferrous scrap separation from slag : 31%. The technology mix for this dataset includes a filter ash treatment (FLUWA) of a share of 46.22%. Gross electric efficiency technology mix 15.84% and Gross thermal efficiency technology mix 28.51%

## Time period
Waste composition as given in literature reference, theoretical data or other source. Transfer coefficients for modern MSWI.

## Reference product
- residue from mechanical treatment, laser printer: -1 kg; name RP_amount_1; CPC 39: Wastes or scraps; By-product classification Waste
  Main reference product of this activity (supply of disposal service).
  production volume 649940 kg; name RP_PV_1
    based on corresponding global production volume of MSW fraction in conventional MSWI (wo fly ash extraction) and scaled down to annual Swiss incinerated MSW mass of 3.02 mio. tonnes.
  property heating value, net 33.3 MJ
    Value taken from the general comment of the treatment dataset.
  property price 0 EUR2005; name RP_amount_1_price_EUR2005
    Waste products are assigned a price of zero as they are assumed to require further treatment.
  property carbon content 0.791
    carbon content on a dry matter basis (reserved; not for manual entry)
  properties: water in wet mass 0.0086449 kg, water content 0.0087202, oxygen content 0.050701, hydrogen content 0.072431, arsenic content 7.1311e-6, barium content 0.00016829, cobalt content 2.8028e-5, chlorine content 0.0064438, fluorine content 0.0002377, sulfur content 0.00041545, nitrogen content 0.012646, chromium content 6.7073e-5, copper content 0.025914, cadmium content 0.0001433, bromine content 0.0052295, lead content 0.00014565, phosphorus content 0.00048685, molybdenum content 2.8525e-6, beryllium content 4.4362e-7, vanadium content 4.2871e-6, manganese content 4.0871e-5, antimony content 0.0045624, selenium content 1.8632e-6, tin content 0.00020259, mercury content 8.0821e-7, nickel content 0.00049137, zinc content 0.00073224, silicon content 0.0032616, strontium content 7.852e-5, sodium content 0.00013264, titanium content 0.0042568, iron content 0.013156, thallium content 3.5489e-7, aluminium content 0.0039359, potassium content 0.00011125, wet mass 1 kg, dry mass 0.99136 kg, calcium content 0.0029589, carbon content, fossil 0.791, carbon allocation 0.784166 kg

## By-products
All rows: pedigree (1,1,1,1,1)
- copper scrap, sorted, pressed: 0 kg; CPC 39361: Waste and scrap of copper; By-product classification Recyclable
  Copper scrap recovered from this waste.
  Uncertainty: uncertainty calculated from uncertainty in waste composition, uncertainty of share of recyclable metal, uncertainty of transfer coefficient to bottom ash, uncertainty of the efficiency of scrap removal in MSWI plant.
  production volume 0 kg
    calculated in proportion to reference product waste input to incinerator
  property price 2.84 EUR2005
    Temporary price data. Calculated as 90% of purchasers price based on: Source: USGS Mineral Yearbook 2007, Table 1 in <http://minerals.usgs.gov/minerals/pubs/commodity/recycle/myb1-2007-recyc.pdf>
  property carbon content 0
    carbon content on a dry matter basis (reserved; not for manual entry)
  properties: water content 0, dry mass 1 kg, wet mass 1 kg, carbon content, non-fossil 0, carbon content, fossil 0, water in wet mass 0 kg, carbon allocation 0 kg
- metalliferous hydroxide sludge: 0 kg; By-product classification Recyclable; CPC 1429: Other non-ferrous metal ores and concentrates (other than uranium or thorium ores and concentrates)
  Metalliferous hydroxide sludge from filter ash leaching (FLUWA).
  Uncertainty: uncertainty is calculated from uncertainties in waste composition and transfer coefficients to filter ash in incinerator and the uncertainty of the transfer coefficients of the FLUWA process.
  production volume 0 kg
    calculated in proportion to reference product waste input to incinerator
  property heating value, net 0 MJ
    Non combustible products are assumed to have an LHV equal to zero (0).
  property price 0.0042 EUR2005
    World market value of manure, deflated with barley world market price and consumer price index, based on [http://www.gov.pe.ca/photos/original/af_NM_manconv.pdf].
  property carbon content 0.046248
    carbon content on a dry matter basis (reserved; not for manual entry)
  properties: bromine content 0.1161, copper content 0.0014184, mercury content 1.6554e-6, antimony content 0.055615, titanium content 0.00039242, manganese content 7.5369e-6, cobalt content 0.00077723, vanadium content 4.5659e-6, chromium content 0.00026895, lead content 0.0028447, nickel content 0.00049844, zinc content 0.14459, tin content 0.00019145, strontium content 1.0066e-6, beryllium content 7.4519e-6, selenium content 2.2243e-5, thallium content 4.0315e-6, iron content 0.0001861, potassium content 0.00079545, calcium content 0.033552, carbon content, fossil 0.046248, silicon content 0.00016789, aluminium content 0.00017675, wet mass 1 kg, water in wet mass 0.75 kg, barium content 5.3244e-5, sulfur content 0.027969, dry mass 0.25 kg, oxygen content 0.32321, fluorine content 0.003898, water content 3, sodium content 0.0012247, molybdenum content 0.00019651, cadmium content 0.054867, chlorine content 0.17415, arsenic content 7.4267e-5, phosphorus content 0.01049, carbon allocation 0.011562 kg
- aluminium scrap, post-consumer, prepared for melting: 0 kg; By-product classification Recyclable; CPC 39363: Waste and scrap of aluminium
  Aluminium scrap recovered from this waste.
  Uncertainty: uncertainty calculated from uncertainty in waste composition, uncertainty of share of recyclable metal, uncertainty of transfer coefficient to bottom ash, uncertainty of the efficiency of scrap removal in MSWI plant.
  production volume 0 kg
    calculated in proportion to reference product waste input to incinerator
  property price 0.806 EUR2005
    Temporary price data. Calculated as 90% of purchasers price based on: 2005 import and export prices (total trades (USD) divided by total weight (kg) in biggest economies of the world: EU27, USA, Brasil, China, India, Japan and Russia) from UN Commodity Trade Statistics Database (http://data.un.org/Explorer.aspxDatabase [Accessed 2011.06.17]). Commodity: Waste or scrap, aluminium
  property carbon content 0
    carbon content on a dry matter basis (reserved; not for manual entry)
  properties: carbon content, fossil 0, water in wet mass 0 kg, water content 0, wet mass 1 kg, carbon content, non-fossil 0, dry mass 1 kg, carbon allocation 0 kg
- heat, for reuse in municipal waste incineration only: 0 MJ; name E_th_prod_MSWI; By-product classification allocatable product; CPC 17300: Steam and hot water
  Net useful heat generated from this waste and used in internal MSWI plant energy redistribution.
  Uncertainty: uncertainty is calculated from uncertainties in waste composition and uncertainties in energy efficiency and the uncertainty in internal energy demand
  production volume 5.3899e6 MJ
    calculated in proportion to reference product waste input to incinerator
  property true value relation 0.1842; name E_th_prod_MSWI_true_value_relation
    property to calculate "true value" from
  property exergy 0.1842 MJ; name E_th_prod_MSWI_exergy
    This exergy property is based on the exergy content of the product.
  property price 0.0106 EUR2005; name E_th_prod_MSWI_price_EUR2005
    Average European district heat price from Ecoheatcool and Euroheat 2005-2006, Ecoheat Work package 1: The European heat market. Final report. 10.6 EUR/GJ i s the price of district heat. http://www.solarthermalworld.org/files/Ecoheatcool%20WP1%20Web.pdf?download
- electricity, for reuse in municipal waste incineration only: 0 kWh; name E_el_prod_MSWI; CPC 17100: Electrical energy; By-product classification allocatable product
  Net electricity generated from this waste and used in internal MSWI plant energy redistribution.
  Uncertainty: uncertainty is calculated from uncertainties in waste composition and uncertainties in energy efficiency and the uncertainty in internal energy demand
  production volume 772590 kWh
    calculated in proportion to reference product waste input to incinerator
  property exergy 3.6 MJ; name E_el_prod_MSWI_exergy
    This exergy property is based on the exergy content of the product.
  property true value relation 3.6; name E_el_prod_MSWI_true_value_relation
    property to calculate "true value" from
  property price 0.1 EUR2005; name E_el_prod_MSWI_price_EUR2005
    Estimated to be the same price as in case of electricity, medium voltage.
- iron scrap, sorted, pressed: 0 kg; CPC 39310: Slag, dross, scalings and other waste from the manufacture of iron or steel; By-product classification Recyclable
  Iron scrap recovered from this waste.
  Uncertainty: uncertainty calculated from uncertainty in waste composition, uncertainty of share of recyclable metal, uncertainty of transfer coefficient to bottom ash, uncertainty of the efficiency of scrap removal in MSWI plant.
  production volume 0 kg
    calculated in proportion to reference product waste input to incinerator
  property price 0.175 EUR2005
    Temporary price data. Calculated as 90% of purchasers price based on: 2005 import and export prices (total trades (USD) divided by total weight (kg) in biggest economies of the world: EU27, USA, Brasil, China, India, Japan and Russia) from UN Commodity Trade Statistics Database (http://data.un.org/Explorer.aspxDatabase [Accessed 2011.06.20]). Commodity: Waste or scrap, of cast iron
  property carbon content 0
    carbon content on a dry matter basis (reserved; not for manual entry)
  properties: carbon content, non-fossil 0, water in wet mass 0 kg, wet mass 1 kg, dry mass 1 kg, water content 0, carbon content, fossil 0, carbon allocation 0 kg

## Inputs from technosphere
- sodium hydroxide, without water, in 50% solution state: 0.0011337 kg; lognormal variance with pedigree 0.18983, pedigree (1,1,4,1,1)
  Auxilliary inputs for the flue gas treatment stage of the incinerator plant, and partially in the filter ash treatment (FLUWA).
  Uncertainty: uncertainty calculated from uncertainty in average NaOH input, of transfer coefficients in the incinerator, and the uncertainty of the waste composition of this waste
  properties: dry mass 1 kg, wet mass 1 kg, heating value, net 3.03 MJ
- heat, district or industrial, natural gas: 0.41745 MJ; lognormal variance with pedigree 0.67536, pedigree (1,1,4,1,1)
  Input to DeNOx stage, to heat up flue gas in low-dust SCR.
  Uncertainty: uncertainty calculated from uncertainty in average DeNOx input, uncertainty in the share of thermal NOx, uncertainty of nitrogen content in average municipal waste and the uncertainty in nitrogen content in *this* waste.
  properties: heating value, net 1 MJ
- chemical, inorganic: 0.00016443 kg; lognormal variance with pedigree 0.22049, pedigree (1,1,4,1,1)
  Auxilliary inputs for the wastewater treatment stage of the incinerator plant. Proxy for Polyelectrolyte.
  Uncertainty: uncertainty calculated from uncertainty in average Polyelectrolyte input, of transfer coefficients in the incinerator, and the uncertainty of the waste composition of this waste
  properties: dry mass 1 kg, wet mass 1 kg, carbon content, fossil 0.003
- titanium dioxide: 0.00013986 kg; lognormal variance with pedigree 1.0322, pedigree (1,1,4,1,1)
  Input to DeNOx stage (TiO2 catalyst carrier)
  Uncertainty: uncertainty calculated from uncertainty in average DeNOx input, uncertainty in the share of thermal NOx, uncertainty of nitrogen content in average municipal waste and the uncertainty in nitrogen content in *this* waste.
  properties: wet mass 1 kg, dry mass 1 kg
- chromium oxide, flakes: 2.8543e-6 kg; lognormal variance with pedigree 1.0322, pedigree (1,1,4,1,1)
  Input to DeNOx stage. Active component in SCR catalyst (vanadium pentoxide, V2O5), here approximated with the available chromium trioxide.
  Uncertainty: uncertainty calculated from uncertainty in average DeNOx input, uncertainty in the share of thermal NOx, uncertainty of nitrogen content in average municipal waste and the uncertainty in nitrogen content in *this* waste.
  properties: dry mass 1 kg, wet mass 1 kg
- hydrogen peroxide, without water, in 50% solution state: 0.00077998 kg; lognormal variance with pedigree 0.089701, pedigree (1,1,4,1,1)
  Auxilliary oxidising agent for filter ash treatment (FLUWA).
  Uncertainty: uncertainty calculated from uncertainty in of transfer coefficients in the incinerator, and the uncertainty of the waste composition of this waste
  properties: wet mass 1 kg, dry mass 1 kg, heating value, net 7.13 MJ
- ammonia, anhydrous, liquid: 0.0022324 kg; lognormal variance with pedigree 0.67536, pedigree (1,1,4,1,1)
  Input to DeNOx stage (100% NH3).
  Uncertainty: uncertainty calculated from uncertainty in average DeNOx input, uncertainty in the share of thermal NOx, uncertainty of nitrogen content in average municipal waste and the uncertainty in nitrogen content in *this* waste.
  properties: wet mass 1 kg, dry mass 1 kg
- cationic resin: 4.0608e-6 kg; lognormal variance with pedigree 1.6048, pedigree (1,1,4,1,1)
  Auxilliary input for mercury removal in filter ash treatment (FLUWA).
  Uncertainty: uncertainty calculated from uncertainty in of transfer coefficients in the incinerator, and the uncertainty of the waste composition of this waste
  properties: heating value, net 6.68 MJ, dry mass 0.5 kg, water content 1, carbon content, fossil 0.521606, wet mass 1 kg
- water, decarbonised: 1.9493 kg; lognormal variance with pedigree 0.26368, pedigree (1,1,4,1,1)
  Incinerator process water used in flue gas scrubber stage.
  Uncertainty: uncertainty calculated from uncertainty in average water input, and the uncertainty of the waste composition of this waste
  properties: wet mass 1 kg
- process-specific burdens, slag landfill: 0.085571 kg; lognormal variance with pedigree 0.045773, pedigree (1,1,4,1,1)
  Mass-specific expenditures required for landfilling of bottom ash.;activityLink introduced to establish a direct link to the corresponding regional supply of this product
  Uncertainty: uncertainty is calculated from uncertainties in waste composition and transfer coefficients in incinerator
- waste cement, hydrated: -0.011499 kg; lognormal variance with pedigree 0.071523, pedigree (1,1,4,1,1)
  Hydrated cement output for solidification of landfilled residual material.
  Uncertainty: Uncertainty calculated from uncertainty of the waste composition of this waste and transfer coefficients in the incinerator and of the solidification recipe.
  production volume 7473.9 kg
    calculated in proportion to reference product waste input to incinerator
  properties: dry mass 1 kg, wet mass 1 kg
- slag landfill: 1.5213e-10 unit; lognormal variance with pedigree 0.045773, pedigree (1,1,4,1,1)
  Landfill infrastructure required for landfilling of bottom ash.
  Uncertainty: uncertainty is calculated from uncertainties in waste composition and transfer coefficients in incinerator
- transport, freight, lorry, unspecified: 0.0041293 metric ton*km; lognormal variance with pedigree 0.034982, pedigree (1,1,4,1,1)
  Transport services to transport incineration residues to landfills and filter ash to external treatments (FLUWA).
  Uncertainty: uncertainty calculated from uncertainty of the waste composition of this waste, uncertainty of transfer coefficients and the uncertainty in generic transportation distances
- spent activated carbon with mercury: -4.2745e-6 kg; name BP_amount_1; lognormal variance with pedigree 1.6048, pedigree (1,1,4,1,1)
  Spent ion exchanger charged with mercury, from FLUWA filter ash treatment, approximated here with Spent activated carbon with mercury, deposited undergound in a polyethylene Big Bag.
  Uncertainty: uncertainty calculated from uncertainty in of transfer coefficients in the incinerator, and the uncertainty of the waste composition of this waste.
  production volume 2.77817 kg; = ABS(RP_PV_1 * (BP_amount_1 / RP_amount_1))
    Calculated from production volume of reference product using the relative outputs.
  property price 0 EUR2005; name BP_amount_1_price_EUR2005
  properties: dry mass 1 kg, carbon content, fossil 0.6, wet mass 1 kg, heating value, net 18.18 MJ
- municipal waste incineration facility: 2.5e-10 unit
  Demands per kilogram waste.
- process-specific burdens, residual material landfill: 0.022927 kg; lognormal variance with pedigree 0.062439, pedigree (1,1,4,1,1)
  Mass-specific expenditures required for landfilling of incineration residues.;activityLink introduced to establish a direct link to the corresponding regional supply of this product
  Uncertainty: uncertainty is calculated from uncertainties in waste composition and transfer coefficients in incinerator
- quicklime, milled, packed: 0.0036065 kg; lognormal variance with pedigree 0.38677, pedigree (1,1,4,1,1)
  Auxilliary inputs for the flue gas treatment stage of the incinerator plant.
  Uncertainty: uncertainty calculated from uncertainty in average CaO input, of transfer coefficients in the incinerator, and the uncertainty of the waste composition of this waste
  properties: water content 0.010101, dry mass 0.99 kg, wet mass 1 kg
- residual material landfill: 4.7764e-11 unit; lognormal variance with pedigree 0.062439, pedigree (1,1,4,1,1)
  Landfill infrastructure required for landfilling of incineration residues.
  Uncertainty: uncertainty is calculated from uncertainties in waste composition and transfer coefficients in incinerator
- hydrochloric acid, without water, in 30% solution state: 0.00034967 kg; lognormal variance with pedigree 0.074127, pedigree (1,1,4,1,1)
  Auxilliary inputs for the wastewater treatment stage of the incinerator plant.
  Uncertainty: uncertainty calculated from uncertainty in average HCl input, of transfer coefficients in the incinerator, and the uncertainty of the waste composition of this waste
  properties: heating value, net 3.32 MJ, dry mass 1 kg, wet mass 1 kg
- iron (III) chloride, without water, in 40% solution state: 7.0347e-5 kg; lognormal variance with pedigree 0.26368, pedigree (1,1,4,1,1)
  Auxilliary inputs for the wastewater treatment stage of the incinerator plant.
  Uncertainty: uncertainty calculated from uncertainty in average FeCl3 input, of transfer coefficients in the incinerator, and the uncertainty of the waste composition of this waste
  properties: dry mass 1 kg, wet mass 1 kg
- chemical, organic: 2.7238e-5 kg; lognormal variance with pedigree 0.75214, pedigree (1,1,4,1,1)
  Auxilliary inputs for the wastewater treatment stage of the incinerator plant. Proxy for (pure) Trisodium-trimercapto-s-triazine (CAS 17766-26-6), used as 15% diluted solution, aka TMT15.
  Uncertainty: uncertainty calculated from uncertainty in average TMT15 input, of transfer coefficients in the incinerator, and the uncertainty of the waste composition of this waste
  properties: heating value, net 19.03 MJ, dry mass 1 kg, wet mass 1 kg, carbon content, fossil 0.628
- cement, unspecified: 0.0045998 kg; lognormal variance with pedigree 0.071523, pedigree (1,1,4,1,1)
  Cement required for solidification of landfilled residual material.
  Uncertainty: Uncertainty calculated from uncertainty of the waste composition of this waste, of transfer coefficients in the incinerator and of the solidification recipe.
  properties: wet mass 1 kg, dry mass 1 kg
- copper scrap, sorted, pressed: -0.0068803 kg; lognormal variance with pedigree 0.27641, pedigree (1,1,4,1,1)
  (same comment as for copper scrap, sorted, pressed)
  production volume 4471.8 kg
  properties: dry mass 1 kg, wet mass 1 kg, price 2.84 EUR2005
- metalliferous hydroxide sludge: -0.0035275 kg; lognormal variance with pedigree 0.069857, pedigree (1,1,4,1,1)
  (same comment as for metalliferous hydroxide sludge)
  production volume 2292.7 kg
  properties: bromine content 0.1161, antimony content 0.055615, zinc content 0.14459, calcium content 0.033552, carbon content, fossil 0.046248, wet mass 1 kg, sulfur content 0.027969, dry mass 0.25 kg, oxygen content 0.32321, water content 3, cadmium content 0.054867, chlorine content 0.17415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
- aluminium scrap, post-consumer, prepared for melting: -0.00041595 kg; lognormal variance with pedigree 0.50094, pedigree (1,1,4,1,1)
  (same comment as for aluminium scrap, post-consumer, prepared for melting)
  production volume 270.34 kg
  properties: wet mass 1 kg, dry mass 1 kg, price 0.806 EUR2005
- iron scrap, sorted, pressed: -0.0066787 kg; lognormal variance with pedigree 0.35386, pedigree (1,1,4,1,1)
  (same comment as for iron scrap, sorted, pressed)
  production volume 4340.8 kg
  properties: wet mass 1 kg, dry mass 1 kg, price 0.175 EUR2005

## Inputs from nature
- Oxygen [natural resource, in air]: 2.6642 kg; lognormal variance with pedigree 0.0173497, pedigree (1,1,4,1,1)
  Oxygen from ambient air needed to combust and oxidise this waste. Net demand, i.e. without O2 leaving the plant in flue gas uncombusted.
  Uncertainty: uncertainty is calculated from uncertainties in waste composition and transfer coefficients to flue gas and soild residues in incinerator

## Emissions to nature
- Chromium, ion [water, surface water]: 6.4246e-9 kg; lognormal variance with pedigree 0.66144, pedigree (1,1,4,1,1)
  Emissions to water from waste composition and transfer coefficients in incinerator and landfills.
  Uncertainty: uncertainty is calculated from uncertainties in waste composition and transfer coefficients in incinerator and landfills
- Potassium [air, urban air close to ground]: 5.4486e-7 kg; lognormal variance with pedigree 0.97248, pedigree (1,1,4,1,1)
  Emission to air from waste composition and transfer coefficients.
  Uncertainty: uncertainty is calculated from uncertainties in waste composition and transfer coefficients in incinerator
- Benzene [air, urban air close to ground]: 1.335e-8 kg; lognormal variance with pedigree 0.075042, pedigree (1,1,4,1,1)
  Incomplete combustion product emitted to air.
  Uncertainty: uncertainty calculated from uncertainty in average operation emissions, and the uncertainty of the flue gas volume from this waste.
- COD, Chemical Oxygen Demand [water, ground-, long-term]: 0.005811 kg; lognormal variance with pedigree 0.020086, pedigree (1,1,4,1,1)
  Long-term emissions from landfilling of incineration residues.
  Uncertainty: uncertainty is calculated from uncertainties in waste composition and transfer coefficients in incinerator and landfills.
- BOD5, Biological Oxygen Demand [water, surface water]: 0.00058338 kg; lognormal variance with pedigree 0.026125, pedigree (1,1,4,1,1)
  (same comment as for Chromium, ion)
- Toluene [air, urban air close to ground]: 2.6699e-8 kg; lognormal variance with pedigree 0.075042, pedigree (1,1,4,1,1)
  (same comment as for Benzene)
- TOC, Total Organic Carbon [water, ground-, long-term]: 0.0022994 kg; lognormal variance with pedigree 0.020086, pedigree (1,1,4,1,1)
  (same comment as for COD, Chemical Oxygen Demand)
- Sodium [air, urban air close to ground]: 1.0796e-6 kg; lognormal variance with pedigree 0.94306, pedigree (1,1,4,1,1)
  (same comment as for Potassium)
- Benzene, pentachloro- [air, urban air close to ground]: 7.0531e-11 kg; lognormal variance with pedigree 0.075042, pedigree (1,1,4,1,1)
  (same comment as for Benzene)
- DOC, Dissolved Organic Carbon [water, ground-, long-term]: 0.0022994 kg; lognormal variance with pedigree 0.020086, pedigree (1,1,4,1,1)
  (same comment as for COD, Chemical Oxygen Demand)
- TOC, Total Organic Carbon [water, surface water]: 0.00026002 kg; lognormal variance with pedigree 0.025918, pedigree (1,1,4,1,1)
  (same comment as for Chromium, ion)
- Benzene, hexachloro- [air, urban air close to ground]: 2.7914e-11 kg; lognormal variance with pedigree 0.075042, pedigree (1,1,4,1,1)
  (same comment as for Benzene)
- Sulfate [water, ground-, long-term]: 0.00098833 kg; lognormal variance with pedigree 0.58508, pedigree (1,1,4,1,1)
  (same comment as for COD, Chemical Oxygen Demand)
- COD, Chemical Oxygen Demand [water, surface water]: 0.00059614 kg; lognormal variance with pedigree 0.02594, pedigree (1,1,4,1,1)
  (same comment as for Chromium, ion)
- Phenol, pentachloro- [air, urban air close to ground]: 5.8136e-12 kg; lognormal variance with pedigree 0.075042, pedigree (1,1,4,1,1)
  (same comment as for Benzene)
- Carbon monoxide, fossil [air, urban air close to ground]: 2.2693e-5 kg; lognormal variance with pedigree 0.74917, pedigree (1,1,4,1,1)
  (same comment as for Benzene)
- Nitrate [water, ground-, long-term]: 0.00044964 kg; lognormal variance with pedigree 0.358, pedigree (1,1,4,1,1)
  (same comment as for COD, Chemical Oxygen Demand)
- DOC, Dissolved Organic Carbon [water, surface water]: 0.00026002 kg; lognormal variance with pedigree 0.025918, pedigree (1,1,4,1,1)
  (same comment as for Chromium, ion)
- Benzo(a)pyrene [air, urban air close to ground]: 2.9707e-13 kg; lognormal variance with pedigree 0.37463, pedigree (1,1,4,1,1)
  (same comment as for Benzene)
- Carbon dioxide, fossil [air, urban air close to ground]: 2.8579 kg; lognormal variance with pedigree 0.0098539, pedigree (1,1,4,1,1)
  (same comment as for Potassium)
- Phosphate [water, ground-, long-term]: 4.2845e-5 kg; lognormal variance with pedigree 5.143, pedigree (1,1,4,1,1)
  (same comment as for COD, Chemical Oxygen Demand)
- Sulfate [water, surface water]: 0.00016685 kg; lognormal variance with pedigree 0.4084, pedigree (1,1,4,1,1)
  (same comment as for Chromium, ion)
- Heat, waste [water, surface water]: 5.8843 MJ; lognormal variance with pedigree 0.023436, pedigree (1,1,4,1,1)
  Waste heat generated from heating value of this waste plus any electricity required to process it.
  Uncertainty: uncertainty is calculated from uncertainties in waste composition and uncertainties in energy efficiency and the uncertainty in internal energy demand
- Methane, fossil [air, urban air close to ground]: 2.0025e-7 kg; lognormal variance with pedigree 0.075042, pedigree (1,1,4,1,1)
  (same comment as for Benzene)
- Chloride [water, ground-, long-term]: 0.00080486 kg; lognormal variance with pedigree 0.41933, pedigree (1,1,4,1,1)
  (same comment as for COD, Chemical Oxygen Demand)
- Nitrate [water, surface water]: 0.00016107 kg; lognormal variance with pedigree 0.23723, pedigree (1,1,4,1,1)
  (same comment as for Chromium, ion)
- Heat, waste [air, urban air close to ground]: 25.577 MJ; lognormal variance with pedigree 0.023436, pedigree (1,1,4,1,1)
  (same comment as for Heat, waste)
- Sulfur dioxide [air, urban air close to ground]: 4.2653e-6 kg; lognormal variance with pedigree 0.79413, pedigree (1,1,4,1,1)
  (same comment as for Potassium)
- Bromine [water, ground-, long-term]: 0.00026875 kg; lognormal variance with pedigree 0.46451, pedigree (1,1,4,1,1)
  (same comment as for COD, Chemical Oxygen Demand)
- Phosphate [water, surface water]: 7.0251e-7 kg; lognormal variance with pedigree 0.36908, pedigree (1,1,4,1,1)
  (same comment as for Chromium, ion)
- Water [water, surface water]: 0.000664194 m3; lognormal variance with pedigree 1.1281, pedigree (1,1,4,1,1)
  Process water released to surface water.
  Uncertainty: uncertainty calculated from uncertainty in process water input and the uncertainty of fraction to surface water.
- Ammonia [air, urban air close to ground]: 2.6247e-6 kg; lognormal variance with pedigree 0.73049, pedigree (1,1,4,1,1)
  Nitrogen species emitted to air after DeNOx stage.
  Uncertainty: uncertainty calculated from uncertainty in average N-emissions and uncertainty in the share of thermal NOx and the uncertainty in nitrogen content in *this* waste.
- Fluoride [water, ground-, long-term]: 0.00015722 kg; lognormal variance with pedigree 0.51485, pedigree (1,1,4,1,1)
  (same comment as for COD, Chemical Oxygen Demand)
- Chloride [water, surface water]: 0.0054262 kg; lognormal variance with pedigree 0.16424, pedigree (1,1,4,1,1)
  (same comment as for Chromium, ion)
- Water [air, urban air close to ground]: 0.00185612 m3; lognormal variance with pedigree 0.7457, pedigree (1,1,4,1,1)
  Water vapour from waste humidity, hydrogen oxidation and part of the process water.
  Uncertainty: Uncertainty calculated from uncertainty in waste composition, process water input and the uncertainty of fraction to air.
- Nitrogen oxides [air, urban air close to ground]: 0.00083115 kg; lognormal variance with pedigree 0.73049, pedigree (1,1,4,1,1)
  Sum of fuel-Nox and thermal-NOx emitted to air after DeNOx stage.
  Uncertainty: uncertainty calculated from uncertainty in average N-emissions and uncertainty in the share of thermal NOx and the uncertainty in nitrogen content in *this* waste.
- Arsenic, ion [water, ground-, long-term]: 4.3099e-6 kg; lognormal variance with pedigree 1.3224, pedigree (1,1,4,1,1)
  (same comment as for COD, Chemical Oxygen Demand)
- Bromine [water, surface water]: 0.0048106 kg; lognormal variance with pedigree 0.11755, pedigree (1,1,4,1,1)
  (same comment as for Chromium, ion)
- Dinitrogen monoxide [air, urban air close to ground]: 0.00018698 kg; lognormal variance with pedigree 1.1226, pedigree (1,1,4,1,1)
  (same comment as for Ammonia)
- Barium [water, ground-, long-term]: 0.00012189 kg; lognormal variance with pedigree 1.2554, pedigree (1,1,4,1,1)
  (same comment as for COD, Chemical Oxygen Demand)
- Fluoride [water, surface water]: 6.8585e-5 kg; lognormal variance with pedigree 0.54181, pedigree (1,1,4,1,1)
  (same comment as for Chromium, ion)
- Cyanide [air, urban air close to ground]: 4.0171e-5 kg; lognormal variance with pedigree 1.1226, pedigree (1,1,4,1,1)
  (same comment as for Ammonia)
- Cadmium, ion [water, ground-, long-term]: 2.2816e-5 kg; lognormal variance with pedigree 4.924, pedigree (1,1,4,1,1)
  (same comment as for COD, Chemical Oxygen Demand)
- Arsenic, ion [water, surface water]: 2.6818e-6 kg; lognormal variance with pedigree 1.2112, pedigree (1,1,4,1,1)
  (same comment as for Chromium, ion)
- Phosphorus [air, urban air close to ground]: 4.7895e-7 kg; lognormal variance with pedigree 0.78174, pedigree (1,1,4,1,1)
  (same comment as for Potassium)
- Cobalt [water, ground-, long-term]: 2.4308e-5 kg; lognormal variance with pedigree 1.1014, pedigree (1,1,4,1,1)
  (same comment as for COD, Chemical Oxygen Demand)
- Barium [water, surface water]: 7.079e-8 kg; lognormal variance with pedigree 0.72336, pedigree (1,1,4,1,1)
  (same comment as for Chromium, ion)
- Hydrogen chloride [air, urban air close to ground]: 3.6352e-6 kg; lognormal variance with pedigree 0.45306, pedigree (1,1,4,1,1)
  (same comment as for Potassium)
- Chromium VI [water, ground-, long-term]: 2.7292e-6 kg; lognormal variance with pedigree 2.8135, pedigree (1,1,4,1,1)
  (same comment as for COD, Chemical Oxygen Demand)
- Cadmium, ion [water, surface water]: 2.5266e-8 kg; lognormal variance with pedigree 0.92853, pedigree (1,1,4,1,1)
  (same comment as for Chromium, ion)
- Bromine [air, urban air close to ground]: 2.5896e-6 kg; lognormal variance with pedigree 0.48153, pedigree (1,1,4,1,1)
  (same comment as for Potassium)
- Copper, ion [water, ground-, long-term]: 0.018635 kg; lognormal variance with pedigree 0.26584, pedigree (1,1,4,1,1)
  (same comment as for COD, Chemical Oxygen Demand)
- Cobalt [water, surface water]: 4.5784e-9 kg; lognormal variance with pedigree 1.6596, pedigree (1,1,4,1,1)
  (same comment as for Chromium, ion)
- Hydrogen fluoride [air, urban air close to ground]: 1.5898e-6 kg; lognormal variance with pedigree 0.86716, pedigree (1,1,4,1,1)
  (same comment as for Potassium)
- Mercury [water, ground-, long-term]: 1.6826e-7 kg; lognormal variance with pedigree 1.6382, pedigree (1,1,4,1,1)
  (same comment as for COD, Chemical Oxygen Demand)
- Chromium VI [water, surface water]: 7.5398e-7 kg; lognormal variance with pedigree 1.1037, pedigree (1,1,4,1,1)
  (same comment as for Chromium, ion)
- Arsenic [air, urban air close to ground]: 5.5377e-8 kg; lognormal variance with pedigree 1.3318, pedigree (1,1,4,1,1)
  (same comment as for Potassium)
- Manganese [water, ground-, long-term]: 3.9175e-5 kg; lognormal variance with pedigree 1.0956, pedigree (1,1,4,1,1)
  (same comment as for COD, Chemical Oxygen Demand)
- Copper, ion [water, surface water]: 8.0899e-7 kg; lognormal variance with pedigree 1.1586, pedigree (1,1,4,1,1)
  (same comment as for Chromium, ion)
- Barium [air, urban air close to ground]: 6.5486e-7 kg; lognormal variance with pedigree 0.91365, pedigree (1,1,4,1,1)
  (same comment as for Potassium)
- Molybdenum [water, ground-, long-term]: 2.1802e-6 kg; lognormal variance with pedigree 1.4413, pedigree (1,1,4,1,1)
  (same comment as for COD, Chemical Oxygen Demand)
- Mercury [water, surface water]: 4.2634e-9 kg; lognormal variance with pedigree 1.7746, pedigree (1,1,4,1,1)
  (same comment as for Chromium, ion)
- Cadmium [air, urban air close to ground]: 7.2386e-8 kg; lognormal variance with pedigree 0.95041, pedigree (1,1,4,1,1)
  (same comment as for Potassium)
- Nickel, ion [water, ground-, long-term]: 0.00047611 kg; lognormal variance with pedigree 0.74783, pedigree (1,1,4,1,1)
  (same comment as for COD, Chemical Oxygen Demand)
- Manganese [water, surface water]: 2.5456e-9 kg; lognormal variance with pedigree 1.8911, pedigree (1,1,4,1,1)
  (same comment as for Chromium, ion)
- Cobalt [air, urban air close to ground]: 5.0533e-8 kg; lognormal variance with pedigree 1.1563, pedigree (1,1,4,1,1)
  (same comment as for Potassium)
- Lead [water, ground-, long-term]: 0.00010327 kg; lognormal variance with pedigree 2.3768, pedigree (1,1,4,1,1)
  (same comment as for COD, Chemical Oxygen Demand)
- Molybdenum [water, surface water]: 4.7053e-7 kg; lognormal variance with pedigree 0.92147, pedigree (1,1,4,1,1)
  (same comment as for Chromium, ion)
- Chromium [air, urban air close to ground]: 4.3212e-8 kg; lognormal variance with pedigree 1.046, pedigree (1,1,4,1,1)
  (same comment as for Potassium)
- Antimony [water, ground-, long-term]: 0.0018345 kg; lognormal variance with pedigree 0.41814, pedigree (1,1,4,1,1)
  (same comment as for COD, Chemical Oxygen Demand)
- Nickel, ion [water, surface water]: 3.2117e-7 kg; lognormal variance with pedigree 1.3849, pedigree (1,1,4,1,1)
  (same comment as for Chromium, ion)
- Copper [air, urban air close to ground]: 2.7576e-7 kg; lognormal variance with pedigree 0.31479, pedigree (1,1,4,1,1)
  (same comment as for Potassium)
- Selenium [water, ground-, long-term]: 1.4174e-6 kg; lognormal variance with pedigree 0.96863, pedigree (1,1,4,1,1)
  (same comment as for COD, Chemical Oxygen Demand)
- Lead [water, surface water]: 9.5625e-9 kg; lognormal variance with pedigree 0.78706, pedigree (1,1,4,1,1)
  (same comment as for Chromium, ion)
- Mercury [air, urban air close to ground]: 2.2718e-8 kg; lognormal variance with pedigree 1.6132, pedigree (1,1,4,1,1)
  (same comment as for Potassium)
- Tin, ion [water, ground-, long-term]: 0.00013643 kg; lognormal variance with pedigree 0.97547, pedigree (1,1,4,1,1)
  (same comment as for COD, Chemical Oxygen Demand)
- Antimony [water, surface water]: 0.00088829 kg; lognormal variance with pedigree 0.44439, pedigree (1,1,4,1,1)
  (same comment as for Chromium, ion)
- Manganese [air, urban air close to ground]: 1.2421e-9 kg; lognormal variance with pedigree 1.1343, pedigree (1,1,4,1,1)
  (same comment as for Potassium)
- Vanadium, ion [water, ground-, long-term]: 7.736e-7 kg; lognormal variance with pedigree 2.1114, pedigree (1,1,4,1,1)
  (same comment as for COD, Chemical Oxygen Demand)
- Tin, ion [water, surface water]: 1.7312e-7 kg; lognormal variance with pedigree 0.79717, pedigree (1,1,4,1,1)
  (same comment as for Chromium, ion)
- Molybdenum [air, urban air close to ground]: 3.7208e-9 kg; lognormal variance with pedigree 1.4624, pedigree (1,1,4,1,1)
  (same comment as for Potassium)
- Zinc, ion [water, ground-, long-term]: 0.00032755 kg; lognormal variance with pedigree 1.5211, pedigree (1,1,4,1,1)
  (same comment as for COD, Chemical Oxygen Demand)
- Selenium [water, surface water]: 3.6801e-7 kg; lognormal variance with pedigree 1.0596, pedigree (1,1,4,1,1)
  (same comment as for Chromium, ion)
- Nickel [air, urban air close to ground]: 5.9324e-7 kg; lognormal variance with pedigree 0.78174, pedigree (1,1,4,1,1)
  (same comment as for Potassium)
- Beryllium [water, ground-, long-term]: 4.1273e-7 kg; lognormal variance with pedigree 1.641, pedigree (1,1,4,1,1)
  (same comment as for COD, Chemical Oxygen Demand)
- Vanadium, ion [water, surface water]: 3.0929e-9 kg; lognormal variance with pedigree 1.5271, pedigree (1,1,4,1,1)
  (same comment as for Chromium, ion)
- Lead [air, urban air close to ground]: 1.1449e-8 kg; lognormal variance with pedigree 0.95777, pedigree (1,1,4,1,1)
  (same comment as for Potassium)
- Strontium [water, ground-, long-term]: 7.7758e-5 kg; lognormal variance with pedigree 1.00312, pedigree (1,1,4,1,1)
  (same comment as for COD, Chemical Oxygen Demand)
- Zinc, ion [water, surface water]: 4.4255e-8 kg; lognormal variance with pedigree 0.64767, pedigree (1,1,4,1,1)
  (same comment as for Chromium, ion)
- Antimony [air, urban air close to ground]: 3.6208e-9 kg; lognormal variance with pedigree 0.54436, pedigree (1,1,4,1,1)
  (same comment as for Potassium)
- Titanium, ion [water, ground-, long-term]: 0.0012629 kg; lognormal variance with pedigree 0.72827, pedigree (1,1,4,1,1)
  (same comment as for COD, Chemical Oxygen Demand)
- Beryllium [water, surface water]: 2.7369e-10 kg; lognormal variance with pedigree 2.2823, pedigree (1,1,4,1,1)
  (same comment as for Chromium, ion)
- Selenium [air, urban air close to ground]: 2.2036e-8 kg; lognormal variance with pedigree 1.5056, pedigree (1,1,4,1,1)
  (same comment as for Potassium)
- Thallium [water, ground-, long-term]: 2.7002e-7 kg; lognormal variance with pedigree 1.44, pedigree (1,1,4,1,1)
  (same comment as for COD, Chemical Oxygen Demand)
- Strontium [water, surface water]: 5.089e-8 kg; lognormal variance with pedigree 1.6722, pedigree (1,1,4,1,1)
  (same comment as for Chromium, ion)
- Tin [air, urban air close to ground]: 1.2499e-10 kg; lognormal variance with pedigree 0.95041, pedigree (1,1,4,1,1)
  (same comment as for Potassium)
- Silicon [water, ground-, long-term]: 0.00063933 kg; lognormal variance with pedigree 4.5786, pedigree (1,1,4,1,1)
  (same comment as for COD, Chemical Oxygen Demand)
- Titanium, ion [water, surface water]: 8.5912e-7 kg; lognormal variance with pedigree 0.39083, pedigree (1,1,4,1,1)
  (same comment as for Chromium, ion)
- Vanadium [air, urban air close to ground]: 1.4994e-8 kg; lognormal variance with pedigree 1.4045, pedigree (1,1,4,1,1)
  (same comment as for Potassium)
- Iron, ion [water, ground-, long-term]: 0.0032983 kg; lognormal variance with pedigree 0.48273, pedigree (1,1,4,1,1)
  (same comment as for COD, Chemical Oxygen Demand)
- Thallium [water, surface water]: 2.5043e-10 kg; lognormal variance with pedigree 1.7288, pedigree (1,1,4,1,1)
  (same comment as for Chromium, ion)
- Zinc [air, urban air close to ground]: 4.846e-7 kg; lognormal variance with pedigree 0.73076, pedigree (1,1,4,1,1)
  (same comment as for Potassium)
- Calcium, ion [water, ground-, long-term]: 0.0026515 kg; lognormal variance with pedigree 0.47972, pedigree (1,1,4,1,1)
  (same comment as for COD, Chemical Oxygen Demand)
- Iron, ion [water, surface water]: 7.0111e-8 kg; lognormal variance with pedigree 1.3743, pedigree (1,1,4,1,1)
  (same comment as for Chromium, ion)
- Strontium [air, urban air close to ground]: 7.7842e-9 kg; lognormal variance with pedigree 1.0387, pedigree (1,1,4,1,1)
  (same comment as for Potassium)
- Aluminium [water, ground-, long-term]: 0.0027758 kg; lognormal variance with pedigree 0.46933, pedigree (1,1,4,1,1)
  (same comment as for COD, Chemical Oxygen Demand)
- Silicon [water, surface water]: 1.6459e-6 kg; lognormal variance with pedigree 0.69879, pedigree (1,1,4,1,1)
  (same comment as for Chromium, ion)
- Titanium [air, urban air close to ground]: 3.5011e-6 kg; lognormal variance with pedigree 0.50235, pedigree (1,1,4,1,1)
  (same comment as for Potassium)
- Potassium, ion [water, ground-, long-term]: 7.9132e-5 kg; lognormal variance with pedigree 0.64681, pedigree (1,1,4,1,1)
  (same comment as for COD, Chemical Oxygen Demand)
- Calcium, ion [water, surface water]: 5.2993e-5 kg; lognormal variance with pedigree 0.22946, pedigree (1,1,4,1,1)
  (same comment as for Chromium, ion)
- Thallium [air, urban air close to ground]: 3.5183e-10 kg; lognormal variance with pedigree 1.7339, pedigree (1,1,4,1,1)
  (same comment as for Potassium)
- Sodium, ion [water, ground-, long-term]: 8.6059e-5 kg; lognormal variance with pedigree 0.64565, pedigree (1,1,4,1,1)
  (same comment as for COD, Chemical Oxygen Demand)
- Aluminium [water, surface water]: 2.3354e-7 kg; lognormal variance with pedigree 0.83036, pedigree (1,1,4,1,1)
  (same comment as for Chromium, ion)
- Silicon [air, urban air close to ground]: 4.353e-9 kg; lognormal variance with pedigree 0.57972, pedigree (1,1,4,1,1)
  (same comment as for Potassium)
- NMVOC, non-methane volatile organic compounds, unspecified origin [air, urban air close to ground]: 6.0754e-7 kg; lognormal variance with pedigree 0.075042, pedigree (1,1,4,1,1)
  (same comment as for Benzene)
- Potassium, ion [water, surface water]: 2.9905e-5 kg; lognormal variance with pedigree 0.3813, pedigree (1,1,4,1,1)
  (same comment as for Chromium, ion)
- Iron [air, urban air close to ground]: 2.6657e-9 kg; lognormal variance with pedigree 0.42674, pedigree (1,1,4,1,1)
  (same comment as for Potassium)
- Particulates, < 2.5 um [air, urban air close to ground]: 1.5938e-6 kg; lognormal variance with pedigree 0.37463, pedigree (1,1,4,1,1)
  (same comment as for Benzene)
- Sodium, ion [water, surface water]: 4.3274e-5 kg; lognormal variance with pedigree 0.31915, pedigree (1,1,4,1,1)
  (same comment as for Chromium, ion)
- Calcium [air, urban air close to ground]: 2.3085e-5 kg; lognormal variance with pedigree 0.53733, pedigree (1,1,4,1,1)
  (same comment as for Potassium)
- Particulates, > 2.5 um, and < 10um [air, urban air close to ground]: 8.0093e-9 kg; lognormal variance with pedigree 0.17022, pedigree (1,1,4,1,1)
  (same comment as for Benzene)
- BOD5, Biological Oxygen Demand [water, ground-, long-term]: 0.0019008 kg; lognormal variance with pedigree 0.020086, pedigree (1,1,4,1,1)
  (same comment as for COD, Chemical Oxygen Demand)
- Aluminium [air, urban air close to ground]: 1.8417e-9 kg; lognormal variance with pedigree 0.56554, pedigree (1,1,4,1,1)
  (same comment as for Potassium)
- Dioxins, measured as 2,3,7,8-tetrachlorodibenzo-p-dioxin [air, urban air close to ground]: 2.6698e-14 kg; lognormal variance with pedigree 0.37463, pedigree (1,1,4,1,1)
  (same comment as for Benzene)

## Extrapolations
This dataset has been extrapolated from year 2012 to the year of the calculation (2021). The uncertainty has been adjusted accordingly.
