# mine construction, open cast, hard coal

Dataset: EcoSpold 2, unit process
Geography: GLO
Time period: 1980-01-01 to 2021-12-31
Technology level: current
Classification: ISIC rev.4 ecoinvent: 4290:Construction of other civil engineering projects
Classification: EcoSpold01Categories: hard coal/production
Tags: ConvertedDataset
Scenario: Business-as-Usual
System model: Allocation, cut-off by classification
Generated by: Christian Bauer
Published in: Röder, A. 2007
Database: ecoinvent
isCopyrightProtected: true
accessRestrictedTo: 1

## General comment
This dataset represents the construction of an opencast mine for hard coal mining. Life time is assumed to be the same as for opencast mines for mining lignite. Thus, an average life time of 30 years is considered for machinery.

Data represent first approximations due to the insufficient availability of data. The estimates are based on data about four opencast mines: Oberdorf (Austria), Kans-Achinsk/Ekibastuz (Russia), Rheinbraun AG (Germany) and Rietspruit (South Africa). Hence, only figures per tone hard coal were given in literature and no information about average annual production of hard coal was available. Due to these facts a total production of 100 million tons has been assumed to represent a worldwide average (excluding small mines in China). This estimation includes both opencast and underground mines; therefore the total production shall be seen more as a normalization factor than an actual average value for the production of open pit mines.

Due to the fact that hard coal has to be treated, higher figures for infrastructure are considered. It has to be considered that this dataset is based on few data about opencast mines thus it may not reflect specific mines. Even with a broader database it would not have been possible to calculate assured mean values. This is due to the fact that there are big differences between mines and complete data of several hundred mines would have been required.
[This dataset was already contained in the ecoinvent database version 2. It was not individually updated during the transfer to ecoinvent version 3. Life Cycle Impact Assessment results may still have changed, as they are affected by changes in the supply chain, i.e. in other datasets. This dataset was generated following the ecoinvent quality guidelines for version 2. It may have been subject to central changes described in the ecoinvent version 3 change report (http://www.ecoinvent.org/database/ecoinvent-version-3/reports-of-changes/), and the results of the central updates were reviewed extensively. The changes added e.g. consistent water flows and other information throughout the database. The documentation of this dataset can be found in the ecoinvent reports of version 2, which are still available via the ecoinvent website. The change report linked above covers all central changes that were made during the conversion process.]

## Included activities start
From unspecified land forseen for an opencast mine for hard coal mining.

## Included activities end
This activity ends with an opencast mine unit for hard coal mining. This dataset includes machinery and equipment with a life time of 30 years because this information is not seperated in the literature given. It also includes requirements for prospecting. Land use is included as well. In this dataset explosives are considered via blasting.

## Geography
Average European conditions.

## Technology
No specific information available.

## Reference product
- mine infrastructure, open cast, hard coal: 1 unit; By-product classification allocatable product; CPC 53261: Mining constructions
  EcoSpold01Location=GLO
  Estimation. After operation it is assumed that all materials except from wood on the surface are left in situ.
  production volume 1 unit
    Dummy value to be replaced by measured, estimated or calculated value
  property price 4.69674e7 EUR2005
    Calculated based on inputs: The price of the product has been calculated as a sum of the values of the material and energy inputs for this product. This value is therefore a rough estimation. It may underestimate the real price since there are additional expenses when producing any product. These expences can include for example labour costs, treatment of waste materials and profit for the producer. Please consider carefully whether this level of data quality is acceptable for your application.

## Inputs from technosphere
- copper, cathode: 90000 kg; source Astakhov A. 1984; lognormal variance with pedigree 0.34, pedigree (1,1,5,1,1)
  Estimation. In this dataset specific copper consumption of 0.003 kg/t pit coal is used. Elevators, cooling systems, processing installations, loading facilities, administration buildings and sanitary installations have to be taken into account. It is not clearly possible to differentiate between data belonging to infrastructure and operation of the mine. Due to this, requirements for copper are included in the infrastructure dataset; the rest of material consumption is considered in the operation dataset.
  Further references:
  Pers. Mitteilung von N. Schlösser, Rheinbraun AG, Köln.
  EcoSpold01Location=RER
  properties: dry mass 1 kg, wet mass 1 kg
- reinforcing steel: 2.1e6 kg; source Astakhov A. 1984; lognormal variance with pedigree 0.34, pedigree (1,1,5,1,1)
  Estimation. In this dataset specific steel consumption of 0.07 kg/t pit coal is used. Elevators, cooling systems, processing installations, loading facilities, administration buildings and sanitary installations have to be taken into account. It is not clearly possible to differentiate between data belonging to infrastructure and operation of the mine. Due to this, requirements for steel are included in the infrastructure dataset; the rest of material consumption is considered in the operation dataset.
  Further references:
  Pers. Mitteilung von N. Schlösser, Rheinbraun AG, Köln.
  EcoSpold01Location=RER
  properties: carbon content, fossil 0.004, dry mass 1 kg, wet mass 1 kg
- diesel, burned in building machine: 1.2e8 MJ; lognormal variance with pedigree 0.34, pedigree (1,1,5,1,1)
  Estimation. In this dataset specific diesel consumption of 4 MJ/t pit coal is used.
  EcoSpold01Location=GLO
  properties: heating value, net 1 MJ
- concrete, normal: 3750 m3; source Astakhov A. 1984; lognormal variance with pedigree 0.34, pedigree (1,1,5,1,1)
  Estimation. For general infrastructure 10 kg/t.a reinforced concrete is used which result in a specific value of 0.3 kg/t pit coal. Elevators, cooling systems, processing installations, loading facilities, administration buildings and sanitary installations have to be taken into account. It is not clearly possible to differentiate between data belonging to infrastructure and operation of the mine. Due to this, requirements for concrete are included in the infrastructure dataset; the rest of material consumption is considered in the operation dataset.
  EcoSpold01Location=CH
  properties: water content 0.086758, dry mass 2190 kg, wet mass 2380 kg
- waste wood, untreated: 0 kg; pedigree (1,1,1,1,1)
  EcoSpold01Location=CH
  Estimation. It is assumed that after operation the plywood is landfilled.
  production volume 0 kg
    Calculated from the production volume of mine infrastructure, open cast, hard coal in proportion to the respective output amounts.
  properties: heating value, net 13.99 MJ, carbon content, non-fossil 0.48632, water content 0.25, wet mass 1 kg, dry mass 0.8 kg
  note on heating value, net: Value taken from the general comment of the treatment dataset.
  note on carbon content, non-fossil: Tab A.4, ecoinvent v2.2 report 13_I. C content has been referred to 1 kg DM,
- plywood: 0 m3; source Astakhov A. 1984; pedigree (1,1,1,1,1)
  EcoSpold01Location=RER
  Estimation. In this dataset specific plywood consumption of 0.003 kg/t pit coal is used. Elevators, cooling systems, processing installations, loading facilities, administration buildings and sanitary installations have to be taken into account. It is not clearly possible to differentiate between data belonging to infrastructure and operation of the mine. Due to this, requirements for wood are included in the infrastructure dataset; the rest of material consumption is considered in the operation dataset.
  properties: heating value, net 11688.9 MJ, dry mass 768.6 kg, carbon content, fossil 0.09783, price 400 EUR2005, water content 0.070778, wet mass 823 kg, carbon content, non-fossil 0.409818
- electricity, medium voltage: 9e6 kWh; lognormal variance with pedigree 0.34, pedigree (1,1,5,1,1)
  Estimation. In this dataset specific electricity consumption of 0,3 kWh/t pit coal is used.
  EcoSpold01Location=UCTE
- synthetic rubber: 3e6 kg; lognormal variance with pedigree 0.34, pedigree (1,1,5,1,1)
  Estimation. The requirements for tires is only included via cost estimates.
  EcoSpold01Location=RER
  properties: dry mass 1 kg, carbon content, fossil 0.871949, wet mass 1 kg, heating value, net 26.42 MJ
  note on carbon content, fossil: EPDM (Ethylene-propene-diene terpolymer) rubber is a terpolymer of ethylene, propene, and a diene with the residual unsaturated portion of the diene in the side chain (ecoinvent v2.2 report 7-part XX & Ullmann). Chemical formula (deduced from Evidences of Solvent-Induced Miscibility in Polychloroprene-co-Ethylene-Propene Diene Terpolymer Blends, Dubey et al., Journal of Applied Polymer Science, 2009, 111:1884–1891): C20H35
- heat, district or industrial, other than natural gas: 1.8e8 MJ; lognormal variance with pedigree 0.34, pedigree (1,1,5,1,1)
  Estimation. In this dataset specific heat consumption of 4 MJ/t is assumed.
  EcoSpold01Location=RER
  properties: heating value, net 1 MJ
- blasting: 3.6e7 kg; lognormal variance with pedigree 0.34, pedigree (1,1,5,1,1)
  Estimation. Due to the fact that hard coal is embedded in hard rocks blasting is assumed. Therefore, high amounts of explosives are required. The amount of explosives required is considered in this module.
  EcoSpold01Location=RER
- steel, low-alloyed, hot rolled: 900000 kg; source Astakhov A. 1984; lognormal variance with pedigree 0.34, pedigree (1,1,5,1,1)
  EcoSpold01Location=RER
  Estimation. In this dataset specific steel consumption of 0.03 kg/t pit coal is used. Elevators, cooling systems, processing installations, loading facilities, administration buildings and sanitary installations have to be taken into account. It is not clearly possible to differentiate between data belonging to infrastructure and operation of the mine. Due to this, requirements for steel are included in the infrastructure dataset; the rest of material consumption is considered in the operation dataset.
  Further references:
  Pers. Mitteilung von N. Schlösser, Rheinbraun AG, Köln.
  Dohmen A., Hagen G., Groten A. (1998) Der Steinkohlentagebau Rietspruit/ Republik Südafrika. In: Braunkohle 40, Heft 1/2, s.24-29.
  properties: wet mass 1 kg, carbon content, fossil 0.005, dry mass 1 kg
  note on carbon content, fossil: Low alloyed steel composition given in Tab. 3.2 ecoinvent v2.2 report 10_partII. Steel assumed to have a C content of 0.5%
- waste wood, untreated: -8617.95, -678.028, -1904.38, -454.838, -5460.7, -287.705, -49.5715, -72446.8 kg (8 entries); lognormal variance with pedigree 0.34, pedigree (1,1,5,1,1)
  (same comment as for waste wood, untreated)
  production volume 89900 kg
- plywood: 7.42663, 157.573 m3 (2 entries); source Astakhov A. 1984; lognormal variance with pedigree 0.34, pedigree (1,1,5,1,1)
  (same comment as for plywood)

## Inputs from nature
- Occupation, industrial area [natural resource, land]: 1.14e7 m2*year; lognormal variance with pedigree 0.69, pedigree (1,1,5,1,1)
  Estimation.
- Transformation, to industrial area [natural resource, land]: 570000 m2; lognormal variance with pedigree 0.69, pedigree (1,1,5,1,1)
  Estimation.
- Transformation, from unspecified [natural resource, land]: 570000 m2; lognormal variance with pedigree 0.69, pedigree (1,1,5,1,1)
  Estimation.

## Sampling procedure
literature

## Extrapolations
This dataset has been extrapolated from year 1993 to the year of the calculation (2021). The uncertainty has been adjusted accordingly.

## Review by Christian Bauer 2003-08-19
passed

## Review by Roland Hischier 2011-09-22
Transfer of documentation done.
