# electricity voltage transformation from high to medium voltage

Dataset: EcoSpold 2, unit process
Geography: CO
Time period: 2014-01-01 to 2021-12-31
Technology level: current
Classification: ISIC rev.4 ecoinvent: 3510:Electric power generation, transmission and distribution
Scenario: Business-as-Usual
System model: Allocation, cut-off by classification
Generated by: Germán Santa María Restrepo
Published in: Suppen, N. 2017
Database: ecoinvent
isCopyrightProtected: true
accessRestrictedTo: 1

## General comment
This dataset represents the transformation of electricity voltage from high to medium voltage. The losses are valid for the year 2018, based on electricity generation and trade statistics: IEA World Energy Statistics and Balances, ISSN: 16834240, https://doi.org/10.1787/enestats-data-en
Definition of the voltage levels:
- High voltage level above 24 kV (large scale industry)
- Medium voltage level between 1 kV and 24 kV (medium to small scale industry, service sector
and public buildings)
- Low voltage level below 1 kV (Households)

## Included activities start
This activity starts with the high voltage electricity arriving at the transformer station.

## Included activities end
This activity ends with 1kWh of high voltage electricity transformed to medium voltage.

This dataset includes the losses during voltage transformation.

It doesn't include the transformer station itself as this is included in the dataset for the transmission network.

## Geography
This dataset contains country-specific data.

## Technology
Transformers are essential components of the electricity grid. They connect the different voltage levels.
Big power plants feed the electricity at a very high voltage to the electricity grid. Transformers between 600 MVA and 80 MVA can be found in substations, where the high transmission voltage is transformed to the medium distribution voltage. In an additional step the medium voltage is transformed to low voltage using transformers below 2.5 MVA. The small transformers below 2.5 MVA are allocated to the low voltage level, whereas all the other transformers are allocated to the medium voltage level.

## Parameters
- electricity transformation losses: 0 dimensionless; name electricity_transformation_losses; pedigree (1,1,1,1,1)
- total electricity losses within the country: 0 dimensionless; name electricity_losses_total; pedigree (1,1,1,1,1)

## Reference product
- electricity, medium voltage: 1 kWh; CPC 17100: Electrical energy; By-product classification allocatable product
  production volume 5.3185e10 kWh
    Literature value/ calculated value.
    Calculation details:
    Absolute amount of electricity arriving at the MV level after transformation (53185 GWh)= Amount of electricity available at HV (GWh 55835) - Use of electricity at HV (GWh 2051) - Absolute losses, Transformation HV-MV (599 GWh)
    Absolute losses, Transformation HV-MV = Total transmission losses (7.487 GWh)* transformation losses at Medium voltage level (1kV - 24 kV) (8%)
    Use of electricity at HV (2051 GWh)= [Total electricity supply (58755 GWh)- Total transmission losses (7.487 GWh)]* Fraction of total consumption at HV level (4%)
    Amount of electricity available at HV (55835 GWh)= Total electricity supply (58755 GWh)- Absolute losses on HV, transmission and transformation within HV grid (2920 GWh)
    Absolute losses on HV, transmission and transformation within HV grid (2920 GWh)= Total transmission losses (7.487 GWh)* percentage of total losses on HV level (39%)
  property price 0.1 EUR2005
    Calculated to be between the price of electricity, high voltage and electricity, low voltage.

## Inputs from technosphere
- electricity, high voltage: 0 kWh; undefined min 0.0074, max 0.0074, standardDeviation95 0, pedigree (1,1,3,1,1)
  Electricity being transformed from the high voltage market to the medium voltage market.
- electricity, high voltage: 1.00889 kWh; lognormal variance with pedigree 0.0222, pedigree (3,2,3,3,3)
  Calculated value/estimation. This value compensates for the losses during transmission/distribution on this electricity market. The calculation is made based on total electricity losses between net electricity available at the busbar and the use of electricity calculated based on the IEA electricity information 2014, table 1.1, Electrity supply vs. transmission losses.
  Total electricity supply: 58755 GWh
  Total demand: 51278 GWh
  Total transmission losses: 7478 GWh
  Electricity production value for calculations was 58755 GWh (Total electricity supply =Final consumption 51268 GWh + total losses 7487 GWh) given that the domestic supply value of IEA has a statistical difference of (-8577 GWh) and internal consumption of the energy sector (-1977 GWh).
  These total losses over the whole chain are then allocated to the different voltage levels as well as transformation and transmission losses based on generic data taken from the City of Zürich in 2009.
  Voltage level (definitions taken from Itten et al. 2014).
  High voltage level (>24 kV)
  Fraction of total consumption at high voltage level (generic, data taken from Switzerland): 4%.
  Total losses on high voltage level (generic, data taken from the City of Zürich in 2009): 39%
  Of which: Transmission: 33%
  Of which: Transformation: 6%
  Medium voltage level (1kV - 24 kV)
  Fraction of total consumption at medium voltage level (generic, data taken from Switzerland): 32%.
  Total losses on medium voltage level (generic, data taken from the City of Zürich in 2009): 13%
  Of which: Transmission: 5%
  Of which: Transformation: 8%
  Low voltage level (>1kV)
  Fraction of total consumption at low voltage level (generic, data taken from Switzerland): 64%.
  Total losses on medium voltage level (generic, data taken from the City of Zürich in 2009): 48%
  Of which: Transmission: 24%
  Of which: Transformation: 24%
  Calculation details:
  Transformation losses on medium voltage level are assumed to be the total transformation losses from high to medium voltage.
  Percentage of electricity lost due to transformation HV to MV, referring to the amount which could potentially arrive at MV after transformation (1,11%) = Absolute losses, Transformation HV-MV (599 GWh) / Amount of electricity leaving the HV level = amount of electricity which has to be transformed HV to MV (53784 GWh)
  Sources:
  International Energy Agency, Colombia: Indicators for 2014, Electricity and Heat.
  https://www.iea.org/statistics/statisticssearch/report/?country=COLOMBIA&product=electricityandheat&year=2014
  Accessed on 26/07/2017
  IEA. 2014. Electricity Information 2014. ISBN 978-92-64-21692-1. International Energy Agency (IEA), Paris Cedex (FR).
  Itten R., Frischknecht R., Stucki M. 2014. Life Cycle Inventories of Electricity Mixes and Grid. Version 1.3. treeze, Uster, Switzerland

## Extrapolations
This dataset has been extrapolated from year 2017 to the year of the calculation (2021). The uncertainty has been adjusted accordingly.

## Review by Christopher Oberschelp 2017-11-21
Well-documented dataset. Main exchanges look plausible. Comparison with similar datasets may show remaining deviations.
