# ferrochromium production, high-carbon, 68% Cr

Dataset: EcoSpold 2, unit process
Geography: RoW
Time period: 2017-01-01 to 2021-12-31
Technology level: current
Classification: EcoSpold01Categories: metals/extraction
Classification: ISIC rev.4 ecoinvent: 2410:Manufacture of basic iron and steel
Synonyms: ferro-chrome; ferrochrome
Scenario: Business-as-Usual
System model: Allocation, cut-off by classification
Generated by: Eleonora Crenna
Published in: Cusano, G. 2017
Database: ecoinvent
isCopyrightProtected: true
accessRestrictedTo: 1

## General comment
This dataset represents the production of 1 kg high-carbon ferrochromium (HC FeCr), which is used in the production of stainless steel and high chromium steel. The original data are taken from the European Commission JRC report on the Best Available Techniques (BAT) for the Non-Ferrous Metals Industries (Cusano et al. 2017). This dataset is a copy of the geography Kazakhstan.
Reference:
Gianluca Cusano, Miguel Rodrigo Gonzalo, Frank Farrell, Rainer Remus, Serge Roudier, Luis Delgado Sancho (2017). Best Available Techniques (BAT) Reference Document for the main Non-Ferrous Metals Industries, EUR 28648, doi:10.2760/8224
[This dataset is meant to replace the following datasets:]

## Included activities start
The activity starts with chromite and other materials entering the factory gate.

## Included activities end
The activity ends with the carbothermal reduction of chromite and the production of high-carbon ferrochromium. Emissions to water and air are included, as well as infrastructure and waste.

## Geography
This dataset represents the global geography. It is a copy of the geography Kazakhstan. The production volume and the uncertainty are updated accordingly.

## Technology
High-carbon ferrochromium (HC FeCr) is produced at high temperatures via the carbothermal reduction of chromite, smelted in electric arc furnaces. Inputs to the arc furnace are oxide of iron and chromium (chromite, with Cr/Fe = 3.8 in Kazakhstan), coke or coal (used as reducing agent), dolomite, silica and/or bauxite (used as fluxing agents for slag formation). The smelting charge can be pre-heated and pre-reduced in a rotary kiln.Water is used during the operations. Main emissions from the smelting process are dust and fume. Dust occur from storage, handling and pre-treatment of raw materials. Depending on the raw material and on the process, other emissions to air are SO2, NOx, CO-gas, CO2, polycyclic aromatic hydrocarbon (PAH), VOCs, and volatile metals. The formation of dioxins is possible. Process residues and by-products are mainly slag and filter dust (or dry cake, considered as inert material).

Reference:
USGS 2016. Minerals Yearbook - Ferroalloys. Available at: https://prd-wret.s3-us-west-2.amazonaws.com/assets/palladium/production/atoms/files/myb1-2016-feall.pdf
Gianluca Cusano, Miguel Rodrigo Gonzalo, Frank Farrell, Rainer Remus, Serge Roudier, Luis Delgado Sancho (2017). Best Available Techniques (BAT) Reference Document for the main Non-Ferrous Metals Industries, EUR 28648, doi:10.2760/8224

## Time period
The time period is from 2017 (publication of data) to 2021 (creation of the datasets)

## Parameters
- fraction, process water, to air: 0.15 dimensionless; name fraction_PW_to_air; lognormal variance with pedigree 0.092025, pedigree (4,4,3,2,4)
  Literature value. In case when no industry/process specific data are available, default evaporation fraction value is used. This value is 15% and is based on literature (Statistics Canada, 2007 & Shaffer, K.H., 2008, Consumptive water use in the Great Lakes Basin, USGS & Shiklomanov, 2003, World Water Resources at the Beginning of the 21st Century) and has been approved by an expert.

## Reference product
- ferrochromium, high-carbon, 68% Cr: 1 kg; name RefProd; By-product classification allocatable product; CPC 41112: Ferro-manganese; CAS 11114-46-8
  EcoSpold01Location=GLO
  production volume 5.1e9 kg; name RP_PV_1; = 13600000*1000*0.5
    According to USGS (2021), it is estimated that 13'600'000 metric tons of ferrochromium were produced globablly in 2018. Due to lack of data on the production shares of the different grades of ferrochromium, it is assumed that this dataset represents half of ferrochromium produced globally.
    Reference:
    USGS (2021). Chromium Statistics and Information, Advance Data Release of the 2019 Annual Tables. https://prd-wret.s3.us-west-2.amazonaws.com/assets/palladium/production/atoms/files/myb1-2019-chrom-adv.xlsx
  property price 1.52 EUR2005
    assuming that US-prices reflect world-prices (2003 average price given here instead of 2002 price)
  property chromium content 0.68; name RefProd_Cr_content
    chromium content on a dry matter basis
  property heating value, net 2.12 MJ
    LHV is calculated based on the Carbon content of the product. More details can be found on the respective documentation.
  property iron content 0.25; name RefProd_Fe_content; = 1-(0.68+0.07)
    iron content on a dry matter basis. Calculated value, considering that ferrochromium contains 68% Cr and 7% C from coke.
  property dry mass 1 kg; name ferrochromium_DM
  property carbon content, fossil 0.07; name ferrochromium_carbon_content_fossil
    Ferrochromium is a master alloy of iron and chromium, containing 45 – 95 % Cr and various amounts of iron, carbon, and other elements. High-carbon ferrochromium (HC ferrochromium) contains 4 – 10 % C (ecoinvent v2.2 report 20_part VI). An average content of 7% C was considered
  property carbon content 0.07
    carbon content on a dry matter basis (reserved; not for manual entry)
  properties: water in wet mass 0 kg, wet mass 1 kg, carbon content, non-fossil 0, water content 0, carbon allocation 0.07 kg

## Inputs from technosphere
- non-ferrous metal smelter: 7.1655e-12 unit; source Classen M. 2009; lognormal variance with pedigree 0.39, pedigree (5,5,5,5,1)
  Literature. Classen et al. (2009).
  EcoSpold01Location=GLO
  Uncertainty: rough estimate
- electricity, medium voltage: 0 kWh; source Cusano, G.  2017; pedigree (1,1,1,1,1)
  Literature. Original values are reported in Table 8.5 in Cusano et al. (2017). The value is calculated as average between conventional open submerged furnace and more modern furnaces with pre-heating or pre-reduction processes.
  EcoSpold01Location=UCTE
  Uncertainty: estimate based on reported value
- wastewater, unpolluted: -0.014025 m3; name WW_amount; = (tap_water_amount/1000+cooling_water_amount-water_to_air)*-1; source Cusano, G.  2017; lognormal variance with pedigree 0.0138, pedigree (2,5,3,5,2)
  Calculated value to obtain mass balance with water input.
  EcoSpold01Location=CH
  production volume 7.15275e7 m3; = (RP_PV_1 * (WW_amount/ RefProd))
    Calculated from the production volume of ferrochromium, high-carbon, 68% Cr in proportion to the respective output amounts.
  property price 0 EUR2005; name WW_amount_price_EUR2005
  properties: carbon content, non-fossil 0.00178991, dry mass 0.337476 kg, water content 2962.17, wet mass 1000 kg, carbon content, fossil 0.00178991
  note on carbon content, fossil: Assumed to be like in tap water. Bicarbonate content is 2.93 mol/m3. CO2 content is 0.1 mol/m3 (ecoinvent v2.2 report 8, Tab 93.1).
- tap water: 0 kg; name tap_water_amount; source Cusano, G.  2017; pedigree (1,1,1,1,1)
  Literature. Original values are reported in Cusano et al. (2017). Process water is used for scrubbing and slag granulation. Around 3–10 m3 per tonne of ferrochromium is normally used.
  properties: carbon content, fossil 0.00178991, wet mass 1 kg, dry mass 0.000337476 kg, water content 2962.17
  note on carbon content, fossil: Bicarbonate content is 2.93 mol/m3. CO2 content is 0.1 mol/m3 (ecoinvent v2.2 report 8, Tab 93.1).
- nickel smelter slag: -1.35 kg; name slag_amount; = (AVERAGE(1;1.7))*-1; source Cusano, G.  2017; lognormal variance with pedigree 0.0138, pedigree (2,5,3,5,2)
  Literature. This exchange is used as a proxy for the slag reported in Table 8.25 in Cusano et al. (2017). The value is calculated as average between the minimum and maximum value provded by the authors.
  production volume 6.885e9 kg; = (RP_PV_1 * (slag_amount/ RefProd))
    Calculated from production volume of reference product using the relative outputs.
  property price 0 EUR2005; name slag_amount_price_EUR2005
  property chromium content 0.0705; name slag_amount_Cr_content; = (chromite_ore_amount_Cr_content*chromite_ore_amount- RefProd_Cr_content*RefProd)/1.35
  properties: carbon content, fossil 0.00345, dry mass 1 kg, wet mass 1 kg
  note on chromium content: chromium content on a dry matter basis. Calculated value based on the chromium content of chromite (44.9%) and ferrochromium (68%). slag amount = 1.35 kg
- inert waste, for final disposal: -0.474194 kg; name inert_waste_amount; = (((AVERAGE(200;400)+ AVERAGE(200;400)* AVERAGE(0.2;0.25))/1000)/(1-0.225))*-1; source Cusano, G.  2017; lognormal variance with pedigree 0.0138, pedigree (2,5,3,5,2)
  Literature. According to Cusano et al. (2017), filter cake containes 20-25% moisture, and the amount of dry cake generated from wastewater is 200-400 kg/t of alloy. Filter cake is processed further to extract zinc and lead, rather than being sent to landfill.
  EcoSpold01Location=CH
  production volume 2.41839e9 kg; = (RP_PV_1 * (inert_waste_amount/ RefProd))
    (same comment as for wastewater, unpolluted)
  property price 0 EUR2005; name inert_waste_amount_price_EUR2005
  properties: wet mass 1 kg, dry mass 0.995 kg, water content 0.00502513
- coke: 16.8583 MJ; name coke_amount; = ((AVERAGE(550;700)+ AVERAGE(500;550)+ 600)/3)/1000*28.9; source Cusano, G.  2017; lognormal variance with pedigree 0.0138, pedigree (2,5,3,5,2)
  Literature. Original values are reported in Table 8.5 in Cusano et al. (2017). Coke is the main reducing agent in the carbothermal reduction of chromite. The value is calculated as average between conventional open submerged furnace and more modern furnaces with pre-heating or pre-reduction processes. The gross calorific value of coke from hard coal (metallurgical coke) is 28.9 MJ/kg, taken from Weidema et al. 2013 ("Overview and methodology - data quality guideline for the ecoinvent database version 3")
  property carbon content, fossil 0.869149; name coke_carbon_content_fossil
  property dry mass 0.0328671 kg; name coke_DM
  properties: wet mass 0.034965 kg, heating value, net 28.6 MJ, water content 0.0638298
- chromite ore concentrate: 2.525 kg; name chromite_ore_amount; = ((AVERAGE(2400;3000)+AVERAGE(2300;2400))/2 )/1000; source Cusano, G.  2017; lognormal variance with pedigree 0.0138, pedigree (2,5,3,5,2)
  Literature. Original values are reported in Table 8.5 in Cusano et al. (2017). The value is calculated as average between conventional open submerged furnace and more modern furnaces with pre-heating or pre-reduction processes.
  EcoSpold01Location=GLO
  property iron content 0.249494; name chromite_ore_amount_Fe_content; = 55.845/223.833
  property chromium content 0.307; name chromite_ore_amount_Cr_content
  properties: wet mass 1 kg, dry mass 1 kg
  note on iron content: iron content on a dry matter basis. Calculated value based on stoichiometry. Fe MW= 55.845 g/mol; FeOCr2O3 MW= 223.833 g/mol
- anode, for metal electrolysis: 0.0125 kg; = ((AVERAGE(8;25)+AVERAGE(7;10))/2 )/1000; source Cusano, G.  2017; lognormal variance with pedigree 0.0138, pedigree (2,5,3,5,2)
  EcoSpold01Location=RER
  Literature. Cusano et al. 2017 report the values for graphite electrode in Table 8.5, This value is calculated as average between conventional open submerged furnace and more modern furnaces with pre-heating or pre-reduction of the smelted charge.
  properties: dry mass 1 kg, carbon content, fossil 0.865971, wet mass 1 kg
  note on carbon content, fossil: The main component of the anode is carbon, coming from bitumen and petroleum coke (ecoinvent v2.2 report 10). The C content in those components of the anode has been taken into account to calculate the anode final C content.
- bauxite: 0.25 kg; = AVERAGE(100;400)/1000; source Cusano, G.  2017; lognormal variance with pedigree 0.0138, pedigree (2,5,3,5,2)
  Literature. Original values are reported in Table 8.5 in Cusano et al. (2017). Since the share of different fluxing agents (e.g. dolomite, bauxite, silica sand, lime) is unknown, bauxite is assumed to be the unique fluxing agent. The value is calculated as average between conventional open submerged furnace and more modern furnaces with pre-heating or pre-reduction processes.
  EcoSpold01Location=GLO
  properties: dry mass 1 kg, wet mass 1 kg
- electricity, medium voltage: 0.00102165, 0.0377008, 0.00347963, 0.0105994, 0.00300142, 0.000609002, 0.000793397, 0.00197568, 0.00813687, 0.0291561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 kWh (46 entries); source Cusano, G.  2017; lognormal variance with pedigree 0.0138, pedigree (2,5,3,5,2)
  (same comment as for electricity, medium voltage)
- tap water: 0.130776, 0.015742, 0.0260162, 0.656025, 0.0170663, 0.0485449, 5.60583 kg (7 entries); source Cusano, G.  2017; lognormal variance with pedigree 0.0138, pedigree (2,5,3,5,2)
  (same comment as for tap water)

## Inputs from nature
- Oxygen [natural resource, in air]: 1.09502 kg; = 15.99/(12.01+15.99)*CO_amount + (15.99*2)/(12.01+15.99*2)*CO2_amount; lognormal variance with pedigree 0.0138, pedigree (2,5,3,5,2)
  Calculated value, based on stoichiometry. See comment to carbon monoxide and carbon dioxide.
- Water, cooling, unspecified natural origin [natural resource, in water]: 0.01 m3; name cooling_water_amount; = AVERAGE(5;15)/1000; source Cusano, G.  2017; lognormal variance with pedigree 0.0138, pedigree (2,5,3,5,2)
  Literature. The original values are reported in Cusano et al. (2017). The use of cooling water is around 5-15 m3 per tonne of ferro-chrome.

## Emissions to nature
- Chromium VI [air, non-urban air or from high stacks]: 0.0001 kg; name chromium_IV_emission_amount; = AVERAGE(0.001;0.003)*(AVERAGE(20;80)/1000); source Cusano, G.  2017; lognormal variance with pedigree 0.6632, pedigree (2,5,3,5,2)
  Literature. The original values are reported in Table 8.18 in Cusano et al. (2017). Chromium(IV) is emitted to air from a semi-closed furnace. Chromium(IV) emission is 0.1-0.3% of total dust emissions, which account for 20-80 kg/t ferrochromium (Table 8.26 in Cusano et al., 2017).
- Particulates, < 2.5 um [air, non-urban air or from high stacks]: 0.027519 kg; = (AVERAGE(20;80)/1000-( chromium_emission_amount+ chromium_IV_emission_amount+ cyanide_emission_amount))*0.6; source Cusano, G.  2017; lognormal variance with pedigree 0.3072, pedigree (2,4,3,5,2)
  Calculated value. According to Cusano et al. (2017), emissions total dust is 20-80 kg/t ferrochrome, of which a defined share is given by the emissions of Cr, Cr(VI) and cyanides (Table 8.26). The size differentiation of PM is based on the proportion reported in Kuenen 2019 (EMEP/EEA air pollutant emission inventory guidebook 2019 - 2.C.2 Ferro-alloys production), Table 3.1: 60% PM<2.5um; 85%-60%=25% PM >2.5 & <10um; 100%-85%=15% PM>10um
- Sulfur dioxide [air, non-urban air or from high stacks]: 0.0016 kg; = AVERAGE(0.2;3)/1000; source Cusano, G.  2017; lognormal variance with pedigree 0.0138, pedigree (2,5,3,5,2)
  Literature. Original values are reported in Table 8.18 in Cusano et al. (2017). The value is calculated as average between minimum and maximum value.
- Dioxins, measured as 2,3,7,8-tetrachlorodibenzo-p-dioxin [air, non-urban air or from high stacks]: 1e-12 kg; source Classen M. 2009; lognormal variance with pedigree 0.0532, pedigree (2,5,3,5,2)
  Literature. Table 5.6 in Classen et al. (2009), value originated from EEA.
- Dissolved solids [water, surface water]: 1.5e-5 kg; = AVERAGE(10;20)*10^(-6); source Cusano, G.  2017; lognormal variance with pedigree 0.0532, pedigree (2,5,3,5,2)
  Literature. The original value of 10-20 g/t alloy is available in chapter 8.2.4 in Cusano et al. (2017). Calculated as average between minimum and maximum value. This emissions to water is not specific of ferrochromium, but valid for all ferroalloys analyzed in the report.
- Chromium [air, non-urban air or from high stacks]: 0.004 kg; name chromium_emission_amount; = AVERAGE(0.01;0.15)*AVERAGE(20;80)/1000; source Cusano, G.  2017; lognormal variance with pedigree 0.6632, pedigree (2,5,3,5,2)
  Literature. The original values are reported in Table 8.18 in Cusano et al. (2017). Chromium is emitted to air from a semi-closed furnace. Chromium emission is 1-15% of total dust emissions, which account for 20-80 kg/t ferrochromium (Table 8.26 in Cusano et al., 2017).
- Particulates, > 10 um [air, non-urban air or from high stacks]: 0.00687975 kg; = (AVERAGE(20;80)/1000-( chromium_emission_amount+ chromium_IV_emission_amount+ cyanide_emission_amount))*0.15; source Cusano, G.  2017; lognormal variance with pedigree 0.0532, pedigree (2,5,3,5,2)
  (same comment as for Particulates, < 2.5 um)
- Nitrogen oxides [air, non-urban air or from high stacks]: 0.001 kg; = AVERAGE(0.5;1.5)/1000; source Cusano, G.  2017; lognormal variance with pedigree 0.0532, pedigree (2,5,3,5,2)
  (same comment as for Sulfur dioxide)
- Carbon monoxide, fossil [air, non-urban air or from high stacks]: 0.00163125 kg; name CO_amount; = (((coke_amount*coke_carbon_content_fossil*coke_DM)-(RefProd* ferrochromium_carbon_content_fossil*ferrochromium_DM))*(12.01+15.99)/12.01)*0.0017; lognormal variance with pedigree 0.6632, pedigree (2,5,3,5,2)
  Calculated value, based on stoichiometry and carbon content of coke and the reference product. Carbon monoxide and carbon dioxide originate from the reaction of C contained in coke (reducing agent) with oxygen available in the air. C MW=12.01 g/mol; O MW= 15.99 g/mol. The split between CO and CO2 (0.0017 and 0.9983) is based on the carbon content of CO and CO2 respectively in the dataset "heat production, at coal coke industrial furnace 10 MW".
- PAH, polycyclic aromatic hydrocarbons [water, surface water]: 6.5e-8 kg; source IPPC 2001; lognormal variance with pedigree 13.462, pedigree (1,1,1,5,1)
  This emission has been taken from the dataset "ferrochromium production, high-carbon, 68% Cr" (GLO, 1994-2003)
- Water [air, unspecified]: 0.002475 m3; name water_to_air; = (tap_water_amount/1000+cooling_water_amount)* fraction_PW_to_air; lognormal variance with pedigree 0.25, pedigree (5,5,5,5,5)
  Calculated value based on literature values and expert opinion. See comments in the parametres' comment field.
  property fraction, origin: salt water 0; name fraction_origin_salt_water
  property fraction, origin: fresh water 0.27907; name fraction_origin_fresh_water
  property fraction, origin: unspecified 0.72093; name fraction_origin_unspecified
- Cyanide [air, non-urban air or from high stacks]: 3.5e-5 kg; name cyanide_emission_amount; = AVERAGE(0.02;0.05)/1000; source Cusano, G.  2017; lognormal variance with pedigree 0.0532, pedigree (2,5,3,5,2)
  Literature. The original values are reported in Table 8.18 in Cusano et al. (2017). Cyanides are emitted to air from a closed furnace. The emissions are 0.02-0.05 kg per metric ton of HC-FeCr produced.
- Chromium, ion [water, surface water]: 7.71e-9 kg; source IPPC 2001; lognormal variance with pedigree 12.942, pedigree (1,1,1,5,1)
  (same comment as for PAH, polycyclic aromatic hydrocarbons)
- Carbon dioxide, fossil [air, non-urban air or from high stacks]: 1.50497 kg; name CO2_amount; = (((coke_amount*coke_carbon_content_fossil*coke_DM)-(RefProd* ferrochromium_carbon_content_fossil*ferrochromium_DM))*(12.01+15.99*2)/12.01)*0.9983; lognormal variance with pedigree 0.6632, pedigree (2,5,3,5,2)
  (same comment as for Carbon monoxide, fossil)
- NMVOC, non-methane volatile organic compounds, unspecified origin [air, non-urban air or from high stacks]: 0.0017 kg; source IPPC 2001; lognormal variance with pedigree 0.0434, pedigree (2,3,2,5,1)
  Literature value (IPCC, 2001)
- Particulates, > 2.5 um, and < 10um [air, non-urban air or from high stacks]: 0.0114663 kg; = (AVERAGE(20;80)/1000-( chromium_emission_amount+ chromium_IV_emission_amount+ cyanide_emission_amount))*0.25; source Cusano, G.  2017; lognormal variance with pedigree 0.1332, pedigree (2,5,3,5,2)
  (same comment as for Particulates, < 2.5 um)

## Sampling procedure
Literature and estimation from Cusano et al. (2017) and Classen et al. (2009). See comments to exchanges for details.

References:
Cusano, G., Gonzalo, M.R., Farrell, F., Remus, R., Roudier, S., Delgado Sancho, L. (2017). Best Available Techniques (BAT) Reference Document for the main Non-Ferrous Metals Industries, EUR 28648, doi:10.2760/8224
Classen, M., Althaus, H.-J., Blaser, S., Tuchschmid, M., Jungbluth, N., Doka, G., Faist Emmenegger, M., Scharnhorst, W. (2009). Life Cycle Inventories of Metals. Final report ecoinvent data v2.1, No 10. EMPA Dübendorf, Swiss Centre for Life Cycle Inventories, Dübendorf, CH, Online-Version under: www.ecoinvent.ch

## Extrapolations
The data are extrapolated from the original dataset for KZ.

## Review by Carl Vadenbo 2021-04-29
Accepted on 2021-06-29 after issues raised during cc-review had been addressed satisfactorily.
