# pear production

Dataset: EcoSpold 2, unit process
Geography: ZA
Time period: 2012-03-01 to 2021-06-30
Technology level: current
Classification: ISIC rev.4 ecoinvent: 0124:Growing of pome fruits and stone fruits
Scenario: Business-as-Usual
System model: Allocation, cut-off by classification
Share of production covered: 0.88 %
Generated by: Karen Muir
Published in: de Kock, L. 2017
Database: ecoinvent
isCopyrightProtected: true
accessRestrictedTo: 1

## General comment
This dataset represents the production of 1 kg of pears. The average yield from 2012 - 2016 is 35.1 t/ha. The data are representative for pear production in South Africa.
The dataset includes the establishment of the orchard (including the tree seedlings, planting of the trees, 1298 trees/ha, and the trellis), inputs of fertilisers (N-P2O5- K2O from mineral fertiliser input: 156-43-69 kg/ha*a ) and pesticides (input of 80.7 kg/ha*a, including naptha/mineral oil application), fertiliser and pesticide packaging, irrigation water (6048.5 m3 per ha and year) and machine operations (mulching, mowing, tillage, fertiliser and pesticide application). Furthermore, direct field emissions, pesicide emissions to the soil, heavy metal emissions to the soil and water, and land use change are included.

## Included activities start
This activity starts with the establishment of the orchard.

## Included activities end
This activity ends with the clearing of the orchard after an average lifetime of 20 years.

## Geography
The inventory is modelled for South Africa

## Technology
Conventional production

## Parameters
- fruit yield: 35144 kg/ha.yr; name yield
  yield (kilogram per hectare and year) in South Africa in 2016. Source: Hortgro (2017), Key Deciduous Fruite Statistics 2016, Hortgro, Paarl, South Africa, available online at http://www.hortgro.co.za/wp-content/uploads/2017/06/HORTGRO-Key-Deciduous-Fruit-Statistics-2016.pdf
- imidacloprid: 0.692701 kg
  Quantity of pesticide applied (kg/ha*a)
- copper: 0.0035 kg; name copper_emissions
  Copper emissions to soil (kg/ha*a)
- irrigation water fraction to ground water: 0.8 dimensionless; name fraction_iw_to_ground_water
  The fraction of irrigation water emitted to ground water
- thiamethoxam: 0.000781991 kg
  Quantity of pesticide applied (kg/ha*a)
- irrigation water fraction to air: 0.72 dimensionless; name fraction_iw_to_air
  The fraction of irrigation water emitted to the air. Literature value: Siebert, (2010); Vionnet, S., Quantis Water Database - Technical Report (2012)
- copper from copper oxychloride: 1.76347 dimensionless; name copper_emissions_copper_oxychloride
  Copper emissions arising from the use of copper oxychloride (kg/ha*a)
- cyanamide: 0.00182464 kg/ha.yr
  Application of cyanamide in kilogram per hectare per year
- irrigation water fracton to surface water: 0.2 dimensionless; name fraction_IW_to_surface_water
  The fraction of irrigation water emitted to surface water
- thiram: 0.00236967 kg/ha.yr
  Application of thiram in kilogram per hectare per year
- chlorpyrifos: 0.806635 kg/ha.yr
  Application of chlorpyrifos in kilogram per hectare per year
- LUC_crop_specific: 1 dimensionless
  This parameter allows to switch between a 'crop specific' and a 'country specific' approach when calculating the LUC of a crop. By default, the chosen approach is 'crop specific', so the value of the parameter is 1. If you want to apply a 'country specific' approach, turn the parameter to 0.
- orchard lifetime: 20 year; name orchard_lifetime
  Average orchard lifetime in years
- tree density: 1298 m³/ha; name tree_density
  Average tree density (tree/hectare)
- acephate: 0.000829384 kg/ha.yr
  Application of acephate in kilogram per hectare per year

## Reference product
- pear: 1 kg; CPC 01342: Pears and quinces; By-product classification allocatable product
  Pear, South African production. Output of pear, produced for direct human consumption.
  production volume 4.31535e8 kg
    Source: Hortgro (2017) Key Deciduous Fruit Statistics 2016, Hortgro, Paarl, South Africa
  property price 0.43 EUR2005
    Calculated from the trade statistics for the year 2005 published by the UN (COMTRADE database, accessed 20151105) as an average of 5 biggest importers of pear in the world; DE, UK, RU, NL and FR. Comtrade cathegory: 80820: Pears and quinces, fresh.
  property carbon content 0.0729198
    carbon content on a dry matter basis (reserved; not for manual entry)
  properties: carbon content, non-fossil 0.0729198, dry mass 0.153 kg, wet mass 1 kg, carbon content, fossil 0, water content 5.53595, water in wet mass 0.847 kg, carbon allocation 0.0111567 kg

## Inputs from technosphere
- establishing orchard: 0.00184669 unit; = tree_density/ orchard_lifetime/ yield; source Confronting Climate Change 2017; lognormal variance with pedigree 0.126177, pedigree (2,5,3,1,1)
  Calculated value: based on a tree density of 1298 trees/ha and an orchard lifetime of 20 years. Additional source: Personal communication with Louise Human of Core Fruit, Paarl, South Africa (2017).
- packaging, for fertilisers: 0.0161874 kg; lognormal variance with pedigree 0.0532, pedigree (4,3,3,5,4)
  Total amount of active substance/s of fertilisers needed for the production of 'pear' is calculated to be circa 8.09E-03 kg. Fertiliser/s used in this dataset is/are: 'ammonium nitrate, as N', 'calcium nitrate', 'phosphate fertiliser, as P2O5', 'potassium chloride, as K2O', 'urea, as N'. The total amount of active substance/s is doubled in order to account for the packaging of the dilluted product of fertiliser/s that is/are applied. Therefore, 1.62E-02 kg of packaging for fertilisers is justified with this exchange.
  properties: wet mass 1 kg, price 0.0642 EUR2005, dry mass 1 kg, carbon content, fossil 0.825301, heating value, net 25.01 MJ
  note on carbon content, fossil: Considering a chemical formula (C2H4)n for polyethylene, carbon content-fossil is calculated to be 0.856286 kg of Carbon per kg of dry mass.
- waste wood, untreated: -0.0922 kg; lognormal variance with pedigree 0.128177, pedigree (2,5,3,5,1)
  Literature value: Wood from trees after 1-2 years of sorrage at the field (20% water) per lifetime year (20 years) of the orchard. Source: ecoinvent GLO pear production dataset
  production volume 6.37271e7 kg; = 902129000*0.0706408094863
    Annual production volume (kg/a) multiplied by mass of waste wood per kilogram apple
  properties: dry mass 0.8 kg, water content 0.25, wet mass 1 kg, carbon content, non-fossil 0.48632, heating value, net 13.99 MJ
  note on heating value, net: Value taken from the general comment of the treatment dataset.
- bipyridylium-compound: 5.21079e-5 kg; name bipyridylium_compound; = 1.83127962085/ yield; source Dabrowski, J.M. 2014; lognormal variance with pedigree 0.0572, pedigree (2,5,4,1,4)
  Calculated value: Paraquat. Calculated based on 2009 pesticide application values from Dabrowski, Shadung, & Wepener (2014) and König (2015), with data on total production area from Hortgro (2015). Further references: Koenig, A. (2015). Environmental hotspots and the potential of clean technologies in the South African fruit supply chain. Master thesis at Zurich University of applied Sciences (ZHAW), Institute of Natural Resource Sciences, unpublished; Hortgro (2015) Key Deciduous Fruit Statistics 2014, Hortgro, Paarl, South Africa.
  properties: wet mass 1 kg, carbon content, fossil 0.418929, dry mass 1 kg
- mowing, by rotary mower: 1.42272e-5 ha; = 0.50/ yield; source Confronting Climate Change 2017; lognormal variance with pedigree 0.3046, pedigree (2,4,3,1,1)
  Calculated value: average once per year carried out by 50% of producers.
- copper, cathode: 5.01784e-5 kg; name copper; = 1.76347026540 / yield; source Dabrowski, J.M. 2014; lognormal variance with pedigree 0.0572, pedigree (2,5,4,1,4)
  Calculated value: copper from copper oxychloride. Calculated based on 2009 pesticide application values from Dabrowski, Shadung, & Wepener (2014) and König (2015), with data on total production area from Hortgro (2015). Stoechiometric calculation: Copper oxychloride: Cu(OH)3Cl: molecular mass: 213.57 g/mol, Cu: 63.55 g/mol, Cu: 59.51%. Further references: Koenig, A. (2015). Environmental hotspots and the potential of clean technologies in the South African fruit supply chain. Master thesis at Zurich University of applied Sciences (ZHAW), Institute of Natural Resource Sciences, unpublished; Hortgro (2015) Key Deciduous Fruit Statistics 2014, Hortgro, Paarl, South Africa.
  properties: wet mass 1 kg, dry mass 1 kg
- mancozeb: 0.000449515 kg; = 1.57977725E+01/ yield; source Dabrowski, J.M. 2014; lognormal variance with pedigree 0.0572, pedigree (2,5,4,1,4)
  Calculated value: Calculated based on 2009 pesticide application values from Dabrowski, Shadung, & Wepener (2014) and König (2015), with data on total production area from Hortgro (2015). Further references: Koenig, A. (2015). Environmental hotspots and the potential of clean technologies in the South African fruit supply chain. Master thesis at Zurich University of applied Sciences (ZHAW), Institute of Natural Resource Sciences, unpublished; Hortgro (2015) Key Deciduous Fruit Statistics 2014, Hortgro, Paarl, South Africa.
  properties: carbon content, fossil 0.17759, dry mass 1 kg, wet mass 1 kg
- land use change, perennial crop: 6.72946e-6 ha; = (0.2365/yield)*LUC_crop_specific+0.0000*(1-LUC_crop_specific); source Reinhard, J. 2017; lognormal variance with pedigree 0.218, pedigree (5,5,5,5,5)
  Calculated value. Land use change (LUC) combines land transformation areas calculated with the adapted 'Direct Land Use Change Assessment Tool' version 2014 developed by Blonk Consultants and the carbon losses from soil organic carbon (SOC) and vegetation (VEG) as calculated in ecoinvent v3. See 'WFLDB-Guidelines.pdf', available at https://ecoquery.ecoinvent.org/File/Reports.
- [thio]carbamate-compound: 1.0721e-7 kg; name thiocarbamate_compound; = 0.00376777251/ yield; source Dabrowski, J.M. 2014; lognormal variance with pedigree 0.0572, pedigree (2,5,4,1,4)
  Calculated value: Carbaryl. Calculated based on 2009 pesticide application values from Dabrowski, Shadung, & Wepener (2014) and König (2015), with data on total production area from Hortgro (2015). Further references: Koenig, A. (2015). Environmental hotspots and the potential of clean technologies in the South African fruit supply chain. Master thesis at Zurich University of applied Sciences (ZHAW), Institute of Natural Resource Sciences, unpublished; Hortgro (2015) Key Deciduous Fruit Statistics 2014, Hortgro, Paarl, South Africa.
  properties: carbon content, fossil 0.626349, dry mass 1 kg, wet mass 1 kg
- urea: 0.000359171 kg; = (5.88800000E+00/ yield)*2.14379903903132; source Confronting Climate Change 2017; lognormal variance with pedigree 0.126177, pedigree (2,5,3,1,1)
  The exchange has been updated from 'urea, as N' into 'urea' and therefore its amount has been scaled (multiplied) from 0.0002 kg by 2.1438 kg of 'urea' per kg of 'urea, as N'. Original comment of the exchange is: Calculated value: 5.888 kg per ha per year.
  properties: carbon content, fossil 0.2, dry mass 1 kg, wet mass 1 kg
- fertilising, by broadcaster: 0.000219145 ha; = 7.70163122E+00/ yield; source Confronting Climate Change 2017; lognormal variance with pedigree 0.126177, pedigree (2,5,3,1,1)
  Calculated value: average 9 applications per year on bearing hectares only. Proxy for fertilising (foliar feeding), by field sprayer.
- application of plant protection product, by field sprayer: 0.000535688 ha; = 1.88262096E+01 / yield; source Confronting Climate Change 2017; lognormal variance with pedigree 0.126564, pedigree (2,5,3,1,1)
  Calculated value: average 22 applications per year, only on bearing orchards
- irrigation: 0.172109 m3; name irrigation_input; = 6048.6/ yield; source Pfister, S. 2011; lognormal variance with pedigree 0.135602, pedigree (3,4,4,2,3)
  Literature value: average irrigation volume in 2010: 7116m3/ha/a. For 2016/2017 industry experts predict 10-20% water saving on 2010 figures = 6048.6m3/ha/a.
  Further references: personal communication with Theresa Volschenk, Soil Scientist (Irrigation), Soil and Water Science Programme, ARC Infruitec-Nietvoorbij, Stellenbosch, van der Walt, M.W. 2017. Development of a land use-based spatial water requirements model for the Berg Water Management Area. University of Cape Town, and background data for Hortgro 2007 pome fruit budget: Elektrisiteitskostes en verbruik_Hortgro budgets.
  properties: dry mass 0.11 kg, water content 9089.91, wet mass 1000 kg
- organophosphorus-compound, unspecified: 2.29759e-5 kg; name organosphosphorus_compound; = (acephate+ chlorpyrifos)/ yield; source Dabrowski, J.M. 2014; lognormal variance with pedigree 0.0617498, pedigree (2,5,4,1,4)
  Calculated value: Acephate and chlorpyrifos. Calculated based on 2009 pesticide application values from Dabrowski, Shadung, & Wepener (2014) and König (2015), with data on total production area from Hortgro (2015). Further references: Koenig, A. (2015). Environmental hotspots and the potential of clean technologies in the South African fruit supply chain. Master thesis at Zurich University of applied Sciences (ZHAW), Institute of Natural Resource Sciences, unpublished; Hortgro (2015) Key Deciduous Fruit Statistics 2014, Hortgro, Paarl, South Africa.
  properties: wet mass 1 kg, carbon content, fossil 0.260898, dry mass 1 kg
- naphtha: 0.00158612 kg; name naptha; = 5.57426953E+01/ yield; source Confronting Climate Change 2017; lognormal variance with pedigree 0.0112, pedigree (2,5,3,1,1)
  Calculated value: 65.14 kg per bearing ha per year (55.71kg per hectare per year). Product Budbreak and DNOC Mineral oil used for the control of insects and mites.
  properties: dry mass 1 kg, wet mass 1 kg, heating value, net 45 MJ, carbon content, fossil 0.919743
- planting tree: 0.00184669 unit; = tree_density/ orchard_lifetime/ yield; source Confronting Climate Change 2017; lognormal variance with pedigree 0.126177, pedigree (2,5,3,1,1)
  (same comment as for establishing orchard)
- triazine-compound, unspecified: 4.04564e-9 kg; name triazine; = 0.00014218009/ yield; source Dabrowski, J.M. 2014; lognormal variance with pedigree 0.0572, pedigree (2,5,4,1,4)
  Calculated value: Simazine. Calculated based on 2009 pesticide application values from Dabrowski, Shadung, & Wepener (2014) and König (2015), with data on total production area from Hortgro (2015). Further references: Koenig, A. (2015). Environmental hotspots and the potential of clean technologies in the South African fruit supply chain. Master thesis at Zurich University of applied Sciences (ZHAW), Institute of Natural Resource Sciences, unpublished; Hortgro (2015) Key Deciduous Fruit Statistics 2014, Hortgro, Paarl, South Africa.
  properties: dry mass 1 kg, wet mass 1 kg, carbon content, fossil 0.475616
- tillage, ploughing: 1.42272e-6 ha; = 5.00000000E-02 / yield; source Confronting Climate Change 2017; lognormal variance with pedigree 0.126177, pedigree (2,5,3,1,1)
  Calculated value: carried out once to establish the orchard.
- packaging, for pesticides: 0.0014218 kg; lognormal variance with pedigree 0.0532, pedigree (4,3,3,5,4)
  Total amount of active substance/s of pesticides needed for the production of pear is calculated to be circa 7.11E-04 kg. Pesticide/s used in this dataset is/are: '[thio]carbamate-compound', 'bipyridylium-compound', 'copper', 'glyphosate', 'mancozeb', 'organophosphorus-compound, unspecified', 'pesticide, unspecified', 'phenoxy-compound', 'triazine-compound, unspecified'. The total amount of active substance/s is doubled in order to account for the packaging of the dilluted product of pesticide/s that is/are applied. Therefore, 1.42E-03 kg of packaging for pesticides is justified with this exchange.
  properties: carbon content, fossil 0.85714, heating value, net 25.97 MJ, dry mass 1 kg, price 0.0642 EUR2005, wet mass 1 kg
- transport, tractor and trailer, agricultural: 0.002 metric ton*km; = 2/1000; source Human, L. 2017; lognormal variance with pedigree 0.157039, pedigree (2,5,3,1,1)
  Calculated value: transport of harvested fruit from orchard to farm. Average distance: 2 km.
- glyphosate: 0.000110395 kg; = 3.87971563981/ yield; source Dabrowski, J.M. 2014; lognormal variance with pedigree 0.0617498, pedigree (2,5,4,1,4)
  (same comment as for mancozeb)
  properties: carbon content, fossil 0.214286, dry mass 1 kg, wet mass 1 kg
- potassium chloride: 0.0030865 kg; name potassium_chloride; = (6.85274031E+01/ yield)*1.58289736294535; source Hortgro 2017; lognormal variance with pedigree 0.126177, pedigree (2,5,3,1,1)
  The exchange has been updated from 'potassium chloride, as K2O' into 'potassium chloride' and therefore its amount has been scaled (multiplied) from 0.0019 kg by 1.5829 kg of 'potassium chloride' per kg of 'potassium chloride, as K2O'. Original comment of the exchange is: Calculated value: 80.08 kg K2O per bearing ha per year.
  properties: wet mass 1 kg, dry mass 1 kg
- mulching: 4.5527e-6 ha; = 0.16/ yield; source Confronting Climate Change 2017; lognormal variance with pedigree 0.126177, pedigree (2,5,3,1,1)
  Calculated value: average value: 80% mulch once every 5 years.
- ammonium nitrate: 0.0119068 kg; name ammonium_nitrate; = ( 146.45/ yield )*2.85731828339295; source Peter Dall 2017; lognormal variance with pedigree 0.126177, pedigree (2,5,3,1,1)
  The exchange has been updated from 'ammonium nitrate, as N' into 'ammonium nitrate' and therefore its amount has been scaled (multiplied) from 0.0042 kg by 2.8573 kg of 'ammonium nitrate' per kg of 'ammonium nitrate, as N'. Original comment of the exchange is: Calculated value: 146.45 kg N per ha per year. Additional source: Nico Ferreira, Technical Advisor at Two-A-Day Group (Pty) Ltd. (TAD).
  properties: wet mass 1 kg, dry mass 1 kg
- calcium nitrate: 0.000584387 kg; name calcium_nitrate; = 2.05376833E+01/ yield; source Confronting Climate Change 2017; lognormal variance with pedigree 0.0112, pedigree (2,5,3,1,1)
  Calculated value: 24 kg per bearing ha per year
  properties: wet mass 1 kg, dry mass 1 kg
- inorganic phosphorus fertiliser, as P2O5: 0.00122472 kg; name phosphate_fertiliser; = 4.30415273E+01/ yield; source Confronting Climate Change 2017; lognormal variance with pedigree 0.126177, pedigree (2,5,3,1,1)
  Calculated value: based on the application of 18.78 kg P/ha/year (43.04 kg P2O5/ha/year).
  properties: dry mass 1 kg, wet mass 1 kg
- pesticide, unspecified: 1.9852e-5 kg; name pesticide_unspecified; = ( imidacloprid+ thiram+ thiamethoxam+ cyanamide)/ yield; source Dabrowski, J.M. 2014; lognormal variance with pedigree 0.0572, pedigree (2,5,4,1,4)
  Calculated value: Imidacloprid, cyanamide, thiram and thiamethoxam. Calculated based on 2009 pesticide application values from Dabrowski, Shadung, & Wepener (2014) and König (2015), with data on total production area from Hortgro (2015). Further references: Koenig, A. (2015). Environmental hotspots and the potential of clean technologies in the South African fruit supply chain. Master thesis at Zurich University of applied Sciences (ZHAW), Institute of Natural Resource Sciences, unpublished; Hortgro (2015) Key Deciduous Fruit Statistics 2014, Hortgro, Paarl, South Africa.
  properties: wet mass 1 kg, carbon content, fossil 0.486978, dry mass 1 kg
- trellis system, wooden poles, soft wood, tar impregnated: 2.84544e-5 ha; = 1.0/ yield; source Human, L. 2017; lognormal variance with pedigree 0.126177, pedigree (2,5,3,1,1)
  Calculated value.
- fruit tree seedling, for planting: 0.00184669 unit; = tree_density/ orchard_lifetime/ yield; source Confronting Climate Change 2017; lognormal variance with pedigree 0.126177, pedigree (2,5,3,1,1)
  (same comment as for establishing orchard)
  properties: dry mass 0.578035 kg, carbon content, non-fossil 0.439481, wet mass 1 kg, water content 0.73
  note on carbon content, non-fossil: calculation: C-content of components according to ecoinvent report No. 15a. Source of composition: https://ndb.nal.usda.gov/ndb/search/. Unspecific seedling used as proxy.
- phenoxy-compound: 5.76504e-6 kg; name phenoxy_compound; = 0.20260663507/ yield; source Dabrowski, J.M. 2014; lognormal variance with pedigree 0.00984984, pedigree (2,2,3,5,1)
  Calculated value: MCPA. Calculated based on 2009 pesticide application values from Dabrowski, Shadung, & Wepener (2014) and König (2015), with data on total production area from Hortgro (2015). Further references: Koenig, A. (2015). Environmental hotspots and the potential of clean technologies in the South African fruit supply chain. Master thesis at Zurich University of applied Sciences (ZHAW), Institute of Natural Resource Sciences, unpublished; Hortgro (2015) Key Deciduous Fruit Statistics 2014, Hortgro, Paarl, South Africa.
  properties: carbon content, fossil 0.532559, wet mass 1 kg, dry mass 1 kg

## Inputs from nature
- Transformation, to permanent crop, irrigated [natural resource, land]: 0.0142272 m2; = occupation/ orchard_lifetime; source Confronting Climate Change 2017; lognormal variance with pedigree 0.0906, pedigree (2,5,3,1,1)
  Calculated value
- Transformation, from permanent crop, irrigated [natural resource, land]: 0.0142272 m2; = occupation/ orchard_lifetime; source Confronting Climate Change 2017; lognormal variance with pedigree 0.0186, pedigree (2,5,3,1,1)
  Calculated value
- Carbon dioxide, in air [natural resource, in air]: 0.935952 kg; = 32893.09677822140/ yield; source Nemecek, T. 2011; lognormal variance with pedigree 0.0157498, pedigree (2,5,3,1,1)
  Calculated value
- Energy, gross calorific value, in biomass [natural resource, biotic]: 3.14842 MJ; lognormal variance with pedigree 0.0177498, pedigree (2,5,3,5,1)
  Literature value. Gross energy content is related to MJ/kg dry matter of product. Source: ecoinvent data: GLO pear production dataset
- Occupation, permanent crop, irrigated [natural resource, land]: 0.284544 m2*year; name occupation; = 10000/ yield; source Confronting Climate Change 2017; lognormal variance with pedigree 0.0126, pedigree (2,5,3,1,1)
  Calculated value

## Emissions to nature
- Chromium [soil, agricultural]: -8.24255e-7 kg; = -2.89676249E-02 / yield; source Nemecek, T. 2011; lognormal variance with pedigree 0.0446, pedigree (2,4,3,1,1)
  Calculated value: calculated according to Nemecek und Schnetzer (2012). Heavy metal content of inorganic fertilisers according to Desaules & Struder (1993), heavy-metal contents of organic fertilisers according to Freiermuth (2006) from Menzi & Kessler (1998) and Desaules & Studer (1993), dry matter content from Walther et al. (2001), heavy metal content of plant material according to Mattos at al. (2003), heavy metal content of pesticides according to Perkow & Ploss (1994) in Freiermuth (2006), deposition according to Freiermuth (2006), heavy metal content in exported biomass according to Freiermuth (2006).
  Further references:
  Desaules A. & Studer K. (1993) NABO: Nationales Beobachtungsnetz, Messresultate 1985-1991, Schriftenreihe Umwelt Nr. 200, BUWAL (Bundesamt für Umwelt, Wald und Landschaft), Bern;
  Menzi H. & Kessler J. (1998) Heavy metal content of manures in Switzerland. In: Martinez J. and Maudet M.N. (eds): Proc. 8th International Conference on the FAO ESCORENA;
  Freiermuth R. (2006) Modell zur Berechnung der Schwermetallflüsse in der Landwirtschaftlichen Ökobilanz - SALCA-Schwermetall, Forschungsanstalt Agroscope Reckenholz-Tänikon (ART), 28p;
  Perkow W. und Ploss H., 1994. Wirksubstanzen der Pflanzenschutz- und Schädlingsbekämpfungsmittel. Berlin: Blackwell Wissenschafts-Verlag.
  Walther U., Ryser J.-P. & Flisch R, 2001. Grundlagen für die Düngung im Acker- und Futterbau 2001. Agrarforschung, 8 (6): 1-80.
  Mattos Jr, D., Quaggio, J. A., Cantarella, H., & Alva, A. K. (2003). Nutrient content of biomass components of Hamlin sweet orange trees. Scientia Agricola, 60(1), 155-160.
- Carbon dioxide, fossil [air, non-urban air or from high stacks]: 0.000263037 kg; = 9.24416000E+00 / yield; source Nemecek, T. 2011; lognormal variance with pedigree 0.0112, pedigree (2,5,3,1,1)
  Calculated value: CO2 emissions from urea application according to Nemecek und Schnetzer (2011).
- Lead [soil, agricultural]: 7.21655e-8 kg; = 2.53618322E-03 / yield; source Nemecek, T. 2011; lognormal variance with pedigree 0.0506, pedigree (2,5,3,1,1)
  (same comment as for Chromium)
- Lead [water, ground-]: 2.14102e-9 kg; = 7.52438457E-05 / yield; source Nemecek, T. 2011; lognormal variance with pedigree 0.1006, pedigree (2,5,3,1,1)
  Calculated value: calculated according to Nemecek und Schnetzer (2012). Leaching rates according to Wolfensberger & Dinkel (1997), heavy metal content of inorganic fertilisers according to Desaules & Struder (1993), deposition and content of seeds according to Freiermuth (2006), heavy metal content of pesticides according to Perkow & Ploss (1994) in Freiermuth (2006).
  Further references:
  Wolfensberger U. & Dinkel F. (1997) Beurteilung nachwachsender Rohstoffe in der Schweiz in den Jahren 1993-1996, FAT und Carbotech, im Auftrag des Bundesamtes für Landwirtschaft, Bern;
  Desaules A. & Studer K. (1993) NABO: Nationales Beobachtungsnetz, Messresultate 1985-1991, Schriftenreihe Umwelt Nr. 200, BUWAL (Bundesamt für Umwelt, Wald und Landschaft), Bern;
  Freiermuth R. (2006) Modell zur Berechnung der Schwermetallflüsse in der Landwirtschaftlichen Ökobilanz - SALCA-Schwermetall, Forschungsanstalt Agroscope Reckenholz-Tänikon (ART), 28p
  Walther U., Ryser J.-P. & Flisch R, 2001. Grundlagen für die Düngung im Acker- und Futterbau 2001. Agrarforschung, 8 (6): 1-80.
  Perkow W. und Ploss H., 1994. Wirksubstanzen der Pflanzenschutz- und Schädlingsbekämpfungsmittel. Berlin: Blackwell Wissenschafts-Verlag.
- Water [water, surface water]: 0.00963811 m3; = irrigation_input*(1- fraction_iw_to_air)* fraction_IW_to_surface_water; lognormal variance with pedigree 0.135602, pedigree (3,4,4,2,3)
  Calculated value.
- Zinc, ion [water, ground-]: 4.15873e-7 kg; = 1.46154463E-02 / yield; source Nemecek, T. 2011; lognormal variance with pedigree 0.1006, pedigree (2,5,3,1,1)
  (same comment as for Lead)
- Cadmium [soil, agricultural]: 6.01987e-8 kg; = 2.11562217E-03 / yield; source Nemecek, T. 2011; lognormal variance with pedigree 0.0506, pedigree (2,5,3,1,1)
  Calculated value: calculated according to Nemecek und Schnetzer (2012). Heavy metal content of inorganic fertilisers according to Desaules & Struder (1993), heavy metal content of pesticides according to Perkow & Ploss (1994) in Freiermuth (2006), deposition according to Freiermuth (2006), heavy metal content in exported biomass according to Freiermuth (2006).
  Further references: Desaules A. & Studer K. (1993) NABO: Nationales Beobachtungsnetz, Messresultate 1985-1991, Schriftenreihe Umwelt Nr. 200, BUWAL (Bundesamt für Umwelt, Wald und Landschaft), Bern
- Lead [water, surface water]: 1.42367e-8 kg; = 5.00333952E-04 / yield; source Nemecek, T. 2011; lognormal variance with pedigree 0.1006, pedigree (2,5,3,1,1)
  Calculated value: calculated according to Nemecek und Schnetzer (2012). Soil heavy metal contents according to Keller & Desaules (2001), erosion average value according to Kooman & Critchley (2013), Le Roux et al. (2008) and UWC Erosion (2015), accumulation factor according to Prasuhn (2006), erosion factor: 0.05, since surface waters between agricultural fields are rare and the distance to the next river or lake is greater than 100 m according to Freiermuth (2006), heavy metal content of inorganic fertilisers according to Desaules & Struder (1993), deposition and content of seeds according to Freiermuth (2006), heavy metal content of pesticides according to Perkow & Ploss (1994) in Freiermuth (2006).
  Further references:
  Keller T. & Desaules A. (2001) Böden der Schweiz: Schadstoffgehalte und Orientierungswerte (1990 – 1996). Umwelt-Materialien Nr. 139. Bern: Bundesamt für Umwelt, Wald und Landschaft BUWAL.
  Kooman, G.; Critchley, W. R. S. GIS-Assisted Modelling of Soil Erosion in a South African Catchment: Evaluating the USLE and SLEMSA Approach. In Water Resources Planning, Development and Management; Breetzke, G. D., Ed.; InTech, 2013;
  Le Roux, J. J.; Morgenthal, T. L.; Malherbe, J.; Pretorius, D. J.; Sumner, P. D. Water erosion prediction at a national scale for South Africa. Water SA 2008, 34, 305–314.;
  UWC Erosion http://www.botany.uwc.ac.za/envfacts/facts/erosion.htm (accessed Apr 28, 2015).
  Prasuhn V. (2006) Erfassung der PO4-Austräge für die Ökobilanzierung SALCA Phosphor. Agroscope Reckenholz - Tänikon ART, 20p. Online at http://www.art.admin.ch/themen/00617/00744/index.html?lang=en.
- Glyphosate [soil, agricultural]: 0.000110395 kg; = 3.87971563981/ yield; source Dabrowski, J.M. 2014; lognormal variance with pedigree 0.0896, pedigree (2,5,4,1,4)
  Calculated value: 100% of input quantity. Calculated based on 2009 pesticide application values from Dabrowski, Shadung, & Wepener (2014) and König (2015), with data on total production area from Hortgro (2015). Further references: Koenig, A. (2015). Environmental hotspots and the potential of clean technologies in the South African fruit supply chain. Master thesis at Zurich University of applied Sciences (ZHAW), Institute of Natural Resource Sciences, unpublished; Hortgro (2015) Key Deciduous Fruit Statistics 2014, Hortgro, Paarl, South Africa.
- Nickel [soil, agricultural]: 2.3677e-7 kg; = 8.32106241E-03 / yield; source Nemecek, T. 2011; lognormal variance with pedigree 0.0506, pedigree (2,5,3,1,1)
  (same comment as for Chromium)
- Phosphate [water, surface water]: 1.4495e-5 kg; = 5.09410842E-01 / yield; source Nemecek, T. 2011; lognormal variance with pedigree 0.0506, pedigree (2,5,3,1,1)
  Calculated value: emissions arising from fertiliser use, calculated according to Nemecek und Schnetzer (2011).
- Phosphorus [water, surface water]: 5.53067e-6 kg; = 1.94370000E-01 / yield; source Nemecek, T. 2011; lognormal variance with pedigree 0.0506, pedigree (2,5,3,1,1)
  Calculated value: emissions arising from fertiliser use, calculated according to Nemecek und Schnetzer (2011). Soil erosion according to Kooman & Critchley; Le Roux at al. (2008); UWC (2015), P content in topsoil according to Nemecek, Kägi T. & Blaser S. (2007), enrichment factor for P according to Wilke & Schaub (1996), fraction of eroded soil that reaches river according to Nemecek, Kägi & Blaser (2007).
  Further references: Kooman, G.; Critchley, W. R. S. GIS-Assisted Modelling of Soil Erosion in a South African Catchment: Evaluating the USLE and SLEMSA Approach. In Water Resources Planning, Development and Management; Breetzke, G. D., Ed.; InTech, 2013 ISBN 978-953-51-1092-7; Le Roux, J. J.; Morgenthal, T. L.; Malherbe, J.; Pretorius, D. J.; Sumner, P. D. Water erosion prediction at a national scale for South Africa. Water SA 2008, 34, 305–314; UWC Erosion Available online: http://www.botany.uwc.ac.za/envfacts/facts/erosion.htm (accessed on Apr 28, 2015); Nemecek, T., Kagi, T., & Blaser, S. (2007). Life Cycle Inventories of Swiss and European Agricultural Production Systems. Final report; Wilke B. & Schaub D. (1996) Phosphatanreicherung bei Bodenerosion. Mitt. Deutsche Bodenkundl. Gesellsch. 79, 435-438.
- Zinc, ion [water, surface water]: 1.27889e-7 kg; = 4.49454204E-03 / yield; source Nemecek, T. 2011; lognormal variance with pedigree 0.1006, pedigree (2,5,3,1,1)
  (same comment as for Lead)
- Mancozeb [soil, agricultural]: 0.000449515 kg; = 15.79777251185/ yield; source Dabrowski, J.M. 2014; lognormal variance with pedigree 0.0896, pedigree (2,5,4,1,4)
  (same comment as for Glyphosate)
- Mercury [water, surface water]: 2.39745e-13 kg; = 8.42560838E-09/ yield; source Nemecek, T. 2011; lognormal variance with pedigree 0.1006, pedigree (2,5,3,1,1)
  (same comment as for Lead)
- Cadmium, ion [water, surface water]: 1.05833e-9 kg; = 3.71938473E-05/ yield; source Nemecek, T. 2011; lognormal variance with pedigree 0.1006, pedigree (2,5,3,1,1)
  (same comment as for Lead)
- Mercury [soil, agricultural]: 7.82037e-13 kg; = 2.74838927E-08 / yield; source Nemecek, T. 2011; lognormal variance with pedigree 0.0506, pedigree (2,5,3,1,1)
  (same comment as for Chromium)
- Pesticides, unspecified [soil, agricultural]: 5.19191e-8 kg; = 0.00182464455/ yield; source Dabrowski, J.M. 2014; lognormal variance with pedigree 0.0896, pedigree (2,5,4,1,4)
  Calculated value: cyanamide emissions. 100% of input quantity. Calculated based on 2009 pesticide application values from Dabrowski, Shadung, & Wepener (2014) and König (2015), with data on total production area from Hortgro (2015). Further references: Koenig, A. (2015). Environmental hotspots and the potential of clean technologies in the South African fruit supply chain. Master thesis at Zurich University of applied Sciences (ZHAW), Institute of Natural Resource Sciences, unpublished; Hortgro (2015) Key Deciduous Fruit Statistics 2014, Hortgro, Paarl, South Africa.
- Chlorpyrifos methyl [soil, agricultural]: 2.29523e-5 kg; = 0.80663507109/ yield; source Dabrowski, J.M. 2014; lognormal variance with pedigree 0.0896, pedigree (2,5,4,1,4)
  (same comment as for Glyphosate)
- Chromium, ion [water, ground-]: 5.35185e-7 kg; = 1.88085294E-02 / yield; source Nemecek, T. 2011; lognormal variance with pedigree 0.1006, pedigree (2,5,3,1,1)
  (same comment as for Lead)
- Mercury [water, ground-]: 2.08672e-14 kg; = 7.33358166E-10 / yield; source Nemecek, T. 2011; lognormal variance with pedigree 0.1006, pedigree (2,5,3,1,1)
  (same comment as for Lead)
- Dinitrogen monoxide [air, non-urban air or from high stacks]: 9.48648e-5 kg; = 3.33392854E+00/ yield; source Nemecek, T. 2011; lognormal variance with pedigree 0.0406, pedigree (2,5,3,1,1)
  Calculated value: emissions arising from fertiliser use, calculated according to Nemecek und Schnetzer (2011)
- Imidacloprid [soil, agricultural]: 1.97104e-5 kg; = 0.69270142180/ yield; source Dabrowski, J.M. 2014; lognormal variance with pedigree 0.0896, pedigree (2,5,4,1,4)
  (same comment as for Glyphosate)
- Paraquat [soil, agricultural]: 5.21079e-5 kg; = 1.83127962085/ yield; source Dabrowski, J.M. 2014; lognormal variance with pedigree 0.0896, pedigree (2,5,4,1,4)
  (same comment as for Glyphosate)
- Nitrogen oxides [air, non-urban air or from high stacks]: 1.99216e-5 kg; = 7.00124993E-01/ yield; source Nemecek, T. 2011; lognormal variance with pedigree 0.0406, pedigree (2,5,3,1,1)
  Calculated value: calculated from N2O emissions according to Nemecek und Schnetzer (2011).
- Nitrate [water, ground-]: 0.00102 kg; source Faist Emmenegger M. 2009; lognormal variance with pedigree 0.0506, pedigree (2,5,3,1,1)
  Calculated value: emissions arising from fertiliser use, calculated using the SQCB-NO3 model from Faist Emmenegger et al. (2009). Clay content according to the WFLDB, root depth according to the FAO, N uptake according to Roccuzzo et al. (2012)
  Further references: http://www.fao.org/docrep/x0490e/x0490e0e.htm; Roccuzzo, Giancarlo, Damiano Zanotelli, Maria Allegra, Antonio Giuffrida, Biagio Francesco Torrisi, Antonino Leonardi, Ana Quiñones, Francesco Intrigliolo, and Massimo Tagliavini. "Assessing nutrient uptake by field-grown orange trees." European journal of Agronomy 41 (2012): 73-80.
- Thiamethoxam [soil, agricultural]: 2.2251e-8 kg; = 0.00078199052/ yield; source Dabrowski, J.M. 2014; lognormal variance with pedigree 0.0896, pedigree (2,5,4,1,4)
  (same comment as for Glyphosate)
- Simazine [soil, agricultural]: 4.04564e-9 kg; = 0.00014218009/ yield; source Dabrowski, J.M. 2014; lognormal variance with pedigree 0.0896, pedigree (2,5,4,1,4)
  (same comment as for Glyphosate)
- Ammonia [air, non-urban air or from high stacks]: 0.000358502 kg; = 1.25992000E+01 / yield; source Nemecek, T. 2011; lognormal variance with pedigree 0.0186, pedigree (2,5,3,1,1)
  Calculated value: emissions arising from fertiliser use, calculated using the AGRAMMON model from Nemecek und Schnetzer (2011).
- Carbaryl [soil, agricultural]: 1.0721e-7 kg; = 0.00376777251/ yield; source Dabrowski, J.M. 2014; lognormal variance with pedigree 0.0896, pedigree (2,5,4,1,4)
  (same comment as for Glyphosate)
- MCPA [soil, agricultural]: 5.76504e-6 kg; = 0.20260663507/ yield; source Dabrowski, J.M. 2014; lognormal variance with pedigree 0.0896, pedigree (2,5,4,1,4)
  (same comment as for Glyphosate)
- Zinc [soil, agricultural]: 1.52064e-6 kg; = 5.34414682E-02 / yield; source Nemecek, T. 2011; lognormal variance with pedigree 0.0506, pedigree (2,5,3,1,1)
  (same comment as for Chromium)
- Copper [soil, agricultural]: 5.0278e-5 kg; = (copper_emissions+ copper_emissions_copper_oxychloride)/ yield; source Nemecek, T. 2011; lognormal variance with pedigree 0.0966, pedigree (2,5,4,1,4)
  Calculated value: calculated according to Nemecek und Schnetzer (2012). Heavy metal content of inorganic fertilisers according to Desaules & Struder (1993), heavy-metal contents of organic fertilisers according to Freiermuth (2006) from Menzi & Kessler (1998) and Desaules & Studer (1993), dry matter content from Walther et al. (2001), heavy metal content of plant material according to Mattos at al. (2003), heavy metal content of pesticides according to Perkow & Ploss (1994) in Freiermuth (2006), deposition according to Freiermuth (2006), heavy metal content in exported biomass according to Freiermuth (2006).
  Further references:
  Desaules A. & Studer K. (1993) NABO: Nationales Beobachtungsnetz, Messresultate 1985-1991, Schriftenreihe Umwelt Nr. 200, BUWAL (Bundesamt für Umwelt, Wald und Landschaft), Bern;
  Menzi H. & Kessler J. (1998) Heavy metal content of manures in Switzerland. In: Martinez J. and Maudet M.N. (eds): Proc. 8th International Conference on the FAO ESCORENA;
  Freiermuth R. (2006) Modell zur Berechnung der Schwermetallflüsse in der Landwirtschaftlichen Ökobilanz - SALCA-Schwermetall, Forschungsanstalt Agroscope Reckenholz-Tänikon (ART), 28p;
  Perkow W. und Ploss H., 1994. Wirksubstanzen der Pflanzenschutz- und Schädlingsbekämpfungsmittel. Berlin: Blackwell Wissenschafts-Verlag.
  Walther U., Ryser J.-P. & Flisch R, 2001. Grundlagen für die Düngung im Acker- und Futterbau 2001. Agrarforschung, 8 (6): 1-80.
  Mattos Jr, D., Quaggio, J. A., Cantarella, H., & Alva, A. K. (2003). Nutrient content of biomass components of Hamlin sweet orange trees. Scientia Agricola, 60(1), 155-160.
  AND copper emissions arising from the use of copper oxychloride. Calculated value: Calculated based on 2009 pesticide application values from Dabrowski, Shadung, & Wepener (2014) and König (2015) Copper oxychloride application: 2.96E+00 kg/ha*a. Stoichiometric calculation: Cu(OH)3Cl: molecular mass: 213.57, Cu: 63.55, Cu: 59.51%
  Further references: Koenig, A. (2015). Environmental hotspots and the potential of clean technologies in the South African fruit supply chain. Master thesis at Zurich University of applied Sciences (ZHAW), Institute of Natural Resource Sciences, unpublished.
- Chromium, ion [water, surface water]: 1.24477e-6 kg; = 4.37463328E-02/ yield; source Nemecek, T. 2011; lognormal variance with pedigree 0.1006, pedigree (2,5,3,1,1)
  (same comment as for Lead)
- Cadmium, ion [water, ground-]: 1.07764e-8 kg; = 3.78725229E-04 / yield; source Nemecek, T. 2011; lognormal variance with pedigree 0.1006, pedigree (2,5,3,1,1)
  (same comment as for Lead)
- Copper, ion [water, ground-]: 8.15047e-8 kg; = 2.86440247E-03 / yield; source Nemecek, T. 2011; lognormal variance with pedigree 0.1006, pedigree (2,5,3,1,1)
  (same comment as for Lead)
- Nickel, ion [water, surface water]: 8.80087e-8 kg; = 3.09297756E-03 / yield; source Nemecek, T. 2011; lognormal variance with pedigree 0.1006, pedigree (2,5,3,1,1)
  (same comment as for Lead)
- Copper, ion [water, surface water]: 9.31069e-8 kg; = 3.27215016E-03/ yield; source Nemecek, T. 2011; lognormal variance with pedigree 0.1006, pedigree (2,5,3,1,1)
  (same comment as for Lead)
- Acephate [soil, agricultural]: 2.35996e-8 kg; = 0.00082938389/ yield; source Dabrowski, J.M. 2014; lognormal variance with pedigree 0.0896, pedigree (2,5,4,1,4)
  (same comment as for Glyphosate)
- Phosphate [water, ground-]: 5.23471e-6 kg; = 1.83968612E-01 / yield; source Nemecek, T. 2011; lognormal variance with pedigree 0.0506, pedigree (2,5,3,1,1)
  (same comment as for Phosphate)
- Thiram [soil, agricultural]: 6.74274e-8 kg; = 0.00236966825/ yield; source Dabrowski, J.M. 2014; lognormal variance with pedigree 0.0896, pedigree (2,5,4,1,4)
  (same comment as for Glyphosate)
- Water [air, non-urban air or from high stacks]: 0.123919 m3; = irrigation_input* fraction_iw_to_air; lognormal variance with pedigree 0.135602, pedigree (3,4,4,2,3)
  Literature value (Siebert, 2010) (Vionnet, S., Quantis Water Database - Technical Report, 2012).
- Mineral oil [soil, agricultural]: 0.00158612 kg; = 5.57426953E+01/ yield; source Confronting Climate Change 2017; lognormal variance with pedigree 0.0966, pedigree (2,5,4,1,4)
  Calculated value: 100% of input quantity.
- Water [water, ground-]: 0.0385524 m3; = irrigation_input*(1- fraction_iw_to_air)* fraction_iw_to_ground_water; lognormal variance with pedigree 0.135602, pedigree (3,4,4,2,3)
  Calculated value.

## Sampling procedure
Real industry data from Confronting Climate Change (CCC) http://www.climatefruitandwine.co.za/. Inventory modelling following the ecoinvent Guidelines.

## Extrapolations
This dataset has been extrapolated from year 2016 to the year of the calculation (2021). The uncertainty has been adjusted accordingly.

## Review by Assumpció ANTON 2017-08-31
Please,be aware to consider further flow updates as far as better information or emission models are available.
