# cement production, alternative constituents 6-20%

Dataset: EcoSpold 2, unit process
Geography: CA-QC
Time period: 2005-01-01 to 2021-12-31
Technology level: current
Classification: ISIC rev.4 ecoinvent: 2394:Manufacture of cement, lime and plaster
Synonyms: CEM II/A; Portland-limestone cement; Portland composite cement; CEM II; Contempra
Tags: combined production
Scenario: Business-as-Usual
System model: Allocation, cut-off by classification
Share of production covered: 10 %
Generated by: Geneviève Martineau
Published in: Athena Institute, 2005
Database: ecoinvent
isCopyrightProtected: true
accessRestrictedTo: 1

## General comment
The dataset describes the production of Portland-limestone cement (Contempra) in Quebec.

It must be noted that this type of cement is available in Canada and Quebec only since 2009.
It was assumed that 15% of total cement production in Quebec was of this type. Regular Portland cement defined in another dataset is assumed to correspond to 85% of the market.

For the purpose of this dataset, only the limestone / clinker proportions were modified. All other alternative constituents were assumed equal to zero (therefore, this regionalised version of the dataset is not a Combined production).

Calculations were based on two important technical parameters:
1. The actual make up of regular Portland General Use (GU) cement vs Portland-Limestone cement (PLC) is as follows:
a) GU = 5% gypsum, 3% limestone, 92% clinker
b) PLC = 5% gypsum, 12% limestone, 83% clinker
In both cases, the gypsum level is held constant at 5% and the clinker fraction is adjusted to make up the balance of the material in the cement.
2. Capacity utilisation rate of the cement plant is assumed to be 93.3%

Calculations are based on Athena Institute Portland cement Life cycle inventory 2007 (Quebec data, benchmarked with Canadian, and US LCI cement data), based on:
- For grinding energy: U.S. And Canadian Labor-Energy Input Survey 2007, 2008 Portland Cement Association
- For material inputs: Athena 2005- Cement and Structural Concrete: LCI Update 2005;

Adaptations for Portland-Limestone cement were made based on the following literature survey:
- Thomas, M et al 2010, Field Trials of Concretes Produced with Portland Limestone Cement- New CSA cement type performs well in an aggressive environment, by Michael d.a. Thomas, Doug Hooton, Kevin Cail, Brenton a. Smith, John de Wal, and Kenneth g. Kazanis 2010;
- PCA 2003, The Use of Limestone in Portland Cement: A State-of-the-Art Review, by Peter Hawkins, Paul Tennis, and Rachel Detwiler, © Portland Cement Association 2003.
- PCA 2002, The Use of Limestone in Portland Cements: Effect on Thaumasite Form of Sulfate Attack, by R. Doug Hooton and Michael D. A. Thomas. PCA R&D Serial No. 2658.
- CAC 2009a: Portland-Limestone Cement: State-of-the-Art Report and Gap Analysis for CSA A 3000, by R. D. Hooton, M. Nokken, and M. D. A. Thomas.
- CAC 2009b: Backgrounder, Portland-Limestone Cement.

A direct link was created for clinker input, since it is always produced on the same site as cement. Therefore, no transport was included.

## Included activities start
From cradle, including all upstream activities.

## Included activities end
This activity ends with the cement produced in the cement mill. The dataset does not include packaging and administration.

## Geography
GLO dataset was adapted to Quebec Portland-Limestone production using theAthena Institute"Cement and Structural concrete : LCI update 2005", Athena database (2013, unpublished) and the "US & Canadian Labor-Energy Input Survey 2007" from Portland Cement Association (2008).

## Time period
Quebec data corresponding to 2007 Portland cement inventory, adapted for Portland-Limestone cement from 2009 data.

## Parameters
- Portland fraction: 0.85 dimensionless; name Portland_fraction; lognormal variance with pedigree 0.0406, pedigree (5,1,1,1,1)
  Fraction of the annual production capacity of Quebec cement plants that is used to produce regular Portland cement. Canadian cement association reports all Portland cements (with or without alternative constituents) alltogether. The fraction of regular Portland cement is therefore a rough estimation.
  It is assumed that the balance is Portland-Limestone cement (Contempra)
- quebec production volume: 4.203e9 kg; name PV_cement_Quebec; lognormal variance with pedigree 0.0012, pedigree (2,1,1,1,1)
  Annual production capacity of the 3 cement mills in Quebec, in 2007. Source: USGS (2010). See Exchanges.
  The use of production capacity may be overestimate the production volume of Quebec cement plants.

## Reference product
- silica fume, densified: 0 kg; name silica_fume; source Athena Institute, 2005; By-product classification Recyclable; CPC 374: Plaster, lime and cement
  Not applicable to Quebec or Canadian Portland-Limestone cement. Source: Athena LCI of Portland cement, and Athena LCI database 2013 (unpublished).
  production volume 0 kg; = APV_cement/ cement*ABS( silica_fume)
    Amount relative to produced amount of reference product
  property price 0.165426 EUR2005; name silica_fume_price_EUR2005
    Estimated value. Based on price reported on the website Alibaba (https://www.alibaba.com/showroom/silica-fume-price.html, accessed 7 July 2019). Using exchange rate of 1EURO = 1.209 USD.
  property carbon content, fossil 0
    asumed same composition as sylicon dioxide (http://www.silicafume.org/pdf/silicafume-users-manual.pdf)
  property carbon content, non-fossil 0
    (same comment as for silica fume, densified)
  property carbon content 0
    carbon content on a dry matter basis (reserved; not for manual entry)
  properties: wet mass 1 kg, water content 0, dry mass 1 kg, water in wet mass 0 kg, carbon allocation 0 kg
- cement, alternative constituents 6-20%: 1 kg; name cement; source Athena Institute, 2005; CPC 374: Plaster, lime and cement; By-product classification allocatable product
  production volume 6.3045e8 kg; name APV_cement
    Based on annual production capacity of the 3 cement mills in Quebec, scaled by the assumed share of this cement in the Canadian cement production.
  property price 0.0615 EUR2005; name cement_price_EUR2005
    2005 import and export prices (total trades (USD) divided by total weight (kg) in China, India, USA, Japan, Russia and Europe, major producers and consumers (http://www.cementchina.net/freport/showfre.asp?id=749) from UN Commodity Trade Statistics Database (http://data.un.org/Explorer.aspxDatabase [Accessed 2 July 2010]). Commodity: Cement (portland, aluminious, slag or hydraulic)
  property carbon content 0
    carbon content on a dry matter basis (reserved; not for manual entry)
  properties: carbon content, fossil 0, dry mass 1 kg, carbon content, non-fossil 0, water in wet mass 0 kg, water content 0, wet mass 1 kg, carbon allocation 0 kg
- hard coal ash: 0 kg; name flyash; source Athena Institute, 2005; By-product classification Waste; CPC 39: Wastes or scraps
  (same comment as for silica fume, densified)
  production volume 0 kg; = APV_cement/ cement*ABS( flyash)
    Amount relative to produced amount of reference product
  property price 0 EUR2005; name flyash_price_EUR2005
    Waste products are assigned a price of zero as they are assumed to require further treatment.
  property carbon content 0
    carbon content on a dry matter basis (reserved; not for manual entry)
  properties: dry mass 1 kg, wet mass 1 kg, water content 0, carbon content, fossil 0, carbon content, non-fossil 0, water in wet mass 0 kg, carbon allocation 0 kg
- blast furnace slag: 0 kg; name blast_furnace_slag; By-product classification Recyclable; CPC 39310: Slag, dross, scalings and other waste from the manufacture of iron or steel
  Estimated to be the same amount as in the Swiss production.
  production volume 0 kg; name ByP_01_PV
    Calculated from the relationship to the reference product.
  property price 0 EUR2005; name blast_furnace_slag_price_EUR2005
    Assumed without economic value
  property heating value, net 0 MJ
    Non combustible products are assumed to have an LHV equal to zero (0).
  property carbon content, fossil 0
    Industry value; Arcelor Mittal, chemical composition of blast furnace slag (http://www.cst.com.br/english/products/co_products/catalog_products/blast_slag/blast_slag.asp, accessed: 20121003).
  property carbon content 0
    carbon content on a dry matter basis (reserved; not for manual entry)
  properties: water in wet mass 0 kg, carbon content, non-fossil 0, water content 0, dry mass 1 kg, wet mass 1 kg, carbon allocation 0 kg

## Inputs from technosphere
- steel, low-alloyed: 0.00011 kg; name steel; = 0.00011* cement; source Kellenberger D. 2007; lognormal variance with pedigree 0.1, pedigree (3,5,5,5,3)
  Ancillary product for grinding (wearing parts). Extrapolated value, based on "cement production, alternative constituents 6-20%, GLO" dataset.
  Uncertainty: V
  properties: carbon content, fossil 0.005, dry mass 1 kg, wet mass 1 kg
- cement factory: 5.36e-11 unit; = 5.36e-11* cement+silica_fume*0+ blast_furnace_slag*0+ flyash*0; source Kellenberger D. 2007; lognormal variance with pedigree 0.1, pedigree (3,5,5,5,3)
  Ancillary product for grinding. Extrapolated value, based on "cement production, alternative constituents 6-20%, GLO" dataset.
  Uncertainty: V
- electricity, medium voltage: 0.0542 kWh; = 0.0542* cement; source Portland Cement Association 2008; lognormal variance with pedigree 0.009325, pedigree (2,2,4,2,1)
  Grinding energy. Literature value.
  Uncertainty: V
- heat, district or industrial, other than natural gas: 0 MJ; source Athena Institute, 2005
  Heat for drying of blast furnace slag. Not applicable to Quebec or Canadian Portland-Limestone cement. Source: Athena LCI of Portland cement, and Athena LCI database 2013 (unpublished).
  properties: heating value, net 1 MJ
- ethylene glycol: 0.00021 kg; = 2.1e-4* cement; source Kellenberger D. 2007; lognormal variance with pedigree 0.1, pedigree (3,5,5,5,3)
  (same comment as for cement factory)
  properties: heating value, net 23.44 MJ, carbon content, fossil 0.387097, dry mass 1 kg, wet mass 1 kg
- limestone, crushed, for mill: 0.12 kg; name limestone; = 0.12*cement; lognormal variance with pedigree 0.009325, pedigree (2,2,4,2,1)
  Cement constituant. Estimated value. Proportion of limestone in Portland-limestone cement provided by Athena Institute (from Athena LCI Database).
  Uncertainty: V
  properties: water content 0.00200401, wet mass 1 kg, dry mass 0.998 kg, carbon content, fossil 0.117492
- burnt shale: 0.002 kg; name bshale; = 0.002*cement; source Athena Institute, 2005; undefined min 0.002, max 0.002, standardDeviation95 0, pedigree (2,2,4,2,1)
  (same comment as for silica fume, densified)
  properties: dry mass 1 kg, wet mass 1 kg
- clinker: 0.83 kg; = 0.83*cement; lognormal variance with pedigree 0.008, pedigree (1,1,4,1,1)
  Cement constituant. Calculated value.The gypsum level is held constant at about 5% (like in regular Portland cement) and the clinker fraction is adjusted to make up the balance of the material in the cement, considering the additional amount of limestone.
  Information provided by Athena Institute (from Athena LCI Database).
  cement-gypsum-limestone
  Uncertainty: C
  properties: dry mass 1 kg, wet mass 1 kg
- ground granulated blast furnace slag: 0 kg; name GGBFS; source Athena Institute, 2005
  Cement constituant. Not applicable to Quebec or Canadian Portland-Limestone cement. Source: Athena LCI of Portland cement, and Athena LCI database 2013 (unpublished).
  properties: wet mass 1 kg, dry mass 0.99 kg
- gypsum, mineral: 0.05 kg; name gypsum; = 0.05* cement; source Athena Institute, 2005; lognormal variance with pedigree 0.009325, pedigree (2,2,4,2,1)
  Cement constituant. Literature Value.The gypsum level is held constant at 5% (as for regular Portland cement). Data provided by Athena Institute (from Athena LCI Database).
  Uncertainty: V
  properties: dry mass 1 kg, wet mass 1 kg

## Emissions to nature
- Heat, waste [air, unspecified]: 0.135 MJ; = 0.135* cement; source Boesch, M.E. 2010; lognormal variance with pedigree 0.1, pedigree (3,5,5,5,3)
  Extrapolated value, based on "cement production, alternative constituents 6-20%, GLO" dataset.
  Ancillary product for grinding.
  Uncertainty: V

## Sampling procedure
Inventory data covering the three (3) Quebec cement plants

## Extrapolations
Parameters for the Canadian Cement Plants were used to represent Quebec"s plants. Some exchanges were also extrapolated from the ecoinvent "cement production, alternative constituents, 6-20%, GLO" dataset, originally based on Swiss data.

## Review by Emilia Moreno Ruiz 2016-03-17
Amount of blast furnace slag corrected
