# tilapia production, extensive aquaculture, in pond

Dataset: EcoSpold 2, unit process
Geography: RLA
Time period: 2014-01-01 to 2021-12-31
Technology level: current
Classification: ISIC rev.4 ecoinvent: 0322:Freshwater aquaculture
Scenario: Business-as-Usual
System model: Allocation, cut-off by classification
Generated by: Angel Avadí
Published in: Avadí, A. 2018
Database: ecoinvent
isCopyrightProtected: true
accessRestrictedTo: 1

## General comment
This activity represents the extensive production of tilapia in ponds. Aquaculture is widespread in South America, yet in global terms, its output is minor. The most prevalent seafood culturing systems are freshwater ones (if the important Ecuadorian shrimp and Chilean salmon aquaculture industries are excluded), either land-based (ponds) or large water bodies-based (cages). One specific aquaculture systems was modelled: pond-based semi-extensive tilapia. These tilapia systems are common in tropical areas of Brazil, Colombia, Peru and Ecuador. Technologically speaking, these systems are simple and well established. The pond systems usually consist of earthen ponds without aeration, and featuring manual feeding and fertilisation. This type of systems uses predominantly commercial aquafeed.
System boundaries and relation between activities

## Included activities start
The system boundaries include the partial life cycle of production means, from construction, through maintenance and the use phase, but excluding plant EOL, as no data was available :
· Production of 1000 kg of commercial fish feed.
· Use of an aquaculture system featuring either cage or pond infrastructure required to produce 1000 kg of fish, and consuming as much feed as determined by the system’s FCR. The construction and maintenance of ponds is integrated in the system’s use phase.

## Included activities end
Covers the nursery, rearing and production ponds until the tilapia is ready for processing. Transport of fertilized eggs is not included, since it considered to be produced locally. Ponds were integrated into the main pond-based aquaculture dataset, due to low construction and maintenance input requirements.
The provision of fingerlings was not modelled explicitly, for instance as a separate hatchery/nursery activity, but its material and energy requirements included in the main fish production dataset.

## Geography
This production system is very common in Latin America

## Technology
Common pond-based tilapia production technology

## Parameters
- feed conversion ratio: 1.329 dimensionless; name FCR; lognormal variance with pedigree 0.002425, pedigree (2,3,1,2,2)
  Feed conversion ratio for animal husbandry and aquaculture, expressed in kg feed per kg live weight of slaugthered or harvested animal

## Reference product
- tilapia: 1 kg; name RP_amount_1; source Avadí, A. 2018; CPC 04212: Farmed freshwater fish, live, fresh or chilled; By-product classification allocatable product; pedigree (1,1,1,1,1)
  Tilapia production, intensive
  production volume 3.08e8 kg; name RP_PV_1
    Includes mainly production from Brazil (220000 t) and a smaller production in Colombia. Production in other South American countries is minor.
  property price 4.5423 EUR2005; name RP_amount_1_price_EUR2005
    Calculated value based on data from United Nations Commodity Trade Statistics Database (comtrade.un.org). UN comtrade category: 30271 Fish; fresh or chilled, tilapias (Oreochromis spp.), excluding fillets, livers, roes, and other fish meat of heading 0304. Year 2015. Using exchange rate of 1EURO = 1.209 USD. Average of price of import into 4 main markets (EU, US, JPN and IN).

## Inputs from technosphere
- waste concrete: -1.737e-6 kg; name BP_amount_1; = (concrete*0.05)*-1; source Avadí, A. 2018; lognormal variance with pedigree 0.0647, pedigree (5,5,4,3,3)
  It was assumed that 5% of the concrete used is disposed of as waste.
  production volume 534.996 kg; = RP_PV_1 * (BP_amount_1 / RP_amount_1)
    Calculated from production volume of reference product using the relative outputs.
  property price 0 EUR2005; name BP_amount_1_price_EUR2005
  properties: dry mass 0.5 kg, water content 1, wet mass 1 kg
- electricity, medium voltage: 4.618 kWh; source Avadí, A. 2018; lognormal variance with pedigree 0.005825, pedigree (3,3,3,2,2)
  Energy used to power water pumping.
- quicklime, milled, packed: 0.019 kg; source Avadí, A. 2018; lognormal variance with pedigree 0.0518, pedigree (4,4,5,4,2)
  Liming increases the pH of bottom mud and thereby increases the availability of phosphorus added in fertilizer. Liming increases benthic production in fertilized ponds, apparently through increased nutrient availability and also liming increases microbial activity in mud through a favorable increase in pH.
  properties: water content 0.010101, dry mass 0.99 kg, wet mass 1 kg
- tilapia feed, 24-28% protein: 1.329 kg; = FCR*1; source Costa 2016; lognormal variance with pedigree 0.004425, pedigree (2,3,3,2,2)
  Tilapia feed, 24-28% protein
- ammonium sulfate: 0.003252 kg; source Watanabe, W. O. 2010; lognormal variance with pedigree 0.0518, pedigree (4,4,5,4,2)
  Fertilization used in ponds.
  properties: dry mass 1 kg, wet mass 1 kg
- poultry manure, dried: 0.19967 kg; source Avadí, A. 2018; lognormal variance with pedigree 0.0518, pedigree (4,4,5,4,2)
  Use of fertilizers in the ponds
  properties: potassium content 0.024, phosphorus content 0.0167, lead content 2.92e-6, wet mass 1 kg, carbon content, non-fossil 0.33389, water content 0.156069, nitrogen content 0.532, dry mass 0.865 kg, nickel content 4e-5, cadmium content 2.92e-7, mercury content 2e-7, copper content 4.38e-5, zinc content 0.000349
  note on lead content: pg 36 Tab 7. Original values are given in kg/m3, but this is an error and it is mg/kg DM
- inorganic potassium fertiliser, as K2O: 0 kg; source Avadí, A. 2018; pedigree (1,1,1,1,1)
  Considers a 30% content of K2O
  properties: dry mass 1 kg, wet mass 1 kg
- concrete, normal: 0 m3; name concrete; source Avadí, A. 2018; pedigree (1,1,1,1,1)
  Concrete used in the infrastructure of ponds.
  properties: water content 0.086758, wet mass 2380 kg, dry mass 2190 kg
- inorganic potassium fertiliser, as K2O: 1.81916e-5, 6.89982e-5, 7.38493e-5, 0.00126757, 2.93231e-5, 1.02003e-5, 2.77205e-5, 2.18516e-5 kg (8 entries); source Avadí, A. 2018; lognormal variance with pedigree 0.0518, pedigree (4,4,5,4,2)
  Considers a 30% content of K2O
- concrete, normal: 2.29294e-6, 2.20054e-5, 1.04416e-5 m3 (3 entries); source Avadí, A. 2018; lognormal variance with pedigree 0.0518, pedigree (4,4,5,4,2)
  Concrete used in the infrastructure of ponds.

## Inputs from nature
- Water, unspecified natural origin [natural resource, in water]: 6.8222 m3; name water; source Avadí, A. 2018; lognormal variance with pedigree 0.0518, pedigree (4,4,5,4,2)
  Water used in the ponds.

## Emissions to nature
- Water [air, unspecified]: 3.47932 m3; = water*0.51; source Sharma, K.K. 2013; lognormal variance with pedigree 0.0606, pedigree (4,4,4,5,4)
  51% of total water used is evaporated
- Water [water, surface water]: 3.34288 m3; = water*0.49; source Sharma, K.K. 2013; lognormal variance with pedigree 0.0606, pedigree (4,4,4,5,4)
  49% eventually reaches surface water
- Phosphorus [water, unspecified]: 0.0091 kg; source Cho, CY 1990; lognormal variance with pedigree 0.0912, pedigree (4,4,5,4,2)
  Phosphorus emissions to the environment
- Nitrogen [water, unspecified]: 0.0763 kg; source Cho, CY 1990; lognormal variance with pedigree 0.0912, pedigree (4,4,5,4,2)
  Nitrogen emissions to the environment

## Extrapolations
This dataset has been extrapolated from year 2017 to the year of the calculation (2021). The uncertainty has been adjusted accordingly.
