# treatment of aluminium scrap, post-consumer, prepared for recycling, at remelter

Dataset: EcoSpold 2, unit process
Geography: RER
Time period: 2005-01-01 to 2021-12-31
Technology level: current
Classification: EcoSpold01Categories: metals/extraction
Classification: ISIC rev.4 ecoinvent: 2420:Manufacture of basic precious and other non-ferrous metals
Scenario: Business-as-Usual
System model: Allocation, cut-off by classification
Share of production covered: 92.4 %
Generated by: Pascal Lesage
Published in: European Aluminium Association 2008
Database: ecoinvent
isCopyrightProtected: true
accessRestrictedTo: 1

## General comment
This dataset is based on two sources: the European Aluminium Association 2005 LCI data (EAA, 2008); and (2) the ecoinvent v2.2 dataset for the same activity (Althaus, 2009), itself largely based on EAA data from 2000. Priority was given to data contained in EAA (2008); Althaus (2009) was used only in cases where it was found to be more complete that EAA (2008).
Remelters use mainly reverbatory furnaces, and this dataset is based on this furnace technology only.
The dataset excludes, for lack of access to data, salt slag and dross recycling. According to EAA, this data gap represents approximately 10-20% of potential impacts, as calculated using the CML 2001 method.
The following emissions to air are reported in EAA 2008 but excluded from this dataset: CO (0.095 kg/tonne secondary aluminium), Dust/particulates (0.041 kg/tonne secondary aluminium), NOx (0.329 kg/tonne secondary aluminium), SO2 (0.051 kg/tonne secondary aluminium), and VOC (0.050 kg/tonne secondary aluminium). These are assumed to be combustion emissions or electricity production emissions, conclusion arrived at by comparing gate-to-gate emissions with the cradle-to-gate emissions also reported in EAA 2008. Their inclusion wouldhave led to double-counting.
While this dataset represents the remelting of post-consumer scrap aluminium, the inputs and outputs reported by EAA (2008) actually refer to refining of new scrap. In the ecoinvent database, both the remelting of post-consumer scrap and new scrap is represented by two distinct but mostly identical datasets to enable the appropriate modeling of aluminium mass flow through the economy. The use of new scrap remelting to represent prepared old scrap remelting is thought to be more accurate than the use of refining as a proxy for this activity. The extrapolation is accounted for in the uncertainty.

## Included activities start
The activity starts with the reception of prepared post-consumer scrap.

## Included activities end
The activity ends with wrought aluminium billets. Note that the dataset excludes salt slag processing and dross recycling (data gap), as well as an output of unspecified metal for recycling output.

## Geography
Some Swiss datasets are used for European processes.

## Technology
Average technology for the aluminium recycled in Europe

## Reference product
- aluminium scrap, post-consumer, prepared for melting: 0 kg; source European Aluminium Association 2008; By-product classification Recyclable; CPC 39363: Waste and scrap of aluminium
  production volume 0 kg; name scrapInputVolume; = (1.1/15.5)*1.9e9
    Based on (1) EAA (2008) which states that approx. 1.9 million tonnes of scrap was treated by remelters in 2005 and (2) the split between new (14.4 Mt) and post-consumer (1.1 Mt) scrap treated by remelters globally in 2007, based on Wellmet (2011).
  property price 0.806 EUR2005; name scrapInputAmount_price_EUR2005
    Temporary price data. Calculated as 90% of purchasers price based on: 2005 import and export prices (total trades (USD) divided by total weight (kg) in biggest economies of the world: EU27, USA, Brasil, China, India, Japan and Russia) from UN Commodity Trade Statistics Database (http://data.un.org/Explorer.aspxDatabase [Accessed 2011.06.17]). Commodity: Waste or scrap, aluminium
  property carbon content 0
    carbon content on a dry matter basis (reserved; not for manual entry)
  properties: wet mass 1 kg, water in wet mass 0 kg, water content 0, carbon content, non-fossil 0, dry mass 1 kg, carbon content, fossil 0, carbon allocation 0 kg
- aluminium, wrought alloy: 1 kg; name secondaryAluminiumOutput; source European Aluminium Association 2008; By-product classification allocatable product; CPC 4153: Semi-finished products of aluminium or aluminium alloys; pedigree (1,1,1,1,1)
  production volume 1.33639e8 kg; name WroughtPV
  property price 1.44 EUR2005; name secondaryAluminiumOutput_price_EUR2005
  properties: carbon content, non-fossil 0, carbon content, fossil 0, water content 0, wet mass 1 kg, water in wet mass 0 kg, dry mass 1 kg, carbon content 0, carbon allocation 0 kg

## By-products
- aluminium, wrought alloy: 0 kg; source European Aluminium Association 2008; By-product classification allocatable product; CPC 4153: Semi-finished products of aluminium or aluminium alloys; pedigree (1,1,1,1,1)
  production volume 0 kg; name WroughtPV
    Based on International Aluminium Institute data on the relative share of primary, secondary (new scrap) and aluminium (old scrap) aluminium in wrought alloy, the total amount of wrought alloy produced globally, and the total amount of primary aluminium ingots produced globally.
  property carbon content 0
    carbon content on a dry matter basis (reserved; not for manual entry)
  properties: carbon content, non-fossil 0, carbon content, fossil 0, water content 0, wet mass 1 kg, water in wet mass 0 kg, dry mass 1 kg, carbon allocation 0 kg

## Inputs from technosphere
- chlorine, liquid: 0.000140046 kg; source European Aluminium Association 2008; lognormal variance with pedigree 0.0812, pedigree (1,3,5,1,4)
  Reported as Chlorine
  properties: wet mass 1 kg, dry mass 1 kg
- hazardous waste, for incineration: 0 kg; name hazWasteIncinerationAmount; source European Aluminium Association 2008; pedigree (1,1,1,1,1)
  Reported as Hazardous waste for incineration
  production volume 0 kg
    Calculated from the production volume of aluminium scrap treatment in proportion to the respective output amounts.
  property water content 0.333333; name water_content
  property dry mass 0.75 kg; name DM
  property carbon content, non-fossil 0; name C_content_non_fossil
  property carbon content, fossil 0.554667; name C_content_fossil
  property water in wet mass 0.25 kg; name WWM
  property wet mass 1 kg; name WM
  property price 0 EUR2005; name hazWasteIncinerationAmount_price_EUR2005
  properties: heating value, net 17 MJ
  note on carbon content, fossil: Tab A.6, ecoinvent v2.2 report 13_I. C content has been calculated after data in the tables, and then referred to 1 kg DM
  note on heating value, net: Value taken from the general comment of the treatment dataset.
- aluminium melting furnace: 2e-9 unit; = secondaryAluminiumOutput/(50*10000000); source Hans-Jörg Althaus  2009; lognormal variance with pedigree 0.2106, pedigree (5,5,5,5,5)
  Estimated, based on an assumed 10 000 tonne scrap aluminium output per year and a lifetime of 50 years.
  Uncertainty: r
- aluminium casting facility: 0 unit; source Hans-Jörg Althaus  2009
  Estimated, based on an assumed 130 000 tonne scrap aluminium output per year and a lifetime of 50 years. Based on casting plant.
- aluminium casting facility: 1.53846e-10 unit; = secondaryAluminiumOutput/(50*130000000); source Hans-Jörg Althaus  2009; lognormal variance with pedigree 0.1306, pedigree (5,5,5,5,4)
  Estimated, based on an assumed 130 000 tonne scrap aluminium output per year and a lifetime of 50 years. Based on casting plant.
  Uncertainty: r
- aluminium melting furnace: 0 unit; source Hans-Jörg Althaus  2009
  Estimated, based on an assumed 10 000 tonne scrap aluminium output per year and a lifetime of 50 years.
- heat, district or industrial, other than natural gas: 0.0121233 MJ; = Net_Heat_Value_LFO*42.6 *fuel_input_in_kg_LFO /fuel_use_LFO; source European Aluminium Association 2008; lognormal variance with pedigree 0.04, pedigree (1,1,5,1,1)
  Reported in kg fuel input. Converted to MJ heat output using average efficiency (represented by 1/fuel_use) and lower heating value.
  Uncertainty: U
  property Corresponding fuel use 1.053 MJ; name fuel_use_LFO
  property heating value, net 1 MJ; name Net_Heat_Value_LFO
  property kgFuel_Input 0.000297 kg; name fuel_input_in_kg_LFO
  note on Corresponding fuel use: Lower heating value of the fuel input related to the heat/electricity output
- sodium chloride, powder: 0.00049995 kg; source European Aluminium Association 2008; lognormal variance with pedigree 0.08, pedigree (1,1,5,1,4)
  Reported as fluxing salts.
  properties: dry mass 1 kg, wet mass 1 kg
- electricity, medium voltage: 0.132984 kWh; source European Aluminium Association 2008; lognormal variance with pedigree 0.08, pedigree (1,1,5,1,4)
- silicon, metallurgical grade: 0.015166 kg; = 2.874e-2*52.3%; source European Aluminium Association 2008; lognormal variance with pedigree 0.0818, pedigree (2,3,5,1,4)
  Reported as "alloying metal", 52.3% assumed to be Silicon in Althaus (2009)
  properties: wet mass 1 kg, dry mass 1 kg
- argon, liquid: 0.00224397 kg; source European Aluminium Association 2008; lognormal variance with pedigree 0.0812, pedigree (1,3,5,1,4)
  Reported as "argon"
  properties: dry mass 1 kg, wet mass 1 kg
- inert waste, for final disposal: -0.00160024 kg; name inertWasteAmount; source European Aluminium Association 2008; lognormal variance with pedigree 0.0812, pedigree (1,3,5,1,4)
  Reported as "non-hazardous waste". Split between incineration (17%), landfilling (20%) and further processing (63%) reported in EAA (2008) not accounted for in this dataset.
  production volume 213854 kg; = inertWasteAmount*scrapInputVolume/abs(scrapInputAmount)
    (same comment as for hazardous waste, for incineration)
  property price 0 EUR2005; name inertWasteAmount_price_EUR2005
  properties: wet mass 1 kg, dry mass 0.995 kg, water content 0.00502513
- heat, district or industrial, natural gas: 3.09114 MJ; = Net_Heat_Value_ng*45.4* fuel_input_in_kg_ng/ fuel_use_ng; source European Aluminium Association 2008; lognormal variance with pedigree 0.04, pedigree (1,1,5,1,1)
  (same comment as for heat, district or industrial, other than natural gas)
  property heating value, net 1 MJ; name Net_Heat_Value_ng
  property Corresponding fuel use 1.04 MJ; name fuel_use_ng
  property kgFuel_Input 0.07018 kg; name fuel_input_in_kg_ng; = 0.0675+2.68e-3
  note on kgFuel_Input: Sum of natural gas and propane, for lack of a corresponding propane combustion dataset.
- copper, cathode: 0.0138321 kg; = 2.874e-2*47.7%; source European Aluminium Association 2008; lognormal variance with pedigree 0.0818, pedigree (2,3,5,1,4)
  Reported as "alloying metal", 47.7% assumed to be Copper in Althaus (2009)
  properties: dry mass 1 kg, wet mass 1 kg
- hazardous waste, for underground deposit: -0.00268994 kg; name hazWasteDepositAmount; source European Aluminium Association 2008; lognormal variance with pedigree 0.0812, pedigree (1,3,5,1,4)
  Reported as Hazardous waste for landfilling
  production volume 359480 kg; = hazWasteDepositAmount*scrapInputVolume/abs(scrapInputAmount)
    (same comment as for hazardous waste, for incineration)
  property price 0 EUR2005; name hazWasteDepositAmount_price_EUR2005
  properties: wet mass 1 kg, dry mass 1 kg, carbon content, fossil 0.554667
- refractory, fireclay, packed: 0.00140046 kg; source Hans-Jörg Althaus  2009; lognormal variance with pedigree 0.0812, pedigree (1,3,5,1,4)
  Not reported in EAA 2008, taken from earlier EAA data as found in Althaus 2009.
  properties: dry mass 1 kg, wet mass 1 kg
- nitrogen, liquid: 0.00125013 kg; source Hans-Jörg Althaus  2009; lognormal variance with pedigree 0.0812, pedigree (1,3,5,1,4)
  Not reported in EAA 2008, taken from earlier EAA data as found in Althaus 2009.
  properties: dry mass 1 kg, wet mass 1 kg
- heat, district or industrial, other than natural gas: 0.10659 MJ; = Net_Heat_Value_HFO*41.2* fuel_input_in_kg_HFO/fuel_use_HFO; source European Aluminium Association 2008; lognormal variance with pedigree 0.04, pedigree (1,1,5,1,1)
  (same comment as for heat, district or industrial, other than natural gas)
  property heating value, net 1 MJ; name Net_Heat_Value_HFO
  property Corresponding fuel use 1.053 MJ; name fuel_use_HFO
  property kgFuel_Input 0.0027 kg; name fuel_input_in_kg_HFO
- aluminium scrap, post-consumer, prepared for melting: 1.00898 kg; source European Aluminium Association 2008
  production volume 1.34839e8 kg
  properties: wet mass 1 kg, dry mass 1 kg
- hazardous waste, for incineration: -5.84657e-5, -1.52826e-6 kg (2 entries); source European Aluminium Association 2008; lognormal variance with pedigree 0.0812, pedigree (1,3,5,1,4)
  Reported as Hazardous waste for incineration
  production volume 8017.51 kg
  properties: water content 0.333333, dry mass 0.75 kg, carbon content, fossil 0.554667, heating value, net 17 MJ, wet mass 1 kg

## Inputs from nature
- Water, cooling, unspecified natural origin [natural resource, in water]: 0.00965997 m3; source European Aluminium Association 2008; lognormal variance with pedigree 0.0812, pedigree (1,3,5,1,4)
  Reported as "water". Assumption that this is cooling water from Althaus 2009.

## Emissions to nature
- Particulates, > 10 um [air, unspecified]: 8.19897e-6 kg; = 4.063e-5*20%; source European Aluminium Association 2008; lognormal variance with pedigree 0.1212, pedigree (2,3,5,1,4)
  Reported as dust/particulates emissions to air. Split between three classes of particulates based on CEPMIEP database: 32% <2.5 um, 48% >2.5<10 um, 20% > 10 um. Assumed process emissions and not combustion emissions.
  Uncertainty: U
- Hydrogen chloride [air, unspecified]: 3.30037e-5 kg; source Hans-Jörg Althaus  2009; lognormal variance with pedigree 0.1206, pedigree (1,3,5,1,4)
  Not reported in EAA 2008, taken from earlier EAA data as found in Althaus 2009.
- Particulates, < 2.5 um [air, unspecified]: 1.31184e-5 kg; = 4.063e-5*32%; source European Aluminium Association 2008; lognormal variance with pedigree 0.3812, pedigree (2,3,5,1,4)
  (same comment as for Particulates, > 10 um)
- Water [water, unspecified]: 9.16961e-6 m3; source European Aluminium Association 2008; lognormal variance with pedigree 0.0812, pedigree (1,3,5,1,4)
- Chlorine [air, unspecified]: 5.99939e-6 kg; source European Aluminium Association 2008; lognormal variance with pedigree 0.1206, pedigree (1,3,5,1,4)
- Particulates, > 2.5 um, and < 10um [air, unspecified]: 1.96775e-5 kg; = 4.063e-5*48%; source European Aluminium Association 2008; lognormal variance with pedigree 0.2012, pedigree (2,3,5,1,4)
  (same comment as for Particulates, > 10 um)
- Hydrocarbons, chlorinated [air, unspecified]: 3.89971e-6 kg; source Hans-Jörg Althaus  2009; lognormal variance with pedigree 0.1206, pedigree (1,3,5,1,4)
  Not reported in EAA 2008, taken from earlier EAA data as found in Althaus 2009.

## Sampling procedure
Literature / Survey

## Extrapolations
This dataset has been extrapolated from year 2005 to the year of the calculation (2021). The uncertainty has been adjusted accordingly.

## Review by Christian Bauer 2012-06-01
passed

## Review by Hans-Jörg Althaus 2012-06-01
ok
