# ferrochromium production, high-carbon, 55% Cr

Dataset: EcoSpold 2, unit process
Geography: ZA
Time period: 2012-01-01 to 2021-12-31
Technology level: current
Classification: ISIC rev.4 ecoinvent: 2410:Manufacture of basic iron and steel
Synonyms: Charge Chrome
Scenario: Business-as-Usual
System model: Allocation, cut-off by classification
Share of production covered: 50 %
Generated by: Russo
Published in: Charikinya E. 2017
Database: ecoinvent
isCopyrightProtected: true
accessRestrictedTo: 1

## General comment
Four out of the seven South African ferrochrome producers have been reported as being active (Creamer, 2016). This means that the other three producers were and are still presumably inactive. Therefore only the active were investigated.
The five producer were Merafe-Glencore (formerly Merafe Xstrata), Samancor Chrome, Hernic Chrome, and Asametal and International Ferro Metals limited (IFML). Some ferrochrome producers produce chromite ore for the market. Samancor uses 70% of the chromite produced annually for ferrochrome production and the remainder is sold to international markets. Hernic Chrome also produces concentrated chromite ore for the market.
The cause for some producers being idle can be attributed to the absence of direct access to chromite ore. This has been speculated to have been caused by chromite ore increasingly being sold to Chinese ferrochrome producers. Current active producer have an integrated chromite and ferrochrome production
REFERENCES: Creamer, M., 2016. Ferrochrome price in sharp rise, s.l.: Mining Weekly.
Pistorius, P., 2002. Reductant selection in ferro-alloy production: The case for the importance of dissolution in the metal. The Journal of the South African Institue of Mining and Metallurgy , 102(1), pp. 33-36.
Visser, M., 2006. An overview of the history and current operational facilities of Samancor Chrome. Southern African Pyrometallurgy , pp. 285-296.
Xstrata, 2006. [Online]
Available at: http://www.portsregulator.org/images/documents/XSTRATA_submission-Position_Paper_on_Beneficiation.pdf

## Included activities start
Activities start includes the mining of the Chromium ore and its concentration and extraction operations

## Included activities end
Activities ends with Charge Chrome produced. The vast majority of FeCr produced is charge chrome from Souther Africa. Chrome’s products are transported via rail or road to Richards Bay or Durban ports for export. From the ports the products are shipped to clients in the international market.

## Geography
The Merafe-Glencore is the only ferrochrome producer with sustainability reports however the results are mostly aggregated
The expected operation life of the resources given the current capacity is expected to be 100 years. Glencore has vanadium by products in the form of ferrovanadium and vanadium pentoxide.
Eastern limb: Thorncliffe, Magareng and Helena mines are situated along the southern portion of the Eastern Limb of the Bushveld Complex. The MG1 chromitite layer is being mined underground using trackless mining methods on a bord and pillar mining layout.

## Technology
Ferrochrome or Charge Chrome is a major product of Chrome’s product line. Charged chrome is an iron and chromium alloy (55-55% Cr, 7% C, 4% Si) produced in open, submerged and DC arc furnaces. Submerged furnace
Chromite ore consisting of iron oxides, chromium oxides, magnesium oxides and aluminium oxides mixed with carbon sources in batches for the endothermic reduction reactions (Visser, 2006).
The aluminium and magnesium oxides have high melting temperature therefore fluxes of limestone, dolomite and quartz are applied to condition the slag phase for ease of tapping (Visser, 2006). The CO produced in submerged furnaces is burnt with oxygen to heat furnace feed. From the furnace slag is tapped. After tapping it is de-slagged, granulated, cast into ingots or transferred into the next phase of processing (Visser, 2006).
Intermediate-carbon ferrochrome is processed from hot charge chrome slag. The product has a lower silicon and carbon content, less than 0.3% and 1.5% respectively. Figure below shows a diagram of the process. The hot slag charge chrome is transferred to a CLU converter where oxygen and on site generated steam (CO from closed furnace) blown in the bottom of the vessel. Burnt lime and dolomite are used to strip Si from the metal to from SiO2. As more CO is produced, the carbon content (C) content is decreases. When the slag suitable carbon grade the slag is tapped and thereafter granulated. The granulated product is the transported for export (Visser, 2006).
Visser, M., 2006. An overview of the history and current operational facilities of Samancor Chrome. Southern African Pyrometallurgy , pp. 285-296.

## Time period
Data were colleted over a perido of 5 years and 2015 was chosen as reference year.

## Parameters
- fraction, process water, to air: 0.15 dimensionless; name fraction_PW_to_air; lognormal variance with pedigree 0.21, pedigree (5,5,5,5,5)
  Literature value. In case when no industry/process specific data are available, default evaporation fraction value is used. This value is 15% and is based on literature (Statistics Canada, 2007 & Shaffer, K.H., 2008, Consumptive water use in the Great Lakes Basin, USGS & Shiklomanov, 2003, World Water Resources at the Beginning of the 21st Century) and has been approved by an expert.
- water used in primary activity: 0.00622587 m3; name totWaterPA; = water_surface+water_ground+(potable_water/1000)+water_abstracted_recycled; lognormal variance with pedigree 0.0007, pedigree (2,2,1,1,1)
  this is represents the sum of all water inputs to the process

## Reference product
- ferrochromium, high-carbon, 55% Cr: 1 kg; name RP; source Visser M. 2006; CPC 41113: Ferro-chromium; By-product classification allocatable product; CAS 11114-46-8; pedigree (1,1,1,1,1)
  Ferrochrome (or Charge Chrome) production. Value based on Merafe-Glencore production values. Merafe Sustainability Report (2016).
  production volume 3.9e9 kg; name APV_za; = 3900000*1000
    According to USGS (2021), it is estimated that 3'900'000 metric tons of ferrochromium were produced in South Africa in 2018. It is assumed that the ferrochromium modelled in this dataset is representative of the whole production in South Africa.
    Reference:
    USGS (2021). Chromium Statistics and Information, Advance Data Release of the 2019 Annual Tables. https://prd-wret.s3.us-west-2.amazonaws.com/assets/palladium/production/atoms/files/myb1-2019-chrom-adv.xlsx
  property iron content 0.3635; name RP_Fe_content
    iron content on a dry matter basis
  property price 1.22941 EUR2005; name RP_price_EUR2005
    Assuming that chromium content (and the price of chromium) is the determining factor in the price of ferrochromium, this value was calculated relative to the price for "ferrochromium, high-carbon, 68% Cr": (55/68) * 1.52 (EUR/kg; price for ferrochromium, high-carbon, 68% Cr)
  property heating value, net 2.12 MJ
    LHV is calculated based on the Carbon content of the product. More details can be found on the respective documentation.
  property carbon content 0.07
    carbon content on a dry matter basis (reserved; not for manual entry)
  properties: manganese content 0.0017, carbon content, fossil 0.07, wet mass 1 kg, water content 0, silicon content 0.04, chromium content 0.55, water in wet mass 0 kg, carbon content, non-fossil 0, dry mass 1 kg, carbon allocation 0.07 kg

## Inputs from technosphere
- non-ferrous metal smelter: 7.54717e-12 unit; = 1/(50*2650000000); lognormal variance with pedigree 0.172, pedigree (4,4,5,5,5)
  Value estimated from the annual production volume produced by the infrastructure (2.650.000 ton metal /year) and lifetime 50 year and scaled down to refer to 1 kg of Ferrochrome produce.
- diesel, burned in building machine: 1.23 MJ; lognormal variance with pedigree 0.0027, pedigree (2,2,3,1,1)
  Diesel usage in the mine and ferrochrome plants and given as direct energy usage in the Merafe-Glencore Integrate report (2015).
  properties: heating value, net 1 MJ
- nickel smelter slag: -1.51 kg; name ByP_04; lognormal variance with pedigree 0.0027, pedigree (2,2,3,1,1)
  This accounts specifically for Regulated slag. Previously all mineral waste was stored together was not treated before disposal in specially designed faciliities on site. This made it legally claissified as hazardous material. Of late sludge which has a high concentration of Cr (VI) is treated before disposal. Slag constitutes most of the mineral waste, it is reprocessed when possible. Otherwise all mineral waste is stockpiled. Overburden is used for backfilling.
  production volume 5.889e9 kg; = APV_za * (ByP_04 / RP)
    Calculated from production volume of reference product using the relative outputs.
  property price 0 EUR2005; name ByP_04_price_EUR2005
  properties: wet mass 1 kg, dry mass 1 kg, carbon content, fossil 0.00345
- electricity, medium voltage: 2.96 kWh; lognormal variance with pedigree 0.0098, pedigree (2,3,4,1,2)
  Electricity usage. Data are based on the Merafe-Glencore (ferrochrome producer) sustainability reports and the XSTRATA available at: http://www.portsregulator.org/images/documents/XSTRATA_submission-Ferrochrome_Industry_Communique.pdf
- non-sulfidic tailing, off-site: -0.595 kg; name ByP_01; lognormal variance with pedigree 0.0032, pedigree (2,3,3,1,1)
  This accounts specifically for: tailing and processing wastes and regulated ferrochrome slimes (from metal recovery). Previously all mineral waste was stored together was not treated before disposal in specially designed faciliities on site. This made it legally claissified as hazardous material. Of late sludge which has a high concentration of Cr (VI) is treated before disposal. Slag constitutes most of the mineral waste, it is reprocessed when possible. Otherwise all mineral waste is stockpiled. Overburden is used for backfilling.
  production volume 2.3205e9 kg; = APV_za * (ByP_01 / RP)
    Calculated from production volume of reference product using the relative outputs.
  property price 0 EUR2005; name ByP_01_price_EUR2005
  properties: wet mass 1 kg, dry mass 0.7 kg, water content 0.428571
- hazardous waste, for underground deposit: -0.00186 kg; name ByP_03; lognormal variance with pedigree 0.0027, pedigree (2,2,3,1,1)
  This accounts specifically for Quenche ash. Previously all mineral waste was stored together was not treated before disposal in specially designed faciliities on site. This made it legally claissified as hazardous material. Of late sludge which has a high concentration of Cr (VI) is treated before disposal. Slag constitutes most of the mineral waste, it is reprocessed when possible. Otherwise all mineral waste is stockpiled. Overburden is used for backfilling.
  production volume 7.254e6 kg; = APV_za * (ByP_03 / RP)
    Calculated from production volume of reference product using the relative outputs.
  property price 0 EUR2005; name ByP_03_price_EUR2005
  properties: wet mass 1 kg, dry mass 1 kg, carbon content, fossil 0.554667
  note on carbon content, fossil: Tab A.6, ecoinvent v2.2 report 13_I, average hazardous waste composition was used, and referred to 0% water mass. No waste-specific emission are currently inventoried for underground deposits. Accordingly, no waste composition must be specified. For generic, average waste to underground deposit deposition in a 200 liter steel drum without cement solidification is assumed (ecoinvent v2.2 report 13_I).
- silica sand: 0.436 kg; lognormal variance with pedigree 0.0027, pedigree (2,2,3,1,1)
  Value calculated from the Merafe Report on Wonderkop Smelter (6 May 2016) that report 0.436 tonne of flux (a mix of Dolimite, Limestone and Qaurtz) per 1 tonne of FeCr produced.
  properties: wet mass 1 kg, water content 0.010101, dry mass 0.99 kg
- inert waste: -0.129 kg; name ByP_02; lognormal variance with pedigree 0.0032, pedigree (2,3,3,1,1)
  This accounts specifically for Delisted metallurgical slag. Previously all mineral waste was stored together was not treated before disposal in specially designed faciliities on site. This made it legally claissified as hazardous material. Of late sludge which has a high concentration of Cr (VI) is treated before disposal. Slag constitutes most of the mineral waste, it is reprocessed when possible. Otherwise all mineral waste is stockpiled. Overburden is used for backfilling.
  production volume 5.031e8 kg; = APV_za * (ByP_02 / RP)
    Calculated from production volume of reference product using the relative outputs.
  property price 0 EUR2005; name ByP_02_price_EUR2005
  properties: dry mass 1 kg, wet mass 1 kg
- tap water: 0.00187 kg; name potable_water; lognormal variance with pedigree 0.0098, pedigree (2,3,4,1,2)
  Potable water
  properties: dry mass 0.000337476 kg, carbon content, fossil 0.00178991, water content 2962.17, wet mass 1 kg
  note on carbon content, fossil: Bicarbonate content is 2.93 mol/m3. CO2 content is 0.1 mol/m3 (ecoinvent v2.2 report 8, Tab 93.1).
- hard coal: 0.68 kg; lognormal variance with pedigree 0.0027, pedigree (2,2,3,1,1)
  Carbon reductants (anthracite, coke and coal for smelting). Merafe resources, Wonderkop Smelter (2016).
  properties: dry mass 0.94 kg, carbon content, fossil 0.845, wet mass 1 kg, water content 0.0638298, heating value, net 27.91 MJ
  note on carbon content, fossil: C content 75-94% (specified in Tab 1.1, report 6, part VI). A mean content of 0.845 kg C/ kg dry hard coal was considered
  note on heating value, net: Based on the Characterization factor of Hard coal in the CED method

## Inputs from nature
- Chromium, in ground [natural resource, in ground]: 0.690011 kg; name Cr_in_ground; lognormal variance with pedigree 0.0098, pedigree (2,3,4,1,2)
  Chromium content in the Run Of Mine.
- Water, river [natural resource, in water]: 0.000544 m3; name water_surface; lognormal variance with pedigree 0.0098, pedigree (2,3,4,1,2)
  Surface water
- Iron, in ground [natural resource, in ground]: 0.463778 kg; lognormal variance with pedigree 0.0032, pedigree (2,3,3,1,1)
  Iron content in the Run Of Mine.
- Water, unspecified natural origin [natural resource, in water]: 0.00496 m3; name water_abstracted_recycled; lognormal variance with pedigree 0.0098, pedigree (2,3,4,1,2)
  Water either abstracted or recycled
- Water, well, in ground [natural resource, in water]: 0.00072 m3; name water_ground; lognormal variance with pedigree 0.0098, pedigree (2,3,4,1,2)
  ground water
- Gangue, in ground [natural resource, in ground]: 1.38454 kg; lognormal variance with pedigree 0.0412, pedigree (2,3,5,1,1)
  Run of Mine, excluding chormium and iron that are inputted separately.

## Emissions to nature
- Dissolved solids [water, surface water]: 0.000375 kg; lognormal variance with pedigree 13.1046, pedigree (3,3,5,5,5)
  Value form the ferrochromiun production, high carbon, 68% Cr dataset
- NMVOC, non-methane volatile organic compounds, unspecified origin [air, non-urban air or from high stacks]: 0.0017 kg; lognormal variance with pedigree 0.2046, pedigree (3,3,5,5,5)
  Value form the ferrochromiun production, high carbon, 68% Cr dataset
- Nitrogen oxides [air, non-urban air or from high stacks]: 0.000304 kg; lognormal variance with pedigree 0.0098, pedigree (2,3,4,1,2)
  NOx emissions
- Chromium VI [air, non-urban air or from high stacks]: 7.92e-5 kg; lognormal variance with pedigree 0.2046, pedigree (3,3,5,5,5)
  Value form the ferrochromiun production, high carbon, 68% Cr dataset
- Chromium [air, non-urban air or from high stacks]: 0.00317 kg; lognormal variance with pedigree 0.2646, pedigree (3,3,5,5,5)
  Value form the ferrochromiun production, high carbon, 68% Cr dataset
- Dioxins, measured as 2,3,7,8-tetrachlorodibenzo-p-dioxin [air, non-urban air or from high stacks]: 1e-12 kg; lognormal variance with pedigree 0.4646, pedigree (3,3,5,5,5)
  Value form the ferrochromiun production, high carbon, 68% Cr dataset
- Particulates, > 10 um [air, non-urban air or from high stacks]: 8.24e-5 kg; lognormal variance with pedigree 0.0098, pedigree (2,3,4,1,2)
  Particulates emission were given as Tot particulate. Calculated shares for the three groups:> 2,5 & <10, <2,5 and > 10 according to the emission from the Ferrochormium production, high carbon, 68% Cr on a mass basis.
- Carbon dioxide, fossil [air, non-urban air or from high stacks]: 1.91 kg; lognormal variance with pedigree 0.0027, pedigree (2,2,3,1,1)
  CO2 emission, Scope 1 from carbon reductans only. Merafe Integrate Report (2015). The figure given by the company report was of 2 kg CO2: from that the CO2 emission related to the diesel input, burned in building machine has been deducted.
- Particulates, < 2.5 um [air, non-urban air or from high stacks]: 0.000577 kg; lognormal variance with pedigree 0.0098, pedigree (2,3,4,1,2)
  (same comment as for Particulates, > 10 um)
- Carbon monoxide, fossil [air, non-urban air or from high stacks]: 0.001 kg; lognormal variance with pedigree 0.8146, pedigree (3,3,5,5,5)
  Value form the ferrochromiun production, high carbon, 68% Cr dataset
  Uncertainty: Extraolation, Value taken from ferrosilicon production.
- Water [water, surface water]: 0.00529199 m3; = totWaterPA*(1-fraction_PW_to_air); lognormal variance with pedigree 0.0098, pedigree (2,3,4,1,2)
  Water relised to environment: surface water bodies
- PAH, polycyclic aromatic hydrocarbons [water, surface water]: 6.5e-8 kg; lognormal variance with pedigree 13.6246, pedigree (3,3,5,5,5)
  Value form the ferrochromiun production, high carbon, 68% Cr dataset
- Sulfur dioxide [air, non-urban air or from high stacks]: 0.00214 kg; lognormal variance with pedigree 0.0098, pedigree (2,3,4,1,2)
  SOx emission
- Particulates, > 2.5 um, and < 10um [air, non-urban air or from high stacks]: 0.000256 kg; lognormal variance with pedigree 0.0098, pedigree (2,3,4,1,2)
  (same comment as for Particulates, > 10 um)
- Cyanide [air, non-urban air or from high stacks]: 3.5e-5 kg; lognormal variance with pedigree 0.1946, pedigree (3,3,5,5,5)
  Value form the ferrochromiun production, high carbon, 68% Cr dataset
- Chromium, ion [water, surface water]: 7.71e-9 kg; lognormal variance with pedigree 13.1046, pedigree (3,3,5,5,5)
  Value form the ferrochromiun production, high carbon, 68% Cr dataset
- Water [air, non-urban air or from high stacks]: 0.00093388 m3; = totWaterPA*fraction_PW_to_air; lognormal variance with pedigree 0.0098, pedigree (2,3,4,1,2)
  Water released to air

## Sampling procedure
Data are based on the Merafe-Glencore (ferrochrome producer) sustainability reports and the following other sources: Creamer, M., 2016. Ferrochrome price in sharp rise, s.l.: Mining Weekly.
Pistorius, P., 2002. Reductant selection in ferro-alloy production: The case for the importance of dissolution in the metal. The Journal of the South African Institue of Mining and Metallurgy , 102(1), pp. 33-36.
Visser, M., 2006. An overview of the history and current operational facilities of Samancor Chrome. Southern African Pyrometallurgy , pp. 285-296.
Xstrata, 2006. [Online] Available at: http://www.portsregulator.org/images/documents/XSTRATA_submission-Position_Paper_on_Beneficiation.pdf

## Extrapolations
This dataset has been extrapolated from year 2016 to the year of the calculation (2021). The uncertainty has been adjusted accordingly.
