# debarking, softwood, in forest

Dataset: EcoSpold 2, unit process
Geography: RER
Time period: 1994-01-01 to 2021-12-31
Technology level: current
Classification: EcoSpold01Categories: wooden materials/extraction
Classification: ISIC rev.4 ecoinvent: 0220:Logging
Synonyms: Spruce
Tags: ConvertedDataset
Scenario: Business-as-Usual
System model: Allocation, cut-off by classification
Generated by: Hans-Jörg Althaus
Published in: Werner F. 2007
Database: ecoinvent
isCopyrightProtected: true
accessRestrictedTo: 1

## General comment
This dataset represents the service of debarking softwood in forest with an output of one m3. The volume is excluding bark.

Debarking is one process step in the technical wood production with the main function of removing bark, bast, and dirt. The process data reflects Germany/Europe standards.

The data is mainly based on literature values.

## Included activities start
Debarking process starts from spruce stems in forest, with bark.

## Included activities end
This activity ends with debarked spruce stems, at forest road.
The dataset includes tractor driven debarking.
The dataset does not include dust emissions due to a high water content in the wood nor the natural growth process of the trees. Furthermore, the dataset does not include the environmental consequences of soil compression due to the use of heavy machines due to a lack of data

## Geography
Data for Germany used for central Europe

## Technology
The process refers to a tractor driven process, i.e. a mechanical and mobile debarking process. Softwood is usually debarked in the forest with movable disbarkers.

The amount of bark, based on the total volume of the stem with bark is about 8 to 15% for spruce (Kollmann et al., 1975 and Sell, 1997).
References:
Kollmann F. F. P., Kuenzi E. W. and Stamm A. J. (1975) Principles of Wood Science and Technology. Springer-Verl., Berlin, Heidelberg, New York.

Sell J. (1997) Eigenschaften und Kenngrössen von Holzarten. 4. überarbeitete und erweiterte Aufl. Edition. Lig-num, Baufachverl. AG Zürich, Dietikon.

## Reference product
- bark chips, wet, measured as dry mass: 1 kg; name bark_chips; CPC 31230: Wood in chips or particles; By-product classification allocatable product
  EcoSpold01Location=RER
  Literature Value. Residues remaining in the forest.
  production volume 1.16601e9 kg; = sawlog_apv*bark_chips
    Unknown
    Assumed 10% debarked in forest, the rest debarked at sawmill ; 0.171 m3 bark chips per 1.71 m3 wood output
  property carbon content, non-fossil 0.494
    C content of dry mass is 0.494 kgC/kg dry wood (ecoinvent v2.2 report 9)
  property price 0.034 EUR2005
    Expert judgement (Urs Luginbühl, Swiss Sawmilling industry, personal communication in June 2014). Cross-reference; FAOSTAT database; http://faostat.fao.org/site/626/DesktopDefault.aspx?PageID=626#ancor; Average import/export prices of EU for 'chips and particles'. Price: 48.76 Euro/m3. The density of the wood chips is 650 kg/m3. The price is calculated to be 0.075 EUR/kg.
  property heating value, net 4.81 MJ
    LHV is calculated based on the Carbon content of the product. More details can be found on the respective documentation.
  property carbon content 0.494
    carbon content on a dry matter basis (reserved; not for manual entry)
  property true value 1.53; name bark_chips_true_value
    allocation property applied in "true value" allocation // value calculated from revenue
  properties: carbon content, fossil 0, dry mass 1 kg, water in wet mass 1.4 kg, wet mass 2.4 kg, water content 1.4, carbon allocation 0.494 kg
- sawlog and veneer log, softwood, debarked, measured as solid wood: 0 m3; By-product classification allocatable product; CPC 031: Wood in the rough
  Reference product. Calculated value of the debarked softwood logs. Debarked after German/European procedures.
  EcoSpold01Location=RER
  production volume 2.59112e7 m3; name sawlog_apv
    Unknown
    Assumed 10% debarked in forest, the rest debarked at sawmill
  property carbon content, non-fossil 0.494
    C content of dry mass is 0.494 kgC/kg dry wood (ecoinvent v2.2 report 9)
  property price 80 EUR2005
    Expert judgement (Urs Luginbühl, Swiss Sawmilling industry, personal communication in June 2014). Cross-reference; Calculated as 90% of purchasers price based on: 2004 prices for World Import/Export data (USD/m3) from UN Commodity Trade Statistics Database (http://data.un.org/Data.aspx?d=ComTrade&f=_l1Code%3a45, [accessed 10th June 2010]) Commodity: 'Logs, poles, coniferous not treated or painted'.
  property heating value, net 5962.7 MJ
    LHV is calculated based on the Carbon content of the product. More details can be found on the respective documentation.The property is based on a value of 7.79MJ/kg
  property carbon content 0.494
    carbon content on a dry matter basis (reserved; not for manual entry)
  property true value 80
    allocation property applied in "true value" allocation // value calculated from revenue
  properties: water content 0.7, carbon content, fossil 0, water in wet mass 315 kg, wet mass 765 kg, dry mass 450 kg, carbon allocation 222.3 kg

## Inputs from technosphere
- lubricating oil: 1.0509e-5 kg; source Wegener G. 1994; lognormal variance with pedigree 0.0413, pedigree (2,3,5,3,1)
  EcoSpold01Location=RER
  Literature Value.
  properties: dry mass 1 kg, wet mass 1 kg, carbon content, fossil 0.75, heating value, net 40.2 MJ
  note on carbon content, fossil: Lubricating oil is produced from diesel. C-content/dry mass of fats and oils considered 75%, from: ecoinvent v2.2 report, n 15a, pg 40
  note on heating value, net: Literature value, Source: IPCC 2006, 2006 IPCC Guidelines for National Greenhouse Gas Inventories, Prepared by the National Greenhouse Gas Inventories Programme, Eggleston H.S., Buendia L., Miwa K., Ngara T. and Tanabe K. (eds). Published: IGES, Japan
- sawlog and veneer log, softwood, measured as solid wood under bark: 0 m3; pedigree (1,1,1,1,1)
  EcoSpold01Location=RER
  Calculated Value.
  properties: dry mass 511.364 kg, wet mass 869.318 kg, carbon content, non-fossil 0.494, water content 0.7, heating value, net 4483.78 MJ
  note on carbon content, non-fossil: C content of dry mass is 0.494 kgC/kg dry wood (ecoinvent v2.2 report 9)
  note on heating value, net: Value based on the dataset "softwood forestry, mixed species, sustainable forest management"The property is based on a value of 11.58MJ/kg
- diesel, burned in building machine: 0.0118435 MJ; source Wegener G. 1994; lognormal variance with pedigree 0.1613, pedigree (2,3,5,3,1)
  EcoSpold01Location=GLO
  Literature Value.
  properties: heating value, net 1 MJ
- sawlog and veneer log, softwood, measured as solid wood under bark: 0.000397551, 1.94735e-5 m3 (2 entries); lognormal variance with pedigree 0.0707, pedigree (1,3,5,3,1)
  EcoSpold01Location=RER
  Calculated Value.

## Inputs from nature
- Carbon dioxide, non-fossil, resource correction [natural resource, in air]: 1.48494 kg; pedigree (1,1,1,1,1)
  This exchange has been added after economic allocation in order to re-balance the non-fossil carbon dioxide resource extraction.

## Sampling procedure
Literature

## Extrapolations
see Geography and Technology

## Review by Roberto Dones 2003-09-12
passed

## Review by Roland Hischier 2011-12-01
Transfer of documentation done.
