# soybean beverage production

Dataset: EcoSpold 2, unit process
Geography: CA-QC
Time period: 2010-01-01 to 2021-12-31
Technology level: current
Classification: ISIC rev.4 ecoinvent: 1030:Processing and preserving of fruit and vegetables
Synonyms: soy milk; soybean milk
Scenario: Business-as-Usual
System model: Allocation, cut-off by classification
Generated by: Pierre-Olivier Roy
Database: ecoinvent
isCopyrightProtected: true
accessRestrictedTo: 1

## General comment
This dataset represent the soybean beverage production following the ProSoya Inc. process; which is used by at least the Earth's Own Food Company Inc. Soybeans received at the facility are sampled and analyzed for moisture content, foreign matter, and damaged seeds. The soybeans which are not up to specifications are eliminated. Soybeans are not dehulled. They are first soaked and remain there for a certain period of time (approximately 24 hours). The soaking water is continuously removed as fresh water enters the vessels. The soybeans are then grounded under airless condition. The resulting slurry is then centrifuged to obtain a soy base at 5% protein. Separated from a moist solid co-product, the okara is valorized as animal feed. The soy base is then sent to a vacuum deodorization tank where the volatile off-flavors are removed, diluted down to 3.25% protein content with filtered water, and submitted to an Ultra High Temperature (UHT) sterilization process, before aseptic packaging.

## Included activities start
From the arrival of beans

## Included activities end
This activity ends with the soy beverage production. The dataset includes the production of 5% protein soy base, dilution of soy base into a soy beverage @3.25% protein and UHT sterilisation. The dataset doesn't include refregiration of the soy beverage, infrastructures and cleaning processes. Refrigerated storage down the supply chain is specific to pasteurized soybean beverage. While the latter is also marketed, it seems to have a smaller market share than the long conservation UHT soy beverage.

## Geography
Collected data for Quebec industries

## Time period
Collected data for Quebec processing industries in 2012-13 period while soybean production values were taken from statistics in 2010

## Parameters
- soybeverage: 7.65 l; name beverage; lognormal variance with pedigree 0.0018, pedigree (2,3,1,1,1)
  L/kg soybean; the result of the mass balance calculation. 7.65L (at the given protein content) of soybean beverage are produced from 1 kg of soybeans.
- electricity input: 0.1669 kWh; name electricity; = 0.1+0.0573+0.0096; lognormal variance with pedigree 0.0018, pedigree (2,3,1,1,1)
  kWh/kg soybean; electricity from soy base production, homogenizing and UHT sterilization
- fraction, tap water, to air: 0.15 dimensionless; name fraction_TW_to_air; = fraction_PW_to_air; lognormal variance with pedigree 0.092025, pedigree (4,4,3,2,4)
  Calculated value. See comment in the other parametres present in this dataset. Tap water is considered to be always used as process water, thus process water fractions to air are applied to all tap water input flows to calculate the amount of water consumed in the processes.
- mass water (dilution): 2.65 kg; name water_dilution; lognormal variance with pedigree 0.0018, pedigree (2,3,1,1,1)
  kg/kg soybean; water for the dilution process to decrease the protein content from 5% to the soybean beverage protein content
- mass wastewater: 4.1268 kg; name wastewater; = soybean+steam-m_discarded-okara+water+water_dilution-beverage; lognormal variance with pedigree 0.0018, pedigree (2,3,1,1,1)
  kg/kg soybean; from total mass balance calculation
- mass steam: 2.3968 kg; name steam; = 1.25+1.1468; lognormal variance with pedigree 0.0072, pedigree (2,3,1,1,1)
  kg;steam from soybase production and UHT sterilization
- mass water (process): 7.5 kg; name water; lognormal variance with pedigree 0.0018, pedigree (2,3,1,1,1)
  kg/kg soybean; water requirements for the soy base production (5% protein content)
- mass okara: 1.75 kg; name okara; lognormal variance with pedigree 0.0018, pedigree (2,3,1,1,1)
  kg/kg soybean; okara is a by product of the soy base production
- fraction, process water, to air: 0.15 dimensionless; name fraction_PW_to_air; lognormal variance with pedigree 0.092025, pedigree (4,4,3,2,4)
  Literature value. In case when no industry/process specific data are available, default evaporation fraction value is used. This value is 15% and is based on literature (Statistics Canada, 2007 & Shaffer, K.H., 2008, Consumptive water use in the Great Lakes Basin, USGS & Shiklomanov, 2003, World Water Resources at the Beginning of the 21st Century) and has been approved by an expert.
  This literature value also corresponds with direct measurements of the amount of tap water entering the activity and the amount of wastewater leaving the activity.
- enthalpy: 2675.43 kJ/kg; lognormal variance with pedigree 0, pedigree (1,1,1,1,1)
  kJ/kg; required for the calculation of heat loss
- mass discarded soybeans: 0.02 kg; name m_discarded; lognormal variance with pedigree 0.0101, pedigree (2,3,2,3,3)
  kg/kg soybean; discarded soybeans based on evaluation from Daalgard et al. 2008
  Dalgaard, R.; Schmidt, J.; Halberg, N.; Christensen, P.; Thrane, M.; Pengue. W. A., 2008. LCA of Soybean Meal. International Journal of Life Cycle Assessment, 13, (3), 240-254
- mass soybean: 1 kg; name soybean; lognormal variance with pedigree 0.0018, pedigree (2,3,1,1,1)
  kg; the reference for the mass balance calculation: 1 kg of soybean

## Reference product
- soybean beverage: 1 l; name bev; = beverage/beverage; source Pro Soya 2013; By-product classification allocatable product; CPC 24: Beverages
  see parameter
  production volume 1.84288e7 l; name ref_pv; = 6.6*1000*365*beverage
    The Quebec soybean beverage production was estimated as 6.6 tons of processed soybeans/day. On a yearly basis: 365 days/yr. The value of 6.6 tons of processed soybean/day was obtained from the organic soybeans destined for soybean beverage production in Canada (estimated at 1% of Canada's soybean production according to a personnal communication with a Soy 20/20 representative). It is assumed that all soybean beverage producers in Canada contribute equally to this Production Volume
  property price 0.0545 EUR2005; name bev_price_EUR2005
    Calculated based on literature values and estimates. The price of soybeans in 2005 was 0.23 Euro/kg. Import Quantity worldwide; 66869432 tonnes, Import Value; 18967764000 USD (FAOSTAT). Including the price of all the other inputs from technosphare. Resulting value multiplied by 1.5 to account for the treatment of wastewater and other expences which should be included in the basic price.
  property carbon content 0.7877
    carbon content on a dry matter basis (reserved; not for manual entry)
  property true value 0.0545; name bev_true_value
    allocation property applied in "true value" allocation // value calculated from revenue
  properties: dry mass 0.068081 kg, water in wet mass 0.93192 kg, carbon content, fossil 0, water content 13.688, wet mass 1 kg, protein content 0.0327, carbon content, non-fossil 0.7877, digestable energy content 2.26 MJ/kg, oil/fat content 0.017, carbon allocation 0.0536274 kg

## By-products
- protein feed, 100% crude: 0 kg; name protein; source Dalgaard, R. 2008; CPC 23319: Preparations used in animal feeding n.e.c.; By-product classification allocatable product; pedigree (1,1,1,1,1)
  see parameter; this is a proxy for okara since okara is used as a protein source for animal feeds
  3.2% is the amount of crude protein in okara.
  Uncertainty: Calculated variable. Uncertainty will be determined from propagation of uncertainty factors of underlying variables. Uncertainty of actual relation between variables not accounted at this time, although this could be included in a future update
  production volume 134904 kg; = ref_pv * protein / bev
    Calculated from production volume of reference product using the relative outputs.
  property price 0.424 EUR2005; name protein_price_EUR2005
    Based on protein content and energy feed, gross content in soybean meal and prices per kg of soybean meal. Assumed soybean meal is the most used feed. Soybean meal 2004 prices for World import/export data (tonnes and US$) from FaoStat statistics (http://faostat.fao.org/site/535/default.aspx#ancor, TRADE)- [Accessed 24 May 2010]. See calculations for protein /energy content
  property carbon content 0.0978
    carbon content on a dry matter basis (reserved; not for manual entry)
  property true value 0.00310379; name protein_true_value
    allocation property applied in "true value" allocation // value calculated from revenue
  properties: carbon content, fossil 0, water in wet mass 0.816 kg, oil/fat content 0, carbon content, non-fossil 0.0978, protein content 1, digestable energy content 0 MJ/kg, dry mass 0.184 kg, wet mass 1 kg, carbon allocation 0.0179952 kg

## Inputs from technosphere
All rows: lognormal variance with pedigree 0.008, pedigree (1,1,4,1,1)
- steam, in chemical industry: 0.296426 kg; = steam/beverage; source Pro Soya 2013
  see parameter
  Uncertainty: Calculated variable. Uncertainty will be determined from propagation of uncertainty factors of underlying variables. Uncertainty of actual relation between variables not accounted at this time, although this could be included in a future update
  properties: wet mass 1 kg
- tap water: 1.25531 kg; name tap_water_input; = (water+ water_dilution)/beverage; source Pro Soya 2013
  (same comment as for steam, in chemical industry)
  properties: wet mass 1 kg, dry mass 0.000337476 kg
- biowaste: -0.00247351 kg; = (m_discarded/beverage)*-1; source Dalgaard, R. 2008
  See parameter; this is a proxy for okara since okara is used as a protein source for animal feeds
  Uncertainty: Calculated variable. Uncertainty will be determined from propagation of uncertainty factors of underlying variables. Uncertainty of actual relation between variables not accounted at this time, although this could be included in a future update
  production volume 48180 kg; = ref_pv * biowaste / bev
    Calculated from production volume of reference product using the relative outputs.
  property price 0 EUR2005; name biowaste_price_EUR2005
  properties: heating value, net 4.29 MJ, carbon content, non-fossil 0.1624, wet mass 1 kg, water content 1.5, dry mass 0.4 kg
  note on heating value, net: Value taken from the general comment of the treatment dataset.
- electricity, medium voltage: 0.0206415 kWh; = electricity/beverage; source Pro Soya 2013
  (same comment as for steam, in chemical industry)
- wastewater, average: -0.000510384 m3; name waste; = (wastewater/1000/beverage)*-1; source Pro Soya 2013
  (same comment as for steam, in chemical industry)
  production volume 9941.46 m3; = ref_pv* waste / bev
    Calculated from production volume of reference product using the relative outputs.
  property price 0 EUR2005; name waste_price_EUR2005
  properties: dry mass 0.346837 kg, wet mass 1000 kg, carbon content, non-fossil 0.194039
  note on carbon content, non-fossil: 0.0673 kg TOC/m3 (Tab A.17, ecoinvent v2.2 report 13_I). TOC was considered as Total Carbon.
- soybean, organic: 0.123676 kg; = soybean/beverage; source Pro Soya 2013
  (same comment as for steam, in chemical industry)
  properties: protein content 0.4, oil/fat content 0.215, carbon content, non-fossil 0.52451, dry mass 0.86 kg, wet mass 1 kg

## Emissions to nature
- Water [air, unspecified]: 0.000188296 m3; name water_to_air_unspecified; = (tap_water_input/1000)* fraction_TW_to_air
  Calculated value based on literature values and expert opinion. See comments in the parametres' comment field.

## Sampling procedure
Collected data for Quebec industries for soybean

## Extrapolations
No extrapolations
