# dolomite quarry construction

Dataset: EcoSpold 2, unit process
Geography: RER
Time period: 2000-01-01 to 2021-12-31
Technology level: current
Classification: ISIC rev.4 ecoinvent: 4290:Construction of other civil engineering projects
Classification: EcoSpold01Categories: construction materials/additives
Synonyms: quarry
Scenario: Business-as-Usual
System model: Allocation, cut-off by classification
Generated by: Avraam Symeonidis
Database: ecoinvent
isCopyrightProtected: true
accessRestrictedTo: 1

## General comment
This dataset represents the construction of 1 dolomite mine. Data are estimated from air-picture and the mine is considered to have an annual yield of about 380'000 t

## Included activities start
From unoccupied land forseen for a mining operation.

## Included activities end
The activity ends with the constructed mine. The dataset includes the 'land-use' of the built part of the mine and therefore the production places and the paved roads

## Technology
Data corresponds to a medium size mine.

## Reference product
- dolomite quarry infrastructure: 1 unit; By-product classification allocatable product; CPC 53269: Other constructions for manufacturing
  production volume 0.0336675 unit
    This is a placeholder value that does not reflect real-world production volumes. This dataset does not currently require a real-world production volume to work in the database framework, and no actual data were collected yet. This has no negative effect on the results of the ecoinvent database. The placeholder value of this activity was scaled according to the nominal GDP of 2005 (source: United Nations, http://data.un.org/Glossary.aspx?q=GDP+%28current+US%24%29, accessed 20130726) to reflect an appropriate share of the global production volume, which is also a placeholder value.
  property price 122109 EUR2005
    Calculated based on inputs: The price of the product has been calculated as a sum of the values of the material and energy inputs for this product. This value is therefore a rough estimation. It may underestimate the real price since there are additional expenses when producing any product. These expences can include for example labour costs, treatment of waste materials and profit for the producer. Please consider carefully whether this level of data quality is acceptable for your application.
  properties: lifetime capacity [kg] 1.9e10 kg, lifetime 50 year

## Inputs from technosphere
- building, hall: 500 m2; lognormal variance with pedigree 0.368125, pedigree (4,2,5,2,1)
  Estimation, based on an air-picture.
  This exchange has an activity link directly to the producing activity because the product is primarily consumed in the same geographical area where it is produced.
- building, multi-storey: 480 m3; lognormal variance with pedigree 0.368125, pedigree (4,2,5,2,1)
  Estimation, based on an air-picture. An area of 80m2 and an average height of 6m are considered.

## Inputs from nature
- Transformation, to traffic area, road network [natural resource, land]: 400 m2; lognormal variance with pedigree 0.188125, pedigree (4,2,5,2,1)
  Estimation, based on an air-picture.
- Transformation, from forest, unspecified [natural resource, land]: 980 m2; lognormal variance with pedigree 0.188125, pedigree (4,2,5,2,1)
  Estimation, based on an air-picture. It is considered that before were mostly forest.
- Occupation, traffic area, road network [natural resource, land]: 20000 m2*year; lognormal variance with pedigree 0.098125, pedigree (4,2,5,2,1)
  Estimation, based on an air-picture.
- Transformation, to industrial area [natural resource, land]: 580 m2; lognormal variance with pedigree 0.188125, pedigree (4,2,5,2,1)
  Estimation, based on an air-picture. It is considered that before were mostly forest.
- Occupation, industrial area [natural resource, land]: 29000 m2*year; lognormal variance with pedigree 0.098125, pedigree (4,2,5,2,1)
  Estimation, based on an air-picture. It is assumed that the mine is used for 50 years.

## Sampling procedure
Data is extrapolated from a limestone quarry.

## Extrapolations
This dataset has been extrapolated from year 2002 to the year of the calculation (2021). The uncertainty has been adjusted accordingly.
