# electric arc furnace slag to market for electric arc furnace slag, for recovery

Dataset: EcoSpold 2, unit process
Geography: RER
Time period: 2020-01-01 to 2025-12-31
Technology level: current
Classification: ISIC rev.4 ecoinvent: 3821:Treatment and disposal of non-hazardous waste
Scenario: Business-as-Usual
System model: Allocation, cut-off by classification
Generated by: Avraam Symeonidis
Database: ecoinvent
isCopyrightProtected: true
accessRestrictedTo: 1

## General comment
This is a renaming activity. Its purpose is to link 'electric arc furnace slag' to the 'market for electric arc furnace slag, for recovery'. This represents the share of electric arc furnace slag that is recovered for use via internal (in iron and steelmaking) or external routes (e.g. cement making).Through this renaming, the by-product classification of the electric arc furnace slag is changed from 'waste' to 'recyclable material'.

## Included activities start
Activity starts with the reception of 'electric arc furnace slag'.

## Included activities end
Activity ends with the 'electric arc furnace slag, for recovery' being ready for transportation.

## Reference product
- electric arc furnace slag: -1 kg; name RP; By-product classification Waste; CPC 39310: Slag, dross, scalings and other waste from the manufacture of iron or steel
  production volume 1.73e10 kg; name PVRP
    Assuming that 92.8% of electric arc furnace slag produced through iron and steelmaking is recovered for recycling either in other iron and steemaking operations or or externally, e.g. cement making (worldsteel, 2010).
    References:
    Worldsteel (2010). Steel industry by-products. World Steel Association: Brussels, Belgium.
  property tin content 1.00503e-5
    The value of 'tin content' is documented in Turner & Symeonidis, 2020.
    Reference: Turner David & Symeonidis Avraam, 2020, Life cycle inventories of the treatment of iron and steelmaking by-products, ecoinvent association, Zürich, Switzerland
  property manganese content 0.0244221
    The value of 'manganese content' is documented in Turner & Symeonidis, 2020.
    Reference: Turner David & Symeonidis Avraam, 2020, Life cycle inventories of the treatment of iron and steelmaking by-products, ecoinvent association, Zürich, Switzerland
  property beryllium content 1.10553e-6
    The value of 'beryllium content' is documented in Turner & Symeonidis, 2020.
    Reference: Turner David & Symeonidis Avraam, 2020, Life cycle inventories of the treatment of iron and steelmaking by-products, ecoinvent association, Zürich, Switzerland
  property lead content 0.00081005
    The value of 'lead content' is documented in Turner & Symeonidis, 2020.
    Reference: Turner David & Symeonidis Avraam, 2020, Life cycle inventories of the treatment of iron and steelmaking by-products, ecoinvent association, Zürich, Switzerland
  property selenium content 1.80905e-5
    The value of 'selenium content' is documented in Turner & Symeonidis, 2020.
    Reference: Turner David & Symeonidis Avraam, 2020, Life cycle inventories of the treatment of iron and steelmaking by-products, ecoinvent association, Zürich, Switzerland
  property arsenic content 1.26633e-6
    The value of 'arsenic content' is documented in Turner & Symeonidis, 2020.
    Reference: Turner David & Symeonidis Avraam, 2020, Life cycle inventories of the treatment of iron and steelmaking by-products, ecoinvent association, Zürich, Switzerland
  property thallium content 1.10553e-5
    The value of 'thallium content' is documented in Turner & Symeonidis, 2020.
    Reference: Turner David & Symeonidis Avraam, 2020, Life cycle inventories of the treatment of iron and steelmaking by-products, ecoinvent association, Zürich, Switzerland
  property magnesium content 0.0431156
    The value of 'magnesium content' is documented in Turner & Symeonidis, 2020.
    Reference: Turner David & Symeonidis Avraam, 2020, Life cycle inventories of the treatment of iron and steelmaking by-products, ecoinvent association, Zürich, Switzerland
  property phosphorus content 0.00201005
    The value of 'phosphorus content' is documented in Turner & Symeonidis, 2020.
    Reference: Turner David & Symeonidis Avraam, 2020, Life cycle inventories of the treatment of iron and steelmaking by-products, ecoinvent association, Zürich, Switzerland
  property mercury content 4.0201e-8
    The value of 'mercury content' is documented in Turner & Symeonidis, 2020.
    Reference: Turner David & Symeonidis Avraam, 2020, Life cycle inventories of the treatment of iron and steelmaking by-products, ecoinvent association, Zürich, Switzerland
  property sulfur content 0.00126633
    The value of 'sulfur content' is documented in Turner & Symeonidis, 2020.
    Reference: Turner David & Symeonidis Avraam, 2020, Life cycle inventories of the treatment of iron and steelmaking by-products, ecoinvent association, Zürich, Switzerland
  property zinc content 0.00108543
    The value of 'zinc content' is documented in Turner & Symeonidis, 2020.
    Reference: Turner David & Symeonidis Avraam, 2020, Life cycle inventories of the treatment of iron and steelmaking by-products, ecoinvent association, Zürich, Switzerland
  property cadmium content 7.63819e-6
    The value of 'cadmium content' is documented in Turner & Symeonidis, 2020.
    Reference: Turner David & Symeonidis Avraam, 2020, Life cycle inventories of the treatment of iron and steelmaking by-products, ecoinvent association, Zürich, Switzerland
  property fluorine content 0.0201005
    The value of 'fluorine content' is documented in Turner & Symeonidis, 2020.
    Reference: Turner David & Symeonidis Avraam, 2020, Life cycle inventories of the treatment of iron and steelmaking by-products, ecoinvent association, Zürich, Switzerland
  property silicon content 0.0912563
    The value of 'silicon content' is documented in Turner & Symeonidis, 2020.
    Reference: Turner David & Symeonidis Avraam, 2020, Life cycle inventories of the treatment of iron and steelmaking by-products, ecoinvent association, Zürich, Switzerland
  property carbon content, fossil 0.0041407
    The value of 'carbon content, fossil' is documented in Turner & Symeonidis, 2020.
    Reference: Turner David & Symeonidis Avraam, 2020, Life cycle inventories of the treatment of iron and steelmaking by-products, ecoinvent association, Zürich, Switzerland
  property antimony content 4.0201e-6
    The value of 'antimony content' is documented in Turner & Symeonidis, 2020.
    Reference: Turner David & Symeonidis Avraam, 2020, Life cycle inventories of the treatment of iron and steelmaking by-products, ecoinvent association, Zürich, Switzerland
  property chromium content 0.0116583
    The value of 'chromium content' is documented in Turner & Symeonidis, 2020.
    Reference: Turner David & Symeonidis Avraam, 2020, Life cycle inventories of the treatment of iron and steelmaking by-products, ecoinvent association, Zürich, Switzerland
  property oxygen content 0.400947
    The value of 'oxygen content' is documented in Turner & Symeonidis, 2020.
    Reference: Turner David & Symeonidis Avraam, 2020, Life cycle inventories of the treatment of iron and steelmaking by-products, ecoinvent association, Zürich, Switzerland
  property vanadium content 0.00136683
    The value of 'vanadium content' is documented in Turner & Symeonidis, 2020.
    Reference: Turner David & Symeonidis Avraam, 2020, Life cycle inventories of the treatment of iron and steelmaking by-products, ecoinvent association, Zürich, Switzerland
  property iron content 0.098593
    The value of 'iron content' is documented in Turner & Symeonidis, 2020.
    Reference: Turner David & Symeonidis Avraam, 2020, Life cycle inventories of the treatment of iron and steelmaking by-products, ecoinvent association, Zürich, Switzerland
  property calcium content 0.244221
    The value of 'calcium content' is documented in Turner & Symeonidis, 2020.
    Reference: Turner David & Symeonidis Avraam, 2020, Life cycle inventories of the treatment of iron and steelmaking by-products, ecoinvent association, Zürich, Switzerland
  property carbon content, non-fossil 0
    The value of 'carbon content, non-fossil' is documented in Turner & Symeonidis, 2020.
    Reference: Turner David & Symeonidis Avraam, 2020, Life cycle inventories of the treatment of iron and steelmaking by-products, ecoinvent association, Zürich, Switzerland
  property sodium content 0.00132663
    The value of 'sodium content' is documented in Turner & Symeonidis, 2020.
    Reference: Turner David & Symeonidis Avraam, 2020, Life cycle inventories of the treatment of iron and steelmaking by-products, ecoinvent association, Zürich, Switzerland
  property heating value, net 0 MJ
    Non combustible products are assumed to have an LHV equal to zero (0).
  property price 0 EUR2005; name RP_price_EUR2005
    Waste products are assigned a price of zero as they are assumed to require further treatment.
  property copper content 0.00110553
    The value of 'copper content' is documented in Turner & Symeonidis, 2020.
    Reference: Turner David & Symeonidis Avraam, 2020, Life cycle inventories of the treatment of iron and steelmaking by-products, ecoinvent association, Zürich, Switzerland
  property titanium content 0.00359799
    The value of 'titanium content' is documented in Turner & Symeonidis, 2020.
    Reference: Turner David & Symeonidis Avraam, 2020, Life cycle inventories of the treatment of iron and steelmaking by-products, ecoinvent association, Zürich, Switzerland
  property cobalt content 4.82412e-6
    The value of 'cobalt content' is documented in Turner & Symeonidis, 2020.
    Reference: Turner David & Symeonidis Avraam, 2020, Life cycle inventories of the treatment of iron and steelmaking by-products, ecoinvent association, Zürich, Switzerland
  property barium content 0.00109548
    The value of 'barium content' is documented in Turner & Symeonidis, 2020.
    Reference: Turner David & Symeonidis Avraam, 2020, Life cycle inventories of the treatment of iron and steelmaking by-products, ecoinvent association, Zürich, Switzerland
  property nickel content 0.000533668
    The value of 'nickel content' is documented in Turner & Symeonidis, 2020.
    Reference: Turner David & Symeonidis Avraam, 2020, Life cycle inventories of the treatment of iron and steelmaking by-products, ecoinvent association, Zürich, Switzerland
  property potassium content 0.00355779
    The value of 'potassium content' is documented in Turner & Symeonidis, 2020.
    Reference: Turner David & Symeonidis Avraam, 2020, Life cycle inventories of the treatment of iron and steelmaking by-products, ecoinvent association, Zürich, Switzerland
  property molybdenum content 0.000507538
    The value of 'molybdenum content' is documented in Turner & Symeonidis, 2020.
    Reference: Turner David & Symeonidis Avraam, 2020, Life cycle inventories of the treatment of iron and steelmaking by-products, ecoinvent association, Zürich, Switzerland
  property silver content 8.44221e-6
    The value of 'silver content' is documented in Turner & Symeonidis, 2020.
    Reference: Turner David & Symeonidis Avraam, 2020, Life cycle inventories of the treatment of iron and steelmaking by-products, ecoinvent association, Zürich, Switzerland
  property aluminium content 0.0432161
    The value of 'aluminium content' is documented in Turner & Symeonidis, 2020.
    Reference: Turner David & Symeonidis Avraam, 2020, Life cycle inventories of the treatment of iron and steelmaking by-products, ecoinvent association, Zürich, Switzerland
  property carbon content 0.0041407
    carbon content on a dry matter basis (reserved; not for manual entry)
  properties: water content 0.00502513, water in wet mass 0.005 kg, wet mass 1 kg, dry mass 0.995 kg, carbon allocation 0.00412 kg

## By-products
- electric arc furnace slag, for recovery: 0 kg; CPC 39310: Slag, dross, scalings and other waste from the manufacture of iron or steel; By-product classification Recyclable
  production volume 0 kg; name PVBP; = PVRP*BP/ABS(RP)
    Calculated from production volume of reference product using the relative outputs.
  property molybdenum content 0.000507538
    (same comment as for electric arc furnace slag)
  property cobalt content 4.82412e-6
    (same comment as for electric arc furnace slag)
  property phosphorus content 0.00201005
    (same comment as for electric arc furnace slag)
  property tin content 1.00503e-5
    (same comment as for electric arc furnace slag)
  property carbon content, non-fossil 0
    (same comment as for electric arc furnace slag)
  property thallium content 1.10553e-5
    (same comment as for electric arc furnace slag)
  property manganese content 0.0244221
    (same comment as for electric arc furnace slag)
  property calcium content 0.244221
    (same comment as for electric arc furnace slag)
  property chromium content 0.0116583
    (same comment as for electric arc furnace slag)
  property potassium content 0.00355779
    (same comment as for electric arc furnace slag)
  property iron content 0.098593
    (same comment as for electric arc furnace slag)
  property lead content 0.00081005
    (same comment as for electric arc furnace slag)
  property barium content 0.00109548
    (same comment as for electric arc furnace slag)
  property oxygen content 0.400947
    (same comment as for electric arc furnace slag)
  property heating value, net 0 MJ
    Non combustible products are assumed to have an LHV equal to zero (0).
  property price 0 EUR2005; name BP_price_EUR2005
    Assumed without economic value
  property cadmium content 7.63819e-6
    (same comment as for electric arc furnace slag)
  property silicon content 0.0912563
    (same comment as for electric arc furnace slag)
  property sodium content 0.00132663
    (same comment as for electric arc furnace slag)
  property fluorine content 0.0201005
    (same comment as for electric arc furnace slag)
  property zinc content 0.00108543
    (same comment as for electric arc furnace slag)
  property mercury content 4.0201e-8
    (same comment as for electric arc furnace slag)
  property aluminium content 0.0432161
    (same comment as for electric arc furnace slag)
  property copper content 0.00110553
    (same comment as for electric arc furnace slag)
  property antimony content 4.0201e-6
    (same comment as for electric arc furnace slag)
  property nickel content 0.000533668
    (same comment as for electric arc furnace slag)
  property vanadium content 0.00136683
    (same comment as for electric arc furnace slag)
  property carbon content, fossil 0.0041407
    (same comment as for electric arc furnace slag)
  property sulfur content 0.00126633
    (same comment as for electric arc furnace slag)
  property magnesium content 0.0431156
    (same comment as for electric arc furnace slag)
  property silver content 8.44221e-6
    (same comment as for electric arc furnace slag)
  property arsenic content 1.26633e-6
    (same comment as for electric arc furnace slag)
  property selenium content 1.80905e-5
    (same comment as for electric arc furnace slag)
  property beryllium content 1.10553e-6
    (same comment as for electric arc furnace slag)
  property titanium content 0.00359799
    (same comment as for electric arc furnace slag)
  property carbon content 0.0041407
    carbon content on a dry matter basis (reserved; not for manual entry)
  properties: wet mass 1 kg, dry mass 0.995 kg, water content 0.00502513, water in wet mass 0.005 kg, carbon allocation 0.00412 kg

## Inputs from technosphere
- electric arc furnace slag, for recovery: -1 kg
  production volume 1.73e10 kg
  properties: wet mass 1 kg, dry mass 0.995 kg, manganese content 0.0244221, calcium content 0.244221, chromium content 0.0116583, water content 0.00502513, iron content 0.098593, oxygen content 0.400947, silicon content 0.0912563, fluorine content 0.0201005, aluminium content 0.0432161, magnesium content 0.0431156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
  note on manganese content: The value of 'manganese content' is documented in Turner & Symeonidis, 2020. Reference: Turner David & Symeonidis Avraam, 2020, Life cycle inventories of the treatment of iron and steelmaking by-products, ecoinvent association, Zürich, Switzerland
  note on calcium content: The value of 'calcium content' is documented in Turner & Symeonidis, 2020. Reference: Turner David & Symeonidis Avraam, 2020, Life cycle inventories of the treatment of iron and steelmaking by-products, ecoinvent association, Zürich, Switzerland
  note on chromium content: The value of 'chromium content' is documented in Turner & Symeonidis, 2020. Reference: Turner David & Symeonidis Avraam, 2020, Life cycle inventories of the treatment of iron and steelmaking by-products, ecoinvent association, Zürich, Switzerland
  note on iron content: The value of 'iron content' is documented in Turner & Symeonidis, 2020. Reference: Turner David & Symeonidis Avraam, 2020, Life cycle inventories of the treatment of iron and steelmaking by-products, ecoinvent association, Zürich, Switzerland
  note on oxygen content: The value of 'oxygen content' is documented in Turner & Symeonidis, 2020. Reference: Turner David & Symeonidis Avraam, 2020, Life cycle inventories of the treatment of iron and steelmaking by-products, ecoinvent association, Zürich, Switzerland
  note on silicon content: The value of 'silicon content' is documented in Turner & Symeonidis, 2020. Reference: Turner David & Symeonidis Avraam, 2020, Life cycle inventories of the treatment of iron and steelmaking by-products, ecoinvent association, Zürich, Switzerland
  note on fluorine content: The value of 'fluorine content' is documented in Turner & Symeonidis, 2020. Reference: Turner David & Symeonidis Avraam, 2020, Life cycle inventories of the treatment of iron and steelmaking by-products, ecoinvent association, Zürich, Switzerland
  note on aluminium content: The value of 'aluminium content' is documented in Turner & Symeonidis, 2020. Reference: Turner David & Symeonidis Avraam, 2020, Life cycle inventories of the treatment of iron and steelmaking by-products, ecoinvent association, Zürich, Switzerland
  note on magnesium content: The value of 'magnesium content' is documented in Turner & Symeonidis, 2020. Reference: Turner David & Symeonidis Avraam, 2020, Life cycle inventories of the treatment of iron and steelmaking by-products, ecoinvent association, Zürich, Switzerland
