# natural gas, high pressure, import from DZ

Dataset: EcoSpold 2, unit process
Geography: GB
Time period: 2012-01-01 to 2021-12-31
Technology level: current
Classification: ISIC rev.4 ecoinvent: 4930:Transport via pipeline
Scenario: Business-as-Usual
System model: Allocation, cut-off by classification
Share of production covered: 100 %
Generated by: Mireille Faist Emmenegger
Published in: Faist Emmenegger, Mireille 2015
Database: ecoinvent
isCopyrightProtected: true
accessRestrictedTo: 1

## General comment
This dataset describes the transport needed for an average export of Algerian natural gas to Great Britain(expressed in tkm). All gas is exported per freight ship (LNG) to GB. It includes the pipeline transportto the LNG plant. An average distance of 2'100 km is estimated for the export.For the LNG transport a transport of 800 km from production to LNG liquefaction plant and from LNG evaporation plant to network are taken into account. The freight ship transport is taken into account in the module 'evaporation of natural gas'.
'Characteristics are based on the ecoinvent report v2 'Erdgas' from 2007: HV; 41.39 MJ/m-3; density, 0.78 kg/m-3, 0.65 kg CH4/m-3, kg CO2/m-3
'

## Included activities start
'exit gate' of natural gas production field

## Included activities end
'entry gate' of natural gas national market

## Geography
The average weighted export distance is based on the trade movements 2012.

## Technology
The distance to the different countries is based on rough estimates.

## Reference product
- natural gas, high pressure: 1 m3; CPC 12020: Natural gas, liquefied or in the gaseous state; By-product classification allocatable product; CAS 14493-06-2
  production volume 3.94117e8 m3; = 0.406628774644377*10^9*37.8/39
    m3 imported in 2012 from DZ to GB according to BP Statistical Review of World Energy, June 2014. The share of import to the category 'other Europe' is 3.86% from Netherlands, 38.4% from Norway, 0.008% from United Kingdom, 48.2% from Russian Federation, 9.6% from Algeria based on the import mix to 'other Europe' as described by BP 2014. Scaled form BP standard heating value (37.8MJ/m3) to LHV of ecoinvent v3 (39MJ/m3).
    Refrence(s): BP (2014). Statistical Review of World Energy, June 2014. Retrieved online from http://www.bp.com/content/dam/bp/excel/energy-economics/statistical-review-2015/bp-statistical-review-of-world-energy-2015-workbook.xlsx, 30 August, 2017
  property carbon content, fossil 0.602381
    An average C content of 0.506 kg C/ m3 has been assumed (this average has been calculated using data in Tab 3.5, ecoinvent v2.2 report 6_V
  property heating value, net 39 MJ
    Literature value, Source: United Nations Statistics Division (2018) International Recommendations for Energy Statistics (IRES). Available at: http://unstats.un.org/unsd/statcom/doc11/BG-IRES.pdf.
  property price 0.166 EUR2005
    Temporary price data. Calculated as 90% of purchasers price based on: 2005 price for Europe-27 Import (US$ and kg) in UN Commodity Trade Statistics Database - Natural gas in gaseous state (http://data.un.org/Data.aspx?q=natural+gas&d=ComTrade&f=_l1Code%3a28%3bcmdCode%3a271121; accessed 4 January 2011), using density of natural gas of 0.8 kg/m3 for unit conversion.
  property carbon content 0.602381
    carbon content on a dry matter basis (reserved; not for manual entry)
  properties: water content 0, water in wet mass 0 kg, heating value, gross 0 MJ, dry mass 0.84 kg, carbon content, non-fossil 0, wet mass 0.84 kg, carbon allocation 0.506 kg

## Inputs from technosphere
- transport, pipeline, onshore, long distance, natural gas: 0.624 metric ton*km; = 800*0.78/1000; lognormal variance with pedigree 0.1286, pedigree (2,1,4,1,1)
  Average weighted distance is estimated based on export statistics and multiplied by the density of natural gas.
  Activity link reflects proveniance of NG.
  Uncertainty: A
- transport, pipeline, offshore, long distance, natural gas: 0.078 metric ton*km; = 100*0.78/1000; normal variance with pedigree 0.0092, pedigree (2,1,4,1,1)
  Average weighted distance is estimated based on export statistics and multiplied by the density of natural gas.
- natural gas, burned in gas motor, for storage: 0.0596 MJ; lognormal variance with pedigree 0.036, pedigree (4,1,4,5,3)
  Data from german industrial expert for 2001, standard technology
  Uncertainty: D
  properties: heating value, net 1 MJ
- natural gas, high pressure: 1 m3; lognormal variance with pedigree 0.008, pedigree (1,1,4,1,1)
  Value based on statistics (BP 2014). Activity link reflects proveniance of NG.
  Uncertainty: s
  properties: heating value, net 39 MJ, dry mass 0.84 kg, carbon content, fossil 0.602381, wet mass 0.84 kg
  note on heating value, net: Literature value, Source: United Nations Statistics Division (2018) International Recommendations for Energy Statistics (IRES). Available at: http://unstats.un.org/unsd/statcom/doc11/BG-IRES.pdf.
  note on carbon content, fossil: An average C content of 0.506 kg C/ m3 has been assumed (this average has been calculated using data in Tab 3.5, ecoinvent v2.2 report 6_V

## Emissions to nature
- Ethane [air, non-urban air or from high stacks]: 1e-5 kg; lognormal variance with pedigree 0.1286, pedigree (2,1,4,1,1)
  calculated based on average losses and algerian gas composition
  Uncertainty: c
- Propane [air, non-urban air or from high stacks]: 1.61e-6 kg; lognormal variance with pedigree 0.1286, pedigree (2,1,4,1,1)
  calculated based on average losses and algerian gas composition
  Uncertainty: c
- Butane [air, non-urban air or from high stacks]: 2.71e-7 kg; lognormal variance with pedigree 0.1286, pedigree (2,1,4,1,1)
  calculated based on average losses and algerian gas composition
  Uncertainty: c
- Methane, fossil [air, non-urban air or from high stacks]: 6.54e-5 kg; lognormal variance with pedigree 0.1286, pedigree (2,1,4,1,1)
  calculated based on average losses and algerian gas composition
  Uncertainty: c
- Mercury [air, non-urban air or from high stacks]: 1e-12 kg; lognormal variance with pedigree 0.116, pedigree (4,1,5,1,3)
  calculated based on average losses and algerian gas composition
  Uncertainty: c

## Sampling procedure
statistics

## Extrapolations
This dataset has been extrapolated from year 2012 to the year of the calculation (2021). The uncertainty has been adjusted accordingly.
