# treatment of used window frame, wood-metal, collection for final disposal

Dataset: EcoSpold 2, unit process
Geography: CH
Time period: 1996-01-01 to 2021-12-31
Technology level: current
Classification: EcoSpold01Categories: waste management/building demolition
Classification: ISIC rev.4 ecoinvent: 3821:Treatment and disposal of non-hazardous waste
Tags: ConvertedDataset; Treatment
Scenario: Business-as-Usual
System model: Allocation, cut-off by classification
Generated by: Martin Lehmann
Published in: Kellenberger D. 2007
Database: ecoinvent
isCopyrightProtected: true
accessRestrictedTo: 1

## General comment
This dataset describes the disposal of a wood-metal window frame with 1 m2 visible area via a municipal incineration plant. Distance to incineration site is assumed to be 50 km.
[This dataset was already contained in the ecoinvent database version 2. It was not individually updated during the transfer to ecoinvent version 3. Life Cycle Impact Assessment results may still have changed, as they are affected by changes in the supply chain, i.e. in other datasets. This dataset was generated following the ecoinvent quality guidelines for version 2. It may have been subject to central changes described in the ecoinvent version 3 change report (http://www.ecoinvent.org/database/ecoinvent-version-3/reports-of-changes/), and the results of the central updates were reviewed extensively. The changes added e.g. consistent water flows and other information throughout the database. The documentation of this dataset can be found in the ecoinvent reports of version 2, which are still available via the ecoinvent website. The change report linked above covers all central changes that were made during the conversion process.]

## Included activities end
Included processes are the disposal of wood, paint, rubber, plastic, steel, aluminium, copper and zinc parts, and the transport to the incineration site. Metal parts are too small to be efficiently collected and recycled.

## Geography
Swiss practice of waste management of window frames.

## Technology
Waste management includes incineration of wood, paint, rubber, plastic, steel, aluminium, copper and zinc parts, and the transport to the incineration site by average 28t lorry.

## Reference product
- used window frame, wood-metal: -1 m2; name RP_amount_1; By-product classification Waste; CPC 39: Wastes or scraps
  EcoSpold01Location=CH
  production volume 0.0336675 m2; name RP_PV_1
    This is a placeholder value that does not reflect real-world production volumes. This dataset does not currently require a real-world production volume to work in the database framework, and no actual data were collected yet. This has no negative effect on the results of the ecoinvent database. The placeholder value of this activity was scaled according to the nominal GDP of 2005 (source: United Nations, http://data.un.org/Glossary.aspx?q=GDP+%28current+US%24%29, accessed 20130726) to reflect an appropriate share of the global production volume, which is also a placeholder value.
  property price 0 EUR2005; name RP_amount_1_price_EUR2005
    Waste products are assigned a price of zero as they are assumed to require further treatment.
  property carbon content 0.599556
    carbon content on a dry matter basis (reserved; not for manual entry)
  properties: water in wet mass 4.17 kg, carbon content, fossil 0.0530468, carbon content, non-fossil 0.546509, wet mass 83.4 kg, water content 0.0526316, dry mass 79.23 kg, carbon allocation 47.5028 kg

## Inputs from technosphere
All rows: lognormal variance with pedigree 0.0507, pedigree (1,3,5,3,1)
- waste polyethylene/polypropylene product: -0.256 kg; name BP_amount_4
  EcoSpold01Location=CH
  production volume 0.00861889 kg; = BP_amount_4* RP_PV_1/ABS( RP_amount_1)
    Calculated from the production volume of used window frame, wood-metal in proportion to the respective output amounts.
  property price 0 EUR2005; name BP_amount_4_price_EUR2005
  properties: heating value, net 42.47 MJ, dry mass 0.847 kg, wet mass 1 kg, carbon content, fossil 0.748045, water content 0.180638
  note on carbon content, fossil: Mixed various plastics was used to estimate the C content of this waste (Tab A.2, ecoinvent v2.2 report 13_I)
- waste wood, untreated: -56.9 kg; name BP_amount_1
  EcoSpold01Location=CH
  production volume 1.91568 kg; = BP_amount_1* RP_PV_1/ABS( RP_amount_1)
    (same comment as for waste polyethylene/polypropylene product)
  property price 0 EUR2005; name BP_amount_1_price_EUR2005
  properties: wet mass 1 kg, heating value, net 13.99 MJ, water content 0.25, carbon content, non-fossil 0.48632, dry mass 0.8 kg
  note on heating value, net: Value taken from the general comment of the treatment dataset.
  note on carbon content, non-fossil: Tab A.4, ecoinvent v2.2 report 13_I. C content has been referred to 1 kg DM,
- waste plastic, mixture: -1.09 kg; name BP_amount_8
  EcoSpold01Location=CH
  production volume 0.0366976 kg; = BP_amount_8* RP_PV_1/ABS( RP_amount_1)
    (same comment as for waste polyethylene/polypropylene product)
  property price 0 EUR2005; name BP_amount_8_price_EUR2005
  properties: carbon content, fossil 0.747344, wet mass 1 kg, dry mass 0.847 kg, water content 0.180638, heating value, net 30.79 MJ
  note on carbon content, fossil: C content in 1 kg DM was calculated using data in Tab A.2, ecoinvent v2.2 report 13_I
- scrap copper: -0.00623 kg; name BP_amount_5
  EcoSpold01Location=CH
  production volume 0.000209749 kg; = BP_amount_5* RP_PV_1/ABS( RP_amount_1)
    (same comment as for waste polyethylene/polypropylene product)
  property price 0 EUR2005; name BP_amount_5_price_EUR2005
  properties: dry mass 1 kg, wet mass 1 kg
- scrap aluminium: -0.0156 kg; name BP_amount_2
  EcoSpold01Location=CH
  production volume 0.000525214 kg; = BP_amount_2* RP_PV_1/ABS( RP_amount_1)
    (same comment as for waste polyethylene/polypropylene product)
  property price 0 EUR2005; name BP_amount_2_price_EUR2005
  properties: dry mass 1 kg, wet mass 1 kg
- waste paint: -4.8 kg; name BP_amount_9
  activityLink introduced to establish a direct link to the corresponding regional supply of this product
  EcoSpold01Location=CH
  production volume 0.161604 kg; = BP_amount_9* RP_PV_1/ABS( RP_amount_1)
    (same comment as for waste polyethylene/polypropylene product)
  property price 0 EUR2005; name BP_amount_9_price_EUR2005
  properties: heating value, net 19.7 MJ, carbon content, fossil 0.65, dry mass 1 kg, wet mass 1 kg
  note on carbon content, fossil: Tab A.5, ecoinvent v2.2 report 13_I. C content has been calculated after data in the tables, and then referred to 1 kg DM
- zinc in car shredder residue: -0.29 kg; name BP_amount_6
  EcoSpold01Location=CH
  production volume 0.00976359 kg; = BP_amount_6* RP_PV_1/ABS( RP_amount_1)
    (same comment as for waste polyethylene/polypropylene product)
  property price 0 EUR2005; name BP_amount_6_price_EUR2005
  properties: dry mass 1 kg, wet mass 1 kg
- waste rubber, unspecified: -2.88 kg; name BP_amount_3
  EcoSpold01Location=CH
  production volume 0.0969625 kg; = BP_amount_3* RP_PV_1/ABS( RP_amount_1)
    (same comment as for waste polyethylene/polypropylene product)
  property price 0 EUR2005; name BP_amount_3_price_EUR2005
  properties: dry mass 1 kg, carbon content, fossil 0.853, wet mass 1 kg, heating value, net 27.19 MJ
- scrap steel: -4.88 kg; name BP_amount_7
  (same comment as for waste paint)
  production volume 0.164298 kg; = BP_amount_7* RP_PV_1/ABS( RP_amount_1)
    (same comment as for waste polyethylene/polypropylene product)
  property price 0 EUR2005; name BP_amount_7_price_EUR2005
  properties: wet mass 1 kg, dry mass 1 kg

## Sampling procedure
Calculation from window frame material composition

## Extrapolations
This dataset has been extrapolated from year 2004 to the year of the calculation (2021). The uncertainty has been adjusted accordingly.

## Review by Rolf Frischknecht 2007-11-07
passed
