# maintenance, bus

Dataset: EcoSpold 2, unit process
Geography: RoW
Time period: 1990-01-01 to 2021-12-31
Technology level: current
Classification: EcoSpold01Categories: transport systems/road
Classification: ISIC rev.4 ecoinvent: 4520:Maintenance and repair of motor vehicles
Tags: ConvertedDataset
Scenario: Business-as-Usual
System model: Allocation, cut-off by classification
Generated by: Michael Spielmann (obsolete)
Published in: Spielmann M. 2004
Database: ecoinvent
isCopyrightProtected: true
accessRestrictedTo: 1

## General comment
Material data are rough estimates based on expert estimates. For energy data, yearly energy consumption figures from service garages of Swiss transport companies is employed.
[This dataset was already contained in the ecoinvent database version 2. It was not individually updated during the transfer to ecoinvent version 3. Life Cycle Impact Assessment results may still have changed, as they are affected by changes in the supply chain, i.e. in other datasets. This dataset was generated following the ecoinvent quality guidelines for version 2. It may have been subject to central changes described in the ecoinvent version 3 change report (http://www.ecoinvent.org/database/ecoinvent-version-3/reports-of-changes/), and the results of the central updates were reviewed extensively. The changes added e.g. consistent water flows and other information throughout the database. The documentation of this dataset can be found in the ecoinvent reports of version 2, which are still available via the ecoinvent website. The change report linked above covers all central changes that were made during the conversion process.]

## Included activities end
The inventory includes materials used for alteration parts and energy consumption of garages. Rail and road transport of materials is accounted for

## Geography
Data represent Swiss conditions

## Technology
no technologies are specified

## Time period
Data represents conditions of the early 1990ties

## Parameters
- fraction, tap water, to air: 0.15 dimensionless; name fraction_TW_to_air; lognormal variance with pedigree 0.092025, pedigree (4,4,3,2,4)
- fraction, process water, to air: 0.15 dimensionless; name fraction_PW_to_air; lognormal variance with pedigree 0.092025, pedigree (4,4,3,2,4)

## Reference product
- maintenance, bus: 1 unit; CPC 87141: Maintenance and repair services of motor vehicles; By-product classification allocatable product
  EcoSpold01Location=CH
  production volume 3.96633 unit
    This is a placeholder value that does not reflect real-world production volumes. This dataset does not currently require a real-world production volume to work in the database framework, and no actual data were collected yet. This has no negative effect on the results of the ecoinvent database.
  property price 10917.5 EUR2005
    Calculated based on inputs: The price of the product has been calculated as a sum of the values of the material and energy inputs for this product. This value is therefore a rough estimation. It may underestimate the real price since there are additional expenses when producing any product. These expences can include for example labour costs, treatment of waste materials and profit for the producer. Please consider carefully whether this level of data quality is acceptable for your application.

## Inputs from technosphere
- waste plastic, mixture: 0 kg; pedigree (1,1,1,1,1)
  EcoSpold01Location=CH
  own calculation based on maintenance input data.
  production volume 0 kg
    Calculated from the production volume of maintenance, bus in proportion to the respective output amounts.
  properties: heating value, net 30.79 MJ, water content 0.180638, wet mass 1 kg, carbon content, fossil 0.747344, dry mass 0.847 kg
  note on heating value, net: Value taken from the general comment of the treatment dataset.
  note on carbon content, fossil: C content in 1 kg DM was calculated using data in Tab A.2, ecoinvent v2.2 report 13_I
- tap water: 0 kg; name tap_water_input; pedigree (1,1,1,1,1)
  Calculated value. The figures derived from Service garages in Bern, Switzerland. (bus maintenance).
  EcoSpold01Location=CH
  properties: dry mass 0.000337476 kg, wet mass 1 kg, water content 2962.17, carbon content, fossil 0.00178991
  note on carbon content, fossil: Bicarbonate content is 2.93 mol/m3. CO2 content is 0.1 mol/m3 (ecoinvent v2.2 report 8, Tab 93.1).
- polyethylene, high density, granulate: 1.4 kg; lognormal variance with pedigree 0.162, pedigree (1,1,5,5,1)
  Literature studies. Original data is derived from expert estimates.
  EcoSpold01Location=RER
  properties: dry mass 1 kg, wet mass 1 kg, heating value, net 42.47 MJ, carbon content, fossil 0.857143
  note on carbon content, fossil: Polyethylene is formed out of a huge amount of ethylene monomers (C2H4) (ecoinvent v2.2 report 11_II). MW=28 g/mol
- synthetic rubber: 133 kg; lognormal variance with pedigree 0.162, pedigree (1,1,5,5,1)
  EcoSpold01Location=RER
  Literature studies. Original data is derived from expert estimates.
  properties: dry mass 1 kg, carbon content, fossil 0.871949, wet mass 1 kg, heating value, net 26.42 MJ
  note on carbon content, fossil: EPDM (Ethylene-propene-diene terpolymer) rubber is a terpolymer of ethylene, propene, and a diene with the residual unsaturated portion of the diene in the side chain (ecoinvent v2.2 report 7-part XX & Ullmann). Chemical formula (deduced from Evidences of Solvent-Induced Miscibility in Polychloroprene-co-Ethylene-Propene Diene Terpolymer Blends, Dubey et al., Journal of Applied Polymer Science, 2009, 111:1884–1891): C20H35
- lead: 17.9 kg; lognormal variance with pedigree 0.132, pedigree (1,1,5,5,1)
  EcoSpold01Location=RER
  Literature studies. Original data is derived from expert estimates.
  properties: wet mass 1 kg, dry mass 1 kg
- reinforcing steel: 54.9 kg; lognormal variance with pedigree 0.162, pedigree (1,1,5,5,1)
  EcoSpold01Location=RER
  Literature studies. Original data is derived from expert estimates and comprising steel used in tyres and oil filters, brake shoes, exhaust.
  properties: carbon content, fossil 0.004, dry mass 1 kg, wet mass 1 kg
- heat, district or industrial, other than natural gas: 0 MJ; pedigree (1,1,1,1,1)
  EcoSpold01Location=RER
  Literature studies. Original data is derived from expert estimates.
  properties: heating value, net 1 MJ
- electricity, low voltage: 0 kWh; pedigree (1,1,1,1,1)
  EcoSpold01Location=CH
  Derived from yearly consumption of service garages from public transport companies in Switzerland.
- heat, district or industrial, natural gas: 0 MJ; pedigree (1,1,1,1,1)
  Derived from yearly consumption of service garages from public transport companies in Switzerland.
  EcoSpold01Location=RER
  properties: heating value, net 1 MJ
- waste mineral oil: 0 kg; pedigree (1,1,1,1,1)
  own calculation based on maintenance input data.
  EcoSpold01Location=CH
  production volume 0 kg
    (same comment as for waste plastic, mixture)
  properties: carbon content, fossil 0.864444, water content 0.111111, wet mass 1 kg, dry mass 0.9 kg, heating value, net 34.7 MJ
  note on carbon content, fossil: Tab A.6, ecoinvent v2.2 report 13_I. C content has been calculated after data in the tables, and then referred to 1 kg DM
- paper, woodfree, uncoated: 3.15 kg; lognormal variance with pedigree 0.162, pedigree (1,1,5,5,1)
  EcoSpold01Location=RER
  Literature studies. Original data is derived from expert estimates.
  properties: carbon content, fossil 0.0251406, heating value, net 14.11 MJ, water content 0.0582011, dry mass 0.945 kg, carbon content, non-fossil 0.281215, wet mass 1 kg
  note on carbon content, fossil: Fossil C content was calculated after fossil C contents of chemicals used in the production of the paper (in Tab 8.54 & 8.55 ecoinvent v2.2 report 11_III, part 8).
  note on carbon content, non-fossil: Biogenic C content was calculated after biogenic C contents of chemicals used in the production of the paper (in Tab 8.54 & 8.55 ecoinvent v2.2 report 11_III, part 8). The cellulose content in 1 kg of paper (on a wet mas basis) was estimated as (1-chemical content), C content of cellulose was considered 0.44 kgC/kg dry mass (ecoinvent v2.2 report, n 15a, pg 40)
- lubricating oil: 824 kg; lognormal variance with pedigree 0.132, pedigree (1,1,5,5,1)
  EcoSpold01Location=RER
  Derived from yearly consumption of service garages from public transport companies in Switzerland.
  properties: heating value, net 40.2 MJ, dry mass 1 kg, carbon content, fossil 0.75, wet mass 1 kg
  note on heating value, net: Literature value, Source: IPCC 2006, 2006 IPCC Guidelines for National Greenhouse Gas Inventories, Prepared by the National Greenhouse Gas Inventories Programme, Eggleston H.S., Buendia L., Miwa K., Ngara T. and Tanabe K. (eds). Published: IGES, Japan
  note on carbon content, fossil: Lubricating oil is produced from diesel. C-content/dry mass of fats and oils considered 75%, from: ecoinvent v2.2 report, n 15a, pg 40
- wastewater, average: 0 m3; pedigree (1,1,1,1,1)
  EcoSpold01Location=CH
  own calculation based on maintenance input data.
  production volume 0 m3
    (same comment as for waste plastic, mixture)
  properties: water content 2882.2, dry mass 0.346837 kg, wet mass 1000 kg, carbon content, non-fossil 0.194039
  note on carbon content, non-fossil: 0.0673 kg TOC/m3 (Tab A.17, ecoinvent v2.2 report 13_I). TOC was considered as Total Carbon.
- waste plastic, mixture: -6.10718, -0.408058, -0.0308608, -0.168543, -0.0680893, -0.160047, -5.2036, -42.7536 kg (8 entries); lognormal variance with pedigree 0.162, pedigree (1,1,5,5,1)
  EcoSpold01Location=CH
  own calculation based on maintenance input data.
  production volume 164.7 kg
- tap water: 4522.57, 544.396, 899.704, 193459, 22687, 590.196, 1678.8, 259618 kg (8 entries); lognormal variance with pedigree 0.132, pedigree (1,1,5,5,1)
  (same comment as for tap water)
- heat, district or industrial, other than natural gas: 15.1855, 916.97, 37447.8 MJ (3 entries); lognormal variance with pedigree 0.132, pedigree (1,1,5,5,1)
  EcoSpold01Location=RER
  Literature studies. Original data is derived from expert estimates.
- electricity, low voltage: 707.812, 128.879, 2909.29, 10164.4, 2075.11, 31859.6, 5154.33, 14800.6 kWh (8 entries); lognormal variance with pedigree 0.132, pedigree (1,1,5,5,1)
  (same comment as for electricity, low voltage)
- heat, district or industrial, natural gas: 427.175, 10236, 27716.9 MJ (3 entries); lognormal variance with pedigree 0.132, pedigree (1,1,5,5,1)
  (same comment as for heat, district or industrial, natural gas)
- waste mineral oil: -227.728, -596.272 kg (2 entries); lognormal variance with pedigree 0.162, pedigree (1,1,5,5,1)
  own calculation based on maintenance input data.
  EcoSpold01Location=CH
  production volume 2472 kg
- wastewater, average: -156.522, -327.478 m3 (2 entries); lognormal variance with pedigree 0.162, pedigree (1,1,5,5,1)
  EcoSpold01Location=CH
  own calculation based on maintenance input data.
  production volume 1452 m3

## Emissions to nature
- Water [air, unspecified]: 72.6 m3; name water_to_air_unspecified; lognormal variance with pedigree 0.0827, pedigree (2,2,5,5,1)
  Calculated value based on literature values and expert opinion. See comments in the parametres' comment field.
  property fraction, origin: salt water 0; name fraction_origin_salt_water
  property fraction, origin: unspecified 0; name fraction_origin_unspecified
  property fraction, origin: fresh water 1; name fraction_origin_fresh_water

## Sampling procedure
Energy data, is based on a brief survey of public transport companies. Material data based on expert estimate and further assumption to determine the material consumption.

## Extrapolations
none This dataset has been copied from an original dataset covering the geography CH. The uncertainty has been adjusted accordingly.

## Review by Niels Jungbluth 2004-04-02
Passed.
