# structural timber production

Dataset: EcoSpold 2, unit process
Geography: RoW
Time period: 2012-01-01 to 2021-12-31
Technology level: current
Classification: ISIC rev.4 ecoinvent: 1621:Manufacture of veneer sheets and wood-based panels
Synonyms: Konstruktionsvollholz
Tags: Swiss brush-up completed
Scenario: Business-as-Usual
System model: Allocation, cut-off by classification
Generated by: Frank Werner
Database: ecoinvent
isCopyrightProtected: true
accessRestrictedTo: 1

## General comment
This dataset represents the production of structural timber in Europe. Data are based on a sample of German production.
Structural timber is a building material with precisely defined product characteristics, which was developed specially to meet the high requirements of modern timber construction. Structural timber is a kiln-dried, strength-graded, and in most cases finger-jointed timber product made of solid softwood. Thanks to the method of cutting used and the low moisture content of the material it has little propensity for cracking, is dimensionally stable and, subject to due observance of the rules relating to the structural protection of wood, can also be used without wood preservatives. Structural timber is available in a wide range of preferred dimensions and wood types (spruce, fir, pine, larch or Douglas fir) with precisely defined surface finishes.
Reference:
Rüter, S. and S. Diederichs (2012): Ökobilanz-Basisdaten für Bauprodukte aus Holz. Arbeitsbericht aus dem Institut für Holztechnologie und Holzbiologie Nr. 2012/1, Johann Heinrich von Thünen-Institut (vTI), Hamburg.
[This dataset is meant to replace the following datasets:]

## Included activities start
From the reception at the factory gate of all materials and fuels used.

## Included activities end
This activity ends with the structural timber produced at the factory gate. The dataset includes the inputs to and outputs of the production processes and the available process emissions. Infrastructure is a rough estimate.

## Geography
Data for Germany used for central Europe

## Technology
Technology reflects a sample of German structural timber production.

## Parameters
- wood_fuel: 1302.3; lognormal variance with pedigree 0.0256, pedigree (1,3,1,1,1)
  input of wood fuel used in production; value calculated from Rüter et al. 2012

## Reference product
- structural timber: 0 m3; By-product classification allocatable product
  Reference product. Plywood produced in Germany by processes representative for global average. The reference product is ready for delivery at the wooden board factory.
  A large number of materials can be produced with differing properties and areas of use. Typical uses are as construction plywood for wall, floor, and ceiling panels and also as panels for concrete shuttering, and decorative covering veneers in interior furnishings (e.g. wall panels or doors).
  production volume 8e6 m3; name structural_timber_pv
    Rough estimate. No data on annual produciton volume were available, therefore a rough estimate was made.
  property heating value, net 5320.29 MJ
    LHV is calculated based on the Carbon content of the product. More details can be found on the respective documentation.The property is based on a value of 12.2MJ/kg
  property carbon content 0.451448
    carbon content on a dry matter basis (reserved; not for manual entry)
  property true value 250
    allocation property applied in "true value" allocation // value calculated from revenue
  properties: water content 0.100732, price 250 EUR2005, carbon content, fossil 0.001098, water in wet mass 39.9 kg, dry mass 396.1 kg, wet mass 436 kg, carbon content, non-fossil 0.45035, carbon allocation 178.819 kg
- wood chips, dry, measured as dry mass: 1 kg; name m_wood_chips; By-product classification allocatable product; CPC 31230: Wood in chips or particles; pedigree (1,1,1,1,1)
  Literature value; sample from Germany
  production volume 1.2624e9 kg; = m_wood_chips*structural_timber_pv
    Calculated from production volume of reference product using the relative outputs.
  property price 0.107 EUR2005; name m_wood_chips_price_EUR2005
    Expert judgement (Urs Luginbühl, Swiss Sawmilling industry, personal communication in June 2014). Wood chips from softwood should have a price of 0.101 EUR/kg. Woodchips from hardwood should have a price of 0.112 EUR/kg. Average of these two values is used. Cross-reference; FAOSTAT database; http://faostat.fao.org/site/626/DesktopDefault.aspx?PageID=626#ancor; Average import/export prices of EU for 'chips and particles'. Price: 48.76 Euro/m3. The density of the wood chips is 650 kg/m3. The price is recalculated accordingly.
  property heating value, net 9.99 MJ
    LHV is calculated based on the Carbon content of the product. More details can be found on the respective documentation.
  property carbon content 0.494
    carbon content on a dry matter basis (reserved; not for manual entry)
  property true value 16.8846; name m_wood_chips_true_value
    allocation property applied in "true value" allocation // value calculated from revenue
  properties: water content 0.4, water in wet mass 0.4 kg, wet mass 1.4 kg, dry mass 1 kg, carbon content, non-fossil 0.494, carbon content, fossil 0, carbon allocation 0.494 kg

## Inputs from technosphere
- sawnwood, board, softwood, raw, dried (u=10%): 0.000220106 m3; lognormal variance with pedigree 0.0112, pedigree (2,1,4,5,1)
  Literature value; sample from Germany
  property wet mass 897 kg; name WM
  property dry mass 418.176 kg; name basic_wood_d
  property water in wet mass 478.824 kg; name WWM
  property water content 1.14503; name water_content
  properties: carbon content, non-fossil 0.494, heating value, net 5700.67 MJ
  note on heating value, net: Assumed equal to "sawnwood, softwood, dried (u=10%), planed".The property is based on a value of 13.38MJ/kg
- polyurethane adhesive: 0.000116668 kg; lognormal variance with pedigree 0.0112, pedigree (1,3,4,5,1)
  part of glueing system (inventoried as averaged production average in Europe)
  properties: heating value, net 30.67 MJ, wet mass 1 kg, dry mass 1 kg, carbon content, fossil 0.72
- melamine urea formaldehyde adhesive: 8.49955e-5 kg; lognormal variance with pedigree 0.0446, pedigree (1,4,5,5,1)
  Literature value; sample from Germany
  properties: heating value, net 14.65 MJ, dry mass 1 kg, carbon content, fossil 0.311708, wet mass 1 kg
- sawnwood, softwood, raw: 0.00015195 m3; lognormal variance with pedigree 0.0112, pedigree (2,1,4,5,1)
  Literature value; sample from Germany
  properties: wet mass 658.24 kg, carbon content, non-fossil 0.494, water content 0.7, heating value, net 5130.57 MJ, dry mass 387.2 kg
- waste wood, post-consumer: 0.00241756 kg; lognormal variance with pedigree 0.0112, pedigree (2,1,4,5,1)
  Literature value; sample from Germany
  properties: dry mass 1 kg, carbon content, non-fossil 0.494, water content 0.4, wet mass 1.4 kg, heating value, net 9.99 MJ
- sawlog and veneer log, softwood, measured as solid wood under bark: 0 m3; pedigree (1,1,1,1,1)
  Literature value; sample from Germany
  properties: water content 0.7, carbon content, non-fossil 0.494, wet mass 776.751 kg, dry mass 456.912 kg, basic wood density 402.083, heating value, net 4483.78 MJ
  note on heating value, net: Value based on the dataset "softwood forestry, mixed species, sustainable forest management"The property is based on a value of 11.58MJ/kg
- wastewater from particleboard production: -9.303e-6 m3; name wastewater; lognormal variance with pedigree 0.0446, pedigree (1,4,5,5,1)
  Literature value; sample from Germany
  production volume 185632 m3; = wastewater*structural_timber_pv
    Calculated from production volume of reference product using the relative outputs.
  property price 0 EUR2005; name wastewater_price_EUR2005
  properties: carbon content, non-fossil 0.377131, water content 2962.17, wet mass 1000 kg, dry mass 0.337476 kg
- waste rubber, unspecified: -4.41015e-5 kg; name w_rubber; = (m_rubber)*-1; lognormal variance with pedigree 0.1786, pedigree (4,5,5,5,5)
  calculated from rubber input
  production volume 880000 kg; = w_rubber*structural_timber_pv
    Calculated from production volume of reference product using the relative outputs.
  property price 0 EUR2005; name w_rubber_price_EUR2005
  property dry mass 1 kg; name w_rubber_DM
  properties: heating value, net 27.19 MJ, wet mass 1 kg, carbon content, fossil 0.853
  note on heating value, net: Value taken from the general comment of the treatment dataset.
- tap water: 0 kg; name m_tapwater; pedigree (1,1,1,1,1)
  Literature value; sample from Germany
  properties: wet mass 1 kg, water content 2962.17, carbon content, fossil 0.00178991, dry mass 0.000337476 kg
  note on carbon content, fossil: Bicarbonate content is 2.93 mol/m3. CO2 content is 0.1 mol/m3 (ecoinvent v2.2 report 8, Tab 93.1).
- heat, district or industrial, other than natural gas: 0.0219557 MJ; = 73.017/1.33333; lognormal variance with pedigree 0.0112, pedigree (1,3,4,5,1)
  Fuel input, converted to heat output
  properties: heating value, net 1 MJ
- waste mineral oil: -3.80876e-5 kg; name w_mineral_oil; = (m_lubricating_oil/DM_oil)*-1; lognormal variance with pedigree 0.0118, pedigree (2,3,4,5,1)
  hydraulic oil and engine oil/grease; adjusted for water content of waste oil
  production volume 760000 kg; = w_mineral_oil*structural_timber_pv
    Calculated from production volume of reference product using the relative outputs.
  property price 0 EUR2005; name w_mineral_oil_price_EUR2005
  properties: water content 0.111111, dry mass 0.9 kg, heating value, net 34.7 MJ, wet mass 1 kg, carbon content, fossil 0.864444
  note on carbon content, fossil: Tab A.6, ecoinvent v2.2 report 13_I. C content has been calculated after data in the tables, and then referred to 1 kg DM
- lubricating oil: 3.80876e-5 kg; name m_lubricating_oil; lognormal variance with pedigree 0.0206, pedigree (4,4,4,5,1)
  Literature value; sample from Germany
  property dry mass 1 kg; name DM_oil
  properties: carbon content, fossil 0.75, wet mass 1 kg, heating value, net 40.2 MJ
  note on carbon content, fossil: Lubricating oil is produced from diesel. C-content/dry mass of fats and oils considered 75%, from: ecoinvent v2.2 report, n 15a, pg 40
  note on heating value, net: Literature value, Source: IPCC 2006, 2006 IPCC Guidelines for National Greenhouse Gas Inventories, Prepared by the National Greenhouse Gas Inventories Programme, Eggleston H.S., Buendia L., Miwa K., Ngara T. and Tanabe K. (eds). Published: IGES, Japan
- wooden board factory, organic bonded boards: 1.33507e-11 unit; lognormal variance with pedigree 0.398, pedigree (4,5,5,5,4)
  Default value from ecoinvent 2.2
- phenolic resin: 4.81107e-6 kg; lognormal variance with pedigree 0.0112, pedigree (1,3,4,5,1)
  part of glueing system (inventoried as averaged production average in Europe)
  properties: heating value, net 33.57 MJ, wet mass 1 kg, dry mass 1 kg, carbon content, fossil 0.772277
  note on carbon content, fossil: (C6H5OH)-CH2-(C6H5OH) was considered to be the basic structure in phenolic resin (ecoinvent v2.2 report 8-part 61). C13H14O2, MW=202 g/mol
- municipal solid waste: 0 kg; name w_MSW; pedigree (1,1,1,1,1)
  Literature value; sample from Germany
  Uncertainty: a
  production volume 0 kg
    Calculated from production volume of reference product using the relative outputs.
  properties: wet mass 1 kg, carbon content, fossil 0.171549, water content 0.297017, dry mass 0.771 kg, heating value, net 11.74 MJ, carbon content, non-fossil 0.261655
  note on carbon content, fossil: MSW composition in tab 4.1, ecoinvent v2.2 report 13_I. C content referred to 1 kg DM
- wood ash mixture, pure: -0.000261061 kg; name w_wood_ash; = (0.000666666666666667*wood_fuel/1.33333)*-1; lognormal variance with pedigree 0.0112, pedigree (1,3,4,5,1)
  Amount derived from DS "Heat, district or industrial, other than natural gas {CH}| heat production, wood chips from industry, at furnace 300kW | Cut-off, U" on heat generation from industrial residual wood per MJ, multiplied by the input of wood fuel (direct wood fuel plus production residues ) scaled to reflect wood input per generated heat
  production volume 5.20921e6 kg; = w_wood_ash*structural_timber_pv
    Calculated from production volume of reference product using the relative outputs.
  property price 0 EUR2005; name w_wood_ash_price_EUR2005
  properties: wet mass 1 kg, carbon content, non-fossil 0.012, dry mass 1 kg
- furnace, wood chips, with silo, 300kW: 9.04577e-9 unit; = 2.31E-08*wood_fuel/1.33333; lognormal variance with pedigree 0.0106, pedigree (1,1,4,5,1)
  Infrastructure factor from DS "Heat, district or industrial, other than natural gas {CH}| heat production, wood chips from industry, at furnace 5000kW | Cut-off, U", multiplied by the input of wood fuel (direct wood fuel plus production residues); correction for assumed efficiency as original value refers to heat output
- synthetic rubber: 4.41015e-5 kg; name m_rubber; lognormal variance with pedigree 0.2106, pedigree (5,5,5,5,5)
  Literature value; sample from Germany
  property carbon content, fossil 0.871949; name C_content_fossil_rubber
  properties: heating value, net 26.42 MJ, dry mass 1 kg, wet mass 1 kg
  note on carbon content, fossil: EPDM (Ethylene-propene-diene terpolymer) rubber is a terpolymer of ethylene, propene, and a diene with the residual unsaturated portion of the diene in the side chain (ecoinvent v2.2 report 7-part XX & Ullmann). Chemical formula (deduced from Evidences of Solvent-Induced Miscibility in Polychloroprene-co-Ethylene-Propene Diene Terpolymer Blends, Dubey et al., Journal of Applied Polymer Science, 2009, 111:1884-1891): C20H35
- electricity, medium voltage: 0 kWh; pedigree (1,1,1,1,1)
  Literature value; sample from Germany
- diesel, burned in building machine: 0.0202482 MJ; lognormal variance with pedigree 0.0446, pedigree (1,4,5,5,1)
  Literature value; sample from Germany
  properties: heating value, net 1 MJ
- sawlog and veneer log, softwood, measured as solid wood under bark: 1.01044e-6, 0.000211077 m3 (2 entries); lognormal variance with pedigree 0.0112, pedigree (2,1,4,5,1)
  Literature value; sample from Germany
- tap water: 1.06093e-7, 1.27707e-8, 2.11058e-8, 5.32204e-7, 1.38451e-8, 3.93823e-8, 6.09028e-6 kg (7 entries); lognormal variance with pedigree 0.0118, pedigree (2,3,4,5,1)
  Literature value; sample from Germany
- municipal solid waste: -1.30652e-7, -3.29211e-8, -4.70462e-8, -9.24024e-5 kg (4 entries); lognormal variance with pedigree 0.1318, pedigree (2,3,4,5,5)
  Literature value; sample from Germany
  Uncertainty: a
  production volume 1.848e6 kg
- electricity, medium voltage: 0.000296465, 5.68493e-5, 0.000954381, 0.0138806, 0.00195648, 0.00637451 kWh (6 entries); lognormal variance with pedigree 0.0446, pedigree (1,4,5,5,1)
  Literature value; sample from Germany

## Inputs from nature
- Carbon dioxide, non-fossil, resource correction [natural resource, in air]: 1.50057 kg; pedigree (1,1,1,1,1)
  This exchange has been added after economic allocation in order to re-balance the non-fossil carbon dioxide resource extraction.
- Water, cooling, unspecified natural origin [natural resource, in water]: 9.29498e-6 m3; name water_cooling_UNO_input; lognormal variance with pedigree 0.0446, pedigree (1,4,5,5,1)
  Literature value; sample from Germany

## Emissions to nature
- Particulates, > 2.5 um, and < 10um [air, unspecified]: 4.6991e-5 kg; = 0.00012*wood_fuel/1.33333; lognormal variance with pedigree 0.1632, pedigree (2,3,5,5,1)
  Emission factor from DS "Heat, district or industrial, other than natural gas {CH}| heat production, wood chips from industry, at furnace 300kW | Cut-off, U" on heat generation from industrial residual wood per MJ, multiplied by the input of wood fuel (direct wood fuel plus production residues ) scaled to reflect wood input per generated heat.
- Nitrogen oxides [air, unspecified]: 9.3982e-5 kg; = 0.00024*wood_fuel/1.33333; lognormal variance with pedigree 0.0832, pedigree (2,3,5,5,1)
  (same comment as for Particulates, > 2.5 um, and < 10um)
- Magnesium [air, unspecified]: 1.87964e-7 kg; name magnesium; = 0.00000048*wood_fuel/1.33333; lognormal variance with pedigree 0.6932, pedigree (2,3,5,5,1)
  (same comment as for Particulates, > 2.5 um, and < 10um)
- Benzene, ethyl- [air, unspecified]: 1.56637e-8 kg; = 0.00000004*wood_fuel/1.33333; lognormal variance with pedigree 0.0832, pedigree (2,3,5,5,1)
  (same comment as for Particulates, > 2.5 um, and < 10um)
- Hydrocarbons, aliphatic, alkanes, unspecified [air, unspecified]: 4.75131e-7 kg; = 1.21333333333333E-06*wood_fuel/1.33333; lognormal variance with pedigree 0.0832, pedigree (2,3,5,5,1)
  (same comment as for Particulates, > 2.5 um, and < 10um)
- Cadmium [air, unspecified]: 3.65486e-10 kg; = 9.33333333333334E-10*wood_fuel/1.33333; lognormal variance with pedigree 0.6932, pedigree (2,3,5,5,1)
  (same comment as for Particulates, > 2.5 um, and < 10um)
- Chromium VI [air, unspecified]: 2.08849e-11 kg; = 5.33333333333334E-11*wood_fuel/1.33333; lognormal variance with pedigree 0.6932, pedigree (2,3,5,5,1)
  (same comment as for Particulates, > 2.5 um, and < 10um)
- Water [air, unspecified]: 3.27973e-5 m3; = 0.00006*wood_fuel/1.33333+m_tapwater/1000+water_cooling_UNO_input; lognormal variance with pedigree 0.132, pedigree (4,4,5,5,4)
  Water emissions from the combustion of the wood (emission per MJ, scaled to wood input and extrapolated from wood input to heat generated) plus tap water input plus input of cooling water
- Nickel [air, unspecified]: 3.13273e-9 kg; name nickel; = 0.000000008*wood_fuel/1.33333; lognormal variance with pedigree 0.6932, pedigree (2,3,5,5,1)
  (same comment as for Particulates, > 2.5 um, and < 10um)
- Formaldehyde [air, unspecified]: 1.95369e-7 kg; = 1.73333333333334E-07*wood_fuel/1.33333+0.000318; lognormal variance with pedigree 0.1632, pedigree (2,3,5,5,1)
  Emission factor from DS "Heat, district or industrial, other than natural gas {CH}| heat production, wood chips from industry, at furnace 300kW | Cut-off, U" on heat generation from industrial residual wood per MJ, multiplied by the input of wood fuel (direct wood fuel plus production residues ) scaled to reflect wood input per generated heat plus estimated emissions from wood and glue drying processes (according to Rüter & Diederichs 2012).
- Mercury [air, unspecified]: 1.56637e-10 kg; name mercury; = 0.0000000004*wood_fuel/1.33333; lognormal variance with pedigree 0.6932, pedigree (2,3,5,5,1)
  (same comment as for Particulates, > 2.5 um, and < 10um)
- Calcium [air, unspecified]: 3.05442e-6 kg; = 0.0000078*wood_fuel/1.33333; lognormal variance with pedigree 0.6932, pedigree (2,3,5,5,1)
  (same comment as for Particulates, > 2.5 um, and < 10um)
- Dinitrogen monoxide [air, unspecified]: 1.30531e-6 kg; = 3.33333333333334E-06*wood_fuel/1.33333; lognormal variance with pedigree 0.0832, pedigree (2,3,5,5,1)
  (same comment as for Particulates, > 2.5 um, and < 10um)
- Sulfur dioxide [air, unspecified]: 1.30531e-6 kg; = 3.33333333333334E-06*wood_fuel/1.33333; lognormal variance with pedigree 0.0438, pedigree (2,3,5,5,1)
  (same comment as for Particulates, > 2.5 um, and < 10um)
- Fluorine [air, unspecified]: 2.61061e-8 kg; = 6.66666666666667E-08*wood_fuel/1.33333; lognormal variance with pedigree 0.0832, pedigree (2,3,5,5,1)
  (same comment as for Particulates, > 2.5 um, and < 10um)
- m-Xylene [air, unspecified]: 6.26547e-8 kg; name mxylene; = 0.00000016*wood_fuel/1.33333; lognormal variance with pedigree 0.0832, pedigree (2,3,5,5,1)
  (same comment as for Particulates, > 2.5 um, and < 10um)
- Ammonia [air, unspecified]: 9.03272e-7 kg; = 2.30666666666667E-06*wood_fuel/1.33333; lognormal variance with pedigree 0.0832, pedigree (2,3,5,5,1)
  (same comment as for Particulates, > 2.5 um, and < 10um)
- Chromium [air, unspecified]: 2.06761e-9 kg; = 5.28000000000001E-09*wood_fuel/1.33333; lognormal variance with pedigree 0.6932, pedigree (2,3,5,5,1)
  (same comment as for Particulates, > 2.5 um, and < 10um)
- Methane, non-fossil [air, unspecified]: 2.34955e-6 kg; = 0.000006*wood_fuel/1.33333; lognormal variance with pedigree 0.0832, pedigree (2,3,5,5,1)
  (same comment as for Particulates, > 2.5 um, and < 10um)
- Lead [air, unspecified]: 1.30531e-8 kg; = 3.33333333333333E-08*wood_fuel/1.33333; lognormal variance with pedigree 0.6932, pedigree (2,3,5,5,1)
  (same comment as for Particulates, > 2.5 um, and < 10um)
- Benzene [air, unspecified]: 4.75131e-7 kg; = 1.21333333333333E-06*wood_fuel/1.33333; lognormal variance with pedigree 0.0832, pedigree (2,3,5,5,1)
  (same comment as for Particulates, > 2.5 um, and < 10um)
- Phosphorus [air, unspecified]: 1.56637e-7 kg; = 0.0000004*wood_fuel/1.33333; lognormal variance with pedigree 0.0832, pedigree (2,3,5,5,1)
  (same comment as for Particulates, > 2.5 um, and < 10um)
- Dioxins, measured as 2,3,7,8-tetrachlorodibenzo-p-dioxin [air, unspecified]: 1.61858e-14 kg; = 4.13333333333333E-14*wood_fuel/1.33333; lognormal variance with pedigree 0.3432, pedigree (2,3,5,5,1)
  (same comment as for Particulates, > 2.5 um, and < 10um)
- Chlorine [air, unspecified]: 9.3982e-8 kg; = 0.00000024*wood_fuel/1.33333; lognormal variance with pedigree 0.6932, pedigree (2,3,5,5,1)
  (same comment as for Particulates, > 2.5 um, and < 10um)
- Carbon dioxide, non-fossil [air, unspecified]: 0.0558671 kg; = 0.142666666666666*wood_fuel/1.33333; lognormal variance with pedigree 0.0438, pedigree (2,3,5,5,1)
  (same comment as for Particulates, > 2.5 um, and < 10um)
- Toluene [air, unspecified]: 1.56637e-7 kg; = 0.0000004*wood_fuel/1.33333; lognormal variance with pedigree 0.0832, pedigree (2,3,5,5,1)
  (same comment as for Particulates, > 2.5 um, and < 10um)
- Carbon monoxide, non-fossil [air, unspecified]: 0.000261061 kg; = 0.000666666666666667*wood_fuel/1.33333; lognormal variance with pedigree 0.6932, pedigree (2,3,5,5,1)
  (same comment as for Particulates, > 2.5 um, and < 10um)
- Benzo(a)pyrene [air, unspecified]: 2.61061e-10 kg; = 6.66666666666667E-10*wood_fuel/1.33333; lognormal variance with pedigree 0.3432, pedigree (2,3,5,5,1)
  (same comment as for Particulates, > 2.5 um, and < 10um)
- PAH, polycyclic aromatic hydrocarbons [air, unspecified]: 5.79556e-9 kg; name pah; = 0.0000000148*wood_fuel/1.33333; lognormal variance with pedigree 0.3432, pedigree (2,3,5,5,1)
  (same comment as for Particulates, > 2.5 um, and < 10um)
- Acetone [air, unspecified]: 5.83342e-6 kg; lognormal variance with pedigree 0.2106, pedigree (2,5,5,5,4)
  Estimation: emissions from PUR adhesives
  Uncertainty: e
- Hydrocarbons, aliphatic, unsaturated [air, unspecified]: 1.61858e-6 kg; = 4.13333333333333E-06*wood_fuel/1.33333; lognormal variance with pedigree 0.0832, pedigree (2,3,5,5,1)
  (same comment as for Particulates, > 2.5 um, and < 10um)
- Arsenic [air, unspecified]: 5.22122e-10 kg; = 1.33333333333333E-09*wood_fuel/1.33333; lognormal variance with pedigree 0.6932, pedigree (2,3,5,5,1)
  (same comment as for Particulates, > 2.5 um, and < 10um)
- Benzene, hexachloro- [air, unspecified]: 3.75928e-15 kg; = 9.60000000000001E-15*wood_fuel/1.33333; lognormal variance with pedigree 0.0832, pedigree (2,3,5,5,1)
  (same comment as for Particulates, > 2.5 um, and < 10um)
- Manganese [air, unspecified]: 8.87608e-8 kg; name manganese; = 2.26666666666667E-07*wood_fuel/1.33333; lognormal variance with pedigree 0.6932, pedigree (2,3,5,5,1)
  (same comment as for Particulates, > 2.5 um, and < 10um)
- Sodium [air, unspecified]: 6.78759e-7 kg; = 1.73333333333334E-06*wood_fuel/1.33333; lognormal variance with pedigree 0.6932, pedigree (2,3,5,5,1)
  (same comment as for Particulates, > 2.5 um, and < 10um)
- Copper [air, unspecified]: 1.14867e-8 kg; = 2.93333333333334E-08*wood_fuel/1.33333; lognormal variance with pedigree 0.6932, pedigree (2,3,5,5,1)
  (same comment as for Particulates, > 2.5 um, and < 10um)
- Potassium [air, unspecified]: 1.22177e-5 kg; = 0.0000312*wood_fuel/1.33333; lognormal variance with pedigree 0.0832, pedigree (2,3,5,5,1)
  (same comment as for Particulates, > 2.5 um, and < 10um)
- NMVOC, non-methane volatile organic compounds, unspecified origin [air, unspecified]: 3.65486e-6 kg; name nmvoc; = 9.33333333333334E-06*wood_fuel/1.33333; lognormal variance with pedigree 0.0832, pedigree (2,3,5,5,1)
  (same comment as for Particulates, > 2.5 um, and < 10um)
- Acetaldehyde [air, unspecified]: 3.18495e-8 kg; = 8.13333333333333E-08*wood_fuel/1.33333; lognormal variance with pedigree 0.0832, pedigree (2,3,5,5,1)
  (same comment as for Particulates, > 2.5 um, and < 10um)
- Particulates, < 2.5 um [air, unspecified]: 4.6991e-5 kg; = 0.00012*wood_fuel/1.33333; lognormal variance with pedigree 0.3432, pedigree (2,3,5,5,1)
  (same comment as for Particulates, > 2.5 um, and < 10um)
- Phenol, pentachloro- [air, unspecified]: 4.22919e-12 kg; = 0.0000000000108*wood_fuel/1.33333; lognormal variance with pedigree 0.0832, pedigree (2,3,5,5,1)
  (same comment as for Particulates, > 2.5 um, and < 10um)
- Zinc [air, unspecified]: 1.56637e-7 kg; = 0.0000004*wood_fuel/1.33333; lognormal variance with pedigree 0.6932, pedigree (2,3,5,5,1)
  (same comment as for Particulates, > 2.5 um, and < 10um)
- Bromine [air, unspecified]: 3.13273e-8 kg; = 0.00000008*wood_fuel/1.33333; lognormal variance with pedigree 0.6932, pedigree (2,3,5,5,1)
  (same comment as for Particulates, > 2.5 um, and < 10um)

## Sampling procedure
Literature; emissions profile per MJ wood input from PSI (2014)

## Extrapolations
See Geography and Technology
