# electricity production, wind, >3MW turbine, onshore

Dataset: EcoSpold 2, unit process
Geography: CZ
Time period: 2016-01-01 to 2021-12-31
Technology level: modern
Classification: ISIC rev.4 ecoinvent: 3510:Electric power generation, transmission and distribution
Tags: wind power; marginal; consequential system model only
Scenario: Business-as-Usual
System model: Allocation, cut-off by classification
Generated by: Christian Bauer
Published in: Burger, B. 2007
Database: ecoinvent
isCopyrightProtected: true
accessRestrictedTo: 1

## General comment
This technology is currently not used for power generation, but is supposed to contribute to cypacity expansion/replacement between today and 2030. This dataset represents the production of high voltage electricity at onshore grid-connected wind power plants with a capacity of more than 3MW (3MW excluded). It includes operation and maintenance expenditures as well as infrastructure inputs. Wind load hours represent current global average conditions.
At the moment, the class of onshore >3MW wind turbines is approximated with a 4.5 MW onshore wind turbine consisting of the infrastructure datasets for the 'wind turbine construction' and the 'network connection construction'. The wind turbine's parts are defined to be everything except for the network connection, i.e. rotor, nacelle, tower, and foundation.

## Included activities start
From operation of the wind power plant to high voltage electricity at the plant. According to (European Communities 2001), electricity produced with wind turbines in a wind power plant is connected to medium voltage or high voltage systems, depending on the size of the windfarm. Normally, each wind turbine contains a transformer from low voltage to medium voltage. The network connection additionally transforms the electricity to high voltage electricity. It is assumed here, that there are no stand-alone grid-connected small wind turbines and that all electricity is connected to the network in form of high voltage electricity.

Source:
European Communities. 2001. Wind Turbine Grid Connection and Interaction. Deutsches Windenergie-Institut /Tech-wise A/S /DM Energy, p. 7 Tab.2.1

## Included activities end
This activity ends with the production of 1kWh of high voltage electricity produced at the power plant and delivered to the grid.

This dataset includes
- the operation and maintenance of the wind power plant
- change of lubricating oil every year

This dataset doesn't include
- raw materials extraction, decommissioning and waste treatment as these activities are already included in infrastructure datasets
- transformation of the electricity produced in order to deliver in to the grid as this is already included in the infrastructure datasets.

## Technology
Technology of an Enercon E-112 4.5MW wind power plant modelled with a dataset for the wind turbine (moving+fixed parts) and a network connection each.
See dataset 'wind turbine construction, 4.5MW, onshore' for detailed technical information.

## Time period
Annual production volume is currently zero. This activity is supposed to contribute to capacity expansion/replacement between today and 2030.

## Parameters
- Percentage of onshore wind power plant class capacity on total: 0 dimensionless; name percentage_class_onshore; pedigree (1,1,1,1,1)
  currently zero; this technology is supposed to contribute to capacity expansion/replacement between today and 2030.
- Wind load hours: 1432 hour; name wind_load_hours; lognormal variance with pedigree 0.0506, pedigree (5,3,1,1,3)
  Calculated value, current global average
- Installed capacity: 0 MW; name capacity_installed; pedigree (1,1,1,1,1)
  (same comment as for Percentage of onshore wind power plant class capacity on total)
- losses from gross electricity production: 0.01 dimensionless; name losses_gross_net; lognormal variance with pedigree 0.0113, pedigree (3,3,1,3,3)
  Estimation. The factor for the loss of electricity from gross to net electricity production is an assumption based on experiences, statistics and expertise (1% losses for wind).
  nan
- gross electricity production in 2008: 0 kWh; name gross_electricity; pedigree (1,1,1,1,1)
  (same comment as for Percentage of onshore wind power plant class capacity on total)
- use of lubricating oil for maintenance: 354.375 kg; name lubricating_oil_maintenance; = 63*(4.5/0.8); lognormal variance with pedigree 0.0912, pedigree (4,4,5,4,4)
  Estimation of the use of maintenance lubricating oil per year, extrapolated from the 800 kW turbine in (Burger & Bauer 2007) (63 kg per year) with the rate of capacities.
  nan
- distance: 0 km; pedigree (1,1,1,1,1)

## Reference product
- electricity, high voltage: 1 kWh; By-product classification allocatable product; CPC 17100: Electrical energy
  production volume 0 kWh; name APV_electricity; = gross_electricity* (1-losses_gross_net)* percentage_class_onshore
    Current annual production volume is zero, but this technology is supposed to contribute to capacity expansion/replacement between today and 2030.
  property price 0.0977 EUR2005
    Temporary price data. Calculated as 90% of purchasers price based on: 94% of the average price (to account for a 6% loss in transformation and transmission) for electricity for industrial consumersin 2005 (excluded taxes). From IEA.

## Inputs from technosphere
- lubricating oil: 5.4993e-5 kg; name lubricating_oil; = lubricating_oil_maintenance*lifetime/(lifetime*(capacity_MW*1000)*wind_load_hours); lognormal variance with pedigree 0.25, pedigree (5,5,5,5,5)
  Calculated value/Estimation. Estimated consumption of 354.4 kg lubrication oil per year, extrapolated from the 800 kW turbine in (Burger & Bauer 2004) with the rate of capacities are assumed for maintainance.
  properties: carbon content, fossil 0.75, wet mass 1 kg, dry mass 1 kg, heating value, net 40.2 MJ
  note on carbon content, fossil: Lubricating oil is produced from diesel. C-content/dry mass of fats and oils considered 75%, from: ecoinvent v2.2 report, n 15a, pg 40
  note on heating value, net: Literature value, Source: IPCC 2006, 2006 IPCC Guidelines for National Greenhouse Gas Inventories, Prepared by the National Greenhouse Gas Inventories Programme, Eggleston H.S., Buendia L., Miwa K., Ngara T. and Tanabe K. (eds). Published: IGES, Japan
- waste mineral oil: -5.4993e-5 kg; name waste_min_oil_10; = (lubricating_oil)*-1; lognormal variance with pedigree 0.265, pedigree (5,5,5,5,5)
  Calculated value. The same amount as lubricating oil use.
  production volume 0 kg; = waste_min_oil_10* APV_electricity
    APV=0
  property price 0 EUR2005; name waste_min_oil_10_price_EUR2005
  properties: heating value, net 34.7 MJ, dry mass 0.9 kg, water content 0.111111, wet mass 1 kg, carbon content, fossil 0.864444
  note on heating value, net: Value taken from the general comment of the treatment dataset.
  note on carbon content, fossil: Tab A.6, ecoinvent v2.2 report 13_I. C content has been calculated after data in the tables, and then referred to 1 kg DM
- transport, freight, lorry 7.5-16 metric ton, EURO3: 0 metric ton*km; = ((lubricating_oil/1000)/2)*(distance*2*lifetime/(lifetime*(capacity_MW*1000)*wind_load_hours)); undefined min 9.39228e-13, max 9.39228e-13, standardDeviation95 0, pedigree (1,1,2,1,1)
  Calculated value. Two maintenance transports to the power plant with 200 km each. Once a year, the lubricating oil is transported and changed.
- wind turbine, 4.5MW, onshore: 7.75916e-9 unit; = 1/(lifetime*(capacity_MW*1000)*wind_load_hours); lognormal variance with pedigree 0.227, pedigree (5,5,5,5,5)
  Calculated value
  property lifetime 20 year; name lifetime
  property capacity [MW] 4.5 MW; name capacity_MW
  note on lifetime: Estimation/literature value. Today, wind turbine producers often use a lifetime of 20 years for all parts of the wind turbine in their financial calculataions, even if it can be assumed that the foundation could have a longer lifetime.
- wind turbine network connection, 4.5MW, onshore: 7.75916e-9 unit; = 1/(lifetime*(capacity_MW*1000)*wind_load_hours); lognormal variance with pedigree 0.227, pedigree (5,5,5,5,5)
  Calculated value
  properties: lifetime 20 year

## Inputs from nature
- Energy, kinetic (in wind), converted [natural resource, in air]: 3.87 MJ; undefined min 3.87, max 3.87, standardDeviation95 0, pedigree (1,1,2,1,1)

## Sampling procedure
Literature, calculations

## Extrapolations
This dataset has been extrapolated from year 2018 to the year of the calculation (2021). The uncertainty has been adjusted accordingly.
