# treatment of waste wood, untreated, unsanitary landfill, hyperarid infiltration class (-250mm)

Dataset: EcoSpold 2, unit process
Geography: GLO
Time period: 2006-01-01 to 2021-12-31
Technology level: current
Classification: ISIC rev.4 ecoinvent: 3821:Treatment and disposal of non-hazardous waste
Synonyms: municipal waste landfill
Scenario: Business-as-Usual
System model: Allocation, cut-off by classification
Share of production covered: 1 %
Generated by: Avraam Symeonidis
Database: ecoinvent
isCopyrightProtected: true
accessRestrictedTo: 1

## General comment
This dataset represents the activity of waste disposal of waste wood, untreated in a unsanitary landfill. Recommended use of this dataset: For untreated waste wood, which goes to disposal as part of managed communal waste mixture. // Waste composition (wet, in ppm): upper heating value 15.36 MJ/kg; lower heating value 13.99 MJ/kg; H2O 174080; O 372180; H 50163; C 401470; S 125.51; N 986.98; P 108.97; B 2.1107; Cl 330.95; Br n.a.; F 21.106; I n.a.; Ag n.a.; As 0.42213; Ba n.a.; Cd 0.20051; Co 0.086772; Cr 0.65782; Cu 4.1482; Hg 0.31976; Mn 53.118; Mo 0.8302; Ni 0.55581; Pb 27.868; Sb n.a.; Se n.a.; Sn n.a.; V n.a.; Zn 17.807; Be n.a.; Sc n.a.; Sr n.a.; Ti n.a.; Tl n.a.; W n.a.; Si n.a.; Fe 15.479; Ca 130.89; Al 6.3322; K 65.412; Mg 197.56; Na 14.071; . // Share of carbon in waste that is biogenic 100%. Share of metals in waste not oxidised and bulk-recyclable (exclude very small or thin parts) Iron: 0%; Alu: 0%; Copper: 0%. Overall degradability of waste during 100 years: 1.5%.

## Included activities start
from final waste deposition (without transports to the site)

## Included activities end
Waste-specific short-term emissions to air via landfill gas and landfill leachate. Waste-specific long-term emissions from landfill.

## Geography
Given name of landfill location is 'infiltration class 1 hyperarid (2018)'. Landfill site with mean annual temperature (MAT) of 8 degC, mean annual precipitation (MAP) of 350 mm/year, and net infiltration of -250 mm/year. Negative infiltration means that leachate flow is reversed and flows upward to the surface, where water is evaporated and dissolved solids become solid evaporites.
Climate adjustments result in an alpha t (temperature) for permafrost areas of 0.999. Total climate adjustments with alpha pt of 0.999.

## Technology
This is an inventory for an unsanitary, sub-controlled landfill for municipal solid waste. Ultimate average landfill height is 15 meters. Operation phase duration is 25 years.Percentage of landfill gas directly emitted is 100w%.
Leachate of the landfill is not treated. Leachate flow is upward to the surface due to net negative infiltration. No leachate treatment can be performed. Based on average waste composition and climate data the end of carbonate phase is estimated to be reached 6681 years after waste deposition. Arid conditions at this location prompt formation of evaporites from landfill contents which are partially eroded by wind. It is assumed that 10% of these evaporites are eroded by wind and airborne. Initial decay in the first 100 years of this waste results in a wind erosion rate corresponding to 7.98 g/m2.year and long-term decay corresponds to wind erosion of 20.46 g/m2.year.

## Reference product
- waste wood, untreated: -1 kg; CPC 3928: Sawdust and wood waste and scrap; By-product classification Waste; pedigree (1,1,1,1,1)
  main reference product of this activity (supply of disposal service).
  Uncertainty: Uncertainty is not adjusted, as this is the refence product
  production volume 1 kg
    The amount of the annual production volume is a placeholder value. The contribution of this technology to the different local markets can be found in the markets themselves.
  property price 0 EUR2005
    Waste products are assigned a price of zero as they are assumed to require further treatment.
  property heating value, net 13.99 MJ
    Value taken from the general comment of the treatment dataset.
  property carbon content 0.48608
    carbon content on a dry matter basis (reserved; not for manual entry)
  properties: carbon content, non-fossil 0.48608, wet mass 1 kg, water in wet mass 0.17408 kg, water content 0.21077, sodium content 1.7037e-5, dry mass 0.82592 kg, potassium content 7.9199e-5, magnesium content 0.0002392, aluminium content 7.6668e-6, arsenic content 5.111e-7, boron content 2.5556e-6, iron content 1.8741e-5, chromium content 7.9647e-7, copper content 5.0225e-6, calcium content 0.00015848, cobalt content 1.0506e-7, sulfur content 0.00015197, manganese content 6.4314e-5, mercury content 3.8716e-7, phosphorus content 0.00013193, cadmium content 2.4277e-7, zinc content 2.156e-5, oxygen content 0.45062, lead content 3.3741e-5, heating value, gross 15.365 MJ, nickel content 6.7295e-7, chlorine content 0.0004007, molybdenum content 1.0052e-6, fluorine content 2.5555e-5, hydrogen content 0.060736, nitrogen content 0.001195, carbon allocation 0.401463 kg

## Inputs from technosphere
- diesel, burned in building machine: 0.046738 MJ; lognormal variance with pedigree 0.088256, pedigree (1,1,4,1,1)
  for waste distribution and compaction.
  Uncertainty: Uncertainty calculated from uncertainty in base parameters.
  properties: heating value, net 1 MJ
- excavation, skid-steer loader: 0.00031708 m3; lognormal variance with pedigree 0.088256, pedigree (1,1,4,1,1)
  application of daily cover.
  Uncertainty: Uncertainty calculated from uncertainty in base parameters.

## Inputs from nature
- Occupation, dump site [natural resource, land]: 0.0023333 m2*year; lognormal variance with pedigree 0.088256, pedigree (1,1,4,1,1)
  for landfill operation phase and spontaneous renaturation.
  Uncertainty: Uncertainty calculated from uncertainty in base parameters.

## Emissions to nature
- Cobalt [air, non-urban air or from high stacks]: 4.1889e-11 kg; lognormal variance with pedigree 0.59982, pedigree (1,1,4,1,1)
  burden from direct release or incineration of landfill biogas; or windblown leachate evaporite in arid climates.
  Uncertainty: Uncertainty calculated from unertainty of the waste composition of this waste, uncertainty in waste decomposition and short-term leaching in landfill
- Calcium [soil, industrial]: 0.0001178 kg; lognormal variance with pedigree 0.23877, pedigree (1,1,4,1,1)
  burden from leachate evaporite in arid climates deposited on landflill surface.
  Uncertainty: Uncertainty calculated from unertainty of the waste composition of this waste, uncertainty in waste decomposition and short-term leaching in landfill
- Boron [air, non-urban air or from high stacks]: 2.1278e-8 kg; lognormal variance with pedigree 0.40595, pedigree (1,1,4,1,1)
  (same comment as for Cobalt)
- Zinc [soil, industrial]: 1.6026e-5 kg; lognormal variance with pedigree 0.30553, pedigree (1,1,4,1,1)
  (same comment as for Calcium)
- Hydrogen chloride [air, non-urban air or from high stacks]: 1.4286e-6 kg; lognormal variance with pedigree 0.22112, pedigree (1,1,4,1,1)
  (same comment as for Cobalt)
- Lead [soil, industrial]: 2.5081e-5 kg; lognormal variance with pedigree 0.29096, pedigree (1,1,4,1,1)
  (same comment as for Calcium)
- Nitrate [air, non-urban air or from high stacks]: 1.5302e-5 kg; lognormal variance with pedigree 0.22855, pedigree (1,1,4,1,1)
  burden from windblown leachate evaporite in arid climates.
  Uncertainty: Uncertainty calculated from unertainty of the waste composition of this waste, uncertainty in waste decomposition and short-term leaching in landfill
- Iron [soil, industrial]: 1.3931e-5 kg; lognormal variance with pedigree 0.31041, pedigree (1,1,4,1,1)
  (same comment as for Calcium)
- Sulfate [air, non-urban air or from high stacks]: 2.1008e-7 kg; lognormal variance with pedigree 0.34971, pedigree (1,1,4,1,1)
  (same comment as for Nitrate)
- Molybdenum [soil, industrial]: 3.8157e-7 kg; lognormal variance with pedigree 0.43323, pedigree (1,1,4,1,1)
  (same comment as for Calcium)
- Phosphorus [air, non-urban air or from high stacks]: 9.1283e-9 kg; lognormal variance with pedigree 0.41461, pedigree (1,1,4,1,1)
  (same comment as for Cobalt)
- Nickel [soil, industrial]: 5.0023e-7 kg; lognormal variance with pedigree 0.41882, pedigree (1,1,4,1,1)
  (same comment as for Calcium)
- Sulfur dioxide [air, non-urban air or from high stacks]: 2.454e-7 kg; lognormal variance with pedigree 0.40489, pedigree (1,1,4,1,1)
  burden from direct release or incineration of landfill biogas.
  Uncertainty: Uncertainty calculated from unertainty of the waste composition of this waste, uncertainty in waste decomposition and short-term leaching in landfill
- Copper [soil, industrial]: 3.7333e-6 kg; lognormal variance with pedigree 0.35391, pedigree (1,1,4,1,1)
  (same comment as for Calcium)
- Nitrogen oxides [air, non-urban air or from high stacks]: 2.028e-8 kg; lognormal variance with pedigree 0.31884, pedigree (1,1,4,1,1)
  (same comment as for Sulfur dioxide)
- Mercury [soil, industrial]: 2.8767e-7 kg; lognormal variance with pedigree 0.43647, pedigree (1,1,4,1,1)
  (same comment as for Calcium)
- Particulates, < 2.5 um [air, non-urban air or from high stacks]: 1.064e-5 kg; lognormal variance with pedigree 0.20395, pedigree (1,1,4,1,1)
  (same comment as for Cobalt)
- Manganese [soil, industrial]: 4.7806e-5 kg; lognormal variance with pedigree 0.2632, pedigree (1,1,4,1,1)
  (same comment as for Calcium)
- Particulates, > 10 um [air, non-urban air or from high stacks]: 2.6601e-5 kg; lognormal variance with pedigree 0.13879, pedigree (1,1,4,1,1)
  (same comment as for Cobalt)
- Cobalt [soil, industrial]: 7.8095e-8 kg; lognormal variance with pedigree 0.48589, pedigree (1,1,4,1,1)
  (same comment as for Calcium)
- Sodium [air, low population density, long-term]: 1.3199e-6 kg; lognormal variance with pedigree 0.31376, pedigree (1,1,4,1,1)
  burden from windblown long-term leachate evaporite in arid climates.
  Uncertainty: Uncertainty calculated from unertainty of the waste composition of this waste, uncertainty in waste decomposition and short-term leaching in landfill
- Particulates, > 2.5 um, and < 10um [air, non-urban air or from high stacks]: 1.5961e-5 kg; lognormal variance with pedigree 0.15854, pedigree (1,1,4,1,1)
  (same comment as for Cobalt)
- Cadmium [soil, industrial]: 1.8046e-7 kg; lognormal variance with pedigree 0.45051, pedigree (1,1,4,1,1)
  (same comment as for Calcium)
- Aluminium [air, low population density, long-term]: 6.3274e-7 kg; lognormal variance with pedigree 0.34005, pedigree (1,1,4,1,1)
  (same comment as for Sodium)
- Methane, non-fossil [air, non-urban air or from high stacks]: 0.0043563 kg; lognormal variance with pedigree 0.104997, pedigree (1,1,4,1,1)
  (same comment as for Sulfur dioxide)
- Chromium [soil, industrial]: 3.9006e-9 kg; lognormal variance with pedigree 2.0061, pedigree (1,1,4,1,1)
  (same comment as for Calcium)
- Potassium [air, low population density, long-term]: 6.4695e-6 kg; lognormal variance with pedigree 0.26264, pedigree (1,1,4,1,1)
  (same comment as for Sodium)
- Carbon dioxide, non-fossil [air, non-urban air or from high stacks]: 0.0094315 kg; lognormal variance with pedigree 0.008, pedigree (1,1,4,1,1)
  (same comment as for Sulfur dioxide)
- Arsenic [soil, industrial]: 3.799e-7 kg; lognormal variance with pedigree 0.42674, pedigree (1,1,4,1,1)
  (same comment as for Calcium)
- Magnesium [air, low population density, long-term]: 1.9573e-5 kg; lognormal variance with pedigree 0.22587, pedigree (1,1,4,1,1)
  (same comment as for Sodium)
- Fluoride [soil, industrial]: 1.8888e-5 kg; lognormal variance with pedigree 0.29972, pedigree (1,1,4,1,1)
  (same comment as for Calcium)
- Iron [air, low population density, long-term]: 1.5475e-6 kg; lognormal variance with pedigree 0.31052, pedigree (1,1,4,1,1)
  (same comment as for Sodium)
- Chloride [soil, industrial]: 0.0002977 kg; lognormal variance with pedigree 0.19759, pedigree (1,1,4,1,1)
  (same comment as for Calcium)
- Calcium [air, low population density, long-term]: 1.3063e-5 kg; lognormal variance with pedigree 0.23955, pedigree (1,1,4,1,1)
  (same comment as for Sodium)
- Phosphorus [soil, industrial]: 6.671e-6 kg; lognormal variance with pedigree 0.69804, pedigree (1,1,4,1,1)
  (same comment as for Calcium)
- Zinc [air, low population density, long-term]: 1.7794e-6 kg; lognormal variance with pedigree 0.30588, pedigree (1,1,4,1,1)
  (same comment as for Sodium)
- Boron [soil, industrial]: 1.8997e-6 kg; lognormal variance with pedigree 0.33708, pedigree (1,1,4,1,1)
  (same comment as for Calcium)
- Lead [air, low population density, long-term]: 2.7865e-6 kg; lognormal variance with pedigree 0.29101, pedigree (1,1,4,1,1)
  (same comment as for Sodium)
- Nitrogen [soil, industrial]: 0.00088615 kg; lognormal variance with pedigree 0.16373, pedigree (1,1,4,1,1)
  (same comment as for Calcium)
- Nickel [air, low population density, long-term]: 5.5532e-8 kg; lognormal variance with pedigree 0.41932, pedigree (1,1,4,1,1)
  (same comment as for Sodium)
- Sulfur [soil, industrial]: 0.00011285 kg; lognormal variance with pedigree 0.23886, pedigree (1,1,4,1,1)
  (same comment as for Calcium)
- Manganese [air, low population density, long-term]: 5.2207e-6 kg; lognormal variance with pedigree 0.26957, pedigree (1,1,4,1,1)
  (same comment as for Sodium)
- Carbon [soil, industrial]: 0.35606 kg; lognormal variance with pedigree 0.0138398, pedigree (1,1,4,1,1)
  (same comment as for Calcium)
- Mercury [air, low population density, long-term]: 3.193e-8 kg; lognormal variance with pedigree 0.43705, pedigree (1,1,4,1,1)
  (same comment as for Sodium)
- Sodium [air, non-urban air or from high stacks]: 8.7459e-8 kg; lognormal variance with pedigree 0.35329, pedigree (1,1,4,1,1)
  (same comment as for Cobalt)
- Copper [air, low population density, long-term]: 4.1478e-7 kg; lognormal variance with pedigree 0.35396, pedigree (1,1,4,1,1)
  (same comment as for Sodium)
- Heat, waste [water, ground-, long-term]: 15.134 MJ; lognormal variance with pedigree 0.020755, pedigree (1,1,4,1,1)
  burden from long-term decomposition of waste (>100a).
  Uncertainty: Uncertainty calculated from unertainty of the waste composition of this waste, uncertainty in waste decomposition and short-term leaching in landfill
- Molybdenum [air, low population density, long-term]: 4.2265e-8 kg; lognormal variance with pedigree 0.43483, pedigree (1,1,4,1,1)
  (same comment as for Sodium)
- Heat, waste [soil, industrial]: 0.13269 MJ; lognormal variance with pedigree 0.08594, pedigree (1,1,4,1,1)
  burden from short-term decomposition of waste (0-100a).
  Uncertainty: Uncertainty calculated from unertainty of the waste composition of this waste, uncertainty in waste decomposition and short-term leaching in landfill
- Cobalt [air, low population density, long-term]: 8.6354e-9 kg; lognormal variance with pedigree 0.48845, pedigree (1,1,4,1,1)
  (same comment as for Sodium)
- Magnesium [air, non-urban air or from high stacks]: 1.831e-7 kg; lognormal variance with pedigree 0.31782, pedigree (1,1,4,1,1)
  (same comment as for Cobalt)
- Chromium [air, low population density, long-term]: 4.2217e-10 kg; lognormal variance with pedigree 2.007, pedigree (1,1,4,1,1)
  (same comment as for Sodium)
- Potassium [air, non-urban air or from high stacks]: 7.1828e-8 kg; lognormal variance with pedigree 0.34948, pedigree (1,1,4,1,1)
  (same comment as for Cobalt)
- Arsenic [air, low population density, long-term]: 4.2098e-8 kg; lognormal variance with pedigree 0.42816, pedigree (1,1,4,1,1)
  (same comment as for Sodium)
- Iron [air, non-urban air or from high stacks]: 3.1931e-10 kg; lognormal variance with pedigree 0.52369, pedigree (1,1,4,1,1)
  (same comment as for Cobalt)
- Hydrogen fluoride [air, low population density, long-term]: 2.0964e-6 kg; lognormal variance with pedigree 0.30024, pedigree (1,1,4,1,1)
  (same comment as for Sodium)
- Calcium [air, non-urban air or from high stacks]: 2.5597e-8 kg; lognormal variance with pedigree 0.37961, pedigree (1,1,4,1,1)
  (same comment as for Cobalt)
- Cadmium [air, low population density, long-term]: 1.9998e-8 kg; lognormal variance with pedigree 0.45194, pedigree (1,1,4,1,1)
  (same comment as for Sodium)
- Aluminium [air, non-urban air or from high stacks]: 4.754e-10 kg; lognormal variance with pedigree 0.51081, pedigree (1,1,4,1,1)
  (same comment as for Cobalt)
- Hydrogen chloride [air, low population density, long-term]: 3.1829e-5 kg; lognormal variance with pedigree 0.2088, pedigree (1,1,4,1,1)
  (same comment as for Sodium)
- Zinc [air, non-urban air or from high stacks]: 1.2666e-9 kg; lognormal variance with pedigree 0.47862, pedigree (1,1,4,1,1)
  (same comment as for Cobalt)
- Boron [air, low population density, long-term]: 1.8979e-7 kg; lognormal variance with pedigree 0.37625, pedigree (1,1,4,1,1)
  (same comment as for Sodium)
- Nickel [air, non-urban air or from high stacks]: 4.8531e-11 kg; lognormal variance with pedigree 0.58509, pedigree (1,1,4,1,1)
  (same comment as for Cobalt)
- Nitrate [air, low population density, long-term]: 0.00042074 kg; lognormal variance with pedigree 0.17286, pedigree (1,1,4,1,1)
  (same comment as for Sodium)
- Lead [air, non-urban air or from high stacks]: 2.4682e-10 kg; lognormal variance with pedigree 0.5316, pedigree (1,1,4,1,1)
  (same comment as for Cobalt)
- Phosphorus [air, low population density, long-term]: 7.3209e-7 kg; lognormal variance with pedigree 0.70132, pedigree (1,1,4,1,1)
  (same comment as for Sodium)
- Molybdenum [air, non-urban air or from high stacks]: 1.3149e-10 kg; lognormal variance with pedigree 0.55294, pedigree (1,1,4,1,1)
  (same comment as for Cobalt)
- Particulates, < 2.5 um [air, low population density, long-term]: 0.016339 kg; lognormal variance with pedigree 0.13067, pedigree (1,1,4,1,1)
  (same comment as for Sodium)
- Mercury [air, non-urban air or from high stacks]: 1.6408e-10 kg; lognormal variance with pedigree 0.54478, pedigree (1,1,4,1,1)
  (same comment as for Cobalt)
- Particulates, > 2.5 um, and < 10um [air, low population density, long-term]: 0.024508 kg; lognormal variance with pedigree 0.08526, pedigree (1,1,4,1,1)
  (same comment as for Sodium)
- Manganese [air, non-urban air or from high stacks]: 9.137e-8 kg; lognormal variance with pedigree 0.34339, pedigree (1,1,4,1,1)
  (same comment as for Cobalt)
- Sulfate [air, low population density, long-term]: 3.7407e-5 kg; lognormal variance with pedigree 0.24095, pedigree (1,1,4,1,1)
  (same comment as for Sodium)
- Copper [air, non-urban air or from high stacks]: 3.0519e-11 kg; lognormal variance with pedigree 0.60093, pedigree (1,1,4,1,1)
  (same comment as for Cobalt)
- Magnesium [soil, industrial]: 0.0001778 kg; lognormal variance with pedigree 0.22266, pedigree (1,1,4,1,1)
  (same comment as for Calcium)
- Chromium [air, non-urban air or from high stacks]: 1.1262e-11 kg; lognormal variance with pedigree 0.63313, pedigree (1,1,4,1,1)
  (same comment as for Cobalt)
- Sodium [soil, industrial]: 1.2664e-5 kg; lognormal variance with pedigree 0.2909, pedigree (1,1,4,1,1)
  (same comment as for Calcium)
- Hydrogen fluoride [air, non-urban air or from high stacks]: 1.2837e-7 kg; lognormal variance with pedigree 0.40054, pedigree (1,1,4,1,1)
  (same comment as for Cobalt)
- Particulates, > 10 um [air, low population density, long-term]: 0.040846 kg; lognormal variance with pedigree 0.065507, pedigree (1,1,4,1,1)
  (same comment as for Sodium)
- Cadmium [air, non-urban air or from high stacks]: 5.6382e-11 kg; lognormal variance with pedigree 0.54841, pedigree (1,1,4,1,1)
  (same comment as for Cobalt)
- Aluminium [soil, industrial]: 5.6989e-6 kg; lognormal variance with pedigree 0.33966, pedigree (1,1,4,1,1)
  (same comment as for Calcium)
- Arsenic [air, non-urban air or from high stacks]: 1.2951e-10 kg; lognormal variance with pedigree 0.49865, pedigree (1,1,4,1,1)
  (same comment as for Cobalt)
- Potassium [soil, industrial]: 5.8871e-5 kg; lognormal variance with pedigree 0.25851, pedigree (1,1,4,1,1)
  (same comment as for Calcium)

## Extrapolations
This dataset has been extrapolated from year 2012 to the year of the calculation (2021). The uncertainty has been adjusted accordingly.
