# electricity, high voltage, production mix

Dataset: EcoSpold 2, unit process, production mix
Geography: DE
Time period: 2014-01-01 to 2021-12-31
Scenario: Business-as-Usual
System model: Allocation, cut-off by classification
Generated by: [System]
Database: ecoinvent
isCopyrightProtected: false
accessRestrictedTo: 1

## General comment
The shares of electricity technologies on this market are valid for the year 2018. They have been calculated by the data provider and don't correspond with the production volumes entered in the undefined datasets of the different electricity supplying technologies. The shares have been calculated based on statistics from 2018: IEA World Energy Statistics and Balances. OECD iLibrary, eISSN: 1683-4240, DOI: 10.1787/enestats-data-en and ENTSO-E: Physical Energy & Power Flows, https://www.entsoe.eu/data/power-stats/physical-flows/. Grid losses are based on data from 2018 (also IEA World Energy Statistics and Balances).

## Technology
Average technology used to transmit and distribute electricity. Includes underground and overhead lines. Electricity production according to related technology datasets.
Definition of the voltage levels:
- High voltage level above 24 kV (large scale industry)
- Medium voltage level between 1 kV and 24 kV (medium to small scale industry, service sector
and public buildings)
- Low voltage level below 1 kV (Households)

## Reference product
- electricity, high voltage: 1 kWh; By-product classification allocatable product; CPC 17100: Electrical energy
  production volume 4.17119e11 kWh
  properties: price 0.0977 EUR2005

## Inputs from technosphere
- electricity, high voltage: 0 kWh; pedigree (1,1,1,1,1)
  Calculated value/estimation. This value compensates for the losses during transmission on the high voltage level and transformation within the high voltage level. The calculation is made based on total electricity losses between net electricity available at the busbar and the use of electricity calculated based on the IEA electricity information 2014, table 1.1, Electrity supply vs. transmission losses. These total losses over the whole chain are then allocated to the different voltage levels as well as transformation and transmission losses based on information in Itten et al. 2014. For details please see the documentation available on ecoQuery.
  IEA. 2014. Electricity Information 2014. ISBN 978-92-64-21692-1. International Energy Agency (IEA), Paris Cedex (FR).
  Itten R., Frischknecht R., Stucki M. 2014. Life Cycle Inventories of Electricity Mixes and Grid. Version 1.3. treeze, Uster, Switzerland
- electricity, high voltage: 0, 0, 0, 0, 0, 0, 0, 0, 0, 0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 kWh (20 entries)
- electricity, high voltage: 0 kWh
  properties: Corresponding fuel use 10 MJ, price 0.0977 EUR2005
- electricity, high voltage: 0 kWh
  properties: price 0.0977 EUR2005, Corresponding fuel use 10.9 MJ
- electricity, high voltage: 0 kWh
  properties: Corresponding fuel use 1 MJ, price 0.0977 EUR2005
- electricity, high voltage: 0 kWh
  properties: Corresponding fuel use 8.23 MJ, price 0.0977 EUR2005
- electricity, high voltage: 0 kWh
  properties: price 0.0977 EUR2005, Corresponding fuel use 12.5 MJ
- electricity, high voltage: 0, 0, 0 kWh (3 entries)
  properties: exergy 3.6 MJ, price 0.0977 EUR2005
  note on exergy: allocation factor for electricity (=1) vs. heat, where heat is calculated as the termodynamic mean temperature Tm = (Tfeed-Treturn)/ln(Tfeed/Treturn), relative to the application temperature (Tu, typically = 293 K), i.e. (Tm-Tu)/Tm
- electricity, high voltage: 0, 0, 0 kWh (3 entries)
  properties: price 0.0977 EUR2005, exergy 3.6 MJ
  note on exergy: This exergy property is based on the exergy content of the product.
- electricity, high voltage: 0, 0 kWh (2 entries)
- electricity, high voltage: 0 kWh
- electricity, high voltage: 0.000323426 kWh
  production volume 1.32032e8 kWh
- electricity, high voltage: 0.126551 kWh
  production volume 5.16618e10 kWh
- electricity, high voltage: 0.0121945 kWh
  production volume 4.97813e9 kWh
- electricity, high voltage: 0.00565734 kWh
  production volume 2.30948e9 kWh
- electricity, high voltage: 0.0297006 kWh
  production volume 1.21246e10 kWh
- electricity, high voltage: 0.25676 kWh
  production volume 1.04816e11 kWh
- electricity, high voltage: 0.020555 kWh
  production volume 8.39111e9 kWh
- electricity, high voltage: 0.0126957 kWh
  production volume 5.18274e9 kWh
- electricity, high voltage: 0.0304035 kWh
  production volume 1.24116e10 kWh
- electricity, high voltage: 0.11225 kWh
  production volume 4.58238e10 kWh
- electricity, high voltage: 0.00143899 kWh
  production volume 5.87436e8 kWh
- electricity, high voltage: 0.00621607 kWh
  production volume 2.53757e9 kWh
- electricity, high voltage: 0.16344 kWh
  production volume 6.67207e10 kWh
- electricity, high voltage: 0.0297905 kWh
  production volume 1.21613e10 kWh
- electricity, high voltage: 0.017898 kWh
  production volume 7.30646e9 kWh
- electricity, high voltage: 0.0624533 kWh
  production volume 2.54952e10 kWh
- electricity, high voltage: 0.0206076 kWh
  production volume 8.41259e9 kWh
- electricity, high voltage: 0.00686487 kWh
  production volume 2.80243e9 kWh
- electricity, high voltage: 0.00115758 kWh
  production volume 4.72557e8 kWh
- electricity, high voltage: 0.0697831 kWh
  production volume 2.84874e10 kWh
- electricity, high voltage: 0.000459883 kWh
  production volume 1.87737e8 kWh
- electricity, high voltage: 0.0124576 kWh
  production volume 5.08556e9 kWh
- electricity, high voltage: 9.82815e-5 kWh
  production volume 4.01213e7 kWh
- electricity, high voltage: 0.000242922 kWh
  production volume 9.91676e7 kWh

## Extrapolations
This dataset has been extrapolated from year 2017 to the year of the calculation (2021). The uncertainty has been adjusted accordingly.
