# evacuated tube collector production

Dataset: EcoSpold 2, unit process
Geography: GB
Time period: 2001-01-01 to 2021-12-31
Technology level: current
Classification: ISIC rev.4 ecoinvent: 2815:Manufacture of ovens, furnaces and furnace burners
Classification: EcoSpold01Categories: solar collector systems/production of components
Synonyms: VTC
Tags: ConvertedDataset
Scenario: Business-as-Usual
System model: Allocation, cut-off by classification
Generated by: Niels Jungbluth
Published in: Jungbluth, N. 2007
Database: ecoinvent
isCopyrightProtected: true
accessRestrictedTo: 1

## General comment
The collector has selective TINOX-coating on copper made in DE.
[This dataset was already contained in the ecoinvent database version 2. It was not individually updated during the transfer to ecoinvent version 3. Life Cycle Impact Assessment results may still have changed, as they are affected by changes in the supply chain, i.e. in other datasets. This dataset was generated following the ecoinvent quality guidelines for version 2. It may have been subject to central changes described in the ecoinvent version 3 change report (http://www.ecoinvent.org/database/ecoinvent-version-3/reports-of-changes/), and the results of the central updates were reviewed extensively. The changes added e.g. consistent water flows and other information throughout the database. The documentation of this dataset can be found in the ecoinvent reports of version 2, which are still available via the ecoinvent website. The change report linked above covers all central changes that were made during the conversion process.]

## Included activities end
Production of an evacuated tube collector in Northern-Ireland. Including materials and energy use of production. Disposal in CH.

## Geography
Production in GB. Main components are imported from DE.

## Technology
Assembly of an evacuated tube collector. The collector has selective TINOX-coating on copper made in DE.

## Time period
Material data have been investigated for a collector produced in 2002. Data for energy uses during production have been investigated for 2001.

## Parameters
- fraction, water, completely softened, to air: 0.15 dimensionless; name fraction_WCS_to_air; = fraction_PW_to_air; lognormal variance with pedigree 0.092025, pedigree (4,4,3,2,4)
  Calculated value. See comment in the other parametres present in this dataset. Water, completely softened is considered to be always used as process water, thus process water fractions to air are applied to all water, completely softened input flows to calculate the amount of water consumed in the processes.
- fraction, tap water, to air: 0.15 dimensionless; name fraction_TW_to_air; = fraction_PW_to_air; lognormal variance with pedigree 0.092025, pedigree (4,4,3,2,4)
  Calculated value. See comment in the other parametres present in this dataset. Tap water is considered to be always used as process water, thus process water fractions to air are applied to all tap water input flows to calculate the amount of water consumed in the processes.
- fraction, process water, to air: 0.15 dimensionless; name fraction_PW_to_air; lognormal variance with pedigree 0.092025, pedigree (4,4,3,2,4)
  Literature value. In case when no industry/process specific data are available, default evaporation fraction value is used. This value is 15% and is based on literature (Statistics Canada, 2007 & Shaffer, K.H., 2008, Consumptive water use in the Great Lakes Basin, USGS & Shiklomanov, 2003, World Water Resources at the Beginning of the 21st Century) and has been approved by an expert.

## Reference product
- evacuated tube collector: 1 m2; By-product classification allocatable product; CPC 43430: Parts for the goods of subclasses 43410 and 43420; parts of non-electric bakery ovens
  EcoSpold01Location=GB
  production volume 0.200896 m2
    This is a placeholder value that does not reflect real-world production volumes. This dataset does not currently require a real-world production volume to work in the database framework, and no actual data were collected yet. This has no negative effect on the results of the ecoinvent database. The placeholder value of this activity was scaled according to the nominal GDP of 2005 (source: United Nations, http://data.un.org/Glossary.aspx?q=GDP+%28current+US%24%29, accessed 20130726) to reflect an appropriate share of the global production volume, which is also a placeholder value.
  property price 170 EUR2005
    The production volume of this product is small compared to other products supplied by the activities within the same ISIC 3 category. Therefore, an average price of products supplied by the activities in the same ISIC 3 code has been applied.This price is obtained as '-66 Machinery and equipment, EU27' (5.71 EURO2003/kg dry soilds) in the 'EU & DK Input Output Database' (available in SimaPro); Weight of product according to Ecoinvent: approx 30 kg per m2

## By-products
- waste paperboard, unsorted: 0 kg; By-product classification Recyclable; CPC 39240: Waste and scrap of paper or paperboard; pedigree (1,1,1,1,1)
  Estimation
  EcoSpold01Location=CH
  Uncertainty: Estimation
  production volume 0 kg
    Calculated from the production volume of evacuated tube collector in proportion to the respective output amounts.
  property price 0.03924 EUR2005
    Temporary price data. Calculated as 90% of purchasers price based on: Assumed to be 10% less than for sorted waste paperboard
  property carbon content, non-fossil 0.483259
    C content was calculated for 1 kg DM, using data in Tab A.3, ecoinvent v2.2 report 13_I.
  property carbon content 0.483259
    carbon content on a dry matter basis (reserved; not for manual entry)
  properties: wet mass 1 kg, heating value, net 15.92 MJ, carbon content, fossil 0, water content 0.243781, water in wet mass 0.196 kg, dry mass 0.804 kg, carbon allocation 0.38854 kg

## Inputs from technosphere
- waste glass: -0.68 kg; lognormal variance with pedigree 0.1308, pedigree (2,2,5,3,4)
  Questionnaire, data for other type of collector
  EcoSpold01Location=CH
  Uncertainty: Questionnaire, data for other type of collector
  production volume 0.68 kg
    (same comment as for waste paperboard, unsorted)
  properties: wet mass 1 kg, dry mass 1 kg, heating value, net 0.05 MJ
  note on heating value, net: Value extracted from "treatment of waste glass, open dump, very wet infiltration class (1000mm)"
- waste mineral wool: -2.03 kg; lognormal variance with pedigree 0.06, pedigree (3,5,5,1,1)
  EcoSpold01Location=CH
  Estimation
  Uncertainty: Estimation
  production volume 2.03 kg
    (same comment as for waste paperboard, unsorted)
  properties: dry mass 1 kg, wet mass 1 kg
- heat, district or industrial, natural gas: 14.85 MJ; lognormal variance with pedigree 0.1308, pedigree (2,2,5,3,4)
  EcoSpold01Location=RER
  Questionnaire, data for other type of collector
  Uncertainty: Questionnaire, data for other type of collector
  properties: heating value, net 1 MJ
- sheet rolling, copper: 2.8 kg; lognormal variance with pedigree 0.0586, pedigree (2,5,5,1,1)
  Questionnaire
  EcoSpold01Location=RER
  Uncertainty: Questionnaire
- electricity, medium voltage: 17 kWh; lognormal variance with pedigree 0.1308, pedigree (2,2,5,3,4)
  Questionnaire, data for other type of collector plus data for flat plate collector production
  EcoSpold01Location=GB
  Uncertainty: Questionnaire, data for other type of collector plus data for flat plate collector production
- stone wool, packed: 2.03 kg; lognormal variance with pedigree 0.0586, pedigree (2,5,5,1,1)
  EcoSpold01Location=CH
  Questionnaire
  Uncertainty: Questionnaire
  properties: carbon content, fossil 0.015401, dry mass 1 kg, wet mass 1 kg
  note on carbon content, fossil: The chemical composition of the glass fibres used in the rock wool production is similar to the composition of naturally cooled volcano basalt and has a composition listed in Tab. 3.1 and 3.2 in ecoinvent v2.2 report 16, part XIV. Rock wool contains: a minimum of 96% mineral fibres,between 0.5 and 3.0 weight percent of phenolic resin depending on the specific product characteristics, and about 0.2 percent mineral oil (ecoinvent v2.2 report 16, part XIV). An average composition of 1.8% phenolic resin, 0.2% mineral oil, and 98% mineral fibres has been assumed and used to calculate C content of the rock wool
- selective coat, copper sheet, physical vapour deposition: 1 m2; lognormal variance with pedigree 0.0586, pedigree (2,5,5,1,1)
  EcoSpold01Location=DE
  Questionnaire
  Uncertainty: Questionnaire
- wastewater, from residence: -0.0442 m3; lognormal variance with pedigree 0.1308, pedigree (2,2,5,3,4)
  EcoSpold01Location=CH
  Questionnaire, data for other type of collector
  Uncertainty: Questionnaire, data for other type of collector
  production volume 0.0442 m3
    (same comment as for waste paperboard, unsorted)
  properties: water content 2962.17, wet mass 1000 kg, dry mass 0.337476 kg, carbon content, non-fossil 0.199421
  note on carbon content, non-fossil: 0.0673 kg TOC/m3 (Tab A.17, ecoinvent v2.2 report 13_I). TOC was considered as Total Carbon.
- synthetic rubber: 0.667 kg; lognormal variance with pedigree 0.0586, pedigree (2,5,5,1,1)
  EcoSpold01Location=RER
  Questionnaire
  Uncertainty: Questionnaire
  properties: heating value, net 26.42 MJ, carbon content, fossil 0.871949, dry mass 1 kg, wet mass 1 kg
  note on carbon content, fossil: EPDM (Ethylene-propene-diene terpolymer) rubber is a terpolymer of ethylene, propene, and a diene with the residual unsaturated portion of the diene in the side chain (ecoinvent v2.2 report 7-part XX & Ullmann). Chemical formula (deduced from Evidences of Solvent-Induced Miscibility in Polychloroprene-co-Ethylene-Propene Diene Terpolymer Blends, Dubey et al., Journal of Applied Polymer Science, 2009, 111:1884–1891): C20H35
- corrugated board box: 3.33 kg; lognormal variance with pedigree 0.054, pedigree (3,4,5,1,1)
  Company information, packaging
  EcoSpold01Location=RER
  Uncertainty: Company information, packaging
  properties: water content 0.0582011, carbon content, fossil 0.000656085, dry mass 0.945 kg, wet mass 1 kg, carbon content, non-fossil 0.432275, heating value, net 12.86 MJ
  note on carbon content, fossil: Fossil C content was calculated after fossil C contents of chemicals used in the production of board (Tab 10-15 & 10.16 ecoinvent v2.2 report 11_III, part 10)
  note on carbon content, non-fossil: Biogenic C content was calculated after biogenic C contents of chemicals used in the production of board (Tab 10.15 & 10.16, ecoinvent v2.2 report 11_III, part 10).
- municipal solid waste: -0.0284 kg; lognormal variance with pedigree 0.1308, pedigree (2,2,5,3,4)
  (same comment as for wastewater, from residence)
  production volume 0.0284 kg
    (same comment as for waste paperboard, unsorted)
  properties: dry mass 0.771 kg, wet mass 1 kg, water content 0.297017, heating value, net 11.74 MJ, carbon content, fossil 0.171549, carbon content, non-fossil 0.261655
  note on heating value, net: Value taken from the general comment of the treatment dataset.
  note on carbon content, fossil: MSW composition in tab 4.1, ecoinvent v2.2 report 13_I. C content referred to 1 kg DM
- tap water: 53.6 kg; name tap_water_input; lognormal variance with pedigree 0.1308, pedigree (2,2,5,3,4)
  Questionnaire, data for other type of collector plus data for flat plate collector production
  EcoSpold01Location=RER
  Uncertainty: Questionnaire, data for other type of collector plus data for flat plate collector production
  properties: carbon content, fossil 0.00178991, water content 2962.17, wet mass 1 kg, dry mass 0.000337476 kg
  note on carbon content, fossil: Bicarbonate content is 2.93 mol/m3. CO2 content is 0.1 mol/m3 (ecoinvent v2.2 report 8, Tab 93.1).
- anti-reflex-coating, etching, solar glass: 1 m2; lognormal variance with pedigree 0.0586, pedigree (2,5,5,1,1)
  EcoSpold01Location=DK
  Questionnaire
  Uncertainty: Questionnaire
- glass tube, borosilicate: 14.2 kg; lognormal variance with pedigree 0.0586, pedigree (2,5,5,1,1)
  Questionnaire plus 5% losses
  EcoSpold01Location=DE
  Uncertainty: Questionnaire plus 5% losses
  properties: dry mass 1 kg, wet mass 1 kg
- silicone product: 0.0533 kg; lognormal variance with pedigree 0.0586, pedigree (2,5,5,1,1)
  EcoSpold01Location=RER
  Questionnaire
  Uncertainty: Questionnaire
  properties: heating value, net 9.83 MJ, dry mass 1 kg, carbon content, fossil 0.324324, wet mass 1 kg
  note on carbon content, fossil: The term silicones is used for compounds in which silicon atoms are linked via oxygen atoms, each silicon atom bearing one or several organic groups. In industrially important silicones, these groups are usually methyl or phenyl (ecoinvent v2.2 report 8_part71 & Ullmann). The chemical formula was considered to be [Si(CH3)2O]n (Ullmann).
- waste glass sheet: -14.2 kg; lognormal variance with pedigree 0.06, pedigree (3,5,5,1,1)
  Estimation
  EcoSpold01Location=CH
  Uncertainty: Estimation
  production volume 14.2 kg
    (same comment as for waste paperboard, unsorted)
  properties: dry mass 1 kg, wet mass 1 kg
- hazardous waste, for incineration: -0.227 kg; lognormal variance with pedigree 0.1308, pedigree (2,2,5,3,4)
  (same comment as for wastewater, from residence)
  production volume 0.227 kg
    (same comment as for waste paperboard, unsorted)
  properties: heating value, net 17 MJ, carbon content, fossil 0.554667, water content 0.333333, wet mass 1 kg, dry mass 0.75 kg
  note on carbon content, fossil: Tab A.6, ecoinvent v2.2 report 13_I. C content has been calculated after data in the tables, and then referred to 1 kg DM
- water, completely softened: 0.9 kg; name water_softened_input; lognormal variance with pedigree 0.0586, pedigree (2,5,5,1,1)
  EcoSpold01Location=RER
  Questionnaire, heat transfer fluid
  Uncertainty: Questionnaire, heat transfer fluid
  properties: wet mass 1 kg
- heat carrier liquid, 40% C3H8O2: -0.00155 m3; lognormal variance with pedigree 0.06, pedigree (3,5,5,1,1)
  Estimation
  EcoSpold01Location=CH
  Uncertainty: Estimation
  production volume 0.00155 m3
    (same comment as for waste paperboard, unsorted)
  properties: dry mass 6.31366 kg, wet mass 1000 kg, water content 157.387, carbon content, fossil 3, price 1.08656 EUR2005
  note on carbon content, fossil: The composition of the product was used to estimate its carbon content: 40% (w/v) C3H8O2.
- waste plastic, mixture: -0.72 kg; lognormal variance with pedigree 0.06, pedigree (3,5,5,1,1)
  Estimation
  EcoSpold01Location=CH
  Uncertainty: Estimation
  production volume 0.72 kg
    (same comment as for waste paperboard, unsorted)
  properties: water content 0.180638, dry mass 0.847 kg, carbon content, fossil 0.747344, wet mass 1 kg, heating value, net 30.79 MJ
  note on carbon content, fossil: C content in 1 kg DM was calculated using data in Tab A.2, ecoinvent v2.2 report 13_I
- solar collector factory: 2e-7 unit; lognormal variance with pedigree 0.3666, pedigree (2,5,5,1,3)
  Estimation for flat plate collector
  EcoSpold01Location=RER
  Uncertainty: Estimation for flat plate collector
- hydrochloric acid, without water, in 30% solution state: 0.113 kg; lognormal variance with pedigree 0.1308, pedigree (2,2,5,3,4)
  (same comment as for heat, district or industrial, natural gas)
  properties: heating value, net 3.32 MJ, dry mass 1 kg, wet mass 1 kg
- copper, cathode: 2.8 kg; lognormal variance with pedigree 0.0586, pedigree (2,5,5,1,1)
  EcoSpold01Location=RER
  Questionnaire
  Uncertainty: Questionnaire
  properties: wet mass 1 kg, dry mass 1 kg
- steel, chromium steel 18/8, hot rolled: 4 kg; lognormal variance with pedigree 0.0586, pedigree (2,5,5,1,1)
  EcoSpold01Location=RER
  Questionnaire
  Uncertainty: Questionnaire
  properties: carbon content, fossil 0.0008, wet mass 1 kg, dry mass 1 kg
  note on carbon content, fossil: Stainless steel model is the grade 304 steel (18/8 stainless, 18% chromium 8% nickel; max. 0.08% C)
- brazing solder, cadmium free: 0.1 kg; lognormal variance with pedigree 0.0586, pedigree (2,5,5,1,1)
  Questionnaire
  EcoSpold01Location=RER
  Uncertainty: Questionnaire
  properties: dry mass 1 kg, wet mass 1 kg
- propylene glycol, liquid: 0.654 kg; lognormal variance with pedigree 0.0586, pedigree (2,5,5,1,1)
  (same comment as for water, completely softened)
  properties: dry mass 1 kg, wet mass 1 kg, heating value, net 27.09 MJ, carbon content, fossil 0.473684
- chemical, organic: 0.0113 kg; lognormal variance with pedigree 0.1308, pedigree (2,2,5,3,4)
  EcoSpold01Location=GLO
  Questionnaire, data for other type of collector
  Uncertainty: Questionnaire, data for other type of collector
  properties: dry mass 1 kg, wet mass 1 kg, heating value, net 19.03 MJ, carbon content, fossil 0.628
  note on carbon content, fossil: This dataset is an unweighted average of 20 organic substances (listed in Tab 88.1, ecoinvent v2.2 report 8, part II), being part of the top100 chemicals included in this database. The C-content has also been calculated as an unweighted average of the C content of the substances composing this dataset.
- waste paperboard, unsorted: -3.33 kg; lognormal variance with pedigree 0.06, pedigree (3,5,5,1,1)
  Estimation
  EcoSpold01Location=CH
  Uncertainty: Estimation
  production volume 3.33 kg
  properties: wet mass 1 kg, heating value, net 15.92 MJ, price 0.03924 EUR2005, carbon content, non-fossil 0.483259, water content 0.243781, dry mass 0.804 kg
  note on carbon content, non-fossil: C content was calculated for 1 kg DM, using data in Tab A.3, ecoinvent v2.2 report 13_I.

## Emissions to nature
- Water [water, unspecified]: 0.002125 m3; name water_to_water_unspecified; = (tap_water_input/1000)*(1-fraction_TW_to_air)+(water_softened_input/1000)*(1-fraction_WCS_to_air)-0.0442; lognormal variance with pedigree 0.0807, pedigree (2,2,5,1,1)
  Calculated value based on literature values and expert opinion. See comments in the parametres' comment field.
  property carbon content, non-fossil 0; name C_content_non_fossil
  property carbon content, fossil 0; name C_content_fossil
  property water in wet mass 1000 kg; name WWM
  property fraction, origin: fresh water 1; name fraction_origin_fresh_water_Ww
  property fraction, origin: unspecified 0; name fraction_origin_unspecified_Ww
  property fraction, origin: salt water 0; name fraction_origin_salt_water_Ww
  property wet mass 1000 kg; name WM
  property dry mass 0 kg; name DM
- Water [air, unspecified]: 0.008175 m3; name water_to_air_unspecified; = (tap_water_input/1000*fraction_TW_to_air)+(water_softened_input/1000*fraction_WCS_to_air); lognormal variance with pedigree 0.0807, pedigree (2,2,5,1,1)
  (same comment as for Water)
  property fraction, origin: fresh water 1; name fraction_origin_fresh_water
  property fraction, origin: salt water 0; name fraction_origin_salt_water
  property fraction, origin: unspecified 0; name fraction_origin_unspecified

## Sampling procedure
Questionnaires.

## Extrapolations
This dataset has been extrapolated from year 2002 to the year of the calculation (2021). The uncertainty has been adjusted accordingly.

## Review by Sebastiano Meier 2003-07-07
Passed.
