# almond production

Dataset: EcoSpold 2, unit process
Geography: RoW
Time period: 2009-01-01 to 2021-12-31
Technology level: current
Classification: ISIC rev.4 ecoinvent: 0125:Growing of other tree and bush fruits and nuts
Tags: WFLDB
Scenario: Business-as-Usual
System model: Allocation, cut-off by classification
Generated by: [System]
Database: ecoinvent
isCopyrightProtected: true
accessRestrictedTo: 1

## General comment
This dataset is a weighted average of the regional datasets, with weights based on production volume of the reference product. Detailed comments and sources about the exchanges can be found in the regional datasets.
The geographicalCorrelation score of every pedigree matrix of was changed to '5'.
Sum of regional production volumes: 1.597e+9 kg
US: PV = 1.558e+9 kg; weight = 0.9753
CN: PV = 3.950e+7 kg; weight = 0.02473
Yield of the global dataset = 3095.5987198 kg/ha, calculated as a weighted average of the regional yields.
The comments below were part of the US regional dataset.
This dataset represents the production of 1 kg of almonds. The average yield from 2009 - 2012 is 3.1 t/ha. The data are representative for almond production in the United States in the San Joaquin Valley North (California) used for the export market. Mineral NPK fertiliser input is 250-0-150 kg/ha. No organic fertilisers are applied. Total active ingredients (a.i.) applied as pesticides amount to 10.9 kg a.i./ha.
The dataset was modelled within the project 'World Food LCA database (WFLDB)'. The aim of this project was to provide inventories of a broad variety of agricultural products and processes and to cover for each product at least 50% of the global export market. The export share of almonds produced in the United States amounts to 68% of the global export (tonnage exported in 2010). The production system regarded in this dataset aimed at representing almonds produced in the United States for the export market.
PEF-Quality: data quality rating (DQR) = 1.5 (i.e. excellent quality). This dataset refers to an average situation; for specific situations exchanges might differ substantially due to site specific parameters

## Included activities start
This activity starts with the nursery producing tree seedlings, i.e. grafted young trees to be planted.

## Included activities end
This activity ends with the waste treatment after the clearing of the orchard (rooting up the trees). The dataset includes all activities of a year in a year in the productive phase of the orchard including the establishment phase per year of lifetime (25 years, 306 trees/ha planted), the clearing of the orchard including waste treatment.
The establishment phase of the orchard includes tree nursery, soil cultivation, planting trees, sowing grass, installation of trellis system (posts and wires) and irrigation. Fertiliser and pesticide use in a year of the establishment phase is assumed to be half of the amount of a year in the productive phase.
The productive phase of the orchard includes machine operations, corresponding infrastructure, fuel use and sheds. Machine operations in the productive phase are: soil cultivation (mulching, mowing), fertiliser and pesticide application, prune, harvesting and irrigation. Further, direct field emissions and land use change are included. At the end of the productive phase the orchard is cleared by rooting up the trees.

Heavy metal uptake by the crop is considered.
The inputs of seedlings, fertilisers and pesticides as well as packaging of fertilisers and pesticides are considered.

## Reference product
- almond: 1 kg; CPC 01371: Almonds, in shell; By-product classification allocatable product
  production volume 1.1706e9 kg
    Source: FAOSTAT. Average, 2009-2012
  property price 5.6 EUR2005
    Calculated value based on data from United Nations Commodity Trade Statistics Database (comtrade.un.org). UN comtrade category: 80212 Almonds, fresh or dried, shelled. Year: 2005. Using exchange rate of 1EURO = 1.209 USD. Average of price of import into 5 main markets (EU, US, JP, IN and CN).
  property carbon content, non-fossil 0.626559
    calculation: C-content of components according to ecoinvent report No. 15a. Source of composition: Souci, S.W., Fachmann, W., Kraut, H. (Hg.: Bundesminsiterium fur Ernahrung, Landwirtschaft und Forsten, Bonn) 'Die Zusammensetzung der Lebensmittel - Nahrwerttabellen', medpharm Scientific Publishers Stuttgart, CRC Press; 2000.
  property carbon content 0.626559
    carbon content on a dry matter basis (reserved; not for manual entry)
  properties: carbon content, fossil 0, water content 0.0565, wet mass 1 kg, water in wet mass 0.0534785 kg, dry mass 0.946522 kg, carbon allocation 0.593052 kg

## Inputs from technosphere
- fertilising, by broadcaster: 0.00127262 ha; lognormal variance with pedigree 0.126177, pedigree (2,1,4,5,1)
  Proxy: Extrapolated using a modified MEXALCA-approach (Roches et al. 2010; Nemecek et al. 2012). See supporting documentation 'WFLDB-Documentation.pdf' chapter 'Machinery processes' for L1 data (https://ecoquery.ecoinvent.org/File/Reports). Corresponds to 1.68 applications per year
- organophosphorus-compound, unspecified: 7.72048e-5 kg; lognormal variance with pedigree 0.0158498, pedigree (2,2,4,5,1)
  Proxy: Source for total amount of pesticides: extrapolated from MEXALCA. Active ingredient is calculated based on Ecoinvent dataset Almonds US. For calculations see supporting documentation 'WFLDB-Documentation.pdf' (https://ecoquery.ecoinvent.org/File/Reports).
  properties: dry mass 1 kg, wet mass 1 kg, carbon content, fossil 0.260898
- inorganic phosphorus fertiliser, as P2O5: 0 kg; pedigree (1,1,1,1,1)
  Calculated based on literature values or expert estimation: The total amount of nutrient (Personal written communication, Miles Harriman, Yara, 2015) multiplied by the share of fertiliser type (Personal written communication, Miles Harriman, Yara, 2015). See supporting documentation 'WFLDB-Documentation.pdf' chapter 'Fertiliser application' for L3 and L4 data (https://ecoquery.ecoinvent.org/File/Reports).
  Corresponds to 30.0 kg/ha
  properties: wet mass 1 kg, dry mass 1 kg
- benzimidazole-compound: 0.00114395 kg; lognormal variance with pedigree 0.0158498, pedigree (2,2,4,5,1)
  (same comment as for organophosphorus-compound, unspecified)
  properties: wet mass 1 kg, carbon content, fossil 0.529668, dry mass 1 kg
- nitrile-compound: 0.00010626 kg; lognormal variance with pedigree 0.0158498, pedigree (2,2,4,5,1)
  (same comment as for organophosphorus-compound, unspecified)
  properties: wet mass 1 kg, carbon content, fossil 0.344995, dry mass 1 kg
- potassium chloride: 0.000388432 kg; lognormal variance with pedigree 0.126177, pedigree (2,1,4,5,1)
  The exchange has been updated from 'potassium chloride, as K2O' into 'potassium chloride' and therefore its amount has been scaled (multiplied) from 0.0002 kg by 1.5829 kg of 'potassium chloride' per kg of 'potassium chloride, as K2O'. Original comment of the exchange is: Calculated based on literature values or expert estimation: The total amount of nutrient (Personal written communication, Miles Harriman, Yara, 2015) multiplied by the share of fertiliser type (Personal written communication, Miles Harriman, Yara, 2015). See supporting documentation 'WFLDB-Documentation.pdf' chapter 'Fertiliser application' for L3 and L4 data (https://ecoquery.ecoinvent.org/File/Reports).
  Corresponds to 29.0 kg/ha
  properties: dry mass 1 kg, wet mass 1 kg
- waste wood, untreated: 0 kg; pedigree (1,1,1,1,1)
  Wood from trees after 1-2 years of sorrage at the field (20% water) per lifetime year (20 years) of the orchard
  production volume 0 kg
    Calculated from reference product production volume, reference product amount and byproduct amount.
  properties: water content 0.25, dry mass 0.8 kg, wet mass 1 kg, carbon content, non-fossil 0.48632, heating value, net 13.99 MJ
  note on heating value, net: Value taken from the general comment of the treatment dataset.
- application of plant protection product, by field sprayer: 0.00255277 ha; lognormal variance with pedigree 0.126664, pedigree (2,2,4,5,1)
  Proxy: Extrapolated using a modified MEXALCA-approach (Roches et al. 2010; Nemecek et al. 2012). See supporting documentation 'WFLDB-Documentation.pdf' chapter 'Machinery processes' for L1 data (https://ecoquery.ecoinvent.org/File/Reports). Field sprayer used as a proxy for pesticide application in orchards. Corresponds to 4,25 applications per year
- hoeing: 0.000323066 ha; lognormal variance with pedigree 0.126177, pedigree (2,1,4,5,1)
  Estimation based on a modified MEXALCA-approach (Roches et al. 2010; Nemecek et al. 2012): See supporting documentation 'WFLDB-Documentation.pdf' chapter 'Machinery processes' for L2 data (https://ecoquery.ecoinvent.org/File/Reports).
- irrigation: 0 m3; pedigree (1,1,1,1,1)
  Calculated value: The total amount of water used for irrigation (calculated from evapotranspiration, Pfister et al. 2011) multiplied by the country-share of irrigation technique (WFLDB-Guidelines.pdf, Appendix 6.1). See supporting documentation 'WFLDB-Documentation.pdf' chapter 'Water use for irrigation' for L2 data (https://ecoquery.ecoinvent.org/File/Reports).
  properties: water content 9089.91, dry mass 0.11 kg, wet mass 1000 kg
- ammonium nitrate: 0 kg; pedigree (1,1,1,1,1)
  The exchange has been updated from 'ammonium nitrate, as N' into 'ammonium nitrate' and therefore its amount has been scaled (multiplied) from 0.0475 kg by 2.8573 kg of 'ammonium nitrate' per kg of 'ammonium nitrate, as N'. Original comment of the exchange is: Calculated based on literature values or expert estimation: The total amount of nutrient (Personal written communication, Miles Harriman, Yara, 2015) multiplied by the share of fertiliser type (Personal written communication, Miles Harriman, Yara, 2015). See supporting documentation 'WFLDB-Documentation.pdf' chapter 'Fertiliser application' for L3 and L4 data (https://ecoquery.ecoinvent.org/File/Reports).
  Corresponds to 30.9 kg/ha
  properties: dry mass 1 kg, wet mass 1 kg
- mowing, by rotary mower: 0.0019384 ha; lognormal variance with pedigree 0.126177, pedigree (2,1,4,5,1)
  Proxy: Similar crop and country used (Almonds US).
- zinc: 0.00176199 kg; lognormal variance with pedigree 0.0158498, pedigree (2,2,4,5,1)
  (same comment as for organophosphorus-compound, unspecified)
  properties: dry mass 1 kg, wet mass 1 kg
- planting tree: 0.00392337 unit; lognormal variance with pedigree 0.126177, pedigree (2,1,4,5,1)
  Proxy: Similar crop and country used. This is the number of trees per ha divided by the lifetime years of the orchard.
- [sulfonyl]urea-compound: 0.000138127 kg; lognormal variance with pedigree 0.0158498, pedigree (2,2,4,5,1)
  (same comment as for organophosphorus-compound, unspecified)
  properties: wet mass 1 kg, carbon content, fossil 0.540853, dry mass 1 kg
- packaging, for pesticides: 0.00705876 kg; lognormal variance with pedigree 0.0592, pedigree (4,3,4,5,4)
  Total amount of active substance/s of pesticides needed for the production of almond is calculated to be circa 3.53E-03 kg. Pesticide/s used in this dataset is/are: '[sulfonyl]urea-compound', 'benzimidazole-compound', 'glyphosate', 'nitrile-compound', 'organophosphorus-compound, unspecified', 'zinc'. The total amount of active substance/s is doubled in order to account for the packaging of the dilluted product of pesticide/s that is/are applied. Therefore, 7.06E-03 kg of packaging for pesticides is justified with this exchange.
  properties: dry mass 1 kg, carbon content, fossil 0.85714, wet mass 1 kg, heating value, net 25.97 MJ, price 0.0642 EUR2005
- transport, tractor and trailer, agricultural: 0.00640752 metric ton*km; lognormal variance with pedigree 0.164439, pedigree (4,1,4,5,1)
  On-farm transport: Yield (in tonnes) multiplied by the average distance from field to farm. The distance was obtained by extrapolation (modified MEXALCA approach). See supporting documentation 'WFLDB-Documentation.pdf' chapter 'Machinery processes' (https://ecoquery.ecoinvent.org/File/Reports). Corresponds to 11.2tkm/ha.
- inorganic nitrogen fertiliser, as N: 0 kg; pedigree (1,1,1,1,1)
  Calculated based on literature values or expert estimation: The total amount of nutrient (Personal written communication, Bill Easterwood , Yara, 2015) multiplied by the share of fertiliser type (Personal written communication, Bill Easterwood , Yara, 2015). See supporting documentation 'WFLDB-Documentation.pdf' chapter 'Fertiliser application' for L3 and L4 data (https://ecoquery.ecoinvent.org/File/Reports).
  Corresponds to 100.0 kg/ha
  properties: wet mass 1 kg, dry mass 1 kg
- fruit tree seedling, for planting: 0.00392337 unit; lognormal variance with pedigree 0.126177, pedigree (2,1,4,5,1)
  (same comment as for planting tree)
  properties: wet mass 1 kg, dry mass 0.578035 kg, carbon content, non-fossil 0.439481, water content 0.73
  note on carbon content, non-fossil: calculation: C-content of components according to ecoinvent report No. 15a. Source of composition: https://ndb.nal.usda.gov/ndb/search/. Unspecific seedling used as proxy.
- swath, by rotary windrower: 0.000323066 ha; lognormal variance with pedigree 0.126177, pedigree (2,1,4,5,1)
  (same comment as for hoeing)
- potassium sulfate: 0.087301 kg; lognormal variance with pedigree 0.126177, pedigree (2,1,4,5,1)
  The exchange has been updated from 'potassium sulfate, as K2O' into 'potassium sulfate' and therefore its amount has been scaled (multiplied) from 0.0472 kg by 1.85 kg of 'potassium sulfate' per kg of 'potassium sulfate, as K2O'. Original comment of the exchange is: Calculated based on literature values or expert estimation: The total amount of nutrient (Personal written communication, Bill Easterwood , Yara, 2015) multiplied by the share of fertiliser type (Personal written communication, Bill Easterwood , Yara, 2015). See supporting documentation 'WFLDB-Documentation.pdf' chapter 'Fertiliser application' for L3 and L4 data (https://ecoquery.ecoinvent.org/File/Reports).
  Corresponds to 150.0 kg/ha
  properties: dry mass 1 kg, wet mass 1 kg
- establishing orchard: 0.00392337 unit; lognormal variance with pedigree 0.126177, pedigree (2,1,4,5,1)
  (same comment as for planting tree)
- packaging, for fertilisers: 0.254425 kg; lognormal variance with pedigree 0.0592, pedigree (4,3,4,5,4)
  Total amount of active substance/s of fertilisers needed for the production of 'almond' is calculated to be circa 1.27E-01 kg. Fertiliser/s used in this dataset is/are: 'ammonium nitrate, as N', 'nitrogen fertiliser, as N', 'phosphate fertiliser, as P2O5', 'potassium chloride, as K2O', 'potassium sulfate, as K2O', 'urea, as N'. The total amount of active substance/s is doubled in order to account for the packaging of the dilluted product of fertiliser/s that is/are applied. Therefore, 2.54E-01 kg of packaging for fertilisers is justified with this exchange.
  properties: dry mass 1 kg, wet mass 1 kg, price 0.0642 EUR2005, heating value, net 25.01 MJ, carbon content, fossil 0.825301
  note on carbon content, fossil: Considering a chemical formula (C2H4)n for polyethylene, carbon content-fossil is calculated to be 0.856286 kg of Carbon per kg of dry mass.
- glyphosate: 0.000301846 kg; lognormal variance with pedigree 0.0158498, pedigree (2,2,4,5,1)
  (same comment as for organophosphorus-compound, unspecified)
  properties: dry mass 1 kg, carbon content, fossil 0.214286, wet mass 1 kg
- urea: 0 kg; pedigree (1,1,1,1,1)
  The exchange has been updated from 'urea, as N' into 'urea' and therefore its amount has been scaled (multiplied) from 0.0006 kg by 2.1438 kg of 'urea' per kg of 'urea, as N'. Original comment of the exchange is: Calculated based on literature values or expert estimation: The total amount of nutrient (Personal written communication, Miles Harriman, Yara, 2015) multiplied by the share of fertiliser type (Personal written communication, Miles Harriman, Yara, 2015). See supporting documentation 'WFLDB-Documentation.pdf' chapter 'Fertiliser application' for L3 and L4 data (https://ecoquery.ecoinvent.org/File/Reports).
  Corresponds to 72.1 kg/ha
  properties: dry mass 1 kg, carbon content, fossil 0.2, wet mass 1 kg
- inorganic phosphorus fertiliser, as P2O5: 2.21628e-6, 2.87543e-6, 2.30246e-6, 1.80282e-5, 3.79874e-6, 1.56522e-7, 4.12585e-7, 7.67133e-7, 8.37129e-8, 1.82902e-8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 kg (28 entries); lognormal variance with pedigree 0.126177, pedigree (2,1,4,5,1)
  (same comment as for inorganic phosphorus fertiliser, as P2O5)
- waste wood, untreated: -0.13474, -0.01673, -0.00122315, -0.0469894, -0.00709897, -0.0112229, -0.212643 kg (7 entries); lognormal variance with pedigree 0.126177, pedigree (2,1,4,5,1)
  (same comment as for waste wood, untreated)
  production volume 5.04118e8 kg
- irrigation: 0.0656573, 0.00278695, 0.000111478, 0.00961827, 0.000480953, 0.0273097, 0.00444516, 1.1279, 0.0216809, 0.00741002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 m3 (15 entries); lognormal variance with pedigree 0.126177, pedigree (2,1,4,5,1)
  (same comment as for irrigation)
- ammonium nitrate: 0.0482585, 0.0873274 kg (2 entries); lognormal variance with pedigree 0.126177, pedigree (2,1,4,5,1)
  (same comment as for ammonium nitrate)
- inorganic nitrogen fertiliser, as N: 0.000185228, 0.00026624, 0.000237956, 0.000835902, 0.000499211, 6.18762e-6, 3.70494e-5, 8.77344e-5, 1.31773e-5, 1.27954e-6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 kg (28 entries); lognormal variance with pedigree 0.126177, pedigree (2,1,4,5,1)
  (same comment as for inorganic nitrogen fertiliser, as N)
- urea: 0.000177268, 0.00113066 kg (2 entries); lognormal variance with pedigree 0.126177, pedigree (2,1,4,5,1)
  (same comment as for urea)

## Inputs from nature
- Transformation, from permanent crop, irrigated [natural resource, land]: 0.161533 m2; lognormal variance with pedigree 0.0462144, pedigree (2,1,4,5,1)
  10000 m2 divided by the life time of the perennial crop (20 years).
- Occupation, permanent crop, irrigated [natural resource, land]: 3.23939 m2*year; lognormal variance with pedigree 0.0220616, pedigree (2,1,4,5,1)
  Related to the duration from harvest date of previous crop to harvest date of main crop.
- Carbon dioxide, in air [natural resource, in air]: 2.16332 kg; lognormal variance with pedigree 0.0158498, pedigree (2,2,4,5,1)
  CO2 uptake by biomass
- Transformation, to permanent crop, irrigated [natural resource, land]: 0.161533 m2; lognormal variance with pedigree 0.0462144, pedigree (2,1,4,5,1)
  10000 m2 divided by the life time of the perennial crop (20 years).
- Energy, gross calorific value, in biomass [natural resource, biotic]: 29.3323 MJ; lognormal variance with pedigree 0.0158498, pedigree (2,2,4,5,1)
  Gross energy content is related to MJ/kg dry matter of product. Source: ecoinvent data

## Emissions to nature
- Chromium [soil, agricultural]: -2.77938e-6 kg
  Comment on mathematicalRelation:
  -5.24109373396e-07 from Calculated value - Freiermuth (2006). See 'WFLDB-Guidelines.pdf', available at https://ecoquery.ecoinvent.org/File/Reports.
  -5.14207248212e-07 from Crop, default, heavy metals uptake model
  Heavy metal uptake can be excluded by setting the parameter heavyMetalUptakeSwitch to zero.
- Water [water, surface water]: 1.0487 m3; lognormal variance with pedigree 0.126177, pedigree (2,1,4,5,1)
  Calculated value - Emission calculated from water balance. See 'WFLDB-Guidelines.pdf', available at https://ecoquery.ecoinvent.org/File/Reports.
- Phosphate [water, surface water]: 0.000248677 kg; lognormal variance with pedigree 0.177866, pedigree (2,2,4,5,1)
  Calculated value - Prasuhn (2006). See 'WFLDB-Guidelines.pdf', available at https://ecoquery.ecoinvent.org/File/Reports.
- Carbon dioxide, from soil or biomass stock [air, non-urban air or from high stacks]: 0.00400569 kg; normal variance with pedigree 0.5452, pedigree (3,3,5,5,2)
  Global average LUC emissions according 2nd edition of the Quantis-modified tool developed by Blonk Consultants 'WFLDB-adapted-Blonk 2014 direct-land-use-change-assessment-tool_2015-05-18a.xlsx', tab. 'Country & land use unknown'. The emission are based on the relative change in production areas in all countries for a given crop. The weighted average is used which takes into acount relative difference in crop expansion into primary forest, secondary forest, grassland, perennial and annual land.
  Uncertainty: Uncertainty estimated based on IPCC guidlines 2006.
- Nickel, ion [water, ground-]: 1.89668e-11 kg; lognormal variance with pedigree 0.358938, pedigree (2,2,4,5,1)
  Calculated value - Freiermuth (2006). See 'WFLDB-Guidelines.pdf', available at https://ecoquery.ecoinvent.org/File/Reports. This emission might be overestimated in case of basic soils.
- Water [water, ground-]: 0.262177 m3; lognormal variance with pedigree 0.126177, pedigree (2,1,4,5,1)
  (same comment as for Water)
- Copper, ion [water, surface water]: 3.11568e-7 kg; lognormal variance with pedigree 0.358938, pedigree (2,2,4,5,1)
  Calculated value - Freiermuth (2006). See 'WFLDB-Guidelines.pdf', available at https://ecoquery.ecoinvent.org/File/Reports.
- Cadmium, ion [water, surface water]: 4.13751e-10 kg; lognormal variance with pedigree 0.358938, pedigree (2,2,4,5,1)
  (same comment as for Copper, ion)
- Copper, ion [water, ground-]: 8.20557e-7 kg; lognormal variance with pedigree 0.358938, pedigree (2,2,4,5,1)
  (same comment as for Nickel, ion)
- Cadmium, ion [water, ground-]: 1.40633e-9 kg; lognormal variance with pedigree 0.358938, pedigree (2,2,4,5,1)
  (same comment as for Nickel, ion)
- Mercury [water, surface water]: 5.97218e-10 kg; lognormal variance with pedigree 0.358938, pedigree (2,2,4,5,1)
  (same comment as for Copper, ion)
- Rimsulfuron [soil, agricultural]: 2.42881e-8 kg; lognormal variance with pedigree 0.0467216, pedigree (2,2,4,5,1)
  Calculated value - 100% emission in soil. See 'WFLDB-Guidelines.pdf', available at https://ecoquery.ecoinvent.org/File/Reports.
- Cadmium [soil, agricultural]: -6.765e-8 kg
  Comment on mathematicalRelation:
  5.13226788953e-07 from Calculated value - Freiermuth (2006). See 'WFLDB-Guidelines.pdf', available at https://ecoquery.ecoinvent.org/File/Reports.
  -9.58029430889e-08 from Crop, default, heavy metals uptake model
  Heavy metal uptake can be excluded by setting the parameter heavyMetalUptakeSwitch to zero.
- Azoxystrobin [soil, agricultural]: 8.4748e-5 kg; lognormal variance with pedigree 0.0467216, pedigree (2,2,4,5,1)
  (same comment as for Rimsulfuron)
- Mercury [water, ground-]: 3.53191e-10 kg; lognormal variance with pedigree 0.358938, pedigree (2,2,4,5,1)
  (same comment as for Nickel, ion)
- Oxyfluorfen [soil, agricultural]: 0.000116581 kg; lognormal variance with pedigree 0.0467216, pedigree (2,2,4,5,1)
  (same comment as for Rimsulfuron)
- Mercury [soil, agricultural]: -1.17853e-9 kg
  Comment on mathematicalRelation:
  1.84429006536e-08 from Calculated value - Freiermuth (2006). See 'WFLDB-Guidelines.pdf', available at https://ecoquery.ecoinvent.org/File/Reports.
  Heavy metal uptake can be excluded by setting the parameter heavyMetalUptakeSwitch to zero.
- Lead [water, surface water]: 3.00747e-8 kg; lognormal variance with pedigree 0.358938, pedigree (2,2,4,5,1)
  (same comment as for Copper, ion)
- Zinc, ion [water, surface water]: 7.32511e-7 kg; lognormal variance with pedigree 0.358938, pedigree (2,2,4,5,1)
  (same comment as for Copper, ion)
- Nickel, ion [water, surface water]: 1.60754e-7 kg; lognormal variance with pedigree 0.358938, pedigree (2,2,4,5,1)
  (same comment as for Copper, ion)
- Chlorothalonil [soil, agricultural]: 0.00111918 kg; lognormal variance with pedigree 0.0467216, pedigree (2,2,4,5,1)
  (same comment as for Rimsulfuron)
- Zinc, ion [water, ground-]: 1.03281e-5 kg; lognormal variance with pedigree 0.358938, pedigree (2,2,4,5,1)
  (same comment as for Nickel, ion)
- Nitrogen oxides [air, non-urban air or from high stacks]: 0.00313545 kg; lognormal variance with pedigree 0.126664, pedigree (2,2,4,5,1)
  Calculated value - EEA/EMEP (2013). See 'WFLDB-Guidelines.pdf', available at https://ecoquery.ecoinvent.org/File/Reports.
- Carbon dioxide, fossil [air, non-urban air or from high stacks]: 0.0256543 kg; lognormal variance with pedigree 0.0158498, pedigree (2,2,4,5,1)
  Calculated value - CO2 emissions from urea and lime. See 'WFLDB-Guidelines.pdf', available at https://ecoquery.ecoinvent.org/File/Reports.
- Zinc [soil, agricultural]: 0.00176117 kg
  Comment on mathematicalRelation:
  0.00200731118032 from Calculated value - Freiermuth (2006). See 'WFLDB-Guidelines.pdf', available at https://ecoquery.ecoinvent.org/File/Reports.
  Heavy metal uptake can be excluded by setting the parameter heavyMetalUptakeSwitch to zero.
- Methoxyfenozide [soil, agricultural]: 0.000104773 kg; lognormal variance with pedigree 0.0467216, pedigree (2,2,4,5,1)
  (same comment as for Rimsulfuron)
- Glyphosate [soil, agricultural]: 0.000279796 kg; lognormal variance with pedigree 0.0467216, pedigree (2,2,4,5,1)
  (same comment as for Rimsulfuron)
- Nickel [soil, agricultural]: 1.33904e-6 kg
  Comment on mathematicalRelation:
  1.26316690052e-06 from Calculated value - Freiermuth (2006). See 'WFLDB-Guidelines.pdf', available at https://ecoquery.ecoinvent.org/File/Reports.
  -9.85579617398e-07 from Crop, default, heavy metals uptake model
  Heavy metal uptake can be excluded by setting the parameter heavyMetalUptakeSwitch to zero.
- Glufosinate [soil, agricultural]: 5.58794e-5 kg; lognormal variance with pedigree 0.0467216, pedigree (2,2,4,5,1)
  (same comment as for Rimsulfuron)
- Lead [soil, agricultural]: 1.69978e-7 kg
  Comment on mathematicalRelation:
  6.20101981452e-07 from Calculated value - Freiermuth (2006). See 'WFLDB-Guidelines.pdf', available at https://ecoquery.ecoinvent.org/File/Reports.
  -5.10216245166e-07 from Crop, default, heavy metals uptake model
  Heavy metal uptake can be excluded by setting the parameter heavyMetalUptakeSwitch to zero.
- Phosphorus [water, surface water]: 7.49526e-6 kg; lognormal variance with pedigree 0.177866, pedigree (2,2,4,5,1)
  Calculated value - Prasuhn (2006) and SQCB-Erosion. See 'WFLDB-Guidelines.pdf', available at https://ecoquery.ecoinvent.org/File/Reports.
- Dinitrogen monoxide [air, non-urban air or from high stacks]: 0.00153576 kg; lognormal variance with pedigree 0.126664, pedigree (2,2,4,5,1)
  Calculated value - IPCC (2006). See 'WFLDB-Guidelines.pdf', available at https://ecoquery.ecoinvent.org/File/Reports.
- Water [air, non-urban air or from high stacks]: 2.22318 m3; lognormal variance with pedigree 0.126177, pedigree (2,1,4,5,1)
  (same comment as for Water)
- Cyprodinil [soil, agricultural]: 9.10795e-8 kg; lognormal variance with pedigree 0.0467216, pedigree (2,2,4,5,1)
  (same comment as for Rimsulfuron)
- Nitrate [water, ground-]: 0.0380124 kg; lognormal variance with pedigree 0.177866, pedigree (2,2,4,5,1)
- Phosphate [water, ground-]: 5.95637e-5 kg; lognormal variance with pedigree 0.177866, pedigree (2,2,4,5,1)
  Calculated value - Prasuhn (2006). See 'WFLDB-Guidelines.pdf', available at https://ecoquery.ecoinvent.org/File/Reports. This emission might be overestimated in case of basic soils.
- Ammonia [air, non-urban air or from high stacks]: 0.00583654 kg; lognormal variance with pedigree 0.0467216, pedigree (2,2,4,5,1)
  Calculated value - EMEP/EEA (2013). See 'WFLDB-Guidelines.pdf', available at https://ecoquery.ecoinvent.org/File/Reports.
- Abamectin [soil, agricultural]: 6.58934e-6 kg; lognormal variance with pedigree 0.0467216, pedigree (2,2,4,5,1)
  (same comment as for Rimsulfuron)
- Lead [water, ground-]: 2.0974e-8 kg; lognormal variance with pedigree 0.358938, pedigree (2,2,4,5,1)
  (same comment as for Nickel, ion)
- Copper [soil, agricultural]: -5.53178e-6 kg
  Comment on mathematicalRelation:
  7.08976421067e-08 from Calculated value - Freiermuth (2006). See 'WFLDB-Guidelines.pdf', available at https://ecoquery.ecoinvent.org/File/Reports.
  -6.2524770884e-06 from Crop, default, heavy metals uptake model
  Heavy metal uptake can be excluded by setting the parameter heavyMetalUptakeSwitch to zero.
- Chromium, ion [water, surface water]: 1.5196e-7 kg; lognormal variance with pedigree 0.358938, pedigree (2,2,4,5,1)
  (same comment as for Copper, ion)
- Chromium, ion [water, ground-]: 3.28255e-6 kg; lognormal variance with pedigree 0.358938, pedigree (2,2,4,5,1)
  (same comment as for Nickel, ion)

## Sampling procedure
WFLDB Methodological Guidelines for the Life Cycle Inventory of Agricultural Products in the latest version, available at: (Report section: https://v30.ecoquery.ecoinvent.org/File/Reports). Data sources: Data were categorised from level 0 (L0) to level (L4) as follows: L0 = estimate, proxy; L1 = statistical data (e.g. FAOSTAT); L2 = L1 adapted to crop and country; L3 = literature data or L1 resp. L2 data approved by experts; medium detailing (i.e. kg of total N-fertiliser); L4 = L3 data of high detailing (i.e. portion N-fertiliser types).In this dataset data were obtained for yield: L3; Fertilisers: L4; Pesticides: L4; Machinery: L4; Irrigation: L3. For information regarding the calculation of individual exchanges see supporting documentation WFLDB-Documentation.pdf.

## Extrapolations
The amount of the exchanges are weighted average of regional datasets.

## Review by Assumpció ANTON 2016-05-30
Be aware that the use of statistics in input calculations could provide some specific inputs not common for specific crops, this should be corrected if better information is available and better reflexed in DQR . Currently, I would dissent for some of good marks provided, being a revision of criteria applied advisable.

Pesticides will need to be amended periodically checking for update of pesticides' ban.
