# treatment of used motor scooter

Dataset: EcoSpold 2, unit process
Geography: CH
Time period: 2007-01-01 to 2021-12-31
Technology level: current
Classification: ISIC rev.4 ecoinvent: 3830:Materials recovery
Classification: EcoSpold01Categories: transport systems/road
Tags: ConvertedDataset; Treatment
Scenario: Business-as-Usual
System model: Allocation, cut-off by classification
Generated by: Marianne Leuenberger
Published in: M. Leuenberger 2010
Database: ecoinvent
isCopyrightProtected: true
accessRestrictedTo: 1

## General comment
The data set reflects the disposal of a scooter of 90kg. Aluminium and steel parts are fully recycled. Plastics are incinerated, batteries are treated.
[This dataset was already contained in the ecoinvent database version 2. It was not individually updated during the transfer to ecoinvent version 3. Life Cycle Impact Assessment results may still have changed, as they are affected by changes in the supply chain, i.e. in other datasets. This dataset was generated following the ecoinvent quality guidelines for version 2. It may have been subject to central changes described in the ecoinvent version 3 change report (http://www.ecoinvent.org/database/ecoinvent-version-3/reports-of-changes/), and the results of the central updates were reviewed extensively. The changes added e.g. consistent water flows and other information throughout the database. The documentation of this dataset can be found in the ecoinvent reports of version 2, which are still available via the ecoinvent website. The change report linked above covers all central changes that were made during the conversion process.]

## Included activities end
This data set includes the disposal of all remaining parts, that are not recycled. All recycled parts are attributed to the reuse process (cut-off). Transport for recycled materials included.

## Geography
Data for disposal of vehicle parts in Europe.

## Reference product
- used motor scooter: -1 unit; CPC 39990: Other wastes n.e.c.; By-product classification Waste
  EcoSpold01Location=CH
  production volume 0.0336675 unit
    This is a placeholder value that does not reflect real-world production volumes. This dataset does not currently require a real-world production volume to work in the database framework, and no actual data were collected yet. This has no negative effect on the results of the ecoinvent database. The placeholder value of this activity was scaled according to the nominal GDP of 2005 (source: United Nations, http://data.un.org/Glossary.aspx?q=GDP+%28current+US%24%29, accessed 20130726) to reflect an appropriate share of the global production volume, which is also a placeholder value.
  property price 0 EUR2005
    Waste products are assigned a price of zero as they are assumed to require further treatment.
  property carbon content, fossil 0.269412
    Calculated from C content in input materials in the infrastructure
  property carbon content, non-fossil 0.00092273
    Calculated from C content in input materials in the infrastructure
  property carbon content 0.270335
    carbon content on a dry matter basis (reserved; not for manual entry)
  properties: wet mass 90 kg, water content 0, dry mass 90 kg, water in wet mass 0 kg, carbon allocation 24.3302 kg

## Inputs from technosphere
- zinc in car shredder residue: -0.39463 kg; lognormal variance with pedigree 0.0266, pedigree (2,1,4,1,3)
  Extrapolated from car disposal
  EcoSpold01Location=CH
  Uncertainty: Extrapolated from car disposal
  production volume 0.39463 kg
    Calculated from the production volume of used motor scooter in proportion to the respective output amounts.
  properties: dry mass 1 kg, wet mass 1 kg
- used Li-ion battery: -3.10555 kg; lognormal variance with pedigree 0.0266, pedigree (2,1,4,1,3)
  EcoSpold01Location=GLO
  Assumption for battery treatment
  Uncertainty: Assumption for battery treatment
  production volume 1.70781 kg
    (same comment as for zinc in car shredder residue)
  properties: wet mass 1 kg, carbon content, fossil 0.328011, dry mass 1 kg
- waste plastic, mixture: -22.23 kg; lognormal variance with pedigree 0.034, pedigree (4,1,4,1,3)
  Assumption for plastic recycling: all parts replaced once
  EcoSpold01Location=CH
  Uncertainty: Assumption for plastic recycling: all parts replaced once
  production volume 22.23 kg
    (same comment as for zinc in car shredder residue)
  properties: water content 0.180638, carbon content, fossil 0.747344, heating value, net 30.79 MJ, wet mass 1 kg, dry mass 0.847 kg
  note on carbon content, fossil: C content in 1 kg DM was calculated using data in Tab A.2, ecoinvent v2.2 report 13_I
  note on heating value, net: Value taken from the general comment of the treatment dataset.
- waste rubber, unspecified: -2.4031 kg; lognormal variance with pedigree 0.0266, pedigree (2,1,4,1,3)
  50% of tyres to municipal incineration
  EcoSpold01Location=CH
  Uncertainty: 50% of tyres to municipal incineration
  production volume 2.4031 kg
    (same comment as for zinc in car shredder residue)
  properties: heating value, net 27.19 MJ, wet mass 1 kg, carbon content, fossil 0.853, dry mass 1 kg
- used Ni-metal hydride battery: -3.79445 kg; lognormal variance with pedigree 0.0266, pedigree (2,1,4,1,3)
  (same comment as for used Li-ion battery)
  production volume 1.70781 kg
    (same comment as for zinc in car shredder residue)
  properties: wet mass 1 kg, carbon content, fossil 0.328011, dry mass 1 kg

## Sampling procedure
Literature

## Extrapolations
This dataset has been extrapolated from year 2009 to the year of the calculation (2021). The uncertainty has been adjusted accordingly.

## Review by Christian Bauer 2010-02-07
26.01.2010
passed
C:\Dokumente und Einstellungen\Marianne\Eigene Dateien\Projekte\277_Mobitool\Review\[Ecospold_Disposal_ebikes-v1.1.xls]X-Process
