# fatty acid production, from palm kernel oil

Dataset: EcoSpold 2, unit process
Geography: RoW
Time period: 1995-01-01 to 2021-12-31
Technology level: current
Classification: ISIC rev.4 ecoinvent: 2011:Manufacture of basic chemicals
Classification: EcoSpold01Categories: chemicals/organics
Scenario: Business-as-Usual
System model: Allocation, cut-off by classification
Generated by: Lucia Valsasina
Published in: Hischier R. 2007
Database: ecoinvent
isCopyrightProtected: true
accessRestrictedTo: 1

## General comment
The functional unit is 1 kg of fatty acids - based on palm kernel oil.
[This dataset was already contained in the ecoinvent database version 2. It was not individually updated during the transfer to ecoinvent version 3. Life Cycle Impact Assessment results may still have changed, as they are affected by changes in the supply chain, i.e. in other datasets. This dataset was generated following the ecoinvent quality guidelines for version 2. It may have been subject to central changes described in the ecoinvent version 3 change report (http://www.ecoinvent.org/database/ecoinvent-version-3/reports-of-changes/), and the results of the central updates were reviewed extensively. The changes added e.g. consistent water flows and other information throughout the database. The documentation of this dataset can be found in the ecoinvent reports of version 2, which are still available via the ecoinvent website. The change report linked above covers all central changes that were made during the conversion process.]
[This dataset is meant to replace the following datasets:
- fatty acid production, from vegetable oil, GLO, 1995 - 1995]

## Included activities end
Energy consumption, water and raw materials and waste. Emissions to air according to methodology of database. No emissions to water.

## Geography
data from different European producers - therefore representing a European average

## Technology
No information about techonology given.

## Time period
according to used literature source

## Parameters
- fraction, cooling water, cooling pond system, to air: 0.032 dimensionless; name fraction_CW_CP_to_air; lognormal variance with pedigree 0.0413, pedigree (2,3,1,3,1)
  Calculated based on literature value (Scown, C.D., 2011, Water Footprint of U.S. Transportation Fuels and supplying information of the article) (Vionnet, S., Quantis Water Database - Technical Report, 2012).
- fraction, cooling water, once-through system, to air: 0.004 dimensionless; name fraction_CW_OT_to_air; lognormal variance with pedigree 0.0413, pedigree (2,3,1,3,1)
  (same comment as for fraction, cooling water, cooling pond system, to air)
- fraction, cooling water, recirculating system, to air: 0.771 dimensionless; name fraction_CW_R_to_air; lognormal variance with pedigree 0.0413, pedigree (2,3,1,3,1)
  (same comment as for fraction, cooling water, cooling pond system, to air)
- fraction, cooling water, to air: 0.3875 dimensionless; name fraction_CW_to_air; = (0.5*fraction_CW_OT_to_air)+(0.5*fraction_CW_R_to_air); lognormal variance with pedigree 0.092025, pedigree (4,4,3,2,4)
  Calculated value based on literature value (see comments of the other parametres present in this dataset) and expert opinion. In the case when no industry/literature data are available about the type of cooling or directly fraction, cooling water, to air specific for the process a default assumption is applied. It is assumed that the once-through cooling system is used in 50% of all cases and recirculating system is used in another 50% of all cases.
- fraction, process water, to air: 0.205 dimensionless; name fraction_PW_to_air; lognormal variance with pedigree 0.092025, pedigree (4,4,3,2,4)

## Reference product
- fatty acid: 1 kg; CPC 34120: Industrial monocarboxylic fatty acids; acid oils from refining; By-product classification allocatable product
  EcoSpold01Location=RER
  production volume 1.63618e8 kg; = 3%*6602838000
    Based on expert judgement it is assumed that 3% of the global production of palm kernel oil is utilised in the production of fatty acid. Reference: FAOSTAT, 2017, Food and Agriculture Organization of the United Nations. Statistical data on crops processed. Available at: http://www.fao.org/faostat/en/#data/QD
  property carbon content, non-fossil 0.75
    C-content/dry mass of fats and oils considered 75%, from: ecoinvent v2.2 report, n 15a, pg 40
  property heating value, net 22.73 MJ
    LHV is calculated based on the Carbon content of the product. More details can be found on the respective documentation.
  property carbon content, fossil 0
    (same comment as for fatty acid)
  property price 1.45 EUR2005
    From ICIS (http://www.icispricing.com/il_shared/Samples/SubPage10100075.asp). Commodity: 'Fatty acids'. Year 2011.
  property carbon content 0.75
    carbon content on a dry matter basis (reserved; not for manual entry)
  properties: water content 0, dry mass 1 kg, wet mass 1 kg, water in wet mass 0 kg, carbon allocation 0.75 kg

## Inputs from technosphere
- chemical factory, organics: 4e-10 unit; lognormal variance with pedigree 0.5, pedigree (5,5,5,5,5)
  EcoSpold01Location=RER
  Estimation
  Uncertainty: estimation
- palm kernel oil, crude: 1.032 kg; = 0.258*4; lognormal variance with pedigree 0.0632, pedigree (2,3,5,5,1)
  EcoSpold01Location=MY
  Data from literature (von Däniken 1995)
  Uncertainty: data from literature (von Däniken 1995)
  properties: wet mass 1 kg, dry mass 1 kg, carbon content, non-fossil 0.725581, heating value, net 37 MJ
  note on carbon content, non-fossil: C13H27O2. Palm kernel oil (tab 17.4, ecoinvent v2.2 report 17-part 17)
  note on heating value, net: Literature value, Source: Biograce, Condensed list of standard values, version 2 - Public. Available at: https://biograce.net/app/webroot/files/file/BioGrace_condensed_list_of_standard_values_-_version_2_-_Public.doc
- heat, district or industrial, natural gas: 0 MJ; pedigree (1,1,1,1,1)
  EcoSpold01Location=RER
  Data from literature (von Däniken 1995)
  Uncertainty: data from literature (von Däniken 1995)
  properties: heating value, net 1 MJ
- electricity, medium voltage: 0 kWh; pedigree (1,1,1,1,1)
  EcoSpold01Location=UCTE
  Data from literature (von Däniken 1995)
  Uncertainty: data from literature (von Däniken 1995)
- heat, district or industrial, other than natural gas: 0 MJ; pedigree (1,1,1,1,1)
  (same comment as for heat, district or industrial, natural gas)
  properties: heating value, net 1 MJ
- heat, district or industrial, natural gas: 0.0185174, 1.20148 MJ (2 entries); lognormal variance with pedigree 0.0632, pedigree (2,3,5,5,1)
  (same comment as for heat, district or industrial, natural gas)
- electricity, medium voltage: 0.00031513, 6.04283e-5, 0.00101447, 0.0147545, 0.00207965, 0.00677582 kWh (6 entries); lognormal variance with pedigree 0.0632, pedigree (2,3,5,5,1)
  (same comment as for electricity, medium voltage)
- heat, district or industrial, other than natural gas: 0.000571537, 1.40943 MJ (2 entries); lognormal variance with pedigree 0.0632, pedigree (2,3,5,5,1)
  (same comment as for heat, district or industrial, natural gas)

## Inputs from nature
- Water, unspecified natural origin [natural resource, in water]: 7e-5 m3; name water_UNO_input; lognormal variance with pedigree 0.0632, pedigree (2,3,5,5,1)
  Data from literature (von Däniken 1995)
  Uncertainty: data from literature (von Däniken 1995)
- Water, cooling, unspecified natural origin [natural resource, in water]: 0.024 m3; name water_cooling_UNO_input; lognormal variance with pedigree 0.21, pedigree (5,5,5,5,4)
  Estimated with data from a chemical plant
  Uncertainty: estimated with data from a chemical plant

## Emissions to nature
- Water [water, unspecified]: 0.0147557 m3; name water_to_water_unspecified; lognormal variance with pedigree 0.0827, pedigree (2,2,5,5,1)
  Calculated value based on literature values and expert opinion. See comments in the parametres' comment field.
  property dry mass 0 kg; name DM
  property fraction, origin: salt water 0; name fraction_origin_salt_water_Ww
  property water in wet mass 1000 kg; name WWM
  property fraction, origin: fresh water 0; name fraction_origin_fresh_water_Ww
  property wet mass 1000 kg; name WM
  property fraction, origin: unspecified 1; name fraction_origin_unspecified_Ww
  property carbon content, fossil 0; name C_content_fossil
  property carbon content, non-fossil 0; name C_content_non_fossil
- Water [air, unspecified]: 0.00931435 m3; name water_to_air_unspecified; lognormal variance with pedigree 0.0827, pedigree (2,2,5,5,1)
  (same comment as for Water)
  property fraction, origin: salt water 0; name fraction_origin_salt_water
  property fraction, origin: unspecified 1; name fraction_origin_unspecified
  property fraction, origin: fresh water 0; name fraction_origin_fresh_water

## Sampling procedure
Process data based on information from European producers.

## Extrapolations
This dataset has been copied from an original dataset covering the geography RER. The uncertainty has been adjusted accordingly.

## Review by Emilia Moreno Ruiz 2017-08-10
This dataset was additionally reviewed in a separate review process by Eric Johnson of Atlantic Consulting as well as Emilia Moreno Ruiz and Gregor Wernet of ecoinvent.
