# treatment of refinery sludge, sanitary landfill

Dataset: EcoSpold 2, unit process
Geography: CH
Time period: 1994-01-01 to 2021-12-31
Technology level: current
Classification: ISIC rev.4 ecoinvent: 3821:Treatment and disposal of non-hazardous waste
Classification: EcoSpold01Categories: waste management/sanitary landfill
Tags: Treatment; ConvertedDataset
Scenario: Business-as-Usual
System model: Allocation, cut-off by classification
Generated by: Gabor Doka (obsolete)
Published in: Doka G. 2007
Database: ecoinvent
isCopyrightProtected: true
accessRestrictedTo: 1

## General comment
Inventoried waste contains 100% refinery sludge; .
waste composition (wet, in ppm): upper heating value 4.732 MJ/kg; lower heating value 2.453 MJ/kg; H2O 888000; O 1017.1; H 13731; C 86452; S 508.54; N 1017.1; P 478.03; B n.a.; Cl n.a.; Br n.a.; F n.a.; I n.a.; Ag n.a.; As n.a.; Ba n.a.; Cd 10.171; Co 20.342; Cr n.a.; Cu 101.71; Hg 2.0342; Mn n.a.; Mo n.a.; Ni 152.56; Pb 457.69; Sb n.a.; Se n.a.; Sn n.a.; V n.a.; Zn 1017.1; Be n.a.; Sc n.a.; Sr n.a.; Ti n.a.; Tl n.a.; W n.a.; Si n.a.; Fe n.a.; Ca 7000; Al n.a.; K n.a.; Mg n.a.; Na n.a.;
Share of carbon in waste that is biogenic 0%.
Overall degradability of waste during 100 years: 60%.
[This dataset was already contained in the ecoinvent database version 2. It was not individually updated during the transfer to ecoinvent version 3. Life Cycle Impact Assessment results may still have changed, as they are affected by changes in the supply chain, i.e. in other datasets. This dataset was generated following the ecoinvent quality guidelines for version 2. It may have been subject to central changes described in the ecoinvent version 3 change report (http://www.ecoinvent.org/database/ecoinvent-version-3/reports-of-changes/), and the results of the central updates were reviewed extensively. The changes added e.g. consistent water flows and other information throughout the database. The documentation of this dataset can be found in the ecoinvent reports of version 2, which are still available via the ecoinvent website. The change report linked above covers all central changes that were made during the conversion process.]

## Included activities end
Waste-specific short-term emissions to air via landfill gas incineration and landfill leachate. Burdens from treatment of short-term leachate (0-100a) in wastewater treatment plant (including WWTP sludge disposal in municipal incinerator). Long-term emissions from landfill to groundwater (after base lining failure).

## Geography
Technology encountered in Switzerland in 2000. Landfill includes base seal, leachate collection system, treatment of leachate in municipal wastewater treatment plant.

## Technology
Swiss municipal sanitary landfill for biogenic or untreated municipal waste ('reactive organic landfill'). Landfill gas and leachate collection system. Recultivation and monitoring for 150 years after closure.

## Reference product
- refinery sludge: -1 kg; CPC 39920: Sewage sludge; By-product classification Waste
  production volume 0 kg
    source: ecoinvent v2
  property heating value, net 2.45 MJ
    Value taken from the general comment of the treatment dataset.
  property price 0 EUR2005
    Waste products are assigned a price of zero as they are assumed to require further treatment.
  property carbon content, fossil 0.767857
    Tab A.6, ecoinvent v2.2 report 13_I. C content has been calculated after data in the tables, and then referred to 1 kg DM
  property carbon content 0.767857
    carbon content on a dry matter basis (reserved; not for manual entry)
  properties: wet mass 1 kg, water content 8.52381, dry mass 0.105 kg, carbon content, non-fossil 0, water in wet mass 0.895 kg, carbon allocation 0.080625 kg

## Inputs from technosphere
- cement, unspecified: 2.07e-5 kg; lognormal variance with pedigree 0.46, pedigree (1,1,5,1,1)
  burden from incineration of sludge from wastewater treatment of the short-term leachate (0-100a). uncertainty is calculated from uncertainties in waste composition and transfer coefficients in incinerator and uncertainty of waste decomposition and short-term leaching in sanitary landfill
  properties: dry mass 1 kg, wet mass 1 kg
- process-specific burdens, residual material landfill: 5.16e-5 kg; lognormal variance with pedigree 0.46, pedigree (1,1,5,1,1)
  burden from incineration of sludge from wastewater treatment of the short-term leachate (0-100a). uncertainty is calculated from uncertainties in waste composition and transfer coefficients in incinerator and uncertainty of waste decomposition and short-term leaching in sanitary landfill;activityLink introduced to establish a direct link to the corresponding regional supply of this product
- quicklime, milled, packed: 1.75e-8 kg; lognormal variance with pedigree 0.4, pedigree (1,1,5,1,1)
  (same comment as for cement, unspecified)
  properties: dry mass 0.99 kg, wet mass 1 kg, water content 0.010101
- hydrochloric acid, without water, in 30% solution state: 8.8e-9 kg; lognormal variance with pedigree 0.69, pedigree (1,1,5,1,1)
  (same comment as for cement, unspecified)
  properties: dry mass 1 kg, wet mass 1 kg, heating value, net 3.32 MJ
- chemical, inorganic: 1.47e-8 kg; lognormal variance with pedigree 0.69, pedigree (1,1,5,1,1)
  (same comment as for cement, unspecified)
  properties: wet mass 1 kg, dry mass 1 kg, carbon content, fossil 0.003
  note on carbon content, fossil: This dataset is an unweighted average of 20 inorganic substances (listed in Tab 88.1, ecoinvent v2.2 report 8, part II), being part of the top100 chemicals included in this database. The C-content has also been calculated as an unweighted average of the C content of the substances composing this dataset.
- aluminium sulfate, powder: 2.06e-5 kg; lognormal variance with pedigree 1.16, pedigree (5,5,5,5,5)
  burden from wastewater treatment of the short-term leachate (0-100a). Uncertainty calculated from unertainty of the waste composition of this waste, uncertainty in waste decomposition and short-term leaching in sanitary landfill
  properties: wet mass 1 kg, dry mass 1 kg
- process-specific burdens, slag landfill: 0.000179 kg; lognormal variance with pedigree 0.63, pedigree (1,1,5,1,1)
  (same comment as for process-specific burdens, residual material landfill)
- sanitary landfill facility: 5.56e-10 unit; lognormal variance with pedigree 0.04, pedigree (1,1,5,1,1)
  demands per kilogram waste. uncertainty is heeded in the module
  This exchange has an activity link directly to the producing activity because the product is primarily consumed in the same geographical area where it is produced.
- chemical, organic: 1.82e-6 kg; lognormal variance with pedigree 1.29, pedigree (1,1,5,1,1)
  (same comment as for cement, unspecified)
  properties: heating value, net 19.03 MJ, wet mass 1 kg, carbon content, fossil 0.628, dry mass 1 kg
  note on carbon content, fossil: This dataset is an unweighted average of 20 organic substances (listed in Tab 88.1, ecoinvent v2.2 report 8, part II), being part of the top100 chemicals included in this database. The C-content has also been calculated as an unweighted average of the C content of the substances composing this dataset.
- process-specific burdens, municipal waste incineration: 0.00136 kg; lognormal variance with pedigree 0.27, pedigree (1,1,5,1,1)
  Burden from incineration of sludge from wastewater treatment of the short-term leachate (0-100a).
  Burden from incineration of sludge from wastewater treatment of the short-term leachate (0-100a).;activityLink introduced to establish a direct link to the corresponding regional supply of this product
- electricity, for reuse in municipal waste incineration only: 0.000195 kWh; name E_el_prod_MSWI; lognormal variance with pedigree 0.51, pedigree (1,1,5,1,1)
  (same comment as for cement, unspecified)
- municipal waste incineration facility: 3.39e-13 unit; lognormal variance with pedigree 0.27, pedigree (1,1,5,1,1)
  Burden from incineration of sludge from wastewater treatment of the short-term leachate (0-100a).
  Burden from incineration of sludge from wastewater treatment of the short-term leachate (0-100a).
- heat, for reuse in municipal waste incineration only: 0.00114 MJ; name E_th_prod_MSWI; lognormal variance with pedigree 0.27, pedigree (1,1,5,1,1)
  (same comment as for cement, unspecified)
- process-specific burdens, sanitary landfill: 1 kg; lognormal variance with pedigree 0.04, pedigree (1,1,5,1,1)
  demands per kilogram waste. uncertainty is heeded in the module;activityLink introduced to establish a direct link to the corresponding regional supply of this product
- waste graphical paper: -3.88e-5 kg; lognormal variance with pedigree 0.2106, pedigree (5,5,5,5,5)
  (same comment as for aluminium sulfate, powder)
  production volume 0 kg
    Calculated from the production volume of refinery sludge, 89.5% water in proportion to the respective output amounts.
  properties: dry mass 0.888 kg, carbon content, non-fossil 0.454955, wet mass 1 kg, water content 0.126126, heating value, net 14.12 MJ
  note on heating value, net: Value taken from the general comment of the treatment dataset.
- iron (III) chloride, without water, in 40% solution state: 0.000106 kg; lognormal variance with pedigree 1.01, pedigree (1,1,5,1,1)
  (same comment as for cement, unspecified)
  properties: wet mass 1 kg, dry mass 1 kg
- waste cement, hydrated: -5.16e-5 kg; lognormal variance with pedigree 0.46, pedigree (1,1,5,1,1)
  (same comment as for cement, unspecified)
  production volume 0 kg
    (same comment as for waste graphical paper)
  properties: wet mass 1 kg, dry mass 1 kg
- sodium hydroxide, without water, in 50% solution state: 9.66e-8 kg; lognormal variance with pedigree 0.4, pedigree (1,1,5,1,1)
  (same comment as for cement, unspecified)
  properties: wet mass 1 kg, dry mass 1 kg, heating value, net 3.03 MJ
- ammonia, anhydrous, liquid: 1.43e-6 kg; lognormal variance with pedigree 0.56, pedigree (1,1,5,1,1)
  (same comment as for cement, unspecified)
  properties: wet mass 1 kg, dry mass 1 kg
- titanium dioxide: 4.1e-8 kg; lognormal variance with pedigree 0.81, pedigree (1,1,5,1,1)
  (same comment as for cement, unspecified)
  properties: dry mass 1 kg, wet mass 1 kg
- electricity, low voltage: 0.00581 kWh; lognormal variance with pedigree 0.47, pedigree (5,5,5,5,5)
  (same comment as for aluminium sulfate, powder)
- heat, central or small-scale, other than natural gas: 0.00022748 MJ; lognormal variance with pedigree 0.45, pedigree (5,5,5,5,5)
  (same comment as for aluminium sulfate, powder)
  properties: heating value, net 1 MJ
- residual material landfill: 1.08e-13 unit; lognormal variance with pedigree 0.46, pedigree (1,1,5,1,1)
  (same comment as for cement, unspecified)
- wastewater treatment facility, capacity 5E9l/year: 1.42e-11 unit; lognormal variance with pedigree 0.2106, pedigree (5,5,5,5,5)
  (same comment as for aluminium sulfate, powder)
- waste plastic, mixture: -3.88e-5 kg; lognormal variance with pedigree 0.2106, pedigree (5,5,5,5,5)
  (same comment as for aluminium sulfate, powder)
  production volume 0 kg
    (same comment as for waste graphical paper)
  properties: water content 0.180638, dry mass 0.847 kg, carbon content, fossil 0.747344, wet mass 1 kg, heating value, net 30.79 MJ
  note on carbon content, fossil: C content in 1 kg DM was calculated using data in Tab A.2, ecoinvent v2.2 report 13_I
- iron sulfate: 7.6e-5 kg; lognormal variance with pedigree 1.16, pedigree (5,5,5,5,5)
  (same comment as for aluminium sulfate, powder)
  properties: dry mass 1 kg, wet mass 1 kg
- heat, district or industrial, natural gas: 0.00043896 MJ; lognormal variance with pedigree 0.28, pedigree (1,1,5,1,1)
  (same comment as for aluminium sulfate, powder)
  properties: heating value, net 1 MJ
- sewer grid, 5E9l/year, 110 km: 5.45e-10 km; lognormal variance with pedigree 0.2106, pedigree (5,5,5,5,5)
  (same comment as for aluminium sulfate, powder)
- chromium oxide, flakes: 8.36e-10 kg; lognormal variance with pedigree 0.92, pedigree (5,5,5,5,5)
  burden from incineration of sludge from wastewater treatment of the short-term leachate (0-100a). Proxy for vanadium pentoxide V2O5 in SCR catalyst, uncertainty calculated from uncertainty in average DeNOx input, uncertainty in the share of thermal NOx, uncertainty of nitrogen content in average municipal waste and the unertainty in nitrogen content in *this* waste and uncertainty of waste decomposition and short-term leaching in sanitary landfill
  properties: dry mass 1 kg, wet mass 1 kg
- slag landfill: 3.18e-13 unit; lognormal variance with pedigree 0.63, pedigree (1,1,5,1,1)
  (same comment as for cement, unspecified)

## Emissions to nature
- Zinc, ion [water, surface water]: 8.94e-6 kg; lognormal variance with pedigree 0.94, pedigree (1,1,5,1,1)
  Emissions from short-term leachate treatment and incineration of resulting sludge. Uncertainty calculated depending on waste input and uncertainty of transfer coefficents in landfill, wastewater treatment and incineration model.
- Nitrite [water, ground-, long-term]: 2.26e-14 kg; lognormal variance with pedigree 2.62, pedigree (1,1,5,1,1)
  Emissions from long-term leachate (>100a) directly from MSW landfill and indirectly via incineration of treatement sludge from leachate treatement. Uncertainty calculated depending on waste input and uncertainty of long-term transfer coefficents in landfill.
- Iron [air, urban air close to ground]: 2.13e-9 kg; lognormal variance with pedigree 1.08, pedigree (1,1,5,1,1)
  (same comment as for Zinc, ion)
- Methane, fossil [air, non-urban air or from high stacks]: 0.0199 kg; lognormal variance with pedigree 0.23, pedigree (1,1,5,1,1)
  burden from direct release or incineration of landfill biogas. Uncertainty calculated from unertainty of the waste composition of this waste, uncertainty in waste decomposition and short-term leaching in sanitary landfill
- Methane, fossil [air, urban air close to ground]: 8.49e-6 kg; lognormal variance with pedigree 0.53, pedigree (1,1,5,1,1)
  (same comment as for Zinc, ion)
- Copper [air, non-urban air or from high stacks]: 8.54e-11 kg; lognormal variance with pedigree 2.58, pedigree (1,1,5,1,1)
  (same comment as for Methane, fossil)
- Cadmium, ion [water, ground-, long-term]: 9.1e-6 kg; lognormal variance with pedigree 1.39, pedigree (1,1,5,1,1)
  (same comment as for Nitrite)
- Cobalt [air, urban air close to ground]: 6.13e-14 kg; lognormal variance with pedigree 1.4, pedigree (1,1,5,1,1)
  (same comment as for Zinc, ion)
- Mercury [water, surface water]: 2.65e-8 kg; lognormal variance with pedigree 1.72, pedigree (1,1,5,1,1)
  (same comment as for Zinc, ion)
- Iron, ion [water, ground-, long-term]: 2.99e-5 kg; lognormal variance with pedigree 1.87, pedigree (1,1,5,1,1)
  (same comment as for Nitrite)
- Nitrate [water, ground-, long-term]: 1.02e-6 kg; lognormal variance with pedigree 0.47, pedigree (1,1,5,1,1)
  (same comment as for Nitrite)
- Hydrogen sulfide [water, ground-, long-term]: 2.73e-5 kg; lognormal variance with pedigree 0.79, pedigree (1,1,5,1,1)
  (same comment as for Nitrite)
- Carbon dioxide, fossil [air, non-urban air or from high stacks]: 0.13 kg; lognormal variance with pedigree 0.19, pedigree (1,1,5,1,1)
  (same comment as for Methane, fossil)
- Carbon monoxide, fossil [air, urban air close to ground]: 2.89e-6 kg; lognormal variance with pedigree 0.5, pedigree (1,1,5,1,1)
  (same comment as for Zinc, ion)
- Copper [air, urban air close to ground]: 1.63e-12 kg; lognormal variance with pedigree 1.58, pedigree (1,1,5,1,1)
  (same comment as for Zinc, ion)
- Sulfate [water, ground-, long-term]: 0.00105 kg; lognormal variance with pedigree 0.79, pedigree (1,1,5,1,1)
  (same comment as for Nitrite)
- Lead [air, urban air close to ground]: 5.35e-11 kg; lognormal variance with pedigree 1.35, pedigree (1,1,5,1,1)
  (same comment as for Zinc, ion)
- Carbon monoxide, fossil [air, non-urban air or from high stacks]: 7.36e-6 kg; lognormal variance with pedigree 0.83, pedigree (1,1,5,1,1)
  (same comment as for Methane, fossil)
- Mercury [air, non-urban air or from high stacks]: 3.34e-8 kg; lognormal variance with pedigree 1.83, pedigree (1,1,5,1,1)
  (same comment as for Methane, fossil)
- Mercury [water, ground-, long-term]: 1.92e-6 kg; lognormal variance with pedigree 1.51, pedigree (1,1,5,1,1)
  (same comment as for Nitrite)
- Chloride [water, surface water]: 6.82e-5 kg; lognormal variance with pedigree 1.04, pedigree (1,1,5,1,1)
  Emissions from short-term leachate treatment. Uncertainty calculated depending on waste input and uncertainty of transfer coefficents in landfill and wastewater treatment.
- COD, Chemical Oxygen Demand [water, ground-, long-term]: 0.0097 kg; lognormal variance with pedigree 0.82, pedigree (1,1,5,1,1)
  (same comment as for Nitrite)
- Zinc [air, urban air close to ground]: 3.26e-10 kg; lognormal variance with pedigree 1.01, pedigree (1,1,5,1,1)
  (same comment as for Zinc, ion)
- Phosphate [water, surface water]: 1.73e-5 kg; lognormal variance with pedigree 1.02, pedigree (1,1,5,1,1)
  (same comment as for Zinc, ion)
- Particulates, < 2.5 um [air, non-urban air or from high stacks]: 2.47e-6 kg; lognormal variance with pedigree 0.49, pedigree (1,1,5,1,1)
  (same comment as for Methane, fossil)
- Nickel [air, urban air close to ground]: 9.04e-14 kg; lognormal variance with pedigree 1.29, pedigree (1,1,5,1,1)
  (same comment as for Zinc, ion)
- Phosphate [water, ground-, long-term]: 1.08e-5 kg; lognormal variance with pedigree 6.99, pedigree (1,1,5,1,1)
  (same comment as for Nitrite)
- Calcium [air, non-urban air or from high stacks]: 1.37e-7 kg; lognormal variance with pedigree 1.62, pedigree (1,1,5,1,1)
  (same comment as for Methane, fossil)
- TOC, Total Organic Carbon [water, ground-, long-term]: 0.00887 kg; lognormal variance with pedigree 0.82, pedigree (1,1,5,1,1)
  (same comment as for Nitrite)
- Dinitrogen monoxide [air, urban air close to ground]: 2.5e-6 kg; lognormal variance with pedigree 0.43, pedigree (1,1,5,1,1)
  (same comment as for Zinc, ion)
- Nickel [air, non-urban air or from high stacks]: 1.33e-9 kg; lognormal variance with pedigree 2.22, pedigree (1,1,5,1,1)
  (same comment as for Methane, fossil)
- Cobalt [water, ground-, long-term]: 1.81e-5 kg; lognormal variance with pedigree 1.09, pedigree (1,1,5,1,1)
  (same comment as for Nitrite)
- DOC, Dissolved Organic Carbon [water, surface water]: 0.000231 kg; lognormal variance with pedigree 0.48, pedigree (1,1,5,1,1)
  (same comment as for Zinc, ion)
- Cobalt [water, surface water]: 1.99e-6 kg; lognormal variance with pedigree 1.28, pedigree (1,1,5,1,1)
  (same comment as for Zinc, ion)
- NMVOC, non-methane volatile organic compounds, unspecified origin [air, non-urban air or from high stacks]: 1.39e-7 kg; lognormal variance with pedigree 0.23, pedigree (1,1,5,1,1)
  (same comment as for Methane, fossil)
- Sulfate [water, surface water]: 0.000413 kg; lognormal variance with pedigree 0.68, pedigree (1,1,5,1,1)
  (same comment as for Chloride)
- TOC, Total Organic Carbon [water, surface water]: 0.000241 kg; lognormal variance with pedigree 0.48, pedigree (1,1,5,1,1)
  (same comment as for Zinc, ion)
- Cobalt [air, non-urban air or from high stacks]: 9.81e-10 kg; lognormal variance with pedigree 2.27, pedigree (1,1,5,1,1)
  (same comment as for Methane, fossil)
- Cyanide [air, urban air close to ground]: 2.55e-8 kg; lognormal variance with pedigree 0.58, pedigree (1,1,5,1,1)
  (same comment as for Zinc, ion)
- Nitrogen oxides [air, non-urban air or from high stacks]: 2.62e-7 kg; lognormal variance with pedigree 0.9, pedigree (1,1,5,1,1)
  (same comment as for Methane, fossil)
- Lead [water, surface water]: 1.78e-7 kg; lognormal variance with pedigree 1.3, pedigree (1,1,5,1,1)
  (same comment as for Zinc, ion)
- Ammonium, ion [water, surface water]: 0.000492 kg; lognormal variance with pedigree 0.5, pedigree (1,1,5,1,1)
  (same comment as for Zinc, ion)
- Ammonia [air, urban air close to ground]: 9.08e-7 kg; lognormal variance with pedigree 0.48, pedigree (1,1,5,1,1)
  (same comment as for Zinc, ion)
- Nitrogen [water, surface water]: 1.34e-5 kg; lognormal variance with pedigree 0.45, pedigree (1,1,5,1,1)
  (same comment as for Zinc, ion)
- Cadmium [air, non-urban air or from high stacks]: 7.16e-9 kg; lognormal variance with pedigree 2, pedigree (1,1,5,1,1)
  (same comment as for Methane, fossil)
- Cadmium, ion [water, surface water]: 5.45e-7 kg; lognormal variance with pedigree 1.42, pedigree (1,1,5,1,1)
  (same comment as for Zinc, ion)
- BOD5, Biological Oxygen Demand [water, ground-, long-term]: 0.0023 kg; lognormal variance with pedigree 0.82, pedigree (1,1,5,1,1)
  (same comment as for Nitrite)
- Nitrite [water, surface water]: 1.03e-5 kg; lognormal variance with pedigree 0.7, pedigree (1,1,5,1,1)
  (same comment as for Zinc, ion)
- BOD5, Biological Oxygen Demand [water, surface water]: 0.0003 kg; lognormal variance with pedigree 0.48, pedigree (1,1,5,1,1)
  (same comment as for Zinc, ion)
- NMVOC, non-methane volatile organic compounds, unspecified origin [air, urban air close to ground]: 3.86e-8 kg; lognormal variance with pedigree 0.65, pedigree (1,1,5,1,1)
  (same comment as for Zinc, ion)
- DOC, Dissolved Organic Carbon [water, ground-, long-term]: 0.00887 kg; lognormal variance with pedigree 0.82, pedigree (1,1,5,1,1)
  (same comment as for Nitrite)
- Nickel, ion [water, surface water]: 3.23e-6 kg; lognormal variance with pedigree 1.17, pedigree (1,1,5,1,1)
  (same comment as for Zinc, ion)
- Calcium, ion [water, ground-, long-term]: 0.0065 kg; lognormal variance with pedigree 0.45, pedigree (1,1,5,1,1)
  (same comment as for Nitrite)
- Carbon dioxide, fossil [air, urban air close to ground]: 0.00434 kg; lognormal variance with pedigree 0.48, pedigree (1,1,5,1,1)
  (same comment as for Zinc, ion)
- Copper, ion [water, surface water]: 7.75e-8 kg; lognormal variance with pedigree 1.52, pedigree (1,1,5,1,1)
  (same comment as for Zinc, ion)
- Calcium, ion [water, surface water]: 0.000493 kg; lognormal variance with pedigree 0.59, pedigree (1,1,5,1,1)
  (same comment as for Zinc, ion)
- Nitrogen oxides [air, urban air close to ground]: 8.87e-6 kg; lognormal variance with pedigree 0.47, pedigree (1,1,5,1,1)
  (same comment as for Zinc, ion)
- Phosphorus [air, urban air close to ground]: 1.02e-8 kg; lognormal variance with pedigree 1.06, pedigree (1,1,5,1,1)
  (same comment as for Zinc, ion)
- Aluminium [air, urban air close to ground]: 5.07e-9 kg; lognormal variance with pedigree 1.06, pedigree (1,1,5,1,1)
  (same comment as for Zinc, ion)
- Zinc [air, non-urban air or from high stacks]: 6.42e-9 kg; lognormal variance with pedigree 2.01, pedigree (1,1,5,1,1)
  (same comment as for Methane, fossil)
- Ammonium, ion [water, ground-, long-term]: 4.15e-13 kg; lognormal variance with pedigree 2.62, pedigree (1,1,5,1,1)
  (same comment as for Nitrite)
- Aluminium [water, ground-, long-term]: 2.4e-6 kg; lognormal variance with pedigree 1.05, pedigree (1,1,5,1,1)
  (same comment as for Nitrite)
- Copper, ion [water, ground-, long-term]: 0.000102 kg; lognormal variance with pedigree 1, pedigree (1,1,5,1,1)
  (same comment as for Nitrite)
- Nitrogen, organic bound [water, ground-, long-term]: 6.78e-13 kg; lognormal variance with pedigree 2.62, pedigree (1,1,5,1,1)
  (same comment as for Nitrite)
- COD, Chemical Oxygen Demand [water, surface water]: 0.000953 kg; lognormal variance with pedigree 0.48, pedigree (1,1,5,1,1)
  (same comment as for Zinc, ion)
- Aluminium [water, surface water]: 2.7e-10 kg; lognormal variance with pedigree 1.64, pedigree (1,1,5,1,1)
  (same comment as for Zinc, ion)
- Zinc, ion [water, ground-, long-term]: 0.000817 kg; lognormal variance with pedigree 0.71, pedigree (1,1,5,1,1)
  (same comment as for Nitrite)
- Mercury [air, urban air close to ground]: 1.42e-13 kg; lognormal variance with pedigree 1.78, pedigree (1,1,5,1,1)
  (same comment as for Zinc, ion)
- Iron, ion [water, surface water]: 2.18e-8 kg; lognormal variance with pedigree 1.07, pedigree (1,1,5,1,1)
  (same comment as for Zinc, ion)
- Lead [air, non-urban air or from high stacks]: 5.39e-10 kg; lognormal variance with pedigree 2.34, pedigree (1,1,5,1,1)
  (same comment as for Methane, fossil)
- Lead [water, ground-, long-term]: 0.000456 kg; lognormal variance with pedigree 0.83, pedigree (1,1,5,1,1)
  (same comment as for Nitrite)
- Cadmium [air, urban air close to ground]: 2.94e-11 kg; lognormal variance with pedigree 1.48, pedigree (1,1,5,1,1)
  (same comment as for Zinc, ion)
- Nitrate [water, surface water]: 0.0018 kg; lognormal variance with pedigree 0.44, pedigree (1,1,5,1,1)
  (same comment as for Zinc, ion)
- Sulfur dioxide [air, non-urban air or from high stacks]: 3.98e-5 kg; lognormal variance with pedigree 1, pedigree (1,1,5,1,1)
  (same comment as for Methane, fossil)
- Nickel, ion [water, ground-, long-term]: 0.000149 kg; lognormal variance with pedigree 0.93, pedigree (1,1,5,1,1)
  (same comment as for Nitrite)
- Calcium [air, urban air close to ground]: 8.94e-8 kg; lognormal variance with pedigree 0.63, pedigree (1,1,5,1,1)
  (same comment as for Zinc, ion)

## Sampling procedure
Landfill model based on observed leachate concentrations in literature. Extrapolated to 60'000 years heeding chemical characteristics. Initial waste composition from various literature sources.

## Extrapolations
This dataset has been extrapolated from year 2000 to the year of the calculation (2021). The uncertainty has been adjusted accordingly.

## Review by Niels Jungbluth 2003-08-30
Passed. Calculation for standard deviation 95 of, i.e., infrastructure,
land occupation, transport services or other services can differ from
standard Pedigree approach used in this project and figures obtained by
this procedure.
