# wind turbine construction, 4.5MW, onshore

Dataset: EcoSpold 2, unit process
Geography: GLO
Time period: 2008-01-01 to 2021-12-31
Technology level: modern
Classification: ISIC rev.4 ecoinvent: 2811:Manufacture of engines and turbines, except aircraft, vehicle and cycle eng
Tags: infrastructure; wind power
Scenario: Business-as-Usual
System model: Allocation, cut-off by classification
Generated by: Christian Bauer
Published in: Chataignere A. 2003
Database: ecoinvent
isCopyrightProtected: true
accessRestrictedTo: 1

## General comment
This dataset represents the construction of a wind turbine with a capacity of 4.5MW for onshore use. The term "wind turbine" inludes moving parts such as nacelle, rotor, rotor blades, transition piece as well as fixed parts such as the tower and the foundation.
Reference technology for this wind turbine is an Enercon E-112 turbine. The tower is made of reinforced concrete, a relatively new technology. LCI data are based on (Chataignere & Le Boulch 2003), supplemented with some own assumptions and adapted to the ecoinvent background database for this study. Parts of the wind turbine are the following:
- Rotor: Rotor blades (fibre-glass reinforced plastics), rotor hub, extender
- Nacelle (gearbox, generator, shaft and others)
- Electronics
- Tower
- Foundation

Data are very rough since no real data were available for the tower and foundations mass balance, and since the detailed composition of the nacelle, blades and connection to the grid is derived from an Enercon E-66 1.5MW wind turbine.

## Included activities start
From the transformation of pasture land to industrial site, and from the reception and treatment of building materials and turbine parts.

## Included activities end
This activity ends with the decommissioning of the wind turbine and the treatment of the resulting materials in the end of the lifetime.

This dataset includes
- all materials for the construction of the wind turbine and their treatment, but not the energy for their assembling
- land transformation and use
- energy needed for erection and dismantling of the wind turbine.

This dataset doesn't include
- the connection to the grid, which is modeled in a separate dataset.
- the operation and maintenance of the fully finished wind power plant. It is assumed that all parts will hold for the lifetime of 20 years and don't have to be replaced.
- auxiliary materials such as packaging materials or vacuum fleece.
- any losses of materials (waste) during the processing of the different wind turbine parts.
- neither the energy use for assembly of the different wind turbine parts nor their transportation from manufacture to the construction site.

## Technology
Technology: Enercon E-112 4.5MW wind turbine. This special type of wind turbine is not on the market any more, but the technology can still be taken as a good reference for wind turbines with a capacity of >3 MW built today.
Characteristics:
- Capacity: 4500 kW

- Diameter of the rotor: 113 m
- Length of the rotor blades: 52 m
- Number of rotor blades: 3
- rotor blade weight: 20000 kg

- nacelle weight: ca.355000 kg

- material of the tubular tower: concrete (+reinforcing steel)
- tower height: 120 m
- foundation thickness: 2m
- cable for network connection (per turbine): 1000 m
- Lifetime: 20 years
Source: Chataignere A. and Le Boulch D. (2003) Wind Turbine Systems. Final report ECLIPSE. EDF R&D, Clamart Cedex, France

## Parameters
- extrapolation factor, nacelle: 4.76805 dimensionless; name extrapolation_factor_nacelle; = 440000/ (40690+51591); lognormal variance with pedigree 0.0227, pedigree (4,4,3,3,2)
  Calculated value. Amounts for the nacelle parts in this dataset are extrapolated from a 1.5MW wind turbine.
  Weight of the nacelle, 4.5MW: 440 t
  Weight of the nacelle, 1.5MW: 40.69+51.591t = 92.281
  [Chataignere A. and Le Boulch D. (2003) Wind Turbine Systems. Final report ECLIPSE. EDF R&D, Clamart Cedex, France. p.46]
  Uncertainty: estimated variance. This factor is somewhat arbitrary and has a high uncertainty.
- Installed capacity: 26911 MW; name capacity_installed_new; lognormal variance with pedigree 0.0018, pedigree (2,1,1,1,2)
  Literature value/statistics. New installed capacity of wind power in the world, onshore, 2008. Calculated from the total new installed capacity (27261 MW) minus new capacity offshore (350 MW). [WWEA, 2009. World Wind Energy Report 2008. World Wind Energy Association, Bonn. Table p.12f and chapter "offshore wind energy", p.8]
  Uncertainty: estimated variance
- Percentage of onshore wind power plant class capacity on total: 0.106 dimensionless; name percentage_onshore_class_gt3; lognormal variance with pedigree 0.009325, pedigree (2,2,1,2,2)
  Percentages onshore 2008 of the three wind power plant classes (average from 41 countries worldwide): <1MW 19.7%; 1-3MW 69.6%; >3MW 10.7% [compilation out of "The Wind Power Database, 2011"]. These percentages are taken to calculate the number of new wind power plants per class with the assumption of average capacity values (0.8MW, 2MW, 4.5MW) .
  Source:
  The Wind Power. 2011. Wind power and wind farms database. www.thewindpower.net
  Uncertainty: estimated variance
- extrapolation factor, blades: 3.71471 dimensionless; name extrapolation_factor_blades; = 20000/5384; lognormal variance with pedigree 0.0227, pedigree (4,4,3,3,2)
  Calculated value. Amounts for the blades parts in this dataset are extrapolated from a 1.5MW wind turbine.
  Weight of a blade, 4.5MW: 20 t
  Weight of a blade, 1.5MW: 5.384 t
  [Chataignere A. and Le Boulch D. (2003) Wind Turbine Systems. Final report ECLIPSE. EDF R&D, Clamart Cedex, France. p.46]
  Uncertainty: estimated variance. This factor is somewhat arbitrary and has a high uncertainty.

## Reference product
- wind turbine, 4.5MW, onshore: 1 unit; name wind_turbine; ISIC rev.4 ecoinvent 4220a: Construction of utility projects for electricity production, except for liquid fuels; CPC 53262: Power plants; By-product classification allocatable product
  production volume 633.904 unit; name apv_turbine_4_5MW; = capacity_installed_new* percentage_onshore_class_gt3/ wind_turbine_capacity_MW
    Calculated value. See parameters for a closer look at the values used.
  property capacity [MW] 4.5 MW; name wind_turbine_capacity_MW
    Literature value.
  property price 6.2307e6 EUR2005; name wind_turbine_price_EUR2005
    Data from the report in Energie-spiegel, Facts for the energy decisions of tomorrow N0. 20 /June 2012 from the Paul Scherrer Institut (PSI), table 2. Capital costs for a wind turbine are 1.8-2.5 1000CHF/kWel for a turbine onshore and 2.7-4.0 1000CHF/kWel for a turbine offshore). The average of onshore values is used for onshore turbines and for offshore values to calculate the price of offshore turbines. The capacity of the turbine is used to calculate the price

## By-products
- aluminium scrap, post-consumer: 0 kg; source Vestas 2011; CPC 39363: Waste and scrap of aluminium; By-product classification Recyclable
  Calculated value. It can be assumed that 100% of the aluminium enter a recycling process.
  production volume 0 kg; = apv_turbine_4_5MW * (scrap_alu / wind_turbine)
    Calculated from production volume of reference product using the relative outputs.
  property price 0.685 EUR2005; name scrap_alu_price_EUR2005
    Temporary price data. Calculated as 90% of purchasers price based on: estimated at 85% of new scrap
  property lifetime 20 year; name scrap_alu_lifetime
    Literature value.
  property carbon content 0
    carbon content on a dry matter basis (reserved; not for manual entry)
  properties: water in wet mass 0 kg, dry mass 1 kg, carbon content, non-fossil 0, water content 0, wet mass 1 kg, carbon content, fossil 0, carbon allocation 0 kg
- iron scrap, unsorted: 0 kg; source Vestas 2011; CPC 39310: Slag, dross, scalings and other waste from the manufacture of iron or steel; By-product classification Recyclable
  Calculated value. It can be assumed that 100% of the iron enter a recycling process.
  production volume 0 kg; = apv_turbine_4_5MW * (scrap_iron / wind_turbine)
    Calculated from production volume of reference product using the relative outputs.
  property lifetime 20 year; name scrap_iron_lifetime
    Literature value.
  property price 0.149 EUR2005; name scrap_iron_price_EUR2005
    Temporary price data. Calculated as 90% of purchasers price based on: estimated at 85% of sorted scrap
  property carbon content 0
    carbon content on a dry matter basis (reserved; not for manual entry)
  properties: carbon content, fossil 0, water content 0, carbon content, non-fossil 0, water in wet mass 0 kg, dry mass 1 kg, wet mass 1 kg, carbon allocation 0 kg

## Inputs from technosphere
- electronics scrap from control units: -572.165 kg; name scrap_electronics; = (electronics)*-1
  Calculated value
  production volume 362698 kg; = apv_turbine_4_5MW * (scrap_electronics / wind_turbine)
    Calculated from production volume of reference product using the relative outputs.
  property price 0 EUR2005; name scrap_electronics_price_EUR2005
  property lifetime 20 year; name lifetime
  properties: carbon content, fossil 0.337146, carbon content, non-fossil 0.00013442, dry mass 1 kg, wet mass 1 kg
- aluminium, cast alloy: 311.455 kg; name alu_cast; = 0.32*( alu_cast_calc_prop_nacelle_kg* extrapolation_factor_nacelle+3* alu_cast_calc_prop_blade_kg* extrapolation_factor_blades); source Chataignere A. 2003, p. 46f; lognormal variance with pedigree 0.0641, pedigree (4,4,5,3,3)
  Literature value/calculated value. Used in the nacelle and the three blades. The shares of cast alloy and wrought alloy aluminium in the cancelled ecoinvent v2 "aluminium production mix" dataset amounted to 32% (cast alloy) and 68% (wrought alloy) respectively. These shares have been overtaken to distribute the original amount of 973 kg aluminium.
  Sum of aluminium in nacelle (127 kg) and in the three blades (3*33 kg) extrapolated with accordant weight factors from a 1.5MW wind turbine.
  Uncertainty: estimated variance. higher basic uncertainty because of the extrapolation and the age of the data. slightly higher technological score because of the split of the aluminium use in the two aluminium types.
  property calculation property, nacelle, kg 127 kg; name alu_cast_calc_prop_nacelle_kg
  property calculation property, blade, kg 33 kg; name alu_cast_calc_prop_blade_kg
  properties: dry mass 1 kg, wet mass 1 kg
  note on calculation property, nacelle, kg: Mass of nacelle materials in the 1.5MW turbine. For use in mathematical relations.
  note on calculation property, blade, kg: Mass of material used for one blade in the 1.5MW turbine. For use in mathematical relations.
- reinforcing steel: 519470 kg; name reinforcing_steel; = 150*(5900000/2400)+ 0.1*((2*314)*2400); source Chataignere A. 2003, p. 46f; lognormal variance with pedigree 0.0567, pedigree (4,4,5,3,2)
  Literature value and estimation.
  Reinforcing steel from tower (150 kg/m3 of concrete).
  The reinforcement of the foundation was not included in (Chataignere & Le Boulch 2003), therefore 10% of the mass of the foundation were added as reinforcing steel.
  Uncertainty: estimated variance. higher basic uncertainty because of the extrapolation and the age of the data.
  properties: carbon content, fossil 0.004, dry mass 1 kg, wet mass 1 kg
- waste rubber, unspecified: 0 kg; name waste_rubber
  Calculated value
  production volume 0 kg
    Calculated from production volume of reference product using the relative outputs.
  property price 0 EUR2005; name waste_rubber_price_EUR2005
  property lifetime 20 year; name waste_rubber_lifetime
  properties: heating value, net 27.19 MJ, carbon content, fossil 0.853, wet mass 1 kg, dry mass 1 kg
  note on heating value, net: Value taken from the general comment of the treatment dataset.
- electronics, for control units: 572.165 kg; name electronics; = electronics_calc_prop_nacelle_kg* extrapolation_factor_nacelle; source Chataignere A. 2003, p. 46f; lognormal variance with pedigree 0.0567, pedigree (4,4,5,3,2)
  Literature value. Used in the nacelle.
  Use of electronics in the nacelle (120 kg) extrapolated with a weight factor from a 1.5MW wind turbine.
  Uncertainty: estimated variance. higher basic uncertainty because of the extrapolation and the age of the data.
  property calculation property, nacelle, kg 120 kg; name electronics_calc_prop_nacelle_kg
  properties: carbon content, fossil 0.337146, carbon content, non-fossil 0.00013442, dry mass 1 kg, wet mass 1 kg
  note on carbon content, fossil: The control unit has a composition of 46% steel (housing), 32% plastics, 14% printed wiring boards and 8% cables (various types).;
- waste glass: 0 kg; name waste_glass
  Estimation. The glass fibre reinforced plastic of the rotor is disposed of as 50% glass and 50% plastic.
  Today, it is not possible to recycle the turbine blades. When the turbine’s lifetime expires, the blades will
  be dismantled into smaller pieces, which are deposited at controlled waste deposits.[Elsam. 2004b. Life Cycle Assessment of turbines PSO 1999. Elsam Engineering A/S, Fredericia, Denmark]
  production volume 0 kg
    Calculated from production volume of reference product using the relative outputs.
  property price 0 EUR2005; name waste_glass_price_EUR2005
  property lifetime 20 year; name waste_glass_lifetime
  properties: heating value, net 0.05 MJ, dry mass 1 kg, wet mass 1 kg
  note on heating value, net: Value extracted from "treatment of waste glass, open dump, very wet infiltration class (1000mm)"
- polyvinylchloride, suspension polymerised: 3985.8 kg; name pvc_suspension; = 0.87234*3* pvc_suspension_calc_prop_blade_kg* extrapolation_factor_blades; source Chataignere A. 2003, p. 46f; lognormal variance with pedigree 0.0641, pedigree (4,4,5,3,3)
  Literature value/calculated value. Used for the three blades. The shares of "polyvinylchloride, emulsion polymersied" and "polyvinylchloride, suspension polymerised" in the cancelled ecoinvent v2 "aluminium production mix" dataset amounted to 12.8% (emulsion) and 87.2% (suspension) respectively. These shares have been overtaken to distribute the original amount of 4569 kg polyvinylchloride.These shares correspond to the European distribution of the different PVC types.
  Sum of PVC-foam (3*279 kg) and PVC (3*131 kg) extrapolated with a weight factor from a 1.5MW wind turbine.
  Uncertainty: estimated variance. higher basic uncertainty because of the extrapolation and the age of the data. slightly higher technological score because of the split of the pvc use in the two pvc types.
  property calculation property, blade, kg 410 kg; name pvc_suspension_calc_prop_blade_kg; = 279+131
  properties: heating value, net 21.5 MJ, carbon content, fossil 0.387097, wet mass 1 kg, dry mass 1 kg
  note on carbon content, fossil: Monomer is vynyl chloride, C2H3Cl (ecoinvent v2.2 report 11_II). MW=62 g/mol
- steel, low-alloyed: 158008 kg; name steel_lowalloyed; = steel_lowalloyed_calc_prop_nacelle_kg* extrapolation_factor_nacelle; source Chataignere A. 2003, p. 46f; lognormal variance with pedigree 0.0567, pedigree (4,4,5,3,2)
  Literature value. Used in the nacelle.
  Sum of low-alloyed steel (9101 kg) and steel, no alloy (24038 kg) extrapolated with a weight factor from a 1.5MW wind turbine.
  Uncertainty: estimated variance. higher basic uncertainty because of the extrapolation and the age of the data.
  property calculation property, nacelle, kg 33139 kg; name steel_lowalloyed_calc_prop_nacelle_kg; = 24038+9101
  properties: dry mass 1 kg, carbon content, fossil 0.005, wet mass 1 kg
  note on carbon content, fossil: Low alloyed steel composition given in Tab. 3.2 ecoinvent v2.2 report 10_partII. Steel assumed to have a C content of 0.5%
- epoxy resin, liquid: 0 kg; name epoxy
  Literature value/calculated value. Used for the three blades.
  Use of epoxy resin for the three blades (3*1516) extrapolated with a weight factor from a 1.5MW wind turbine.
  property calculation property, blade, kg 1516 kg; name epoxy_calc_prop_blade_kg
  properties: heating value, net 12.82 MJ, carbon content, fossil 0.42325, dry mass 1 kg, wet mass 1 kg
- waste polyvinylchloride: 0 kg; name waste_polyvinyl
  Calculated value.
  production volume 0 kg
    Calculated from production volume of reference product using the relative outputs.
  property price 0 EUR2005; name waste_polyvinyl_price_EUR2005
  property lifetime 20 year; name waste_polyvinyl_lifetime
  properties: heating value, net 21.51 MJ, carbon content, fossil 0.440882, water content 0.00200401, dry mass 0.998 kg, wet mass 1 kg
  note on carbon content, fossil: C content in 1 kg DM was calculated using data in Tab A.1, ecoinvent v2.2 report 13_I
- waste polyethylene/polypropylene product: 0 kg; name waste_epoxy
  Calculated value. Proxy for the treatment of the epoxy resin (polyepoxide, formed from reaction of an epoxide resin with polyamine hardener)
  production volume 0 kg
    Calculated from production volume of reference product using the relative outputs.
  property price 0 EUR2005; name waste_epoxy_price_EUR2005
  property lifetime 20 year; name waste_epoxy_lifetime
  properties: heating value, net 42.47 MJ, carbon content, fossil 0.748045, water content 0.180638, dry mass 0.847 kg, wet mass 1 kg
  note on carbon content, fossil: Mixed various plastics was used to estimate the C content of this waste (Tab A.2, ecoinvent v2.2 report 13_I)
- excavation, hydraulic digger: 628 m3; = land_from*2; source Chataignere A. 2003; lognormal variance with pedigree 0.0567, pedigree (4,4,5,3,2)
  Literature value. The needed surface for the foundation is calculated so that the average pressure is about 2kg/cm2. Foundation depth is 2 m.
- road: 8000 m*year; = (10000/25)*lifetime; source Vestas 2011, p. 81; lognormal variance with pedigree 0.0966, pedigree (4,4,5,4,4)
  Literature value/estimation. Generally a combination of tarred roads and dirt roads need to be built to provide access to the power plant turbines, which are often located in remote locations. It has been estimated that 10 km of tarred road is needed for a power plant with 25 wind turbines.
  Uncertainty: estimated variance.
- steel, chromium steel 18/8: 6403.49 kg; name chromium_steel; = chromium_steel_calc_prop_nacelle_kg* extrapolation_factor_nacelle; source Chataignere A. 2003, p. 46f; lognormal variance with pedigree 0.0567, pedigree (4,4,5,3,2)
  Literature value. Used in the nacelle.
  Sum of galvanized, low grad steel (1329 kg) and high-alloyed steel (14 kg) extrapolated with a weight factor from a 1.5MW wind turbine.
  Uncertainty: estimated variance. higher basic uncertainty because of the extrapolation and the age of the data.
  property calculation property, nacelle, kg 1343 kg; name chromium_steel_calc_prop_nacelle_kg; = 14+1329
  properties: carbon content, fossil 0.0008, wet mass 1 kg, dry mass 1 kg
  note on carbon content, fossil: Stainless steel model is the grade 304 steel (18/8 stainless, 18% chromium 8% nickel; max. 0.08% C)
- waste polyethylene: 0 kg; name waste_polyethy
  Calculated value.
  production volume 0 kg
    Calculated from production volume of reference product using the relative outputs.
  property price 0 EUR2005; name waste_polyethy_price_EUR2005
  property lifetime 20 year; name waste_polyethy_lifetime
  properties: heating value, net 42.47 MJ, water content 0.00401606, carbon content, fossil 0.825301, wet mass 1 kg, dry mass 0.996 kg
- scrap steel: 0 kg; name scrap_steel; source Vestas 2011
  Calculated value. It can be assumed that 100% of the steel enter a recycling process.
  production volume 0 kg
    Calculated from production volume of reference product using the relative outputs.
  property lifetime 20 year; name scrap_steel_lifetime
  property price 0 EUR2005; name scrap_steel_price_EUR2005
  properties: wet mass 1 kg, dry mass 1 kg
- cast iron: 100258 kg; name cast_iron; = cast_iron_calc_prop_nacelle_kg* extrapolation_factor_nacelle; source Chataignere A. 2003, p. 46f; lognormal variance with pedigree 0.0567, pedigree (4,4,5,3,2)
  Literature value. Used in the nacelle.
  Use of cast iron in the nacelle (21027 kg) extrapolated with a weight factor from a 1.5MW wind turbine.
  Uncertainty: estimated variance. higher basic uncertainty because of the extrapolation and the age of the data.
  property calculation property, nacelle, kg 21027 kg; name cast_iron_calc_prop_nacelle_kg
  properties: wet mass 1 kg, dry mass 1 kg, carbon content, fossil 0.04
  note on carbon content, fossil: Cast iron is made by remelting pig iron in small furnaces (e.g. cupola furnaces or electric arc furnaces) and poured into moulds to make castings. It usually contains 2% to 6% carbon (ecoinvent v2.2 report 10_partII). An average content of 4% was considered
- aluminium, wrought alloy: 661.843 kg; name alu_wrought; = 0.68*( alu_wrought_calc_prop_nacelle_kg* extrapolation_factor_nacelle+3* alu_wrought_calc_prop_blade_kg* extrapolation_factor_blades); source Chataignere A. 2003, p. 46f; lognormal variance with pedigree 0.0641, pedigree (4,4,5,3,3)
  Literature value/calculated value. The shares of cast alloy and wrought alloy aluminium in the cancelled ecoinvent v2 "aluminium production mix" dataset amounted to 32% (cast alloy) and 68% (wrought alloy) respectively. These shares have been overtaken to distribute the original amount of 973 kg aluminium.
  Uncertainty: estimated variance. higher basic uncertainty because of the extrapolation and the age of the data. slightly higher technological score because of the split of the aluminium use in the two aluminium types.
  property calculation property, nacelle, kg 127 kg; name alu_wrought_calc_prop_nacelle_kg
  property calculation property, blade, kg 33 kg; name alu_wrought_calc_prop_blade_kg
  properties: dry mass 1 kg, wet mass 1 kg
- waste paint on wall: -2411 kg; name waste_paint_wall
  Estimation. Alkyd paint at the concrete tower.
  production volume 1.52834e6 kg; = apv_turbine_4_5MW * (waste_paint_wall / wind_turbine)
    Calculated from production volume of reference product using the relative outputs.
  property lifetime 20 year; name waste_paint_wall_lifetime
  property price 0 EUR2005; name waste_paint_wall_price_EUR2005
  properties: dry mass 1 kg, wet mass 1 kg, heating value, net 19.7 MJ, carbon content, fossil 0.65
- alkyd paint, white, without water, in 60% solution state: 0 kg; name paint; source Chataignere A. 2003, p. 46f; pedigree (1,1,1,1,1)
  Literature value/calculated value. Used for the tower, the nacelle and the three blades.
  Sum of paint used for the tower (2411kg, directly final value) as well as for the nacelle (654 kg) and in the three blades (3*184 kg) extrapolated with accordant weight factors from a 1.5MW wind turbine.
  Uncertainty: estimated variance. higher basic uncertainty because of the extrapolation and the age of the data.
  property calculation property, nacelle, kg 654 kg; name paint_calc_prop_nacelle_kg
  property calculation property, blade, kg 184 kg; name paint_calc_prop_blade_kg
  property calculation property, kg 2411 kg; name paint_calc_prop_kg
  properties: heating value, net 17.46 MJ, carbon content, non-fossil 0.161654, carbon content, fossil 0.414587, wet mass 1 kg, dry mass 1 kg
  note on carbon content, non-fossil: C content was calculated as an addition of C content in the raw materials.
  note on calculation property, kg: Mass of tower materials in the 1.5MW turbine. For use in mathematical relations.
- glass fibre reinforced plastic, polyamide, injection moulded: 45780.9 kg; name glass_plastic; = 3* glass_plastic_calc_prop_blade_kg* extrapolation_factor_blades+ glass_plastic_calc_prop_nacelle_kg* extrapolation_factor_nacelle; source Chataignere A. 2003, p. 46f; lognormal variance with pedigree 0.0567, pedigree (4,4,5,3,2)
  Literature value. Used for the rotor blades and the nacelle. Steel and aluminium blades are used for small wind turbines. For large ones, they have problems of weight or metal fatigue. Most modern rotor blades on large wind turbines are made of glass fiber reinforced polyester or epoxy. Carbon fiber or Kevlar seems to be too expensive for large turbines.
  Sum of different components, extrapolated with accordant weight factors from a 1.5MW wind turbine.
  nacelle:
  fibre glass (924 kg) and unsaturated polyester resin (2159 kg)
  one blade:
  fibre glass (2188 kg), hardener (525kg), polyamide (76kg)
  Uncertainty: estimated variance. higher basic uncertainty because of the extrapolation and the age of the data.
  property calculation property, nacelle, kg 3083 kg; name glass_plastic_calc_prop_nacelle_kg; = 924+2159
  property calculation property, blade, kg 2789 kg; name glass_plastic_calc_prop_blade_kg; = 525+76+2188
  properties: dry mass 1 kg, carbon content, fossil 0.446018, wet mass 1 kg
  note on carbon content, fossil: Polyamide resin assimilate to Nylon 66 (ecoinvent v2.2 report 7_XIII). Nylon 66 is derived from hexamethylene diamine and adipic acid and has the following structure: -(HN-(CH2)6-NH-CO-(CH2)4-CO)n- (ecoinvent v2.2 report 11_II), C12H22N2O2. MW=226 g/mol. Here Nylon 66 is – mainly for improved stiffness and stability – modified with glass fibres. The glass fibre content in the product is assumed of 30%. (ecoinvent v2.2 report 11_II)
- concrete, normal: 3086.33 m3; name concrete; = 5900000/2400+ (2*314); source Chataignere A. 2003, p. 46f; lognormal variance with pedigree 0.0567, pedigree (4,4,5,3,2)
  Literature value. Used for the tower and foundation.
  TOWER:
  For very big wind turbines, tubular tower dimensions as normally used seem to create problems for transport. The underlying 4.5 MW Enercon prototype has been built with a fully concrete tower therefore. Hybrid towers (lower part in concrete, upper part in steel) are also an option.
  Tower data:
  The tower is supposed to be in concrete reinforced steel.
  - diameter at the base: 12m
  - diameter at the top: 4m
  - thickness at the base: 1m
  - thickness at the top: 0.6m
  - concrete mass: 5.9E6 kg
  - density of concrete: 2400 kg/m3
  FOUNDATION
  Foundations are supposed to be made of reinforced concrete.
  628 m3 concrete for foundation (surface = 314 m2; depth = 2m)
  Uncertainty: estimated variance. higher basic uncertainty because of the extrapolation and the age of the data.
  properties: water content 0.086758, dry mass 2190 kg, wet mass 2380 kg
- sheet rolling, steel: 158008 kg; = steel_lowalloyed
  Calculated value.
- polyethylene, high density, granulate: 2540.86 kg; name hdpe; = 3* hdpe_calc_prop_blade_kg * extrapolation_factor_blades; source Chataignere A. 2003, p. 46f; lognormal variance with pedigree 0.0567, pedigree (4,4,5,3,2)
  Literature value. Used in the three blades.
  Use of polyethene in the three blades (3*228 kg) extrapolated with a weight factor from a 1.5MW wind turbine.
  Uncertainty: estimated variance. higher basic uncertainty because of the extrapolation and the age of the data.
  property calculation property, blade, kg 228 kg; name hdpe_calc_prop_blade_kg
  properties: carbon content, fossil 0.857143, dry mass 1 kg, wet mass 1 kg, heating value, net 42.47 MJ
  note on carbon content, fossil: Polyethylene is formed out of a huge amount of ethylene monomers (C2H4) (ecoinvent v2.2 report 11_II). MW=28 g/mol
- sheet rolling, chromium steel: 6403.49 kg; = chromium_steel
  Calculated value.
- polyvinylchloride, emulsion polymerised: 583.29 kg; name pvc_emulsion; = 0.12766*3*pvc_emulsion_calc_prop_blade_kg*extrapolation_factor_blades; source Chataignere A. 2003, p. 46f; lognormal variance with pedigree 0.0641, pedigree (4,4,5,3,3)
  (same comment as for polyvinylchloride, suspension polymerised)
  property calculation property, blade, kg 410 kg; name pvc_emulsion_calc_prop_blade_kg; = 279+131
  properties: wet mass 1 kg, dry mass 1 kg, heating value, net 21.5 MJ, carbon content, fossil 0.387097
- waste reinforced concrete: 0 kg; name waste_reinforced_concrete
  Calculated value. Contains the foundation and tower concrete with the reinforcing steel. Calculated value. A density of 2400kg/m3 is assumed for the reinforced concrete.
  production volume 0 kg
    Calculated from production volume of reference product using the relative outputs.
  property lifetime 20 year; name waste_reinforced_concrete_lifetime
  property price 0 EUR2005; name waste_reinforced_concrete_price_EUR2005
  properties: water content 0.00585407, dry mass 0.99418 kg, wet mass 1 kg
- waste plastic, mixture: 0 kg; name waste_plastic
  (same comment as for waste glass)
  production volume 0 kg
    Calculated from production volume of reference product using the relative outputs.
  property lifetime 20 year; name waste_plastic_lifetime
  property price 0 EUR2005; name waste_plastic_price_EUR2005
  properties: dry mass 0.847 kg, wet mass 1 kg, heating value, net 30.79 MJ, water content 0.180638, carbon content, fossil 0.747344
  note on carbon content, fossil: C content in 1 kg DM was calculated using data in Tab A.2, ecoinvent v2.2 report 13_I
- waste paint on metal: 0 kg; name waste_paint_metal
  Calculated value/estimation. Paint on the nacelle and the blades.
  production volume 0 kg
    Calculated from production volume of reference product using the relative outputs.
  property lifetime 20 year; name waste_paint_metal_lifetime
  property price 0 EUR2005; name waste_paint_metal_price_EUR2005
  properties: heating value, net 19.7 MJ, carbon content, fossil 0.65, dry mass 1 kg, wet mass 1 kg
- copper, cathode: 44252.2 kg; name copper; = copper_calc_prop_nacelle_kg* extrapolation_factor_nacelle; source Chataignere A. 2003, p. 46f; lognormal variance with pedigree 0.0567, pedigree (4,4,5,3,2)
  Literature value. Used in the nacelle.
  Use of copper in the nacelle (9281 kg) extrapolated with a weight factor from a 1.5MW wind turbine.
  Uncertainty: estimated variance. higher basic uncertainty because of the extrapolation and the age of the data.
  property calculation property, nacelle, kg 9281 kg; name copper_calc_prop_nacelle_kg
  properties: dry mass 1 kg, wet mass 1 kg
- synthetic rubber: 612.927 kg; name rubber; = 3* rubber_calc_prop_blade_kg * extrapolation_factor_blades; source Chataignere A. 2003; lognormal variance with pedigree 0.0567, pedigree (4,4,5,3,2)
  Literature value. Used in the three blades.
  Use of rubber in the three blades (3*55 kg) extrapolated with a weight factor from a 1.5MW wind turbine.
  Uncertainty: estimated variance. higher basic uncertainty because of the extrapolation and the age of the data.
  property calculation property, blade, kg 55 kg; name rubber_calc_prop_blade_kg
  properties: heating value, net 26.42 MJ, carbon content, fossil 0.871949, wet mass 1 kg, dry mass 1 kg
  note on carbon content, fossil: EPDM (Ethylene-propene-diene terpolymer) rubber is a terpolymer of ethylene, propene, and a diene with the residual unsaturated portion of the diene in the side chain (ecoinvent v2.2 report 7-part XX & Ullmann). Chemical formula (deduced from Evidences of Solvent-Induced Miscibility in Polychloroprene-co-Ethylene-Propene Diene Terpolymer Blends, Dubey et al., Journal of Applied Polymer Science, 2009, 111:1884–1891): C20H35
- sheet rolling, aluminium: 973.298 kg; = alu_cast+alu_wrought; source Chataignere A. 2003
  Calculated value. Proxy for wire drawing of aluminium.
- scrap copper: 0 kg; name scrap_copper; source Vestas 2011
  Calculated value. It can be assumed that 100% of the copper enter a recycling process.
  production volume 0 kg
    Calculated from production volume of reference product using the relative outputs.
  property price 0 EUR2005; name scrap_copper_price_EUR2005
  property lifetime 20 year; name scrap_copper_lifetime
  properties: dry mass 1 kg, wet mass 1 kg
- wire drawing, copper: 44252.2 kg; = copper
  Calculated value.
- electricity, medium voltage: 445224 kWh; = (reinforcing_steel+ chromium_steel+ steel_lowalloyed+ copper+cast_iron+ glass_plastic+ hdpe+ rubber+ pvc_emulsion+ pvc_suspension+ alu_cast+ alu_wrought+paint)*0.5; source Burger, B. 2007; lognormal variance with pedigree 0.216, pedigree (5,5,5,5,5)
  Estimated value. Additional to energy requirements for material processing, a factor of 0.5 kWh/kg material (except of concrete) after (Burger & Bauer 2004) is included with medium voltage electricity for assembly of the parts, further installation of the plant, and removal of the turbine. The value is only a rough estimation based on the potential energy necessary for lifting the relevant weights.
  Uncertainty: Rough estimate
- aluminium scrap, post-consumer: -973.298 kg; source Vestas 2011
  Calculated value. It can be assumed that 100% of the aluminium enter a recycling process.
  production volume 616977 kg
  properties: dry mass 1 kg, wet mass 1 kg
- iron scrap, unsorted: -100258 kg; source Vestas 2011
  Calculated value. It can be assumed that 100% of the iron enter a recycling process.
  production volume 6.35537e7 kg
  properties: dry mass 1 kg, wet mass 1 kg
- waste rubber, unspecified: -300.163, -12.6008, -300.163 kg (3 entries)
  Calculated value
  production volume 388537 kg
  properties: heating value, net 27.19 MJ, carbon content, fossil 0.853, wet mass 1 kg, dry mass 1 kg, lifetime 20 year
- waste glass: -3484.6, -169.078, -15.7747, -70.586, -1834.45, -23.9548, -3.8358, -17288.2 kg (8 entries)
  (same comment as for waste glass)
  production volume 1.45103e7 kg
  properties: heating value, net 0.05 MJ, dry mass 1 kg, wet mass 1 kg, lifetime 20 year
- epoxy resin, liquid: 2939.64, 13954.9 kg (2 entries)
  (same comment as for epoxy resin, liquid)
  properties: heating value, net 12.82 MJ, carbon content, fossil 0.42325, dry mass 1 kg, wet mass 1 kg, calculation property, blade, kg 1516 kg
- waste polyvinylchloride: -439.797, -33.9057, -14.0043, -13.2984, -507.448, -5.65757, -2.56424, -3552.42 kg (8 entries)
  Calculated value.
  production volume 2.89636e6 kg
  properties: heating value, net 21.51 MJ, carbon content, fossil 0.440882, water content 0.00200401, dry mass 0.998 kg, wet mass 1 kg, lifetime 20 year
- waste polyethylene/polypropylene product: -4738.8, -142.199, -12013.5 kg (3 entries)
  (same comment as for waste polyethylene/polypropylene product)
  production volume 1.07095e7 kg
  properties: heating value, net 42.47 MJ, carbon content, fossil 0.748045, water content 0.180638, dry mass 0.847 kg, wet mass 1 kg, lifetime 20 year
- waste polyethylene: -244.57, -18.8549, -7.78775, -7.39519, -282.191, -3.14616, -1.42597, -1975.49 kg (8 entries)
  Calculated value.
  production volume 1.61066e6 kg
  properties: heating value, net 42.47 MJ, water content 0.00401606, carbon content, fossil 0.825301, wet mass 1 kg, dry mass 0.996 kg, lifetime 20 year
- scrap steel: -40033.5, -50.721, -124328 kg (3 entries); source Vestas 2011
  Calculated value. It can be assumed that 100% of the steel enter a recycling process.
  production volume 1.04221e8 kg
  properties: wet mass 1 kg, dry mass 1 kg, lifetime 20 year
- alkyd paint, white, without water, in 60% solution state: 1318.89, 6260.93 kg (2 entries); source Chataignere A. 2003, p. 46f; lognormal variance with pedigree 0.0567, pedigree (4,4,5,3,2)
  (same comment as for alkyd paint, white, without water, in 60% solution state)
  properties: calculation property, nacelle, kg 654 kg, heating value, net 17.46 MJ, carbon content, non-fossil 0.161654, carbon content, fossil 0.414587, wet mass 1 kg, dry mass 1 kg, calculation property, blade, kg 184 kg, calculation property, kg 2411 kg
- waste reinforced concrete: -518682, -5495.82, -7.40249e6 kg (3 entries)
  (same comment as for waste reinforced concrete)
  production volume 5.02474e9 kg
  properties: water content 0.00585407, dry mass 0.99418 kg, wet mass 1 kg, lifetime 20 year
- waste plastic, mixture: -2203.31, -169.862, -70.1592, -66.6228, -2542.24, -28.3435, -12.8464, -17797.1 kg (8 entries)
  (same comment as for waste glass)
  production volume 1.45103e7 kg
  properties: dry mass 0.847 kg, wet mass 1 kg, lifetime 20 year, heating value, net 30.79 MJ, water content 0.180638, carbon content, fossil 0.747344
- waste paint on metal: -43.5054, -5125.32 kg (2 entries)
  Calculated value/estimation. Paint on the nacelle and the blades.
  production volume 3.27653e6 kg
  properties: lifetime 20 year, heating value, net 19.7 MJ, carbon content, fossil 0.65, dry mass 1 kg, wet mass 1 kg
- scrap copper: -14037.2, -658.593, -29556.5 kg (3 entries); source Vestas 2011
  Calculated value. It can be assumed that 100% of the copper enter a recycling process.
  production volume 2.80516e7 kg
  properties: dry mass 1 kg, wet mass 1 kg, lifetime 20 year

## Inputs from nature
- Transformation, from pasture, man made [natural resource, land]: 314 m2; name land_from; source Chataignere A. 2003, p. 46; lognormal variance with pedigree 0.0567, pedigree (4,4,5,3,2)
  Literature value. The needed surface for the foundation is calculated so that the average pressure is about 2kg/cm2.
  Uncertainty: estimated variance. higher basic uncertainty because of the extrapolation and the age of the data.
- Transformation, to industrial area [natural resource, land]: 314 m2; = land_from
  Calculated value.
- Occupation, industrial area [natural resource, land]: 6280 m2*year; name occu_area; = lifetime*land_from
  Calculated value.

## Sampling procedure
Literature, estimations, expert knowledge

## Extrapolations
This dataset has been extrapolated from year 2008 to the year of the calculation (2021). The uncertainty has been adjusted accordingly.

## Review by Bo Weidema 2012-02-23
This dataset has only been reviewed by two editors.

## Review by Carl Vadenbo 2012-02-23
The dataset were found to meet the quality guidelines for the ecoinvent database on 2012.04.06.

Improvements in the following areas/aspects are recommended for future revisions in order to strenghen the overall quality of the dataset:
-energy use and emissions arising during the manufacturing process of the components and during the final assembly;
-material losses during manufacturing;
-packaging materials;
-transport of components between the location of the manufacturing processes and the site of the installation.

Furthermore, in the modeling of the output of material from the wind mill rotor blades, waste plastics and waste glass have been used as proxy exchanges which represent a simplification of reality. To improve the quality of the dataset and to enable the identification of the appropriate treatment activities, it is hence recommended that the output material(s) from the rotor blades is more accurately described and defined in future revisions of the dataset.
