# welding, arc, steel

Dataset: EcoSpold 2, unit process
Geography: RER
Time period: 1997-01-01 to 2021-12-31
Technology level: current
Classification: EcoSpold01Categories: metals/processing
Classification: ISIC rev.4 ecoinvent: 2592:Treatment and coating of metals; machining
Synonyms: MIG; MAG
Tags: ConvertedDataset
Scenario: Business-as-Usual
System model: Allocation, cut-off by classification
Share of production covered: 0 %
Generated by: Silvio Blaser
Published in: Werner F. 2007
Database: ecoinvent
isCopyrightProtected: true
accessRestrictedTo: 1

## General comment
Different arc welding technologies can have verry different emissions. Only to be used for the technology describes or as a rough proxy if welding is not important in the system considered.
[This dataset was already contained in the ecoinvent database version 2. It was not individually updated during the transfer to ecoinvent version 3. Life Cycle Impact Assessment results may still have changed, as they are affected by changes in the supply chain, i.e. in other datasets. This dataset was generated following the ecoinvent quality guidelines for version 2. It may have been subject to central changes described in the ecoinvent version 3 change report (http://www.ecoinvent.org/database/ecoinvent-version-3/reports-of-changes/), and the results of the central updates were reviewed extensively. The changes added e.g. consistent water flows and other information throughout the database. The documentation of this dataset can be found in the ecoinvent reports of version 2, which are still available via the ecoinvent website. The change report linked above covers all central changes that were made during the conversion process.]

## Included activities end
Includes the MAG-welding of non alloyed steel and the transports of the filler rod and the protective gas to the place of use.

## Geography
Data-set is representive for Europe

## Technology
MAG-welding of unalloyed steel with 83% Ar, 13% CO2 and 4% O2 protective gas and a wire consumption of 0.0536 kg/m.

## Reference product
- welding, arc, steel: 1 m; CPC 88731: Metal treatment and coating services; By-product classification allocatable product
  EcoSpold01Location=RER
  production volume 1.32237 m
    This is a placeholder value that does not reflect real-world production volumes. This dataset does not currently require a real-world production volume to work in the database framework, and no actual data were collected yet. This has no negative effect on the results of the ecoinvent database. The placeholder value of this activity was scaled according to the nominal GDP of 2005 (source: United Nations, http://data.un.org/Glossary.aspx?q=GDP+%28current+US%24%29, accessed 20130726) to reflect an appropriate share of the global production volume, which is also a placeholder value.
  property price 0.0343663 EUR2005
    Calculated based on inputs: The price of the product has been calculated as a sum of the values of the material and energy inputs for this product. This value is therefore a rough estimation. It may underestimate the real price since there are additional expenses when producing any product. These expences can include for example labour costs, treatment of waste materials and profit for the producer. Please consider carefully whether this level of data quality is acceptable for your application.

## Inputs from technosphere
- oxygen, liquid: 0.000915 kg; lognormal variance with pedigree 0.076, pedigree (4,5,5,1,1)
  EcoSpold01Location=RER
  properties: dry mass 1 kg, wet mass 1 kg
- argon, liquid: 0.0237 kg; lognormal variance with pedigree 0.076, pedigree (4,5,5,1,1)
  EcoSpold01Location=RER
  properties: wet mass 1 kg, dry mass 1 kg
- electricity, medium voltage: 0.0275 kWh; lognormal variance with pedigree 0.0601, pedigree (3,5,5,3,1)
  EcoSpold01Location=UCTE
- steel, low-alloyed, hot rolled: 0.0536 kg; lognormal variance with pedigree 0.076, pedigree (4,5,5,1,1)
  EcoSpold01Location=RER
  properties: carbon content, fossil 0.005, wet mass 1 kg, dry mass 1 kg
  note on carbon content, fossil: Low alloyed steel composition given in Tab. 3.2 ecoinvent v2.2 report 10_partII. Steel assumed to have a C content of 0.5%
- carbon dioxide, liquid: 0.00411 kg; lognormal variance with pedigree 0.076, pedigree (4,5,5,1,1)
  EcoSpold01Location=RER
  properties: dry mass 1 kg, heating value, net 8.27 MJ, wet mass 1 kg, carbon content, fossil 0.272727
- electronics, for control units: 1e-5 kg; lognormal variance with pedigree 0.4861, pedigree (5,5,5,3,3)
  EcoSpold01Location=RER
  properties: carbon content, non-fossil 0.00013442, dry mass 1 kg, carbon content, fossil 0.337146, wet mass 1 kg
  note on carbon content, non-fossil: The control unit has a composition of 46% steel (housing), 32% plastics, 14% printed wiring boards and 8% cables (various types).;

## Emissions to nature
- Chromium VI [air, unspecified]: 3e-8 kg; lognormal variance with pedigree 0.7561, pedigree (1,5,5,3,3)
- Ozone [air, unspecified]: 9.06e-6 kg; lognormal variance with pedigree 0.1461, pedigree (1,5,5,3,3)
- Carbon monoxide, fossil [air, unspecified]: 6.67e-5 kg; lognormal variance with pedigree 0.7561, pedigree (1,5,5,3,3)
- Zinc [air, unspecified]: 4.2e-7 kg; lognormal variance with pedigree 0.7561, pedigree (1,5,5,3,3)
- Manganese [air, unspecified]: 1.12e-5 kg; lognormal variance with pedigree 0.7561, pedigree (1,5,5,3,3)
- Nickel [air, unspecified]: 1.12e-5 kg; lognormal variance with pedigree 0.7561, pedigree (1,5,5,3,3)
- Particulates, < 2.5 um [air, unspecified]: 0.000141 kg; lognormal variance with pedigree 0.4241, pedigree (4,5,5,3,3)
- Iron [air, unspecified]: 8.74e-5 kg; lognormal variance with pedigree 0.1461, pedigree (1,5,5,3,3)
- Copper [air, unspecified]: 2.1e-7 kg; lognormal variance with pedigree 0.1461, pedigree (1,5,5,3,3)
- Chromium [air, unspecified]: 2.81e-5 kg; lognormal variance with pedigree 0.7561, pedigree (1,5,5,3,3)
- Molybdenum [air, unspecified]: 2.16e-6 kg; lognormal variance with pedigree 0.7561, pedigree (1,5,5,3,3)
- Nitrogen oxides [air, unspecified]: 2e-6 kg; lognormal variance with pedigree 0.1461, pedigree (1,5,5,3,3)

## Sampling procedure
Literature

## Extrapolations
This dataset has been extrapolated from year 2002 to the year of the calculation (2021). The uncertainty has been adjusted accordingly.

## Review by Roland Hischier 2003-06-17
Passed.
