# treatment of spent anion exchange resin from potable water production, municipal incineration with fly ash extraction

Dataset: EcoSpold 2, unit process
Geography: CH
Time period: 2006-01-01 to 2021-12-31
Technology level: current
Classification: ISIC rev.4 ecoinvent: 3821:Treatment and disposal of non-hazardous waste
Synonyms: municipal waste incineration; Siedlungsabfallverbrennung; Kehrichtverbrennung
Scenario: Business-as-Usual
System model: Allocation, cut-off by classification
Share of production covered: 100 %
Generated by: Gabor Doka
Published in: Doka G. 2015
Database: ecoinvent
isCopyrightProtected: true
accessRestrictedTo: 1

## General comment
This dataset represents the activity of waste disposal of spent anion exchange resin from potable water production in a municipal solid waste incinerator (MSWI) // Recommended use of this dataset: disposal of used ion exchange resins *for potable water production*. Resins used of other purifications can have significantly more toxic composition, depending on use. // // Waste composition (wet, in ppm): upper heating value 16.06 MJ/kg; lower heating value 6.081 MJ/kg; H2O 499710; O 70320; H 40160; C 327130; S 23980; N 28640; P 10; B n.a.; Cl 7880; Br n.a.; F n.a.; I n.a.; Ag n.a.; As n.a.; Ba n.a.; Cd 1.592; Co n.a.; Cr n.a.; Cu 16.311; Hg n.a.; Mn n.a.; Mo n.a.; Ni n.a.; Pb 9.2482; Sb n.a.; Se n.a.; Sn 226.21; V n.a.; Zn 34.545; Be n.a.; Sc n.a.; Sr n.a.; Ti n.a.; Tl n.a.; W n.a.; Si 1880; Fe n.a.; Ca n.a.; Al n.a.; K n.a.; Mg n.a.; Na n.a.; // Share of carbon in waste that is biogenic 0%. // Share of metals in waste not oxidised and bulk-recyclable (exclude very small or thin parts) Iron: 0%; Alu: 0%; Copper: 0%. // Recovery of metal scrap from bottom ash to recycling: 0g iron scrap, 0g aluminium scrap, 0g copper scrap. From this waste, the FLUWA process in the technology mix recovers 0.00402kg (DM) of a hydroxide sludge to be recycled in zinc furnaces. // Ultimately one kg of this waste produces 0.06293 kg of bottom ash (can include some washed ash) and 0.01493 kg of residues, which are landfilled (technology mix). Additional solidification of residues with 0.005974 kg of cement.Net energy production: 0.51MJ/kg electric energy and 1.18MJ/kg thermal energy. //

## Included activities start
waste incineration from waste reception gate and delivery into waste bunker at incinerator plant site (without transports to the incinerator)

## Included activities end
Waste-specific short-term emissions to water from leachate. Long-term emissions from landfill to ground water.

## Geography
Specific to the technology mix encountered in Switzerland in 2012.

## Technology
average Swiss MSWI plants in 2010 (grate incinerators) with electrostatic precipitator for fly ash (ESP), wet flue gas scrubber and 25% SNCR , 42.77% SCR-high dust , 32.68% SCR-low dust -DeNOx facilities and 0% without Denox (weighted according to mass of burnt waste, representing Swiss average). Efficiency of iron scrap separation from slag : 58%. Efficiency of non-ferrous scrap separation from slag : 31%. The technology mix for this dataset includes a filter ash treatment (FLUWA) of a share of 46.22%. Gross electric efficiency technology mix 15.84% and Gross thermal efficiency technology mix 28.51%

## Time period
Waste composition as given in literature reference, theoretical data or other source. Transfer coefficients for modern MSWI.

## Reference product
- spent anion exchange resin from potable water production: -1 kg; CPC 39: Wastes or scraps; By-product classification Waste
  Main reference product of this activity (supply of disposal service).
  production volume 21442 kg
    based on corresponding global production volume of MSW fraction in conventional MSWI (wo fly ash extraction) and scaled down to annual Swiss incinerated MSW mass of 3.02 mio. tonnes.
  property price 0 EUR2005
    Waste products are assigned a price of zero as they are assumed to require further treatment.
  property heating value, net 6.08 MJ
    Value taken from the general comment of the treatment dataset.
  property carbon content 0.65388
    carbon content on a dry matter basis (reserved; not for manual entry)
  properties: wet mass 1 kg, dry mass 0.50029 kg, water in wet mass 0.49971 kg, tin content 0.00045215, water content 0.99885, silicon content 0.0037578, carbon content, fossil 0.65388, cadmium content 3.1821e-6, zinc content 6.9051e-5, lead content 1.8486e-5, copper content 3.2603e-5, nitrogen content 0.057247, chlorine content 0.015751, sulfur content 0.047932, hydrogen content 0.080274, phosphorus content 1.9988e-5, oxygen content 0.14056, carbon allocation 0.32713 kg

## By-products
- heat, for reuse in municipal waste incineration only: 0 MJ; name E_th_prod_MSWI; By-product classification allocatable product; CPC 17300: Steam and hot water; pedigree (1,1,1,1,1)
  Net useful heat generated from this waste and used in internal MSWI plant energy redistribution.
  Uncertainty: uncertainty is calculated from uncertainties in waste composition and uncertainties in energy efficiency and the uncertainty in internal energy demand
  production volume 25363 MJ
    calculated in proportion to reference product waste input to incinerator
  property exergy 0.1842 MJ; name E_th_prod_MSWI_exergy
    This exergy property is based on the exergy content of the product.
  property true value relation 0.1842; name E_th_prod_MSWI_true_value_relation
    property to calculate "true value" from
  property price 0.0106 EUR2005; name E_th_prod_MSWI_price_EUR2005
    Average European district heat price from Ecoheatcool and Euroheat 2005-2006, Ecoheat Work package 1: The European heat market. Final report. 10.6 EUR/GJ i s the price of district heat. http://www.solarthermalworld.org/files/Ecoheatcool%20WP1%20Web.pdf?download
- electricity, for reuse in municipal waste incineration only: 0 kWh; name E_el_prod_MSWI; CPC 17100: Electrical energy; By-product classification allocatable product; pedigree (1,1,1,1,1)
  Net electricity generated from this waste and used in internal MSWI plant energy redistribution.
  Uncertainty: uncertainty is calculated from uncertainties in waste composition and uncertainties in energy efficiency and the uncertainty in internal energy demand
  production volume 3046.1 kWh
    calculated in proportion to reference product waste input to incinerator
  property true value relation 3.6; name E_el_prod_MSWI_true_value_relation
    property to calculate "true value" from
  property price 0.1 EUR2005; name E_el_prod_MSWI_price_EUR2005
    Estimated to be the same price as in case of electricity, medium voltage.
  property exergy 3.6 MJ; name E_el_prod_MSWI_exergy
    This exergy property is based on the exergy content of the product.
- metalliferous hydroxide sludge: 0 kg; By-product classification Recyclable; CPC 1429: Other non-ferrous metal ores and concentrates (other than uranium or thorium ores and concentrates); pedigree (1,1,1,1,1)
  Metalliferous hydroxide sludge from filter ash leaching (FLUWA).
  Uncertainty: uncertainty is calculated from uncertainties in waste composition and transfer coefficients to filter ash in incinerator and the uncertainty of the transfer coefficients of the FLUWA process.
  production volume 0 kg
    calculated in proportion to reference product waste input to incinerator
  property heating value, net 0 MJ
    Non combustible products are assumed to have an LHV equal to zero (0).
  property price 0.0042 EUR2005
    World market value of manure, deflated with barley world market price and consumer price index, based on [http://www.gov.pe.ca/photos/original/af_NM_manconv.pdf].
  property carbon content 0.0042296
    carbon content on a dry matter basis (reserved; not for manual entry)
  properties: water in wet mass 0.75 kg, wet mass 1 kg, carbon content, fossil 0.0042296, copper content 1.6846e-6, tin content 4.9616e-5, dry mass 0.25 kg, water content 3, zinc content 0.0015146, silicon content 2.4758e-5, lead content 4.1503e-5, cadmium content 0.00013483, phosphorus content 4.8793e-5, chlorine content 0.047226, oxygen content 0.58015, sulfur content 0.36658, carbon allocation 0.0010574 kg

## Inputs from technosphere
- chemical, inorganic: 0.00021266 kg; lognormal variance with pedigree 0.18782, pedigree (1,1,4,1,1)
  Auxilliary inputs for the wastewater treatment stage of the incinerator plant. Proxy for Polyelectrolyte.
  Uncertainty: uncertainty calculated from uncertainty in average Polyelectrolyte input, of transfer coefficients in the incinerator, and the uncertainty of the waste composition of this waste
  properties: wet mass 1 kg, dry mass 1 kg, carbon content, fossil 0.003
- chromium oxide, flakes: 4.4993e-6 kg; lognormal variance with pedigree 1.2684, pedigree (1,1,4,1,1)
  Input to DeNOx stage. Active component in SCR catalyst (vanadium pentoxide, V2O5), here approximated with the available chromium trioxide.
  Uncertainty: uncertainty calculated from uncertainty in average DeNOx input, uncertainty in the share of thermal NOx, uncertainty of nitrogen content in average municipal waste and the uncertainty in nitrogen content in *this* waste.
  properties: dry mass 1 kg, wet mass 1 kg
- municipal waste incineration facility: 2.5e-10 unit
  Demands per kilogram waste.
- chemical, organic: 2.2537e-7 kg; lognormal variance with pedigree 1.5146, pedigree (1,1,4,1,1)
  Auxilliary inputs for the wastewater treatment stage of the incinerator plant. Proxy for (pure) Trisodium-trimercapto-s-triazine (CAS 17766-26-6), used as 15% diluted solution, aka TMT15.
  Uncertainty: uncertainty calculated from uncertainty in average TMT15 input, of transfer coefficients in the incinerator, and the uncertainty of the waste composition of this waste
  properties: heating value, net 19.03 MJ, wet mass 1 kg, carbon content, fossil 0.628, dry mass 1 kg
- titanium dioxide: 0.00022047 kg; lognormal variance with pedigree 1.2684, pedigree (1,1,4,1,1)
  Input to DeNOx stage (TiO2 catalyst carrier)
  Uncertainty: uncertainty calculated from uncertainty in average DeNOx input, uncertainty in the share of thermal NOx, uncertainty of nitrogen content in average municipal waste and the uncertainty in nitrogen content in *this* waste.
  properties: wet mass 1 kg, dry mass 1 kg
- iron (III) chloride, without water, in 40% solution state: 3.9861e-7 kg; lognormal variance with pedigree 0.74136, pedigree (1,1,4,1,1)
  Auxilliary inputs for the wastewater treatment stage of the incinerator plant.
  Uncertainty: uncertainty calculated from uncertainty in average FeCl3 input, of transfer coefficients in the incinerator, and the uncertainty of the waste composition of this waste
  properties: dry mass 1 kg, wet mass 1 kg
- slag landfill: 1.1188e-10 unit; lognormal variance with pedigree 0.074687, pedigree (1,1,4,1,1)
  Landfill infrastructure required for landfilling of bottom ash.
  Uncertainty: uncertainty is calculated from uncertainties in waste composition and transfer coefficients in incinerator
- heat, district or industrial, natural gas: 0.65803 MJ; lognormal variance with pedigree 0.86256, pedigree (1,1,4,1,1)
  Input to DeNOx stage, to heat up flue gas in low-dust SCR.
  Uncertainty: uncertainty calculated from uncertainty in average DeNOx input, uncertainty in the share of thermal NOx, uncertainty of nitrogen content in average municipal waste and the uncertainty in nitrogen content in *this* waste.
  properties: heating value, net 1 MJ
- process-specific burdens, residual material landfill: 0.029776 kg; lognormal variance with pedigree 0.067364, pedigree (1,1,4,1,1)
  Mass-specific expenditures required for landfilling of incineration residues.;activityLink introduced to establish a direct link to the corresponding regional supply of this product
  Uncertainty: uncertainty is calculated from uncertainties in waste composition and transfer coefficients in incinerator
- hydrochloric acid, without water, in 30% solution state: 0.00042047 kg; lognormal variance with pedigree 0.11603, pedigree (1,1,4,1,1)
  Auxilliary inputs for the wastewater treatment stage of the incinerator plant.
  Uncertainty: uncertainty calculated from uncertainty in average HCl input, of transfer coefficients in the incinerator, and the uncertainty of the waste composition of this waste
  properties: heating value, net 3.32 MJ, wet mass 1 kg, dry mass 1 kg
- process-specific burdens, slag landfill: 0.062933 kg; lognormal variance with pedigree 0.074687, pedigree (1,1,4,1,1)
  Mass-specific expenditures required for landfilling of bottom ash.;activityLink introduced to establish a direct link to the corresponding regional supply of this product
  Uncertainty: uncertainty is calculated from uncertainties in waste composition and transfer coefficients in incinerator
- transport, freight, lorry, unspecified: 0.0034079 metric ton*km; lognormal variance with pedigree 0.04767, pedigree (1,1,4,1,1)
  Transport services to transport incineration residues to landfills and filter ash to external treatments (FLUWA).
  Uncertainty: uncertainty calculated from uncertainty of the waste composition of this waste, uncertainty of transfer coefficients and the uncertainty in generic transportation distances
- quicklime, milled, packed: 0.0037313 kg; lognormal variance with pedigree 0.47669, pedigree (1,1,4,1,1)
  Auxilliary inputs for the flue gas treatment stage of the incinerator plant.
  Uncertainty: uncertainty calculated from uncertainty in average CaO input, of transfer coefficients in the incinerator, and the uncertainty of the waste composition of this waste
  properties: dry mass 0.99 kg, wet mass 1 kg, water content 0.010101
- ammonia, anhydrous, liquid: 0.0035189 kg; lognormal variance with pedigree 0.86256, pedigree (1,1,4,1,1)
  Input to DeNOx stage (100% NH3).
  Uncertainty: uncertainty calculated from uncertainty in average DeNOx input, uncertainty in the share of thermal NOx, uncertainty of nitrogen content in average municipal waste and the uncertainty in nitrogen content in *this* waste.
  properties: dry mass 1 kg, wet mass 1 kg
- residual material landfill: 6.2033e-11 unit; lognormal variance with pedigree 0.067364, pedigree (1,1,4,1,1)
  Landfill infrastructure required for landfilling of incineration residues.
  Uncertainty: uncertainty is calculated from uncertainties in waste composition and transfer coefficients in incinerator
- sodium hydroxide, without water, in 50% solution state: 0.0093649 kg; lognormal variance with pedigree 0.12733, pedigree (1,1,4,1,1)
  Auxilliary inputs for the flue gas treatment stage of the incinerator plant, and partially in the filter ash treatment (FLUWA).
  Uncertainty: uncertainty calculated from uncertainty in average NaOH input, of transfer coefficients in the incinerator, and the uncertainty of the waste composition of this waste
  properties: heating value, net 3.03 MJ, wet mass 1 kg, dry mass 1 kg
- waste cement, hydrated: -0.014934 kg; lognormal variance with pedigree 0.076448, pedigree (1,1,4,1,1)
  Hydrated cement output for solidification of landfilled residual material.
  Uncertainty: Uncertainty calculated from uncertainty of the waste composition of this waste and transfer coefficients in the incinerator and of the solidification recipe.
  production volume 320.23 kg
    calculated in proportion to reference product waste input to incinerator
  properties: wet mass 1 kg, dry mass 1 kg
- water, decarbonised: 2.521 kg; lognormal variance with pedigree 0.74136, pedigree (1,1,4,1,1)
  Incinerator process water used in flue gas scrubber stage.
  Uncertainty: uncertainty calculated from uncertainty in average water input, and the uncertainty of the waste composition of this waste
  properties: wet mass 1 kg
- cement, unspecified: 0.0059738 kg; lognormal variance with pedigree 0.076448, pedigree (1,1,4,1,1)
  Cement required for solidification of landfilled residual material.
  Uncertainty: Uncertainty calculated from uncertainty of the waste composition of this waste, of transfer coefficients in the incinerator and of the solidification recipe.
  properties: wet mass 1 kg, dry mass 1 kg
- hydrogen peroxide, without water, in 50% solution state: 0.00092791 kg; lognormal variance with pedigree 0.14583, pedigree (1,1,4,1,1)
  Auxilliary oxidising agent for filter ash treatment (FLUWA).
  Uncertainty: uncertainty calculated from uncertainty in of transfer coefficients in the incinerator, and the uncertainty of the waste composition of this waste
  properties: heating value, net 7.13 MJ, wet mass 1 kg, dry mass 1 kg
- metalliferous hydroxide sludge: -0.016091 kg; lognormal variance with pedigree 0.066956, pedigree (1,1,4,1,1)
  (same comment as for metalliferous hydroxide sludge)
  production volume 345.02 kg
  properties: price 0.0042 EUR2005, wet mass 1 kg, carbon content, fossil 0.0042296, copper content 1.6846e-6, tin content 4.9616e-5, dry mass 0.25 kg, water content 3, zinc content 0.0015146, silicon content 2.4758e-5, lead content 4.1503e-5, cadmium content 0.00013483, phosphorus content 4.8793e-5, chlorine content 0.047226, oxygen content 0.58015, sulfur content 0.36658

## Inputs from nature
- Oxygen [natural resource, in air]: 1.2211 kg; lognormal variance with pedigree 0.039253, pedigree (1,1,4,1,1)
  Oxygen from ambient air needed to combust and oxidise this waste. Net demand, i.e. without O2 leaving the plant in flue gas uncombusted.
  Uncertainty: uncertainty is calculated from uncertainties in waste composition and transfer coefficients to flue gas and soild residues in incinerator

## Emissions to nature
- Hydrogen chloride [air, urban air close to ground]: 4.4968e-6 kg; lognormal variance with pedigree 0.42742, pedigree (1,1,4,1,1)
  Emission to air from waste composition and transfer coefficients.
  Uncertainty: uncertainty is calculated from uncertainties in waste composition and transfer coefficients in incinerator
- Thallium [water, ground-, long-term]: 1.1163e-9 kg; lognormal variance with pedigree 0.26601, pedigree (1,1,4,1,1)
  Long-term emissions from landfilling of incineration residues.
  Uncertainty: uncertainty is calculated from uncertainties in waste composition and transfer coefficients in incinerator and landfills.
- Lead [water, ground-, long-term]: 6.512e-6 kg; lognormal variance with pedigree 2.8595, pedigree (1,1,4,1,1)
  (same comment as for Thallium)
- Phosphorus [air, urban air close to ground]: 1.0162e-8 kg; lognormal variance with pedigree 1.2954, pedigree (1,1,4,1,1)
  (same comment as for Hydrogen chloride)
- Chromium VI [water, ground-, long-term]: 3.6829e-8 kg; lognormal variance with pedigree 0.0146401, pedigree (1,1,4,1,1)
  (same comment as for Thallium)
- Phosphate [water, ground-, long-term]: 8.9935e-7 kg; lognormal variance with pedigree 5.663, pedigree (1,1,4,1,1)
  (same comment as for Thallium)
- COD, Chemical Oxygen Demand [water, ground-, long-term]: 0.0024242 kg; lognormal variance with pedigree 0.04239, pedigree (1,1,4,1,1)
  (same comment as for Thallium)
- Cyanide [air, urban air close to ground]: 9.1771e-5 kg; lognormal variance with pedigree 1.0285, pedigree (1,1,4,1,1)
  Nitrogen species emitted to air after DeNOx stage.
  Uncertainty: uncertainty calculated from uncertainty in average N-emissions and uncertainty in the share of thermal NOx and the uncertainty in nitrogen content in *this* waste.
- Dinitrogen monoxide [air, urban air close to ground]: 0.00042716 kg; lognormal variance with pedigree 1.0285, pedigree (1,1,4,1,1)
  (same comment as for Cyanide)
- Ammonia [air, urban air close to ground]: 4.1373e-6 kg; lognormal variance with pedigree 0.92642, pedigree (1,1,4,1,1)
  (same comment as for Cyanide)
- Nitrogen oxides [air, urban air close to ground]: 0.0013102 kg; lognormal variance with pedigree 0.92642, pedigree (1,1,4,1,1)
  Sum of fuel-Nox and thermal-NOx emitted to air after DeNOx stage.
  Uncertainty: uncertainty calculated from uncertainty in average N-emissions and uncertainty in the share of thermal NOx and the uncertainty in nitrogen content in *this* waste.
- TOC, Total Organic Carbon [water, surface water]: 0.00010847 kg; lognormal variance with pedigree 0.047607, pedigree (1,1,4,1,1)
  Emissions to water from waste composition and transfer coefficients in incinerator and landfills.
  Uncertainty: uncertainty is calculated from uncertainties in waste composition and transfer coefficients in incinerator and landfills
- Sulfur dioxide [air, urban air close to ground]: 0.00025502 kg; lognormal variance with pedigree 0.28599, pedigree (1,1,4,1,1)
  (same comment as for Hydrogen chloride)
- Water [air, urban air close to ground]: 0.00247522 m3; lognormal variance with pedigree 2.6965, pedigree (1,1,4,1,1)
  Water vapour from waste humidity, hydrogen oxidation and part of the process water.
  Uncertainty: Uncertainty calculated from uncertainty in waste composition, process water input and the uncertainty of fraction to air.
- Methane, fossil [air, urban air close to ground]: 4.774e-7 kg; lognormal variance with pedigree 0.096757, pedigree (1,1,4,1,1)
  Incomplete combustion product emitted to air.
  Uncertainty: uncertainty calculated from uncertainty in average operation emissions, and the uncertainty of the flue gas volume from this waste.
- Carbon dioxide, fossil [air, urban air close to ground]: 1.1922 kg; lognormal variance with pedigree 0.041912, pedigree (1,1,4,1,1)
  (same comment as for Hydrogen chloride)
- Vanadium, ion [water, ground-, long-term]: 2.8469e-7 kg; lognormal variance with pedigree 0.02524, pedigree (1,1,4,1,1)
  (same comment as for Thallium)
- Calcium, ion [water, surface water]: 4.2534e-7 kg; lognormal variance with pedigree 0.90914, pedigree (1,1,4,1,1)
  (same comment as for TOC, Total Organic Carbon)
- Cadmium, ion [water, ground-, long-term]: 2.5525e-7 kg; lognormal variance with pedigree 5.5179, pedigree (1,1,4,1,1)
  (same comment as for Thallium)
- Heat, waste [air, urban air close to ground]: 12.209 MJ; lognormal variance with pedigree 0.046347, pedigree (1,1,4,1,1)
  Waste heat generated from heating value of this waste plus any electricity required to process it.
  Uncertainty: uncertainty is calculated from uncertainties in waste composition and uncertainties in energy efficiency and the uncertainty in internal energy demand
- Sulfate [water, ground-, long-term]: 0.057334 kg; lognormal variance with pedigree 0.18923, pedigree (1,1,4,1,1)
  (same comment as for Thallium)
- Iron, ion [water, surface water]: 1.1496e-9 kg; lognormal variance with pedigree 1.2913, pedigree (1,1,4,1,1)
  (same comment as for TOC, Total Organic Carbon)
- Heat, waste [water, surface water]: 3.7951 MJ; lognormal variance with pedigree 0.046347, pedigree (1,1,4,1,1)
  (same comment as for Heat, waste)
- Silicon [water, surface water]: 1.7633e-6 kg; lognormal variance with pedigree 0.81026, pedigree (1,1,4,1,1)
  (same comment as for TOC, Total Organic Carbon)
- Benzo(a)pyrene [air, urban air close to ground]: 7.0825e-13 kg; lognormal variance with pedigree 0.42337, pedigree (1,1,4,1,1)
  (same comment as for Methane, fossil)
- Thallium [water, surface water]: 1.8636e-12 kg; lognormal variance with pedigree 0.72642, pedigree (1,1,4,1,1)
  (same comment as for TOC, Total Organic Carbon)
- Phenol, pentachloro- [air, urban air close to ground]: 1.386e-11 kg; lognormal variance with pedigree 0.096757, pedigree (1,1,4,1,1)
  (same comment as for Methane, fossil)
- Zinc, ion [water, surface water]: 2.1158e-9 kg; lognormal variance with pedigree 0.93063, pedigree (1,1,4,1,1)
  (same comment as for TOC, Total Organic Carbon)
- Silicon [air, urban air close to ground]: 2.9281e-9 kg; lognormal variance with pedigree 0.65121, pedigree (1,1,4,1,1)
  (same comment as for Hydrogen chloride)
- Cadmium [air, urban air close to ground]: 8.1144e-10 kg; lognormal variance with pedigree 1.5416, pedigree (1,1,4,1,1)
  (same comment as for Hydrogen chloride)
- Aluminium [water, surface water]: 9.1775e-8 kg; lognormal variance with pedigree 0.7524, pedigree (1,1,4,1,1)
  (same comment as for TOC, Total Organic Carbon)
- Benzene, pentachloro- [air, urban air close to ground]: 1.6815e-10 kg; lognormal variance with pedigree 0.096757, pedigree (1,1,4,1,1)
  (same comment as for Methane, fossil)
- Carbon monoxide, fossil [air, urban air close to ground]: 5.4102e-5 kg; lognormal variance with pedigree 0.81783, pedigree (1,1,4,1,1)
  (same comment as for Methane, fossil)
- Tin, ion [water, surface water]: 2.0448e-7 kg; lognormal variance with pedigree 0.78401, pedigree (1,1,4,1,1)
  (same comment as for TOC, Total Organic Carbon)
- Toluene [air, urban air close to ground]: 6.3654e-8 kg; lognormal variance with pedigree 0.096757, pedigree (1,1,4,1,1)
  (same comment as for Methane, fossil)
- Antimony [water, surface water]: 4.9749e-10 kg; lognormal variance with pedigree 0.037563, pedigree (1,1,4,1,1)
  (same comment as for TOC, Total Organic Carbon)
- Antimony [water, ground-, long-term]: 9.132e-10 kg; lognormal variance with pedigree 0.013413, pedigree (1,1,4,1,1)
  (same comment as for Thallium)
- Lead [water, surface water]: 6.3051e-10 kg; lognormal variance with pedigree 1.0494, pedigree (1,1,4,1,1)
  (same comment as for TOC, Total Organic Carbon)
- Chloride [water, ground-, long-term]: 0.0009926 kg; lognormal variance with pedigree 0.39636, pedigree (1,1,4,1,1)
  (same comment as for Thallium)
- Dioxins, measured as 2,3,7,8-tetrachlorodibenzo-p-dioxin [air, urban air close to ground]: 6.3649e-14 kg; lognormal variance with pedigree 0.42337, pedigree (1,1,4,1,1)
  (same comment as for Methane, fossil)
- BOD5, Biological Oxygen Demand [water, ground-, long-term]: 0.00079294 kg; lognormal variance with pedigree 0.04239, pedigree (1,1,4,1,1)
  (same comment as for Thallium)
- Nickel, ion [water, surface water]: 9.1648e-11 kg; lognormal variance with pedigree 0.72642, pedigree (1,1,4,1,1)
  (same comment as for TOC, Total Organic Carbon)
- Particulates, > 2.5 um, and < 10um [air, urban air close to ground]: 1.9095e-8 kg; lognormal variance with pedigree 0.20315, pedigree (1,1,4,1,1)
  (same comment as for Methane, fossil)
- Manganese [water, surface water]: 1.3408e-11 kg; lognormal variance with pedigree 1.2256, pedigree (1,1,4,1,1)
  (same comment as for TOC, Total Organic Carbon)
- Particulates, < 2.5 um [air, urban air close to ground]: 3.7999e-6 kg; lognormal variance with pedigree 0.42337, pedigree (1,1,4,1,1)
  (same comment as for Methane, fossil)
- Mercury [water, surface water]: 1.2036e-14 kg; lognormal variance with pedigree 0.9951, pedigree (1,1,4,1,1)
  (same comment as for TOC, Total Organic Carbon)
- NMVOC, non-methane volatile organic compounds, unspecified origin [air, urban air close to ground]: 1.4484e-6 kg; lognormal variance with pedigree 0.096757, pedigree (1,1,4,1,1)
  (same comment as for Methane, fossil)
- Copper, ion [water, surface water]: 1.4151e-9 kg; lognormal variance with pedigree 1.3189, pedigree (1,1,4,1,1)
  (same comment as for TOC, Total Organic Carbon)
- Aluminium [water, ground-, long-term]: 5.4973e-5 kg; lognormal variance with pedigree 0.37671, pedigree (1,1,4,1,1)
  (same comment as for Thallium)
- Chromium VI [water, surface water]: 1.1659e-8 kg; lognormal variance with pedigree 0.1757, pedigree (1,1,4,1,1)
  (same comment as for TOC, Total Organic Carbon)
- Calcium, ion [water, ground-, long-term]: 0.00025478 kg; lognormal variance with pedigree 1.4527, pedigree (1,1,4,1,1)
  (same comment as for Thallium)
- Phosphate [water, surface water]: 1.489e-8 kg; lognormal variance with pedigree 0.66962, pedigree (1,1,4,1,1)
  (same comment as for TOC, Total Organic Carbon)
- Iron, ion [water, ground-, long-term]: 6.8863e-7 kg; lognormal variance with pedigree 7.0197, pedigree (1,1,4,1,1)
  (same comment as for Thallium)
- Cadmium, ion [water, surface water]: 2.8297e-10 kg; lognormal variance with pedigree 1.4318, pedigree (1,1,4,1,1)
  (same comment as for TOC, Total Organic Carbon)
- Silicon [water, ground-, long-term]: 0.00072348 kg; lognormal variance with pedigree 3.7976, pedigree (1,1,4,1,1)
  (same comment as for Thallium)
- Cobalt [water, ground-, long-term]: 4.8057e-9 kg; lognormal variance with pedigree 0.78792, pedigree (1,1,4,1,1)
  (same comment as for Thallium)
- Arsenic, ion [water, surface water]: 5.6028e-8 kg
  Emissions to water from waste composition and transfer coefficients in incinerator and landfills.
- Nitrate [water, ground-, long-term]: 0.0010272 kg; lognormal variance with pedigree 0.26439, pedigree (1,1,4,1,1)
  (same comment as for Thallium)
- Chloride [water, surface water]: 0.0066931 kg; lognormal variance with pedigree 0.15436, pedigree (1,1,4,1,1)
  (same comment as for TOC, Total Organic Carbon)
- TOC, Total Organic Carbon [water, ground-, long-term]: 0.00095925 kg; lognormal variance with pedigree 0.04239, pedigree (1,1,4,1,1)
  (same comment as for Thallium)
- Benzene [air, urban air close to ground]: 3.1827e-8 kg; lognormal variance with pedigree 0.096757, pedigree (1,1,4,1,1)
  (same comment as for Methane, fossil)
- Zinc, ion [water, ground-, long-term]: 1.5515e-5 kg; lognormal variance with pedigree 1.9381, pedigree (1,1,4,1,1)
  (same comment as for Thallium)
- Nitrate [water, surface water]: 0.00036796 kg; lognormal variance with pedigree 0.17973, pedigree (1,1,4,1,1)
  (same comment as for TOC, Total Organic Carbon)
- Sulfate [water, surface water]: 0.0097992 kg; lognormal variance with pedigree 0.14622, pedigree (1,1,4,1,1)
  (same comment as for TOC, Total Organic Carbon)
- BOD5, Biological Oxygen Demand [water, surface water]: 0.00024337 kg; lognormal variance with pedigree 0.048801, pedigree (1,1,4,1,1)
  (same comment as for TOC, Total Organic Carbon)
- DOC, Dissolved Organic Carbon [water, surface water]: 0.00010847 kg; lognormal variance with pedigree 0.047607, pedigree (1,1,4,1,1)
  (same comment as for TOC, Total Organic Carbon)
- COD, Chemical Oxygen Demand [water, surface water]: 0.00024869 kg; lognormal variance with pedigree 0.047476, pedigree (1,1,4,1,1)
  (same comment as for TOC, Total Organic Carbon)
- Water [water, surface water]: 0.000863077 m3; lognormal variance with pedigree 3.0388, pedigree (1,1,4,1,1)
  Process water released to surface water.
  Uncertainty: uncertainty calculated from uncertainty in process water input and the uncertainty of fraction to surface water.
- Benzene, hexachloro- [air, urban air close to ground]: 6.6548e-11 kg; lognormal variance with pedigree 0.096757, pedigree (1,1,4,1,1)
  (same comment as for Methane, fossil)
- Nickel, ion [water, ground-, long-term]: 5.4897e-8 kg; lognormal variance with pedigree 0.26601, pedigree (1,1,4,1,1)
  (same comment as for Thallium)
- Tin, ion [water, ground-, long-term]: 0.00015013 kg; lognormal variance with pedigree 0.97871, pedigree (1,1,4,1,1)
  (same comment as for Thallium)
- Manganese [water, ground-, long-term]: 8.0313e-9 kg; lognormal variance with pedigree 5.7591, pedigree (1,1,4,1,1)
  (same comment as for Thallium)
- Arsenic, ion [water, ground-, long-term]: 0 kg; pedigree (1,1,1,1,1)
  (same comment as for Thallium)
- DOC, Dissolved Organic Carbon [water, ground-, long-term]: 0.00095925 kg; lognormal variance with pedigree 0.04239, pedigree (1,1,4,1,1)
  (same comment as for Thallium)
- Mercury [water, ground-, long-term]: 7.2094e-12 kg; lognormal variance with pedigree 2.3387, pedigree (1,1,4,1,1)
  (same comment as for Thallium)
- Vanadium, ion [water, surface water]: 9.0904e-10 kg; lognormal variance with pedigree 0.54562, pedigree (1,1,4,1,1)
  (same comment as for TOC, Total Organic Carbon)
- Copper, ion [water, ground-, long-term]: 1.5369e-5 kg; lognormal variance with pedigree 1.1989, pedigree (1,1,4,1,1)
  (same comment as for Thallium)
- Tin [air, urban air close to ground]: 1.4776e-10 kg; lognormal variance with pedigree 0.9357, pedigree (1,1,4,1,1)
  (same comment as for Hydrogen chloride)
- Lead [air, urban air close to ground]: 7.6191e-10 kg; lognormal variance with pedigree 1.3245, pedigree (1,1,4,1,1)
  (same comment as for Hydrogen chloride)
- Zinc [air, urban air close to ground]: 2.3154e-8 kg; lognormal variance with pedigree 1.1343, pedigree (1,1,4,1,1)
  (same comment as for Hydrogen chloride)
- Copper [air, urban air close to ground]: 1.4939e-9 kg; lognormal variance with pedigree 1.2442, pedigree (1,1,4,1,1)
  (same comment as for Hydrogen chloride)
- Cobalt [water, surface water]: 8.0229e-12 kg; lognormal variance with pedigree 0.82494, pedigree (1,1,4,1,1)
  (same comment as for TOC, Total Organic Carbon)

## Extrapolations
This dataset has been extrapolated from year 2012 to the year of the calculation (2021). The uncertainty has been adjusted accordingly.
