# treatment of wastewater from wafer fabrication, capacity 1.1E10l/year

Dataset: EcoSpold 2, unit process
Geography: CH
Time period: 1994-01-01 to 2021-12-31
Technology level: current
Classification: ISIC rev.4 ecoinvent: 3700:Sewerage
Classification: EcoSpold01Categories: waste management/wastewater treatment
Tags: ConvertedDataset; Treatment
Scenario: Business-as-Usual
System model: Allocation, cut-off by classification
Generated by: Martin Lehmann
Published in: Hischier R. 2007
Database: ecoinvent
isCopyrightProtected: true
accessRestrictedTo: 1

## General comment
Wastewater purified in a moderatly large municipal wastewater treatment plant (capacity class 2), with an average capacity size of 71100 per-captia-equivalents PCE.
Wastewater contains (in kg/m3): COD: 0.095 (GSD=122.5%); Ntot.: 0.016 (GSD=122.5%); Ptot.: 0.016 (GSD=122.5%); As: 0.0007 (GSD=224.1%); Cd: 0.0007 (GSD=223.8%); Cr: 0.0007 (GSD=223.8%); Cu: 0.0066 (GSD=223.8%); Ni: 0.0066 (GSD=223.8%); Pb: 0.0007 (GSD=223.8%); Si: 0.0066 (GSD=224.1%); Mg: 0.0007 (GSD=224.1%);
[This dataset was already contained in the ecoinvent database version 2. It was not individually updated during the transfer to ecoinvent version 3. Life Cycle Impact Assessment results may still have changed, as they are affected by changes in the supply chain, i.e. in other datasets. This dataset was generated following the ecoinvent quality guidelines for version 2. It may have been subject to central changes described in the ecoinvent version 3 change report (http://www.ecoinvent.org/database/ecoinvent-version-3/reports-of-changes/), and the results of the central updates were reviewed extensively. The changes added e.g. consistent water flows and other information throughout the database. The documentation of this dataset can be found in the ecoinvent reports of version 2, which are still available via the ecoinvent website. The change report linked above covers all central changes that were made during the conversion process.]

## Included activities end
Infrastructure materials for municipal wastewater treatment plant, transports, dismantling. Land use burdens.

## Geography
Specific to the technology mix encountered in Switzerland in 2000. Well applicable to modern treatment practices in Europe, North America or Japan.

## Technology
Three stage wastewater treatment (mechanical, biological, chemical) including sludge digestion (fermentation) according to the average technology in Switzerland

## Parameters
- fraction, process water, to air: 0.1 dimensionless; name fraction_PW_to_air; lognormal variance with pedigree 0.092025, pedigree (4,4,3,2,4)
  Literature value (Statistics Canada, 2007 & Shaffer, K.H., 2008, Consumptive water use in the Great Lakes Basin, USGS) (Vionnet, S., Quantis Water Database - Technical Report, 2012).

## Reference product
- wastewater from wafer fabrication: -1 m3; name RP_amount_1; CPC 39920: Sewage sludge; By-product classification Waste
  production volume 0.0336675 m3; name RP_PV_1
    This is a placeholder value that does not reflect real-world production volumes. This dataset does not currently require a real-world production volume to work in the database framework, and no actual data were collected yet. This has no negative effect on the results of the ecoinvent database. The placeholder value of this activity was scaled according to the nominal GDP of 2005 (source: United Nations, http://data.un.org/Glossary.aspx?q=GDP+%28current+US%24%29, accessed 20130726) to reflect an appropriate share of the global production volume, which is also a placeholder value.
  property price 0 EUR2005; name RP_amount_1_price_EUR2005
    Waste products are assigned a price of zero as they are assumed to require further treatment.
  property carbon content, fossil 0.121862
    COD: 0.095 kg/m3 (Tab 3.7, ecoinvent v2.2 report 18_1). COD was converted to TOC, using conversion factors in Tab 4.10 (ecoinvent v2.2 report 13_IV). TOC was considered as Total Carbon.
  property carbon content 0.121862
    carbon content on a dry matter basis (reserved; not for manual entry)
  properties: carbon content, non-fossil 0, wet mass 1000 kg, water content 2962.17, water in wet mass 999.663 kg, dry mass 0.337476 kg, carbon allocation 0.0411255 kg

## Inputs from technosphere
- slag landfill: 1.3486e-10 unit; lognormal variance with pedigree 0.07, pedigree (1,1,5,1,1)
  burden from sludge incineration. Uncertainty calculated from wastewater composition and treatment model
- iron sulfate: 0.072568 kg; lognormal variance with pedigree 0.1, pedigree (1,1,5,1,1)
  direct wastewater treatment plant burden. Uncertainty calculated from wastewater composition and treatment model
  properties: dry mass 1 kg, wet mass 1 kg
- hydrochloric acid, without water, in 30% solution state: 9.4586e-7 kg; lognormal variance with pedigree 0.17, pedigree (1,1,5,1,1)
  (same comment as for slag landfill)
  properties: wet mass 1 kg, heating value, net 3.32 MJ, dry mass 1 kg
- chemical, organic: 0.00065633 kg; lognormal variance with pedigree 0.71, pedigree (1,1,5,1,1)
  (same comment as for slag landfill)
  properties: heating value, net 19.03 MJ, wet mass 1 kg, dry mass 1 kg, carbon content, fossil 0.628
  note on carbon content, fossil: This dataset is an unweighted average of 20 organic substances (listed in Tab 88.1, ecoinvent v2.2 report 8, part II), being part of the top100 chemicals included in this database. The C-content has also been calculated as an unweighted average of the C content of the substances composing this dataset.
- cement, unspecified: 0.0040292 kg; lognormal variance with pedigree 0.08, pedigree (1,1,5,1,1)
  (same comment as for slag landfill)
  properties: wet mass 1 kg, dry mass 1 kg
- aluminium sulfate, powder: 0.019613 kg; lognormal variance with pedigree 0.1, pedigree (1,1,5,1,1)
  (same comment as for iron sulfate)
  properties: wet mass 1 kg, dry mass 1 kg
- residual material landfill: 2.0986e-11 unit; lognormal variance with pedigree 0.07, pedigree (1,1,5,1,1)
  (same comment as for slag landfill)
- titanium dioxide: 1.1757e-6 kg; lognormal variance with pedigree 0.54, pedigree (1,1,5,1,1)
  (same comment as for slag landfill)
  properties: dry mass 1 kg, wet mass 1 kg
- heat, district or industrial, other than natural gas: 0.23677 MJ; lognormal variance with pedigree 0.04, pedigree (1,1,5,1,1)
  (same comment as for slag landfill)
  properties: heating value, net 1 MJ
- sodium hydroxide, without water, in 50% solution state: 1.803e-5 kg; lognormal variance with pedigree 0.11, pedigree (1,1,5,1,1)
  (same comment as for slag landfill)
  properties: wet mass 1 kg, dry mass 1 kg, heating value, net 3.03 MJ
- sewer grid, 1.1E10l/year, 242 km: 1.6832e-7 km; lognormal variance with pedigree 0.04, pedigree (1,1,5,1,1)
  uncertainty heeded in exchanges of the module
  This exchange has an activity link directly to the producing activity because the product is primarily consumed in the same geographical area where it is produced.
- quicklime, milled, packed: 3.2688e-6 kg; lognormal variance with pedigree 0.11, pedigree (1,1,5,1,1)
  (same comment as for slag landfill)
  properties: wet mass 1 kg, dry mass 0.99 kg, water content 0.010101
- heat, district or industrial, natural gas: 0.00360495 MJ; lognormal variance with pedigree 0.22, pedigree (1,1,5,1,1)
  (same comment as for slag landfill)
  properties: heating value, net 1 MJ
- waste graphical paper: -0.0155 kg; name BP_amount_1; lognormal variance with pedigree 0.04, pedigree (1,1,5,1,1)
  (same comment as for iron sulfate)
  production volume 0.000521847 kg; = BP_amount_1* RP_PV_1/ABS( RP_amount_1)
    Calculated from the production volume of wastewater from wafer fabrication in proportion to the respective output amounts.
  property price 0 EUR2005; name BP_amount_1_price_EUR2005
  properties: water content 0.126126, carbon content, non-fossil 0.454955, wet mass 1 kg, dry mass 0.888 kg, heating value, net 14.12 MJ
  note on heating value, net: Value taken from the general comment of the treatment dataset.
- iron (III) chloride, without water, in 40% solution state: 0.09935 kg; lognormal variance with pedigree 0.1, pedigree (1,1,5,1,1)
  direct wastewater treatment plant burden plus burden from sludge incineration. Uncertainty calculated from wastewater composition and treatment model
  properties: wet mass 1 kg, dry mass 1 kg
- waste cement, hydrated: -0.010073 kg; name BP_amount_2; lognormal variance with pedigree 0.08, pedigree (1,1,5,1,1)
  (same comment as for slag landfill)
  production volume 0.000339133 kg; = BP_amount_2* RP_PV_1/ABS( RP_amount_1)
    (same comment as for waste graphical paper)
  property price 0 EUR2005; name BP_amount_2_price_EUR2005
  properties: wet mass 1 kg, dry mass 1 kg
- process-specific burdens, municipal waste incineration: 0.28231 kg; lognormal variance with pedigree 0.04, pedigree (1,1,5,1,1)
  burden from sludge incineration. Uncertainty calculated from wastewater composition and treatment model;activityLink introduced to establish a direct link to the corresponding regional supply of this product
- waste plastic, mixture: -0.0155 kg; name BP_amount_3; lognormal variance with pedigree 0.04, pedigree (1,1,5,1,1)
  (same comment as for iron sulfate)
  production volume 0.000521847 kg; = BP_amount_3* RP_PV_1/ABS( RP_amount_1)
    (same comment as for waste graphical paper)
  property price 0 EUR2005; name BP_amount_3_price_EUR2005
  properties: dry mass 0.847 kg, carbon content, fossil 0.747344, water content 0.180638, wet mass 1 kg, heating value, net 30.79 MJ
  note on carbon content, fossil: C content in 1 kg DM was calculated using data in Tab A.2, ecoinvent v2.2 report 13_I
- liquid manure spreading, by vacuum tanker: 0.00061068 m3; lognormal variance with pedigree 0.04, pedigree (1,1,5,1,1)
  burden from sludge spreading. Uncertainty calculated from wastewater composition and treatment model
  This exchange has an activity link directly to the producing activity because the product is primarily consumed in the same geographical area where it is produced.
- electricity, low voltage: 0.16199 kWh; lognormal variance with pedigree 0.05, pedigree (1,1,5,1,1)
  (same comment as for iron sulfate)
- process-specific burdens, slag landfill: 0.075861 kg; lognormal variance with pedigree 0.07, pedigree (1,1,5,1,1)
  (same comment as for process-specific burdens, municipal waste incineration)
- ammonia, anhydrous, liquid: 4.1073e-5 kg; lognormal variance with pedigree 0.22, pedigree (1,1,5,1,1)
  (same comment as for slag landfill)
  properties: wet mass 1 kg, dry mass 1 kg
- wastewater treatment facility, capacity 1.1E10l/year: 1.9883e-9 unit; lognormal variance with pedigree 0.04, pedigree (1,1,5,1,1)
  (same comment as for sewer grid, 1.1E10l/year, 242 km)
- process-specific burdens, residual material landfill: 0.010073 kg; lognormal variance with pedigree 0.07, pedigree (1,1,5,1,1)
  (same comment as for process-specific burdens, municipal waste incineration)
- chromium oxide, flakes: 2.3994e-8 kg; lognormal variance with pedigree 0.54, pedigree (1,1,5,1,1)
  (same comment as for slag landfill)
  properties: dry mass 1 kg, wet mass 1 kg
- municipal waste incineration facility: 7.0577e-11 unit; lognormal variance with pedigree 0.04, pedigree (1,1,5,1,1)
  (same comment as for slag landfill)
- chemical, inorganic: 1.5764e-6 kg; lognormal variance with pedigree 0.17, pedigree (1,1,5,1,1)
  (same comment as for slag landfill)
  properties: carbon content, fossil 0.003, dry mass 1 kg, wet mass 1 kg
  note on carbon content, fossil: This dataset is an unweighted average of 20 inorganic substances (listed in Tab 88.1, ecoinvent v2.2 report 8, part II), being part of the top100 chemicals included in this database. The C-content has also been calculated as an unweighted average of the C content of the substances composing this dataset.
- electricity, high voltage: 0.040587 kWh; lognormal variance with pedigree 0.49, pedigree (1,1,5,1,1)
  (same comment as for slag landfill)

## Emissions to nature
- Silicon [water, ground-, long-term]: 0.00033038 kg; lognormal variance with pedigree 5.46, pedigree (1,1,5,1,1)
  emission from sludge incineration. Uncertainty calculated from wastewater composition and treatment model
- Water [water, unspecified]: 0.9 m3; name water_to_water_unspecified; lognormal variance with pedigree 0.0807, pedigree (2,2,5,1,1)
  Calculated value based on water balance.
  property fraction, origin: unspecified 0; name fraction_origin_unspecified_Ww
  property fraction, origin: salt water 0; name fraction_origin_salt_water_Ww
  property fraction, origin: fresh water 1; name fraction_origin_fresh_water_Ww
  property wet mass 1000 kg; name WM
  property water in wet mass 1000 kg; name WWM
  property carbon content, fossil 0; name C_content_fossil
  property carbon content, non-fossil 0; name C_content_non_fossil
  property dry mass 0 kg; name DM
- Arsenic, ion [water, ground-, long-term]: 5.0875e-5 kg; lognormal variance with pedigree 0.71, pedigree (1,1,5,1,1)
  (same comment as for Silicon)
- Iron [air, urban air close to ground]: 1.2459e-6 kg; lognormal variance with pedigree 0.14, pedigree (1,1,5,1,1)
  direct digester gas emission plus emission from sludge incineration. Uncertainty calculated from wastewater composition and treatment model
- Cadmium [soil, agricultural]: 0.00013333 kg; lognormal variance with pedigree 0.71, pedigree (1,1,5,1,1)
  emission from sludge spreading. Uncertainty calculated from wastewater composition and treatment model
- Phosphate [water, surface water]: 0.016756 kg; lognormal variance with pedigree 0.08, pedigree (1,1,5,1,1)
  sewer overload discharge plus direct wastewater treatment plant emission plus emission from sludge incineration plus emission from sludge spreading. Uncertainty calculated from wastewater composition and treatment model
- NMVOC, non-methane volatile organic compounds, unspecified origin [air, urban air close to ground]: 1.4232e-6 kg; lognormal variance with pedigree 0.26, pedigree (1,1,5,1,1)
  direct digester gas emission. Uncertainty calculated from wastewater composition and treatment model
- Arsenic [air, urban air close to ground]: 1.9706e-7 kg; lognormal variance with pedigree 0.73, pedigree (1,1,5,1,1)
  (same comment as for Iron)
- Nickel, ion [water, ground-, long-term]: 0.0014916 kg; lognormal variance with pedigree 0.71, pedigree (1,1,5,1,1)
  (same comment as for Silicon)
- Carbon monoxide, fossil [air, urban air close to ground]: 0.00013479 kg; lognormal variance with pedigree 0.2, pedigree (1,1,5,1,1)
  (same comment as for Silicon)
- Nitrate [water, ground-, long-term]: 2.9246e-5 kg; lognormal variance with pedigree 0.08, pedigree (1,1,5,1,1)
  (same comment as for Silicon)
- Nitrogen oxides [air, urban air close to ground]: 0.00039896 kg; lognormal variance with pedigree 0.08, pedigree (1,1,5,1,1)
  (same comment as for Iron)
- Nickel, ion [water, surface water]: 0.0040032 kg; lognormal variance with pedigree 0.66, pedigree (1,1,5,1,1)
  sewer overload discharge plus direct wastewater treatment plant emission plus emission from sludge incineration. Uncertainty calculated from wastewater composition and treatment model
- Magnesium [water, ground-, long-term]: 3.8875e-5 kg; lognormal variance with pedigree 0.71, pedigree (1,1,5,1,1)
  (same comment as for Silicon)
- Nickel [air, urban air close to ground]: 6.8756e-11 kg; lognormal variance with pedigree 0.81, pedigree (1,1,5,1,1)
  (same comment as for Iron)
- BOD5, Biological Oxygen Demand [water, surface water]: 0.0060458 kg; lognormal variance with pedigree 0.05, pedigree (1,1,5,1,1)
  (same comment as for Nickel, ion)
- Aluminium [air, urban air close to ground]: 2.9667e-6 kg; lognormal variance with pedigree 0.12, pedigree (1,1,5,1,1)
  (same comment as for Iron)
- Chromium [soil, agricultural]: 0.00013333 kg; lognormal variance with pedigree 0.71, pedigree (1,1,5,1,1)
  (same comment as for Cadmium)
- Water [air, unspecified]: 0.1 m3; name water_to_air_unspecified; lognormal variance with pedigree 0.0807, pedigree (2,2,5,1,1)
  Calculated value based on water balance.
  property fraction, origin: salt water 0; name fraction_origin_salt_water
  property fraction, origin: unspecified 1; name fraction_origin_unspecified
  property fraction, origin: fresh water 0; name fraction_origin_fresh_water
- Nitrogen [water, surface water]: 0.0002793 kg; lognormal variance with pedigree 0.08, pedigree (1,1,5,1,1)
  direct wastewater treatment plant emission. Uncertainty calculated from wastewater composition and treatment model
- Silicon [air, urban air close to ground]: 8.8576e-6 kg; lognormal variance with pedigree 0.73, pedigree (1,1,5,1,1)
  (same comment as for Iron)
- Magnesium [air, urban air close to ground]: 5.7989e-8 kg; lognormal variance with pedigree 0.73, pedigree (1,1,5,1,1)
  (same comment as for Iron)
- Copper [air, urban air close to ground]: 2.2128e-8 kg; lognormal variance with pedigree 0.76, pedigree (1,1,5,1,1)
  (same comment as for Iron)
- Magnesium [water, surface water]: 0.00063148 kg; lognormal variance with pedigree 0.67, pedigree (1,1,5,1,1)
  (same comment as for Nickel, ion)
- Phosphate [water, ground-, long-term]: 0.00074695 kg; lognormal variance with pedigree 4.27, pedigree (1,1,5,1,1)
  (same comment as for Silicon)
- Carbon dioxide, fossil [air, urban air close to ground]: 0.11734 kg; lognormal variance with pedigree 0.06, pedigree (1,1,5,1,1)
  (same comment as for Silicon)
- Carbon [soil, agricultural]: 0.004172 kg; lognormal variance with pedigree 0.1, pedigree (1,1,5,1,1)
  (same comment as for Cadmium)
- Copper, ion [water, ground-, long-term]: 0.0024231 kg; lognormal variance with pedigree 0.73, pedigree (1,1,5,1,1)
  (same comment as for Silicon)
- Ammonium, ion [water, surface water]: 0.0062851 kg; lognormal variance with pedigree 0.06, pedigree (1,1,5,1,1)
  (same comment as for Nitrogen)
- Chromium VI [water, surface water]: 0.00036214 kg; lognormal variance with pedigree 0.64, pedigree (1,1,5,1,1)
  (same comment as for Nickel, ion)
- Dinitrogen monoxide [air, urban air close to ground]: 5.907e-5 kg; lognormal variance with pedigree 0.07, pedigree (1,1,5,1,1)
  direct wastewater treatment plant emission plus direct digester gas emission plus emission from sludge incineration plus emission from sludge spreading. Uncertainty calculated from wastewater composition and treatment model
- Copper, ion [water, surface water]: 0.001712 kg; lognormal variance with pedigree 0.65, pedigree (1,1,5,1,1)
  (same comment as for Nickel, ion)
- Aluminium [water, ground-, long-term]: 0.0014054 kg; lognormal variance with pedigree 0.11, pedigree (1,1,5,1,1)
  (same comment as for Silicon)
- Aluminium [water, surface water]: 1.5802e-7 kg; lognormal variance with pedigree 0.71, pedigree (1,1,5,1,1)
  (same comment as for Nickel, ion)
- Iron, ion [water, surface water]: 1.2771e-5 kg; lognormal variance with pedigree 0.13, pedigree (1,1,5,1,1)
  (same comment as for Nickel, ion)
- Lead [water, ground-, long-term]: 2.7224e-5 kg; lognormal variance with pedigree 6.92, pedigree (1,1,5,1,1)
  (same comment as for Silicon)
- BOD5, Biological Oxygen Demand [water, ground-, long-term]: 5.34e-5 kg; lognormal variance with pedigree 0.11, pedigree (1,1,5,1,1)
  (same comment as for Silicon)
- Chromium, ion [water, surface water]: 6.7382e-7 kg; lognormal variance with pedigree 0.72, pedigree (1,1,5,1,1)
  (same comment as for Silicon)
- Cadmium [air, urban air close to ground]: 1.1797e-8 kg; lognormal variance with pedigree 0.74, pedigree (1,1,5,1,1)
  (same comment as for Iron)
- Copper [soil, agricultural]: 0.0018904 kg; lognormal variance with pedigree 0.71, pedigree (1,1,5,1,1)
  (same comment as for Cadmium)
- Arsenic, ion [water, surface water]: 0.00059051 kg; lognormal variance with pedigree 0.61, pedigree (1,1,5,1,1)
  (same comment as for Nickel, ion)
- Cadmium, ion [water, ground-, long-term]: 2.1214e-6 kg; lognormal variance with pedigree 6.9, pedigree (1,1,5,1,1)
  (same comment as for Silicon)
- Nitrate [water, surface water]: 0.027533 kg; lognormal variance with pedigree 0.06, pedigree (1,1,5,1,1)
  (same comment as for Nickel, ion)
- Silicon [soil, agricultural]: 0.0023994 kg; lognormal variance with pedigree 0.71, pedigree (1,1,5,1,1)
  (same comment as for Cadmium)
- Aluminium [soil, agricultural]: 0.0011976 kg; lognormal variance with pedigree 0.1, pedigree (1,1,5,1,1)
  (same comment as for Cadmium)
- Cyanide [air, urban air close to ground]: 7.3271e-7 kg; lognormal variance with pedigree 0.24, pedigree (1,1,5,1,1)
  (same comment as for Silicon)
- Chromium [air, urban air close to ground]: 1.5633e-11 kg; lognormal variance with pedigree 0.8, pedigree (1,1,5,1,1)
  (same comment as for Iron)
- Sulfate [water, surface water]: 0.062394 kg; lognormal variance with pedigree 0.1, pedigree (1,1,5,1,1)
  (same comment as for Nickel, ion)
- COD, Chemical Oxygen Demand [water, ground-, long-term]: 0.00016325 kg; lognormal variance with pedigree 0.11, pedigree (1,1,5,1,1)
  (same comment as for Silicon)
- Methane, fossil [air, urban air close to ground]: 0.00031424 kg; lognormal variance with pedigree 0.14, pedigree (1,1,5,1,1)
  (same comment as for Silicon)
- Phosphate [water, ground-]: 7.0258e-5 kg; lognormal variance with pedigree 0.14, pedigree (1,1,5,1,1)
  (same comment as for Cadmium)
- Chloride [water, surface water]: 0.065054 kg; lognormal variance with pedigree 0.1, pedigree (1,1,5,1,1)
  (same comment as for Nickel, ion)
- COD, Chemical Oxygen Demand [water, surface water]: 0.018409 kg; lognormal variance with pedigree 0.08, pedigree (1,1,5,1,1)
  (same comment as for Nickel, ion)
- Lead [air, urban air close to ground]: 1.4206e-8 kg; lognormal variance with pedigree 0.75, pedigree (1,1,5,1,1)
  (same comment as for Iron)
- Nitrite [water, surface water]: 0.00036708 kg; lognormal variance with pedigree 0.08, pedigree (1,1,5,1,1)
  (same comment as for Nitrogen)
- TOC, Total Organic Carbon [water, ground-, long-term]: 6.46e-5 kg; lognormal variance with pedigree 0.11, pedigree (1,1,5,1,1)
  (same comment as for Silicon)
- Iron [soil, agricultural]: 0.023535 kg; lognormal variance with pedigree 0.1, pedigree (1,1,5,1,1)
  (same comment as for Cadmium)
- Arsenic [soil, agricultural]: 5.8422e-5 kg; lognormal variance with pedigree 0.71, pedigree (1,1,5,1,1)
  (same comment as for Cadmium)
- DOC, Dissolved Organic Carbon [water, ground-, long-term]: 6.46e-5 kg; lognormal variance with pedigree 0.11, pedigree (1,1,5,1,1)
  (same comment as for Silicon)
- DOC, Dissolved Organic Carbon [water, surface water]: 0.0046071 kg; lognormal variance with pedigree 0.08, pedigree (1,1,5,1,1)
  (same comment as for Nickel, ion)
- Phosphorus [air, urban air close to ground]: 6.3779e-6 kg; lognormal variance with pedigree 0.11, pedigree (1,1,5,1,1)
  (same comment as for Iron)
- Magnesium [soil, agricultural]: 2.6558e-5 kg; lognormal variance with pedigree 0.71, pedigree (1,1,5,1,1)
  (same comment as for Cadmium)
- TOC, Total Organic Carbon [water, surface water]: 0.0049323 kg; lognormal variance with pedigree 0.04, pedigree (1,1,5,1,1)
  (same comment as for Nickel, ion)
- Chromium VI [water, ground-, long-term]: 2.2381e-5 kg; lognormal variance with pedigree 1.09, pedigree (1,1,5,1,1)
  (same comment as for Silicon)
- Nickel [soil, agricultural]: 0.0010047 kg; lognormal variance with pedigree 0.71, pedigree (1,1,5,1,1)
  (same comment as for Cadmium)
- Cadmium, ion [water, surface water]: 0.00035535 kg; lognormal variance with pedigree 0.66, pedigree (1,1,5,1,1)
  (same comment as for Nickel, ion)
- Ammonia [air, urban air close to ground]: 0.00020299 kg; lognormal variance with pedigree 0.28, pedigree (1,1,5,1,1)
  direct digester gas emission plus emission from sludge incineration plus emission from sludge spreading. Uncertainty calculated from wastewater composition and treatment model
- Silicon [water, surface water]: 0.00039664 kg; lognormal variance with pedigree 0.57, pedigree (1,1,5,1,1)
  (same comment as for Nickel, ion)
- Iron, ion [water, ground-, long-term]: 0.01748 kg; lognormal variance with pedigree 0.93, pedigree (1,1,5,1,1)
  (same comment as for Silicon)
- Lead [water, surface water]: 7.6941e-5 kg; lognormal variance with pedigree 0.6, pedigree (1,1,5,1,1)
  (same comment as for Nickel, ion)
- Lead [soil, agricultural]: 0.00024097 kg; lognormal variance with pedigree 0.71, pedigree (1,1,5,1,1)
  (same comment as for Cadmium)

## Extrapolations
This dataset has been extrapolated from year 2000 to the year of the calculation (2021). The uncertainty has been adjusted accordingly.

## Review by Rolf Frischknecht 2009-02-07
passed.
