# gold-silver mine operation with refinery

Dataset: EcoSpold 2, unit process
Geography: CA-QC
Time period: 2012-01-01 to 2021-12-31
Technology level: current
Classification: ISIC rev.4 ecoinvent: 0729:Mining of other non-ferrous metal ores
Scenario: Business-as-Usual
System model: Allocation, cut-off by classification
Share of production covered: 98 %
Generated by: Catherine Reid
Database: ecoinvent
isCopyrightProtected: true
accessRestrictedTo: 1

## General comment
This dataset describes the production of gold and silver in Quebec (Canada) in 2012. This includes the operations at the mining site located in Quebec, i.e. mining, benefication and a first refining, which leads to the production of doré bars, containing gold, silver and impurities.
Specific data were collected from 3 mines that produced doré bars in Quebec. These mines represent about 98% of Quebec gold production and about 95% of Quebec silver production from combined gold-silver mines. Share is estimated as the production statistics for 2012-2013 are not published yet and considers gold-silver mines only (not gold and silver coming from other mines). One mine is an open-pit mine and the two others are underground. A weighted average of 839 tonnes of ore is extracted per kg of gold produce. The recovery rate of gold is known for two of the mines (89% and 91%) and the recovery rate of silver known for only one mine (76%).
Note that the mine infrastructure are extrapolated from gold-silver mine operation with refinery, GLO dataset, where the modelled mines are open pit. This is not representative of the Quebec situation where two of the three modelled mine are underground. Thus a mine infrastrucuture, gold and silver, Québec will eventually be created in order to reflect the Québec specificity.
In order to create a dataset with gold and silver as outputs (to comply with the boundaries of the GLO dataset), a very simplified modeling of the refining of the doré bars to produce gold and silver has been added to this dataset although it is done in Ontario (Canada) : electricity use is extrapolated from gold-silver mine operation with refinery, PE and PG datasets and infrastructure extrapolated from gold-silver mine operation with refinery, GLO dataset.
It is assume that the refining efficency is 100% (i.e. no loss of gold).

## Included activities start
From metal containing ore extraction from the ground.

## Included activities end
This activity ends with the refining of gold and silver.

This dataset includes the operation at the mining site located in Quebec (Canada), i.e. mining, benefication and a first refining, which leads to the production of doré bars. The refining of the doré bars to produce gold and silver, occuring in Ontario (Canada) is also included in this dataset.
Energy and material use, water and air emissions, infrastructure and land use are included for the operation at the mine site and only electricity and infrastructures are included for the refining of the doré bars.

This dataset doesn"t include:
- Fine charcoal (byproduct): fine charcoal coal that no longer meets specifications to enter the process is sent to a smelter to recover gold. Excluded because available data are not complete and reliable.
- Waste sent to recycling: Paper, cardboard (1.028E1 kg/kg) and wood, metals, paper, oil (1.853E1 kg/kg).

Note that the emissions to air and water are limited to what has been measured on site. Also, anodes and cathodes for doré bar refining are supposed to be included in refinery infrastructure.

All calculations made can not be documented (using paramaters, properties and equation) for confidentiality reasons.

## Geography
Inputs and outputs for mining, benefication and a first refining relate to Quebec production. Inputs for doré bar refining, which is done in Ontario, are extrapolated from dataset gold-silver mine operation with refinery (PG, CL, SE).

## Technology
One of the modelled mine is an open-pit mine and the two others are underground.

## Time period
Collected data for Quebec industry for the years 2012 and 2013 : two mines provided 2012 data and one mine provided 2013 data (partly extrapolated as the year was not yet completed).

## Parameters
- fraction, process water, to air: 0.15 dimensionless; lognormal variance with pedigree 0.092025, pedigree (4,4,3,2,4)
- annual production Quebec: 0 kg; name annualProductionQuebec

## Reference product
- silver: 1 kg; name ByProduct_Silver; CPC 41310: Silver (including silver plated with gold or platinum), unwrought or in semi-manufactured forms, or in powder […]; By-product classification allocatable product; CAS 7440-22-4; pedigree (1,1,1,1,1)
  Calculated Value based on weighted average from 3 mines.
  production volume 12064.2 kg; = ByProduct_Silver * (PV_Quebec / RefProduct_Gold)
    Calculated from production volume of reference product using the relative outputs.
  property price 324.357 EUR2005
    Price calculated as 5-year market average (2015-2019; USD/kg; USGS [2020]) and converted to EUR2005 (USD2019/EUR2005 exchange rate: 0.62; Official Data Foundation [2020] and Macrotrends [2020]).
    References:
    Official Data Foundation (2020). Inflation Calculator [Online]. Available from: https://www.officialdata.org/us/inflation/2005?endYear=2019&amount=1 [Accessed 28/07/2020]
    USGS (2020). Mineral Commodity Summaries 2020 [Online]. Available from: https://pubs.usgs.gov/periodicals/mcs2020/mcs2020.pdf [Accessed 28/07/2020]
    Macrotrends (2020). Euro Dollar Exchange Rate (EUR USD) - Historical Chart [Online]. Available from: https://www.macrotrends.net/2548/euro-dollar-exchange-rate-historical-chart [Accessed 28/07/2020]
  property carbon content 0
    carbon content on a dry matter basis (reserved; not for manual entry)
  property true value 170.612; name ByProduct_Silver_true_value
    allocation property applied in "true value" allocation // value calculated from revenue
  properties: water content 0, wet mass 1 kg, dry mass 1 kg, water in wet mass 0 kg, carbon content, fossil 0, carbon content, non-fossil 0, carbon allocation 0 kg
- gold: 0 kg; name RefProduct_Gold; By-product classification allocatable product; CPC 41320: Gold (including gold plated with platinum), unwrought or in semi-manufactured forms, or in powder form; CAS 7440-57-5
  production volume 22935.7 kg; name PV_Quebec; = 22477/0.98
    Estimation as the production statistics for 2012-2013 are not published yet ; Considers gold-silver mines only (not gold and silver coming from other mines).
  property price 25128.4 EUR2005
    (same comment as for silver)
  property carbon content 0
    carbon content on a dry matter basis (reserved; not for manual entry)
  property true value 25128.4; name RefProduct_Gold_true_value
    allocation property applied in "true value" allocation // value calculated from revenue
  properties: carbon content, non-fossil 0, water in wet mass 0 kg, carbon content, fossil 0, wet mass 1 kg, water content 0, dry mass 1 kg, carbon allocation 0 kg

## By-products
- iron scrap, unsorted: 0 kg; CPC 39310: Slag, dross, scalings and other waste from the manufacture of iron or steel; By-product classification Recyclable; pedigree (1,1,1,1,1)
  Calculated Value based on weighted average (extrapolation of third mine based on amount of extracted ore). Reported as metals sent to recovery.
  production volume 0 kg; = ironScrap * (PV_Quebec / RefProduct_Gold)
    Calculated from production volume of reference product using the relative outputs.
  property price 0.149 EUR2005; name ironScrap_price_EUR2005
    Temporary price data. Calculated as 90% of purchasers price based on: estimated at 85% of sorted scrap
  property carbon content 0
    carbon content on a dry matter basis (reserved; not for manual entry)
  properties: dry mass 1 kg, carbon content, non-fossil 0, water content 0, water in wet mass 0 kg, carbon content, fossil 0, wet mass 1 kg, carbon allocation 0 kg

## Inputs from technosphere
- steel, unalloyed: 11.8978 kg; lognormal variance with pedigree 0.0107, pedigree (3,2,4,1,1)
  Calculated Value based on weighted average from 3 mines.
  Different types of steel balls are used. A composition of 14% chromium and 86% steel for all balls is assumed.
  properties: dry mass 1 kg, wet mass 1 kg, carbon content, fossil 0.0025
- propane, burned in building machine: 29.0384 MJ; = (fuel_input_propane*density_propane*UnitConversion(1, 'm3', 'l'))*Net_heat_value_propane*46.46; lognormal variance with pedigree 0.008, pedigree (1,1,4,1,1)
  Calculated Value. See exchange properties for details.
  Uncertainty: C
  property density 0.515 kg/l; name density_propane
  property heating value, net 1 MJ; name Net_heat_value_propane
  property fuel input in physical units, m3 0.09466 m3; name fuel_input_propane
  note on density: Literature value.Density for liquid propane (at 15°C), taken from http://www.cfbp.fr/proprietes-des-gpl/caracteristiques-generales-et-physico-chimiques-n305.
  note on heating value, net: Literature value. Net (lower) heating (calorific) value.Taken directly from ecoinvent v3.0 dataset '"'propane, burned in building machine, GLO 2013".
  note on fuel input in physical units, m3: Calculated Value based on weighted average from 3 mines. Used to heat undeground galeries, at 1 mine (others use natural gas).
- heat, district or industrial, natural gas: 107.183 MJ; = fuel_input_naturalgas*Net_heat_value_naturalgas*36.3/fuel_use_naturalgas; lognormal variance with pedigree 0.008, pedigree (1,1,4,1,1)
  Calculated value. See parameters exchanges properties for details.
  Uncertainty: C
  property heating value, net 1 MJ; name Net_heat_value_naturalgas
  property fuel input in physical units, m3 241 m3; name fuel_input_naturalgas
  property Corresponding fuel use 1.04645 MJ; name fuel_use_naturalgas; = (0.98039+1.0417+1.0526+1.1111)/4
  note on heating value, net: Literature value. Net (lower) heating (calorific) value. Value Taken from Table 5.1 of report "Overview and methodology, Data quality guideline for the ecoinvent database version 3" (ecoinvent report No. 1 (v3), 2011).
  note on fuel input in physical units, m3: Calculated Value based on weighted average from 3 mines. Partially to heat undeground galeries.
  note on Corresponding fuel use: Calculated value. Lower heating value of the fuel input related to the heat/electricity output. Calculated with corresponding heat production datasets.
- sulfur dioxide, liquid: 0.775283 kg; lognormal variance with pedigree 0.0093, pedigree (2,2,4,1,1)
  Calculated Value based on weighted average from 3 mines. Around 40% is for wastewater treatment in one mine.
  properties: wet mass 1 kg, dry mass 1 kg
- fatty alcohol: 0.0142697 kg; lognormal variance with pedigree 0.0112, pedigree (3,3,4,1,1)
  Calculated Value based on weighted average from 3 mines. For wastewater treatment ; Oil-based anti-foaming agent. Stands for CC-7425/76.
  The chemicals used for the wastewater treatment are based on the two smaller mines which has different inputs for water treatment.
  properties: carbon content, fossil 0.0408973, heating value, net 41.01 MJ, carbon content, non-fossil 0.743434, wet mass 1 kg, dry mass 1 kg
- sodium cyanide: 2.54111 kg; lognormal variance with pedigree 0.0093, pedigree (2,2,4,1,1)
  Calculated Value based on weighted average from 3 mines. Used in a 30% solution.
  Uncertainty: E
  properties: heating value, net 7.43 MJ, carbon content, fossil 0.244898, wet mass 1 kg, dry mass 1 kg
- ethylene glycol: 0.0207187 kg; lognormal variance with pedigree 0.0093, pedigree (2,2,4,1,1)
  Calculated Value based on weighted average from 1 mine (information was not available for the 2 other mines).
  Raw data gives the amount of anti-freeze. It is assume that 60% ethylene glycol solution (% by volume), as its freezing point is -55 C (neglect water as it is marginal compared to the global amount of water consumed on site).
  properties: heating value, net 23.44 MJ, carbon content, fossil 0.387097, wet mass 1 kg, dry mass 1 kg
- diesel, low-sulfur: 0.573609 kg; lognormal variance with pedigree 0.0093, pedigree (2,2,4,1,1)
  Calculated Value based on weighted average from 3 mines. It is assume that the given amount represented the complecte explosive, i.e. 94% ammonium nitrate and 6% petrol.
  Assumption : diesel low sulfur.
  properties: wet mass 1 kg, heating value, net 42.8 MJ, carbon content, fossil 0.865, dry mass 1 kg
- manganese dioxide: 0.000116363 kg; lognormal variance with pedigree 0.0093, pedigree (2,2,4,1,1)
  Calculated Value based on weighted average from 3 mines. Used as fluxing/oxidising agent.
  property molecular weight 0 g/mol; name manganese_dioxide_output_MW
  properties: wet mass 1 kg, dry mass 1 kg
- chemical, inorganic: 0.47335 kg; lognormal variance with pedigree 0.0093, pedigree (2,2,4,1,1)
  Calculated Value based on weighted average from 3 mines. Used as a reagent not as a fuel. The chosen dataset is a proxy as the considered charcoal does not per se come from hardwood ; one mine uses charcoal from coconut shells.
  properties: carbon content, fossil 0.003, dry mass 1 kg, wet mass 1 kg
  note on carbon content, fossil: This dataset is an unweighted average of 20 inorganic substances (listed in Tab 88.1, ecoinvent v2.2 report 8, part II), being part of the top100 chemicals included in this database. The C-content has also been calculated as an unweighted average of the C content of the substances composing this dataset.
- hydrochloric acid, without water, in 30% solution state: 0.0213854 kg; lognormal variance with pedigree 0.0093, pedigree (2,2,4,1,1)
  Calculated Value based on weighted average from 3 mines. Active agent only.
  properties: heating value, net 3.32 MJ, dry mass 1 kg, wet mass 1 kg
- hydrogen peroxide, without water, in 50% solution state: 8.30285 kg; lognormal variance with pedigree 0.0107, pedigree (3,2,4,1,1)
  Calculated Value based on weighted average from 3 mines. Around 96% is used for wastewater treatment. The chemicals used for the wastewater treatment are based on the two smaller mines which has different inputs for water treatment.
  properties: wet mass 1 kg, dry mass 1 kg, heating value, net 7.13 MJ
- lime, hydrated, loose weight: 4.95402 kg; lognormal variance with pedigree 0.0112, pedigree (3,3,4,1,1)
  Calculated Value based on weighted average from 3 mines. For wastewater treatment. The chemicals used for the wastewater treatment are based on the two smaller mines which has different inputs for water treatment.
  properties: water content 0.00300903, wet mass 1 kg, dry mass 0.997 kg
- charcoal: 0.47335 kg; lognormal variance with pedigree 0.0093, pedigree (2,2,4,1,1)
  (same comment as for chemical, inorganic)
  properties: heating value, net 28.4 MJ, dry mass 1 kg, carbon content, non-fossil 0.8, wet mass 1 kg
  note on heating value, net: Indicative value. Reference: Fuels - Higher and Lower Calorific Values, available at: https://www.engineeringtoolbox.com/fuels-higher-calorific-values-d_169.html
- copper sulfate: 0.585405 kg; lognormal variance with pedigree 0.0093, pedigree (2,2,4,1,1)
  Calculated Value based on weighted average from 3 mines.
  properties: wet mass 1 kg, dry mass 1 kg
- sodium hydroxide, without water, in 50% solution state: 0.376423 kg; lognormal variance with pedigree 0.0093, pedigree (2,2,4,1,1)
  Calculated Value based on weighted average from 3 mines. The amount is the active agent only. Assumption : it is used in a 50% solution.
  properties: wet mass 1 kg, dry mass 1 kg, heating value, net 3.03 MJ
- oxygen, liquid: 1.19145 kg; lognormal variance with pedigree 0.0093, pedigree (2,2,4,1,1)
  Calculated Value based on weighted average from 3 mines.
  properties: dry mass 1 kg, wet mass 1 kg
- waste wood, untreated: -0.505915 kg; name wasteWood; lognormal variance with pedigree 0.0107, pedigree (3,2,4,1,1)
  Calculated Value based on weighted average (extrapolation of third mine based on amount of extracted ore). Reported as wood sent to recovery.
  production volume 905043 kg; = wasteWood * (PV_Quebec / RefProduct_Gold)
    Calculated from production volume of reference product using the relative outputs.
  property price 0 EUR2005; name wasteWood_price_EUR2005
  properties: heating value, net 13.99 MJ, carbon content, non-fossil 0.48632, dry mass 0.8 kg, water content 0.25, wet mass 1 kg
  note on heating value, net: Value taken from the general comment of the treatment dataset.
- electricity, high voltage: 0.0249444 kWh; = (RefProduct_gold*input_kWh_gold)+(ByProduct_silver*input_kWh_silver); lognormal variance with pedigree 0.008, pedigree (1,1,4,1,1)
  Calculated Value. The refining of the doré bars to produce gold and silver, occuring in Ontario (Canada), has been added to this dataset in order to comply with the boundaries of the GLO dataset (vertical aggregation). Elctricity used has been modelled in a very simplified way. See exchange properties for details.
  Electricity consumption should be allocated on the basis of the amount used for gold and silver.
  Uncertainty: C
  property input_kWh_silver 0.6 kWh; name input_kWh_silver
  property input_kWh_gold 1.63 kWh; name input_kWh_gold
  note on input_kWh_silver: Extrapolation based on dataset gold-silver mine operation with refinery. It is supposed that silver is refined by Möbius electrolysis, with an electricity consumption of 0.6 kWh per kg of silver.
  note on input_kWh_gold: Extrapolation based on dataset gold-silver mine operation with refinery. Gold is refined by Miller chlorination and Wohlwill electrolysis. Due to the lack of specific data, the figure of refinement from electronic scrap is used for the electricity consumption of the electrolysis : 1.63 kWh per kg gold.
- nitric acid, without water, in 50% solution state: 0.069746 kg; lognormal variance with pedigree 0.0093, pedigree (2,2,4,1,1)
  Calculated Value based on weighted average from 3 mines. Active agent only.
  properties: dry mass 1 kg, wet mass 1 kg
- sulfidic tailings, from gold mine operation: -10697.8 kg; name sulfidicTailing; lognormal variance with pedigree 0.0093, pedigree (2,2,4,1,1)
  Calculated Value based on weighted average from 3 mines.
  20% is sent underground to be used as backfill (excluded from the amount); sulfidic tailing is managed on site.
  The sulfidic tailings, off-site dataset is used as a proxy, composition of leachage to groundwater may not fully correspond.
  production volume 1.91376e10 kg; = sulfidicTailing * (PV_Quebec / RefProduct_Gold)
    Calculated from production volume of reference product using the relative outputs.
  property price 0 EUR2005; name sulfidicTailing_price_EUR2005
  properties: aluminium content 0.017079, carbon content, fossil 0.0087785, sodium content 0.0014916, water content 0.428571, dry mass 0.7 kg, silicon content 0.056714, oxygen content 0.88758, iron content 0.014628, wet mass 1 kg, magnesium content 0.0020127, potassium content 0.0031243, calcium content 0.0037589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
- precious metal refinery: 3.12431e-9 unit; lognormal variance with pedigree 0.51, pedigree (5,5,5,5,5)
  Extrapolation from precious metal refinery used in ""gold-silver mine operation, with refinery""
- borax, anhydrous, powder: 0.00455144 kg; lognormal variance with pedigree 0.0093, pedigree (2,2,4,1,1)
  Calculated Value based on weighted average from 3 mines. Used as fluxing/oxidising agent.
  properties: wet mass 1 kg, dry mass 1 kg
- diesel, burned in building machine: 1061.54 MJ; = fuel_input_diesel_buildingmachine*density_diesel_buildingmachine*UnitConversion(1, 'm3', 'l')*Net_heat_value_diesel_buildingmachine*42.8; lognormal variance with pedigree 0.008, pedigree (1,1,4,1,1)
  Calculated value. See parameters exchanges properties for details.
  Uncertainty: C
  property heating value, net 1 MJ; name Net_heat_value_diesel_buildingmachine
  property density 0.84 kg/l; name density_diesel_buildingmachine
  property fuel input in physical units, m3 2.303 m3; name fuel_input_diesel_buildingmachine
  note on density: Density value. Value Taken from Table 5.1 of report "Overview and methodology, Data quality guideline for the ecoinvent database version 3" (ecoinvent report No. 1 (v3), 2011)
- soda ash, dense: 3.69243 kg; lognormal variance with pedigree 0.0107, pedigree (3,2,4,1,1)
  Calculated Value based on weighted average from 3 mines. More than 99% is used for wastewater treatment.The chemicals used for the wastewater treatment are based on the two smaller mines which has different inputs for water treatment.
  properties: dry mass 1 kg, carbon content, fossil 0.113208, heating value, net 3.43 MJ, wet mass 1 kg
- electricity, high voltage: 472.452 kWh; lognormal variance with pedigree 0.0093, pedigree (2,2,4,1,1)
  Calculated Value based on weighted average from 3 mines.
- polyacrylamide: 0.425784 kg; lognormal variance with pedigree 0.0093, pedigree (2,2,4,1,1)
  Calculated Value based on weighted average from 3 mines. Reported as Floculant (some is Flomin 905MC) ; >97% is used in the refining process, the rest is for wastewater treatment.
  property molecular weight 0 g/mol; name C3H5NO_mol_weight
  properties: carbon content, fossil 0.51, dry mass 1 kg, heating value, net 23.88 MJ, wet mass 1 kg
  note on molecular weight: Taken from http://chem.sis.nlm.nih.gov/chemidplus/rn/79-06-1.
- quicklime, milled, loose: 12.2979 kg; lognormal variance with pedigree 0.0093, pedigree (2,2,4,1,1)
  Calculated Value based on weighted average from 3 mines. Around 58% is used for wastewater treatment.
  properties: wet mass 1 kg, water content 0.010101, dry mass 0.99 kg
- sodium nitrate: 0.00364628 kg; lognormal variance with pedigree 0.0093, pedigree (2,2,4,1,1)
  Calculated Value based on weighted average from 3 mines. Used as fluxing/oxidising agent.
  properties: wet mass 1 kg, dry mass 1 kg
- lubricating oil: 0.307831 kg; lognormal variance with pedigree 0.0093, pedigree (2,2,4,1,1)
  Calculated Value based on weighted average from 3 mines. Reported as "grease and oils".
  properties: wet mass 1 kg, heating value, net 40.2 MJ, carbon content, fossil 0.75, dry mass 1 kg
  note on heating value, net: Literature value, Source: IPCC 2006, 2006 IPCC Guidelines for National Greenhouse Gas Inventories, Prepared by the National Greenhouse Gas Inventories Programme, Eggleston H.S., Buendia L., Miwa K., Ngara T. and Tanabe K. (eds). Published: IGES, Japan
  note on carbon content, fossil: Lubricating oil is produced from diesel. C-content/dry mass of fats and oils considered 75%, from: ecoinvent v2.2 report, n 15a, pg 40
- polycarboxylates, 40% active substance: 0.272573 kg; lognormal variance with pedigree 0.0093, pedigree (2,2,4,1,1)
  Calculated Value based on weighted average from 3 mines. Used as anti-scaling (different types) ; around 30% is used for wastewater treatment.
  properties: wet mass 1 kg, water content 1.5, carbon content, fossil 0.496429, dry mass 0.4 kg, heating value, net 4.54 MJ
- synthetic rubber: 1.4462 kg; lognormal variance with pedigree 0.0098, pedigree (2,3,4,1,1)
  Calculated Value based on weighted average from 2 mines (information was not available for 1 mine).
  properties: heating value, net 26.42 MJ, carbon content, fossil 0.871949, dry mass 1 kg, wet mass 1 kg
  note on carbon content, fossil: EPDM (Ethylene-propene-diene terpolymer) rubber is a terpolymer of ethylene, propene, and a diene with the residual unsaturated portion of the diene in the side chain (ecoinvent v2.2 report 7-part XX & Ullmann). Chemical formula (deduced from Evidences of Solvent-Induced Miscibility in Polychloroprene-co-Ethylene-Propene Diene Terpolymer Blends, Dubey et al., Journal of Applied Polymer Science, 2009, 111:1884-1891): C20H35
- aluminium sulfate, powder: 0.435143 kg; lognormal variance with pedigree 0.0112, pedigree (3,3,4,1,1)
  (same comment as for lime, hydrated, loose weight)
  properties: wet mass 1 kg, dry mass 1 kg
- chromium: 1.93725 kg; lognormal variance with pedigree 0.0107, pedigree (3,2,4,1,1)
  (same comment as for steel, unalloyed)
  properties: dry mass 1 kg, wet mass 1 kg
- phosphoric acid, industrial grade, without water, in 85% solution state: 0.0765411 kg; lognormal variance with pedigree 0.0112, pedigree (3,3,4,1,1)
  Calculated Value based on weighted average from 3 mines. For wastewater treatment. The amount is the active agent only used in a 85% solution. The chemicals used for the wastewater treatment are based on the two smaller mines which has different inputs for water treatment.
  properties: dry mass 1 kg, wet mass 1 kg
- ammonium nitrate: 8.98676 kg; = (input_ammoniumNitrate*N_content_ammoniumNitrate)*2.85731828339295; lognormal variance with pedigree 0.008, pedigree (1,1,4,1,1)
  The exchange has been updated from "ammonium nitrate, as N" into "ammonium nitrate" and therefore its amount has been scaled (multiplied) from 245.315 kg by 2.8573 kg of "ammonium nitrate" per kg of "ammonium nitrate, as N". Original comment of the exchange is: Calculated value. See parameters exchanges properties for details.
  Uncertainty: C
  property input_kg 700.9 kg; name input_ammoniumNitrate
  property N content 0.35; name N_content_ammoniumNitrate
  properties: dry mass 1 kg, wet mass 1 kg
  note on input_kg: Calculated Value based on weighted average from 3 mines. It is assume that the given amount represented the complecte explosive, i.e. 94% ammonium nitrate and 6% petrol.
- carbon dioxide, liquid: 0.600277 kg; lognormal variance with pedigree 0.0112, pedigree (3,3,4,1,1)
  (same comment as for lime, hydrated, loose weight)
  properties: carbon content, fossil 0.272727, dry mass 1 kg, heating value, net 8.27 MJ, wet mass 1 kg
- silica sand: 0.00163595 kg; lognormal variance with pedigree 0.0093, pedigree (2,2,4,1,1)
  Calculated Value based on weighted average from 3 mines. Used as fluxing/oxidising agent.
  properties: water content 0.010101, dry mass 0.99 kg, wet mass 1 kg
- sodium silicate, spray powder, 80%: 3.73603 kg; lognormal variance with pedigree 0.0112, pedigree (3,3,4,1,1)
  (same comment as for lime, hydrated, loose weight)
  properties: wet mass 1 kg, dry mass 1 kg
- iron sulfate: 19.2186 kg; lognormal variance with pedigree 0.0112, pedigree (3,3,4,1,1)
  (same comment as for lime, hydrated, loose weight)
  properties: wet mass 1 kg, dry mass 1 kg
- mine infrastructure, gold and silver: 4.06054e-9 unit; lognormal variance with pedigree 0.478, pedigree (4,5,5,5,5)
  Extrapolation based on gold-silver mine operation with refinery, GLO dataset.
  The mine infrastructure, gold and silver dataset, in which the modelled mines are open pit, is not representative of the Quebec situation where two of the three modelled mine are underground.
  A mine infrastrucuture, gold and silver, Québec will eventually be created in order to reflect the Québec specificity.
  Uncertainty: E
- iron scrap, unsorted: -0.389629 kg; lognormal variance with pedigree 0.0107, pedigree (3,2,4,1,1)
  (same comment as for iron scrap, unsorted)
  production volume 697016 kg
  properties: dry mass 1 kg, wet mass 1 kg

## Inputs from nature
- Gold, in ground [natural resource, in ground]: 0.0143454 kg; = 0.209 + 0.1538 + 0.7561; lognormal variance with pedigree 0.0113, pedigree (3,2,4,1,2)
  The gold comes from three different ores with the following compositions:
  0.209 kg Au: 6.8 ppm Au and 1.5 ppm Ag in ore
  0.1538 kg Au: 5.4 ppm Au and 0.15 ppm Ag in ore
  0.7561 kg Au: 0.97 ppm Au and 0.76 ppm Ag in ore
  The input amount of 0.1538 kg of gold was calculated based on the recovered gold for this mine and the recovery rate of the two other mines (not known for this mine).
  The other two input amounts were calculated based on the gold concentration in the ore and the amount of ore extracted.
- Silver, in ground [natural resource, in ground]: 0.00825162 kg; = 0.5924 + 0.004294 + 0.04691; lognormal variance with pedigree 0.0192, pedigree (4,4,4,1,2)
  The silver comes from three different ores with the following compositions:
  0.5924 kg Ag: 0.76 ppm Ag and 0.97 ppm Au in ore
  0.0043 kg Ag: 0.15 ppm Ag and 5.4 ppm Au in ore
  0.0469 kg Ag: 1.5 ppm Ag and 6.8 ppm Au in ore
  The input amount of 0.5924 kg of silver was calculated based on the silver concentration in ore and amount of ore extracted.
  The other two amounts were calculated based on the recovered silver for this mine and the recovery rate of another mine (recovery rate known for only one of the mine and supposed equivalent for all three mines).
- Water, river [natural resource, in water]: 0.150005 m3; name water_input_river; lognormal variance with pedigree 0.0093, pedigree (2,2,4,1,1)
  Calculated Value based on weighted average from 3 mines.
- Water, well, in ground [natural resource, in water]: 9.4593 m3; name water_input_well_inground; lognormal variance with pedigree 0.0093, pedigree (2,2,4,1,1)
  (same comment as for synthetic rubber)

## Emissions to nature
- Lead [water, surface water]: 1.40261e-5 kg; lognormal variance with pedigree 0.6606, pedigree (3,3,4,1,1)
  Calculated Value based on weighted average (extrapolation of third mine based on amount of extracted ore).
- Particulates, < 2.5 um [air, non-urban air or from high stacks]: 0.00193468 kg; lognormal variance with pedigree 0.312, pedigree (3,4,4,1,1)
  Calculated Value extrapolated from 1 mine to the other two, based on gold production. Process emission only.
- Zinc, ion [water, surface water]: 0.000184365 kg; lognormal variance with pedigree 0.6606, pedigree (3,3,4,1,1)
  (same comment as for Lead)
- Manganese [water, surface water]: 0.00200776 kg; lognormal variance with pedigree 0.662, pedigree (3,4,4,1,1)
  Calculated Value based on weighted average (extrapolation from one mine only, based on amount of extracted ore).
- Copper, ion [water, surface water]: 0.000513736 kg; lognormal variance with pedigree 0.6606, pedigree (3,3,4,1,1)
  (same comment as for Lead)
- Particulates, > 2.5 um, and < 10um [air, non-urban air or from high stacks]: 0.0415912 kg; lognormal variance with pedigree 0.132, pedigree (3,4,4,1,1)
  (same comment as for Particulates, < 2.5 um)
- Arsenic, ion [water, surface water]: 0.0135133 kg; lognormal variance with pedigree 0.6606, pedigree (3,3,4,1,1)
  (same comment as for Lead)
- Antimony [water, surface water]: 0.00209494 kg; lognormal variance with pedigree 0.662, pedigree (3,4,4,1,1)
  (same comment as for Manganese)
- Nickel, ion [water, surface water]: 0.000917339 kg; lognormal variance with pedigree 0.6606, pedigree (3,3,4,1,1)
  (same comment as for Lead)
- Water [water, surface water]: 9.6093 m3; = water_input_river+water_input_well_inground; lognormal variance with pedigree 0.0561, pedigree (4,2,4,1,1)
  Estimation based on amount of water used by the process (it is assumed that there is no evaporation).
- Cyanide [water, surface water]: 0.000325011 kg; lognormal variance with pedigree 0.0506, pedigree (3,3,4,1,1)
  (same comment as for Lead)
- Nitrate [water, surface water]: 1.15094 kg; lognormal variance with pedigree 0.052, pedigree (3,4,4,1,1)
  (same comment as for Manganese)
- Particulates, > 10 um [air, non-urban air or from high stacks]: 0.0180519 kg; lognormal variance with pedigree 0.052, pedigree (3,4,4,1,1)
  (same comment as for Particulates, < 2.5 um)
- Sulfur dioxide [air, non-urban air or from high stacks]: 0.0897595 kg; lognormal variance with pedigree 0.0126, pedigree (3,4,4,1,1)
  (same comment as for Particulates, < 2.5 um)
- Dinitrogen monoxide [air, non-urban air or from high stacks]: 0.000652202 kg; lognormal variance with pedigree 0.052, pedigree (3,4,4,1,1)
  (same comment as for Particulates, < 2.5 um)
- Chromium, ion [water, surface water]: 1.86032e-5 kg; lognormal variance with pedigree 0.662, pedigree (3,4,4,1,1)
  (same comment as for Manganese)
- Lead [air, non-urban air or from high stacks]: 2.96549e-5 kg; lognormal variance with pedigree 0.662, pedigree (3,4,4,1,1)
  (same comment as for Particulates, < 2.5 um)
- Ammonium, ion [water, surface water]: 0.150903 kg; lognormal variance with pedigree 0.0506, pedigree (3,3,4,1,1)
  (same comment as for Lead)
- Carbon dioxide, fossil [air, non-urban air or from high stacks]: 1.80647 kg; lognormal variance with pedigree 0.0126, pedigree (3,4,4,1,1)
  Calculated Value extrapolated from 1 mine to the other two, based on explosives consumption. Emissions from explosives only.
- Cadmium, ion [water, surface water]: 4.34374e-5 kg; lognormal variance with pedigree 0.6606, pedigree (3,3,4,1,1)
  (same comment as for Lead)
- Nitrogen oxides [air, non-urban air or from high stacks]: 0.391937 kg; lognormal variance with pedigree 0.052, pedigree (3,4,4,1,1)
  (same comment as for Particulates, < 2.5 um)
- Cobalt [water, surface water]: 0.00148338 kg; lognormal variance with pedigree 0.662, pedigree (3,4,4,1,1)
  (same comment as for Manganese)
- Phosphorus [water, surface water]: 0.00167057 kg; lognormal variance with pedigree 0.052, pedigree (3,4,4,1,1)
  (same comment as for Manganese)

## Sampling procedure
Specific data were collected from 3 mines located in Quebec for mining, benefication and a first refining. Extrapolation based on ecoinvent datasets was done for the refining of the doré bars.

## Extrapolations
Extrapolations have been made for:
- The refining of the doré bars based on ecoinvent datasets for electricity consumption and infrastructures.
- Recovery rate of silver known for only one mine and supposed equivalent for all three mines.
- Recovery rate of gold known for two mines and assumed equal to the average of the two mines for the third mine.
- The chemicals used for wastewater treatment are known for the 2 smaller mines (different inputs) and extrapolated for the third mine.
- Emissions to water: some emissions were given by one mine and extrapolated to the other 2 mines and other emissions were given by two mines and extrapolated to the third one.
- Emissions to air extrapolated from 1 mine to the other two, based on gold production.
- Waste were given by two mines and extrapolated to the third one.
- Mine insfrastructure extrapolated from gold-silver mine operation with refinery, GLO dataset.
The uncertainty has been adjusted accordingly.
