# aluminium hydroxide production

Dataset: EcoSpold 2, unit process
Geography: RNA
Time period: 2015-01-01 to 2021-12-31
Technology level: current
Classification: ISIC rev.4 ecoinvent: 2011:Manufacture of basic chemicals
Classification: EcoSpold01Categories: chemicals/inorganics
Synonyms: aluminium hydroxide; Al2O3*3H2O; Bayerit; diaspore; bayerite; gibbsite; Gibbsit; Hydragillit; hydragillite; Aluminiumtrihydrate; Tonerdehydrat
Scenario: Business-as-Usual
System model: Allocation, cut-off by classification
Share of production covered: 55 %
Generated by: Linlin Wu
Published in: International Aluminium Insitute 2015
Database: ecoinvent
isCopyrightProtected: false
accessRestrictedTo: 1

## General comment
Data on Al(OH)3 extraction and calcination to Al2O3 was aggregated on original source (International ALuminium Institute 2015 LCI survey, IAI personnal communication in 2017). In- and outputs of Al(OH)3 are calculated according to the stoichiometry (1.530 kg Al(OH)3 --> 1.000 kg Al2O3 + 0.530 kg H2O). Separate energy data was provided by IAI for production of hydrate and calcination processes. The Al(OH)3 extraction process involves adding milled bauxite to a hot caustic soda (NaOH) solution, dissolving the aluminium-bearing minerals (gibbsite, böhmite and diaspore) present to form a sodium aluminate supersaturated solution or “pregnant liquor”. Flocculants are added to aid settling and the solution is progressively cooled causing aluminium hydroxide crystals to precipitate. Further information can be found at http://bauxite.world-aluminium.org/refining/process.html.
Two sources were used in the creation of this dataset: IAI 2015 Survey data (officially published in 2017); and original ecoinvent 2 data (Althaus, 2007) for exchanges unreported by IAI.

## Included activities start
Unit process starts with the unloading of the process materials to their storage areas on site.

## Included activities end
Includes transport of bauxite and other inputs to the calcination plant, the extraction of Al(OH)3 (grinding, digestion and precipitation) and the disposal of the wastes. Also includes maintenance and repair of plant and equipment and treatment of process air, liquids and solids.
The output of the original IAI dataset is smelter grade alumina. However, by removing the energy inputs for calcination, the intended output of this unit process is aluminium hydroxide.

## Geography
While IAI data are global in scope, flows not reported by IAI and taken from anterior ecoinvent v2 dataset are based on European data.

## Technology
Average technology for the global aluminium industry.

## Parameters
- alumina, production volume: 1.15247e11 kg; name al2o3_productionvolume_2015
- alumina, production volume, north amercia: 6.449e9 kg; name al2o3_pv_na
- molar mass, aluminion oxyde: 102 kg; name M_Al2O3; lognormal variance with pedigree 0.0007, pedigree (1,2,1,1,1)
- alumina, production volume, 2010: 8.5e10 kg; name al2o3_productionvolume_2010; lognormal variance with pedigree 0.0007, pedigree (2,2,1,1,1)
  Smelter grade alumina. As reported in IAI 2013.
- molar mass of aluminium hydroxide: 78 kg; name M_Al_OH_3
- Aluminium hydroxide used in alumina production: 90 % (obsolete); name Al_OH_3_for_Al2O3; lognormal variance with pedigree 0.0566, pedigree (4,5,5,1,1)
  Used to estimate global production volumes, readily available for Al2O3 but not for Al(OH)3.
  Uncertainty: Value cited in ecoinvent 2 report 5 (Althaus, 2007) without citation. Value also found on internet, but not in official documents.

## Reference product
- aluminium hydroxide: 1 kg; name aluminiumHydroxideAmount; By-product classification allocatable product; CPC 34231: Chemical elements n.e.c.; inorganic acids except phosphoric, nitric and sulphonitric; inorganic oxygen compoun[…]; CAS 14762-49-3
  Dry mass
  EcoSpold01Location=RER
  production volume 1.09591e10 kg; name aluminiumHydroxideProductionVolume; = al2o3_pv_na*(2* M_Al_OH_3/ M_Al2O3)*(1/(Al_OH_3_for_Al2O3/100))
    Production volume calculated using the production volume of alumina, assuming that 90% of aluminium hydroxide is used for the production of alumina.
  property price 0.42 EUR2005; name aluminiumHydroxideAmount_price_EUR2005
    Calculated value based on data from United Nations Commodity Trade Statistics Database (comtrade.un.org). UN comtrade category: 281830 Aluminium hydroxide. Year 2005. Using exchange rate of 1EURO = 1.209 USD. Average of price of import into 5 main markets (EU, US, JP, IN and CN).
  property dry mass 1 kg; name aluminiumHydroxideAmount_DM
  property gallium content 0; name aluminiumHydroxideAmount_Ga_content
    gallium content on a dry matter basis
  property water in wet mass 0.11 kg; name aluminiumHydroxideAmount_WWM
  property carbon content, non-fossil 0; name aluminiumHydroxid_C_content_non_fossil_0
    biogene carbon content on a dry matter basis
  property water content 0.11; name aluminiumHydroxideAmount_water_content
  property wet mass 1.11 kg; name aluminiumHydroxideAmount_WM
  property carbon content, fossil 0; name aluminiumHydroxideAmo_C_content_fossil_0
    fossil carbon content on a dry matter basis
  property carbon content 0
    carbon content on a dry matter basis (reserved; not for manual entry)
  properties: carbon allocation 0 kg

## Inputs from technosphere
- redmud from bauxite digestion: -0.5 kg; name redmudAmount; source International Aluminium Insitute 2015; lognormal variance with pedigree 0.0032, pedigree (1,3,3,1,1)
  EcoSpold01Location=CH
  2015 data. Water content was not specified in IAI datasets.
  Uncertainty: Uncertainty higher due to the 40% water content source (Althaus et al., 2000)
  production volume 5.47954e9 kg; = aluminiumHydroxideProductionVolume* redmudAmount/ aluminiumHydroxideAmount
    Calculated from the production volume of aluminium hydroxide in proportion to the respective output amounts.
  property price 0 EUR2005; name redmudAmount_price_EUR2005
  property water content 0.334; name redmudAmount_water_content
  property water in wet mass 0.334 kg; name redmudAmount_WWM
  property carbon content, fossil 0; name redmudAmount_C_content_fossil
  property carbon content, non-fossil 0; name redmudAmount_C_content_non_fossil
  property dry mass 1 kg; name redmudAmount_DM
  property wet mass 1.334 kg; name redmudAmount_WM
- bauxite: 1.46 kg; source International Aluminium Insitute 2015; lognormal variance with pedigree 0.0086, pedigree (1,3,3,1,1)
  IAI 2015 data. Response rate: 39% by production. Reported on a wet mass basis, dry mass is estimated as 88%
  property carbon content, non-fossil 0; name C_content_non_fossil
  property dry mass 0.88 kg; name DM
  property carbon content, fossil 0; name C_content_fossil
  property water in wet mass 0.12 kg; name WWM
  property water content 0.136364; name water_content; = (WM-DM)/DM
  property wet mass 1 kg; name WM
- sodium hydroxide, without water, in 50% solution state: 0.036 kg; source International Aluminium Insitute 2015; lognormal variance with pedigree 0.0032, pedigree (1,3,3,1,1)
  EcoSpold01Location=RER
  IAI 2015 data. Sodium hydroxide used (as 100% caustic soda)
  properties: dry mass 1 kg, wet mass 1 kg, heating value, net 3.03 MJ
- inert waste, for final disposal: -0.0014 kg; name inertWaste; source International Aluminium Insitute 2015; lognormal variance with pedigree 0.0032, pedigree (1,3,3,1,1)
  IAI 2015 data. recycled by products are excluded, only landfilled waste.
  EcoSpold01Location=CH
  production volume 1.53427e7 kg; = aluminiumHydroxideProductionVolume * inertWaste/aluminiumHydroxideAmount
    (same comment as for redmud from bauxite digestion)
  property price 0 EUR2005; name inertWaste_price_EUR2005
  properties: wet mass 1 kg, dry mass 0.995 kg, water content 0.00502513
- aluminium hydroxide factory: 1.64e-11 unit; source Classen M. 2009; lognormal variance with pedigree 0.51, pedigree (5,5,5,5,5)
  Rough guess
  EcoSpold01Location=RER
  Uncertainty: rough guess
- heat, district or industrial, natural gas: 5.08885 MJ; = Net_Heat_Value_ng*40.4 *m3fuel_use_ng /fuel_use_ng; source International Aluminium Insitute 2015; lognormal variance with pedigree 0.0033, pedigree (2,2,3,1,1)
  Natural Gas.As reported by IAI 2015 Energy survey
  property fuel input in physical units, m3 0.131 m3; name m3fuel_use_ng
  property Corresponding fuel use 1.04 MJ; name fuel_use_ng
  property heating value, net 1 MJ; name Net_Heat_Value_ng
  note on Corresponding fuel use: Lower heating value of the fuel input related to the heat/electricity output, based on an efficiency of 96%
  note on heating value, net: net (lower) heating (calorific) value. Based on European average as reported in Classen et al (2009)
- quicklime, milled, loose: 0.016 kg; source International Aluminium Insitute 2015; lognormal variance with pedigree 0.0032, pedigree (1,3,3,1,1)
  EcoSpold01Location=CH
  IAI 2015 data,collected as calcined lime
  properties: water content 0.010101, wet mass 1 kg, dry mass 0.99 kg
- electricity, medium voltage: 0.047 kWh; source International Aluminium Insitute 2015; lognormal variance with pedigree 0.0027, pedigree (1,2,3,1,1)
  As reported by IAI energy survey (2015), reporting rate is 95% by production

## Inputs from nature
- Water, salt, ocean [natural resource, in water]: 0.0016 m3; source International Aluminium Insitute 2015; lognormal variance with pedigree 0.0032, pedigree (1,3,3,1,1)
  IAI 2015 data. Response rate:64% of surveyed sites.
  Uncertainty: ;
- Occupation, unspecified [natural resource, land]: 0.0009 m2*year; source International Aluminium Insitute 2015; lognormal variance with pedigree 0.0432, pedigree (1,3,5,1,2)
  IAI 2015 data. Reported as Land occupation
- Water, unspecified natural origin [natural resource, in water]: 0.0029 m3; source International Aluminium Insitute 2015; lognormal variance with pedigree 0.0032, pedigree (1,3,3,1,1)
  IAI 2015 data. Response rate: 64% of surveyed sites.

## Emissions to nature
- Particulates, < 2.5 um [air, unspecified]: 5.868e-5 kg; = PM_total_1* PM2_5; source International Aluminium Insitute 2015; lognormal variance with pedigree 0.0407, pedigree (1,3,5,1,1)
  Total amount from IAI survey, distributed among three class sizes using CEPMEIP database emission factors for Production of primary aluminium. Abatement level: medium.
  property ratio of total particulates less than 2.5 microns 0.36; name PM2_5; = 1.44/4
  property total particulates 0.000163 kg; name PM_total_1
- COD, Chemical Oxygen Demand [water, unspecified]: 4.59e-5 kg; source Classen M. 2009; lognormal variance with pedigree 0.0807, pedigree (1,3,5,3,1)
  Values come from the former ecoinvent dataset (Althaus, 2009)
- Nitrogen oxides [air, unspecified]: 0.000387 kg; source International Aluminium Insitute 2015; lognormal variance with pedigree 0.0406006, pedigree (1,3,5,1,1)
  IAI 2015 Data, Response rate: 64% by production
- DOC, Dissolved Organic Carbon [water, unspecified]: 1.8e-5 kg; source Classen M. 2009; lognormal variance with pedigree 0.0807, pedigree (1,3,5,3,1)
  Values come from the former ecoinvent dataset (Althaus, 2009)
  Uncertainty: ;
- Mercury [air, unspecified]: 4.4e-8 kg; source International Aluminium Insitute 2015; lognormal variance with pedigree 0.6526, pedigree (1,3,3,1,1)
  IAI 2015 data. Response rate: 64% by production
- Water [water, surface water]: 0.0027 m3; source International Aluminium Insitute 2015; lognormal variance with pedigree 0.0426, pedigree (1,3,3,1,1)
  IAI 2015 data. Response rate: 64% by production
- Sulfur dioxide [air, unspecified]: 4e-5 kg; source International Aluminium Insitute 2015; lognormal variance with pedigree 0.0032, pedigree (1,3,3,1,1)
  IAI 2015 data. Response rate: 36% by production
- Water [air, urban air close to ground]: 0.0027 m3; source International Aluminium Insitute 2015; lognormal variance with pedigree 0.2106, pedigree (5,5,5,5,5)
  IAI data reported as "Fresh Water Consumption"
- Mercury [water, unspecified]: 4e-10 kg; source International Aluminium Insitute 2015; lognormal variance with pedigree 0.0426, pedigree (1,3,3,1,1)
  IAI 2015 data. Response rate: 64% by production
- Oils, unspecified [water, unspecified]: 0.0048 kg; source International Aluminium Insitute 2015; lognormal variance with pedigree 0.0426, pedigree (1,3,3,1,1)
  IAI 2015 data. Response rate: 64% by production
- Water [water, ocean]: 0.0016 m3; source International Aluminium Insitute 2015; lognormal variance with pedigree 0.0426, pedigree (1,3,3,1,1)
  IAI 2015 data. Response rate: 64% by production
- Sodium, ion [water, unspecified]: 0.00128 kg; source Classen M. 2009; lognormal variance with pedigree 0.0807, pedigree (1,3,5,3,1)
  Values come from the former ecoinvent dataset (Althaus, 2009)
- Particulates, > 10 um [air, unspecified]: 3.26e-5 kg; = PM_total_2 *PM_greater_10um; source International Aluminium Insitute 2015; lognormal variance with pedigree 0.5706, pedigree (1,3,5,1,1)
  (same comment as for Particulates, < 2.5 um)
  property ratio pf particulates greater than 10 microns 0.2; name PM_greater_10um; = (4-3.2)/4
  property total particulates 0.000163 kg; name PM_total_2
- TOC, Total Organic Carbon [water, unspecified]: 1.8e-5 kg; source Classen M. 2009; lognormal variance with pedigree 0.0807, pedigree (1,3,5,3,1)
  Values come from the former ecoinvent dataset (Althaus, 2009)
  Uncertainty: ;
- Particulates, > 2.5 um, and < 10um [air, unspecified]: 7.172e-5 kg; = PM_total_3 * PM_btw_2_5_and_10um; source International Aluminium Insitute 2015; lognormal variance with pedigree 0.04061, pedigree (1,3,5,1,1)
  (same comment as for Particulates, < 2.5 um)
  property ratio of particulates between 2.5 and 10 microns 0.44; name PM_btw_2_5_and_10um; = (3.2-1.44)/4
  property total particulates 0.000163 kg; name PM_total_3
- BOD5, Biological Oxygen Demand [water, unspecified]: 4.59e-5 kg; source Classen M. 2009; lognormal variance with pedigree 0.0807, pedigree (1,3,5,3,1)
  Values come from the former ecoinvent dataset (Althaus, 2009)
  Uncertainty: ;
- Suspended solids, unspecified [water, unspecified]: 5e-5 kg; source International Aluminium Insitute 2015; lognormal variance with pedigree 0.0426, pedigree (1,3,3,1,1)
  IAI 2015 data. Response rate: 64% by production

## Sampling procedure
2015 LCI Survey Data was collected by the IAI in Feb - July 2016 with analysis and data verification taking place Aug - Dec 2016.

## Extrapolations
This dataset has been extrapolated from year 2015 to the year of the calculation (2021). The uncertainty has been adjusted accordingly.
