# venting of nitrogen, liquid

Dataset: EcoSpold 2, unit process
Geography: RER
Time period: 2008-01-01 to 2021-12-31
Technology level: current
Classification: EcoSpold01Categories: chemicals/inorganics
Classification: ISIC rev.4 ecoinvent: 2011:Manufacture of basic chemicals
Tags: service
Scenario: Business-as-Usual
System model: Allocation, cut-off by classification
Generated by: Gregor Wernet
Database: ecoinvent
isCopyrightProtected: true
accessRestrictedTo: 1

## General comment
This activity describes venting of nitrogen into the atmosphere as an emission to air.

Nitrogen is produced mainly as a by-product in air separation, cryogenic activity, where oxygen, liquid is produced as a reference product. Nitrogen is afterwards either vented directly into the atmosphere (Ullmann's Encyclopedia) or transformed into marketable product and sold.

## Included activities end
This activity describes venting of nitrogen as an emission to air.

## Reference product
- venting of nitrogen, liquid: 1 kg; CPC 94339: Other non-hazardous waste treatment and disposal services; By-product classification allocatable product; CAS 7727-37-9
  production volume 2.61e10 kg; = 2.61E11*0.5*0.2
    Calculated value based on literature. Nitrogen is produced as a by-product in air separation, cryogenic. In the same activity oxygen, liquid is produced as a reference product. For every 1kg of oxygen produced 3.27 kg of nitrogen is produced.
    The production volume of oxygen. liquid produced in air separation, cryogenic is calculated based on literature (Emsley, 2001) and estimate. 100 million tonnes of oxygen is being produced annually in the whole world. Out of two different production technologies air separation is the preferred one (Emsley, 2001). Based on this information it is estimated that 80% of the total production volume of oxygen is produced using this technology. The annual production volume of oxygen, liquide produced via air separation, cryogenic is (1E+10*0.8=) 8E+10 kg/year.
    The annual production volume of nitrogen produced in that activity is thus (3.27/1*8E+10=) 2.61E+11 kg/year. It is assumed, based on qualitative information found in literature (Ullmann's Encyclopedia), that 50% of the nitrogen produced in this activity is vented into the air.
    It is assumed that 20% of this takes place in the region of Europe.
  property price 0.0615 EUR2005
    Calculated based on inputs: The price of the product has been calculated as a sum of the values of the material and energy inputs for this product. This value is therefore a rough estimation. It may underestimate the real price since there are additional expenses when producing any product. These expences can include for example labour costs, treatment of waste materials and profit for the producer. Please consider carefully whether this level of data quality is acceptable for your application.
  property carbon content 0
    carbon content on a dry matter basis (reserved; not for manual entry)
  properties: water content 0, wet mass 1 kg, carbon content, fossil 0, carbon content, non-fossil 0, water in wet mass 0 kg, dry mass 1 kg, carbon allocation 0 kg

## Inputs from technosphere
- nitrogen, liquid: 1 kg; lognormal variance with pedigree 0.0086, pedigree (1,1,4,1,1)
  property dry mass 1 kg; name DM
  property carbon content, fossil 0; name C_content_fossil
  property water content 0; name water_content
  property water in wet mass 0 kg; name WWM
  property wet mass 1 kg; name WM
  property carbon content, non-fossil 0; name C_content_non_fossil

## Emissions to nature
- Nitrogen [air, unspecified]: 1 kg; lognormal variance with pedigree 0.048, pedigree (1,1,4,1,1)

## Extrapolations
This dataset has been extrapolated from year 2012 to the year of the calculation (2021). The uncertainty has been adjusted accordingly.
