# wheat production

Dataset: EcoSpold 2, unit process
Geography: CA-QC
Time period: 2010-01-01 to 2021-12-31
Technology level: current
Classification: ISIC rev.4 ecoinvent: 0111:Growing of cereals (except rice), leguminous crops and oil seeds
Synonyms: Triticum aestivum L.
Scenario: Business-as-Usual
System model: Allocation, cut-off by classification
Share of production covered: 100 %
Generated by: Dominique Maxime
Database: ecoinvent
isCopyrightProtected: true
accessRestrictedTo: 1

## General comment
This dataset represents the production of 1 kg of wheat grain (wet mass) in the region of Québec. The 2010-2012 average yield is 3067 kg/ha at a moisture content at storage (i.e. dried grain) of 14.5%.

## Included activities start
This activity starts with soil cultivation after the harvest of the previous crop.

## Included activities end
This activity ends after harvest and drying of grains at the farm gate.
The dataset includes the inputs of seeds, mineral fertilisers (it is assumed that no organic fertilisers are applied), pesticides and all machine operations and corresponding machine infrastructure and sheds. Machine operations are: soil cultivation, transport of seeds, fertilisers and pesticides to the field (15 km), sowing, fertilisation, weed control, pest and pathogen control, combine-harvesting, transport from field to farm or local drying centre and drying of grains. Direct field emissions are also included.
No irrigation is involved for wheat grain production in Québec. The use of car, van or pick-up for servicing people, e.g. from farm to field, is not included in the activities.

## Geography
The inventory is modelled for the region of Québec (Canada).

## Time period
Time of publications

## Parameters
- fraction, process water, to air: 0.6165 dimensionless; name fraction_PW_to_air; lognormal variance with pedigree 0.0413, pedigree (2,2,1,4,1)
  For agricultural crop dataset, distinction is made between irrigation water and process water. Process water is the water that comes with manure or pesticide application. A fraction of the process water input evaporates to the air and the remaining is considered emitted to surface water and ground water.
  By default, the same value as for irrigation is assumed: this is a Canada-wide value taken from database (Vionnet, S., Quantis Water Database - Technical report, 2012). Note that it might be lower in Quebec due to the more humid climate in Western Canada than in Eastern Canada.
- MCPA-to-MCPB emission ratio: 1 dimensionless; name MCPA_to_MCPB; lognormal variance with pedigree 0.25, pedigree (5,5,5,5,5)
  MCPA and MCPB are aggregated together in the PestLCI 2.0 model (Dijkman et al. 2012). A 50/50 split as been considered as default situation. See supporting documentation '01 crop production - Québec.pdf' available on ecoinvent reports web page (https://ecoquery.ecoinvent.org/File/Reports).
- yield, agriculture: 3.067 metric ton/ha; name yield_agriculture; lognormal variance with pedigree 0.0081, pedigree (1,2,1,1,1)
  Amount (wet mass) of harvested and dried grains (14.5% water content) per hectare of cultivated land. See supporting documentation '01 crop production - Québec.pdf' available on ecoinvent reports web page (https://ecoquery.ecoinvent.org/File/Reports).
- water content at harvest: 0.18 kg/kg; name harvest_wc; lognormal variance with pedigree 0.01, pedigree (1,1,1,1,1)
  Grain water content at harvest (wet mass basis). See supporting documentation '01 crop production - Québec.pdf' available on ecoinvent reports web page (https://ecoquery.ecoinvent.org/File/Reports).
- MCPA-MCPB combined emissions to agricultural soil: 4.481e-5 kg; name MCPAB_soil; lognormal variance with pedigree 0.0345, pedigree (2,2,2,1,2)
  Modelled with PestLCI 2.0 (Dijkman et al. 2012). See supporting documentation '01 crop production - Québec.pdf' available on ecoinvent reports web page (https://ecoquery.ecoinvent.org/File/Reports).
- fraction, process water to water, to surface water: 0.2 dimensionless; name fraction_PWtoW_to_surface_water; lognormal variance with pedigree 0.0892, pedigree (4,3,1,4,4)
  For agricultural crop dataset, distinction is made between irrigation water and process water. Process water is the water that comes with manure or pesticide application. A fraction of the process water input evaporates to the air and the remaining is considered emitted to surface water and ground water.
  This value is a proxy, taken from ecoinvent v3.0 dataset 'potato production, US 2006'. 'Literature value (Döll, 2011) cross referenced with expert opinion.' as cited in original dataset.
- MCPA-MCPB combined emissions to groundwater: 1.236e-6 kg; name MCPAB_surface; lognormal variance with pedigree 0.0415, pedigree (2,2,2,1,2)
  (same comment as for MCPA-MCPB combined emissions to agricultural soil)
- MCPA-MCPB combined emissions to air: 5.829e-7 kg; name MCPAB_air; lognormal variance with pedigree 0.0415, pedigree (2,2,2,1,2)
  (same comment as for MCPA-MCPB combined emissions to agricultural soil)
- MCPA-MCPB combined emissions to surface water: 5.712e-9 kg; name MCPAB_ground; lognormal variance with pedigree 0.0415, pedigree (2,2,2,1,2)
  (same comment as for MCPA-MCPB combined emissions to agricultural soil)

## Reference product
- wheat grain: 1 kg; name REF_PRODUCT; CPC 01112: Wheat, other; By-product classification allocatable product
  production volume 1.44333e8 kg
    Wheat grain production, 2010-2012 yearly average.
  property carbon content, non-fossil 0.464601; name REF_PRODUCT_C_content_non_fossil
    biogene carbon content on a dry matter basis
    Composition data obtained from Wheat, soft red winter, in (http://www.nal.usda.gov/fnic/foodcomp/search/). First, composition data were refered to 1 kg dry mass. Then, C-contents were calculated considering a C-content/dry mass of 46% in carbohydrates (including fibres), 53% in proteins and 75% in fats. All data from 'Evolutionary and Biochemical Aspects', A.D. Kay and T. Vrede (in Global Ecology, 2010, Elsevier B.V., S.E. Jørgensen Ed.).
  property wet mass 1 kg; name REF_PRODUCT_WM
  property price 0.22 EUR2005; name REF_PRODUCT_price_EUR2005
    Literature value. Based on SAFEX price of R 3,727 per tonne, source: SAGIS, 2018. Retrieved from: http://www.sagis.org.za/safex_historic.html, accessed 28May2018
  property dry mass 0.855 kg; name REF_PRODUCT_DM; = REF_PRODUCT_WM- REF_PRODUCT_WWM
  property water content 0.169591; name REF_PRODUCT_water_content; = REF_PRODUCT_WWM/ REF_PRODUCT_DM
  property water in wet mass 0.145 kg; name REF_PRODUCT_WWM
  property carbon content 0.464601
    carbon content on a dry matter basis (reserved; not for manual entry)
  properties: carbon content, fossil 0, carbon allocation 0.397234 kg

## Inputs from technosphere
- nitrile-compound: 3.587e-5 kg; lognormal variance with pedigree 0.0414, pedigree (1,2,5,3,2)
  Bromoxynil. See supporting documentation '01 crop production - Québec.pdf' available on ecoinvent reports web page (https://ecoquery.ecoinvent.org/File/Reports).
  properties: wet mass 1 kg, dry mass 1 kg, carbon content, fossil 0.344995
- potassium sulfate: 0.000422732 kg; lognormal variance with pedigree 0.0099, pedigree (2,2,4,1,2)
  The exchange has been updated from 'potassium sulfate, as K2O' into 'potassium sulfate' and therefore its amount has been scaled (multiplied) from 0.0002 kg by 1.85 kg of 'potassium sulfate' per kg of 'potassium sulfate, as K2O'.
  properties: dry mass 1 kg, wet mass 1 kg
- phenoxy-compound: 9.848e-5 kg; lognormal variance with pedigree 0.0414, pedigree (1,2,5,3,2)
  4,663E-05 kg MCPA/MCPB; 1,793E-05 kg 2,4-DB amines, 1,696E-05 kg 2.4-D ester and 1,696E-05 kg dichlorprop. See supporting documentation '01 crop production - Quebec.pdf' available on ecoinvent reports web page (https://ecoquery.ecoinvent.org/File/Reports).
  properties: wet mass 1 kg, carbon content, fossil 0.532559, dry mass 1 kg
- packaging, for fertilisers: 0.122643 kg; lognormal variance with pedigree 0.0592, pedigree (4,3,4,5,4)
  Total amount of active substance/s of fertilisers needed for the production of 'wheat grain' is calculated to be circa 6.13E-02 kg. Fertiliser/s used in this dataset is/are: 'ammonia, liquid', 'ammonium nitrate, as N', 'ammonium sulfate, as N', 'lime', 'nitrogen fertiliser, as N', 'phosphate fertiliser, as P2O5', 'potassium chloride, as K2O', 'potassium sulfate, as K2O', 'urea, as N'. The total amount of active substance/s is doubled in order to account for the packaging of the dilluted product of fertiliser/s that is/are applied. Therefore, 1.23E-01 kg of packaging for fertilisers is justified with this exchange.
  properties: wet mass 1 kg, carbon content, fossil 0.825301, heating value, net 25.01 MJ, price 0.0642 EUR2005, dry mass 1 kg
  note on carbon content, fossil: Considering a chemical formula (C2H4)n for polyethylene, carbon content-fossil is calculated to be 0.856286 kg of Carbon per kg of dry mass.
- urea: 0.0256329 kg; name UREA_N; lognormal variance with pedigree 0.0099, pedigree (2,2,4,1,2)
  The exchange has been updated from 'urea, as N' into 'urea' and therefore its amount has been scaled (multiplied) from 0.012 kg by 2.1438 kg of 'urea' per kg of 'urea, as N'. Original comment of the exchange is: Amount is determined from the mineral nutrient actually used for the crop (CECPA, 2011) and from the overall mineral fertilizers sales, by type of fertilizer, in Québec for agriculture (APNC, 2010). See details for disaggregation in supporting documentation '01 crop production - Québec.pdf' available on ecoinvent reports web page (https://ecoquery.ecoinvent.org/File/Reports).
  properties: wet mass 1 kg, dry mass 1 kg, carbon content, fossil 0.2
- packaging, for pesticides: 0.000493043 kg; lognormal variance with pedigree 0.0592, pedigree (4,3,4,5,4)
  Total amount of active substance/s of pesticides needed for the production of wheat grain is calculated to be circa 2.47E-04 kg. Pesticide/s used in this dataset is/are: '[thio]carbamate-compound', 'cyclic N-compound', 'dinitroaniline-compound', 'glyphosate', 'nitrile-compound', 'organophosphorus-compound, unspecified', 'pesticide, unspecified', 'phenoxy-compound', 'pyrethroid-compound'. The total amount of active substance/s is doubled in order to account for the packaging of the dilluted product of pesticide/s that is/are applied. Therefore, 4.93E-04 kg of packaging for pesticides is justified with this exchange.
  properties: carbon content, fossil 0.85714, heating value, net 25.97 MJ, dry mass 1 kg, price 0.0642 EUR2005, wet mass 1 kg
- tillage, rotary cultivator: 0.000474 ha; lognormal variance with pedigree 0.0099, pedigree (2,2,4,1,2)
  2 passes. See supporting documentation '01 crop production - Quebec.pdf' available on ecoinvent reports web page (https://ecoquery.ecoinvent.org/File/Reports).
- liquid manure spreading, by vacuum tanker: 0.00121101 m3; lognormal variance with pedigree 0.0099, pedigree (2,2,4,1,2)
  Calculated from liquid manure input rate and crop yield.
- tillage, ploughing: 0.0003297 ha; lognormal variance with pedigree 0.0099, pedigree (2,2,4,1,2)
  See supporting documentation '01 crop production - Québec.pdf' available on ecoinvent reports web page (https://ecoquery.ecoinvent.org/File/Reports).
- inorganic nitrogen fertiliser, as N: 0.00627627 kg; lognormal variance with pedigree 0.0099, pedigree (2,2,4,1,2)
  Amount is determined from the mineral nutrient actually used for the crop (CECPA, 2011) and from the overall mineral fertilizers sales, by type of fertilizer, in Québec for agriculture (APNC, 2010). See details for disaggregation in supporting documentation '01 crop production - Québec.pdf' available on ecoinvent reports web page (https://ecoquery.ecoinvent.org/File/Reports).
  properties: dry mass 1 kg, wet mass 1 kg
- inorganic phosphorus fertiliser, as P2O5: 0.00403598 kg; lognormal variance with pedigree 0.0099, pedigree (2,2,4,1,2)
  Amount is determined from the mineral nutrient actually used for the crop (CECPA, 2011) and from the overall mineral fertilizers sales, by type of fertilizer, in Québec for agriculture (APNC, 2010). See details for disaggregation in supporting documentation '01 crop production - Québec.pdf' available on ecoinvent reports web page (https://ecoquery.ecoinvent.org/File/Reports).
  Mono- and di-ammonium phosphate (MAP and DAP), as P2O5. The concommitant supply of nitrogen by DAP is accounted for in total N requirements. See supporting documentation '01 crop production - Québec.pdf' available on ecoinvent reports web page (https://ecoquery.ecoinvent.org/File/Reports).
  properties: wet mass 1 kg, dry mass 1 kg
- manure, solid, cattle: 0.16027 kg; name MANURE_SOLID_CATTLE; lognormal variance with pedigree 0.0099, pedigree (2,2,4,1,2)
  Amount of 0.16027 kg of manure, solid, cattle is needed when producing 1kg of wheat.
  Amount is determined from the organic nutrient actually used for the crop (CECPA, 2011) and from data about organic fertilizer production, by type, in Québec (MAPAQ, 2013). See details for disaggregation in supporting documentation '01 crop production - Québec.pdf' available on ecoinvent reports web page (https://ecoquery.ecoinvent.org/File/Reports).
  property water in wet mass 0.78 kg; name MANURE_SOLID_CATTLE_WWM
  properties: nitrogen content 0.02734, carbon content, non-fossil 0.441, dry mass 0.22 kg, water content 3.5454, wet mass 1 kg
  note on nitrogen content: Total N content on a dry matter basis. Weighted average of beef cattle solid manure (0.02639 kg N/kg dm) and dairy cattle solid manure (0.02789 kg N/kg dm) considering that N supply in central and peripherical agricultural regions is about 63% from dairy and 37% from beef cattle (MAPAQ, 2013). N content from Parent and Gagné (2013).
- application of plant protection product, by field sprayer: 0.000290217 ha; lognormal variance with pedigree 0.0099, pedigree (2,2,4,1,2)
  89% of cropand area receives plant protection products in average. See supporting documentation '01 crop production - Québec.pdf' available on ecoinvent reports web page (https://ecoquery.ecoinvent.org/File/Reports).
- manure, liquid, swine: 0.67083 kg; name MANURE_LIQUID_SWINE; lognormal variance with pedigree 0.0099, pedigree (2,2,4,1,2)
  Amount of 0.67083 kg of manure, liquid, swine is needed when producing 1kg of wheat.
  Amount is determined from the organic nutrient actually used for the crop (CECPA, 2011) and from data about organic fertilizer production, by type, in Québec (MAPAQ, 2013). See details for disaggregation in supporting documentation '01 crop production - Québec.pdf' available on ecoinvent reports web page (https://ecoquery.ecoinvent.org/File/Reports).
  property water in wet mass 0.95 kg; name MANURE_LIQUID_SWINE_WWM
  properties: wet mass 1 kg, water content 19, carbon content, non-fossil 0.64, nitrogen content 0.1, dry mass 0.05 kg
- transport, tractor and trailer, agricultural: 0.0387383 metric ton*km; lognormal variance with pedigree 0.1293, pedigree (2,2,4,1,2)
  Transport of harvested material from field to road and from road to farm or local drying centre, and transport of inputs from farm to field (assuming 15 km). See supporting documentation '01 crop production - Québec.pdf' available on ecoinvent reports web page (https://ecoquery.ecoinvent.org/File/Reports).
- manure, liquid, cattle: 0.54017 kg; name MANURE_LIQUID_CATTLE; lognormal variance with pedigree 0.0099, pedigree (2,2,4,1,2)
  Amount of 0.54017 kg of manure, liquid, cattle is needed when producing 1kg of wheat.
  Amount is determined from the organic nutrient actually used for the crop (CECPA, 2011) and from data about organic fertilizer production, by type, in Québec (MAPAQ, 2013). See details for disaggregation in supporting documentation '01 crop production - Québec.pdf' available on ecoinvent reports web page (https://ecoquery.ecoinvent.org/File/Reports).
  property water in wet mass 0.925 kg; name MANURE_LIQUID_CATTLE_WWM
  properties: water content 12.333, dry mass 0.075 kg, carbon content, non-fossil 0.68, wet mass 1 kg, nitrogen content 0.03681
  note on nitrogen content: Total N content on a dry matter basis. Weighted average of beef cattle liquid manure (0.0425 kg N/kg dm) and dairy cattle liquid manure (0.03611 kg N/kg dm) considering that N supply in central and peripherical agricultural regions is for 89% from dairy and 11% from beef cattle (MAPAQ, 2013). N content from Parent and Gagné (2013).
- potassium chloride: 0.00380424 kg; lognormal variance with pedigree 0.0099, pedigree (2,2,4,1,2)
  The exchange has been updated from 'potassium chloride, as K2O' into 'potassium chloride' and therefore its amount has been scaled (multiplied) from 0.0024 kg by 1.5829 kg of 'potassium chloride' per kg of 'potassium chloride, as K2O'. Original comment of the exchange is: Amount is determined from the mineral nutrient used for the crop and from the overall mineral fertilizers sales, by type of fertilizer, in Québec for agriculture (APNC, 2010). See details for disaggregation in supporting documentation '01 crop production - Québec.pdf' available on ecoinvent reports web page (https://ecoquery.ecoinvent.org/File/Reports).
  The potash domestic market in Canada is supplied almost exclusively by domestic production and Quebec resellers of potassium chloride have a preferential trade agreement for supplying fertilizer from Canadian producers. Hence, potassium chloride used in quebec does not rely on the global market and a direct link to Canadian potassium chloride is used. Sources: 1) personnal communication with Gilles Lavoie from the Quebec Professional Association in Crop Nutrition and the Coop Fédérée Inc. (2013); 2) Temple Scott Associates inc. (2013). Fertilizer report for the Canadian Fertilizer Industry. April 5, 2013, 10 p. http://www.cfi.ca/_documents/Fertilizer%20Industry%20Report-%20FINAL.pdf
  properties: wet mass 1 kg, dry mass 1 kg
- ammonium sulfate: 0.000760091 kg; lognormal variance with pedigree 0.0099, pedigree (2,2,4,1,2)
  (same comment as for inorganic nitrogen fertiliser, as N)
  properties: wet mass 1 kg, dry mass 1 kg
- combine harvesting: 0.0003008 ha; lognormal variance with pedigree 0.0099, pedigree (2,2,4,1,2)
  (same comment as for tillage, ploughing)
- ammonia, anhydrous, liquid: 0.00109122 kg; lognormal variance with pedigree 0.0099, pedigree (2,2,4,1,2)
  (same comment as for inorganic nitrogen fertiliser, as N)
  properties: dry mass 1 kg, wet mass 1 kg
- ammonium nitrate: 0.0155538 kg; lognormal variance with pedigree 0.0099, pedigree (2,2,4,1,2)
  The exchange has been updated from 'ammonium nitrate, as N' into 'ammonium nitrate' and therefore its amount has been scaled (multiplied) from 0.0054 kg by 2.8573 kg of 'ammonium nitrate' per kg of 'ammonium nitrate, as N'. Original comment of the exchange is: Amount is determined from the mineral nutrient actually used for the crop (CECPA, 2011) and from the overall mineral fertilizers sales, by type of fertilizer, in Québec for agriculture (APNC, 2010). See details for disaggregation in supporting documentation '01 crop production - Québec.pdf' available on ecoinvent reports web page (https://ecoquery.ecoinvent.org/File/Reports).
  properties: wet mass 1 kg, dry mass 1 kg
- organophosphorus-compound, unspecified: 2.315e-7 kg; lognormal variance with pedigree 0.0414, pedigree (1,2,5,3,2)
  Ethephon (growth regulator). See supporting documentation '01 crop production - Québec.pdf' available on ecoinvent reports web page (https://ecoquery.ecoinvent.org/File/Reports).
  properties: dry mass 1 kg, carbon content, fossil 0.260898, wet mass 1 kg
- sowing: 0.0003252 ha; lognormal variance with pedigree 0.0099, pedigree (2,2,4,1,2)
  (same comment as for tillage, ploughing)
- dinitroaniline-compound: 2.632e-6 kg; lognormal variance with pedigree 0.0414, pedigree (1,2,5,3,2)
  1,493E-06 kg Pyraclostrobin; 1,138E-06 kg Trifloxystrobin. See supporting documentation '01 crop production - Québec.pdf' available on ecoinvent reports web page (https://ecoquery.ecoinvent.org/File/Reports).
  properties: dry mass 1 kg, carbon content, fossil 0.55516, wet mass 1 kg
- pesticide, unspecified: 4.992e-6 kg; lognormal variance with pedigree 0.0414, pedigree (1,2,5,3,2)
  4,565E-06 kg herbicide, unspecified; 1,011E-07 kg insecticide, unspecified and 3,261E-07 fungicide, unspecified. See supporting documentation '01 crop production - Québec.pdf' available on ecoinvent reports web page (https://ecoquery.ecoinvent.org/File/Reports).
  properties: dry mass 1 kg, carbon content, fossil 0.486978, wet mass 1 kg
  note on carbon content, fossil: Mean of C content in all pesticides whose formula has been documented in Sutter 2010
- pyrethroid-compound: 3.489e-7 kg; lognormal variance with pedigree 0.0414, pedigree (1,2,5,3,2)
  3,489E-07 kg cyhalothrin-lambda. See supporting documentation '01 crop production - Quebec.pdf' available on ecoinvent reports web page (https://ecoquery.ecoinvent.org/File/Reports).
  properties: carbon content, fossil 0.623, wet mass 1 kg, dry mass 1 kg
- fertilising, by broadcaster: 0.000326087 ha; lognormal variance with pedigree 0.0099, pedigree (2,2,4,1,2)
  (same comment as for tillage, ploughing)
- [thio]carbamate-compound: 1.317e-6 kg; lognormal variance with pedigree 0.0414, pedigree (1,2,5,3,2)
  8,250E-07 kg methomyl; 4,924E-07 kg carbaryl. See supporting documentation '01 crop production - Quebec.pdf' available on ecoinvent reports web page (https://ecoquery.ecoinvent.org/File/Reports).
  properties: dry mass 1 kg, carbon content, fossil 0.626349, wet mass 1 kg
- drying of feed grain: 0.0426829 l; name EVAP_WATER; = REF_PRODUCT * (REF_PRODUCT_WWM - harvest_wc) / (harvest_wc - 1); lognormal variance with pedigree 0.008, pedigree (1,1,4,1,1)
  Calculated from average moisture content of grains at harvest (see Exchange Properties and Parameters).
- wheat seed, for sowing: 0.0602726 kg; name SEED; lognormal variance with pedigree 0.0099, pedigree (2,2,4,1,2)
  CECPA 2011. See supporting documentation '01 crop production - Quebec.pdf' available on ecoinvent reports web page (https://ecoquery.ecoinvent.org/File/Reports).
  property carbon content, non-fossil 0.464601; name SEED_C_content_non_fossil; = REF_PRODUCT_C_content_non_fossil
  property water content 0.169591; name SEED_water_content; = SEED_WWM/SEED_DM
  property wet mass 1 kg; name SEED_WM
  property dry mass 0.855 kg; name SEED_DM; = SEED_WM-SEED_WWM
  property water in wet mass 0.145 kg; name SEED_WWM; = REF_PRODUCT_WWM
- glyphosate: 8.967e-5 kg; lognormal variance with pedigree 0.0414, pedigree (1,2,5,3,2)
  (same comment as for tillage, ploughing)
  properties: dry mass 1 kg, carbon content, fossil 0.214286, wet mass 1 kg
- lime: 0.0291261 kg; name LIME_CaCO3; lognormal variance with pedigree 0.0099, pedigree (2,2,4,1,2)
  as CaCO3. CECPA (2011). Étude sur les coûts de production des céréales, du maïs-grain et des oléagineux en 2009 au Québec. [Centre d’Études sur les Coûts de Production en Agriculture], Juillet 2011, 112 p. [in French]. Available at: http://www.cecpa.qc.ca/contenuFichiers/files/etudesAnalyses/etude-complete-cereales-mais-grain-oleagineux-en-2009-quebec_20130501133424.pdf
  properties: dry mass 1 kg, carbon content, fossil 0.120005, wet mass 1 kg
- solid manure loading and spreading, by hydraulic loader and spreader: 0.209237 kg; lognormal variance with pedigree 0.0099, pedigree (2,2,4,1,2)
  Calculated from solid manure input rate and crop yield.
- cyclic N-compound: 1.298e-5 kg; lognormal variance with pedigree 0.0414, pedigree (1,2,5,3,2)
  7,699E-06 Tebuconazole; 3,916E-06 kg Propiconazole; 1,366E-06 kg Prothioconazole. See supporting documentation '01 crop production - Québec.pdf' available on ecoinvent reports web page (https://ecoquery.ecoinvent.org/File/Reports).
  properties: dry mass 1 kg, wet mass 1 kg, carbon content, fossil 0.641962
- poultry manure, fresh: 0.048962 kg; lognormal variance with pedigree 0.0099, pedigree (2,2,4,1,2)
  Amount of 0.048962 kg of poultry manure, fresh is needed when producing 1kg of wheat.
  Amount is determined from the organic nutrient actually used for the crop (CECPA, 2011) and from data about organic fertilizer production, by type, in Québec (MAPAQ, 2013). See details for disaggregation in supporting documentation '01 crop production - Québec.pdf' available on ecoinvent reports web page (https://ecoquery.ecoinvent.org/File/Reports).
  properties: water content 1.63158, carbon content, non-fossil 0.33389, wet mass 1 kg, nitrogen content 0.04044, dry mass 0.38 kg

## Inputs from nature
- Energy, gross calorific value, in biomass [natural resource, biotic]: 14.926 MJ; lognormal variance with pedigree 0.1313, pedigree (3,3,4,3,5)
  Estimated to be the same as in case of wheat production/GLO.
- Transformation, to annual crop, non-irrigated, intensive [natural resource, land]: 3.26052 m2; = (1 / (yield_agriculture * UnitConversion(1, 'metric ton', 'kg')))*UnitConversion(1, 'ha', 'm2'); lognormal variance with pedigree 0.008, pedigree (1,1,4,1,1)
  Calculated value. See Parameters.
- Transformation, from annual crop, non-irrigated, intensive [natural resource, land]: 3.26052 m2; = (1 / (yield_agriculture * UnitConversion(1, 'metric ton', 'kg'))) * UnitConversion(1, 'ha', 'm2'); lognormal variance with pedigree 0.008, pedigree (1,1,4,1,1)
  Calculated value. See Parameters.
- Occupation, annual crop, non-irrigated, intensive [natural resource, land]: 2.45152 m2*year; = OCCUP_period * (1 / (yield_agriculture * UnitConversion(1, 'metric ton', 'kg'))) * UnitConversion(1, 'ha', 'm2'); lognormal variance with pedigree 0.008, pedigree (1,1,4,1,1)
  Calculated value. See Exchange Properties and Parameters.
  property occupation period 0.75188 year; name OCCUP_period
- Carbon dioxide, in air [natural resource, in air]: 1.36874 kg; = 44/12 * (REF_PRODUCT_C_content_non_fossil * REF_PRODUCT * REF_PRODUCT_DM - SEED_C_content_non_fossil * SEED * REF_PRODUCT_DM); lognormal variance with pedigree 0.008, pedigree (1,1,4,1,1)
  Calculated value, see chapter 'CO2 binding' in '01 crop production-direct field emissions natural resources v1.2.pdf' available on ecoinvent reports web page (https://ecoquery.ecoinvent.org/File/Reports). The 44/12 ratio is the stoichiometric mass ratio of carbon dioxide to carbon.

## Emissions to nature
- Pyraclostrobin [water, surface water]: 1.098e-12 kg; source Dijkman, T.J. 2012; lognormal variance with pedigree 0.0813, pedigree (2,2,5,1,2)
  (same comment as for MCPA-MCPB combined emissions to agricultural soil)
- Ammonia [air, non-urban air or from high stacks]: 0.00546904 kg; lognormal variance with pedigree 0.0173, pedigree (2,2,4,1,2)
  NH3 from mineral fertilisers are calculated with the emission factors published in the EMEP guidelines from the European Environment Agency (EEA, 2013). NH3 from manure are calculated according to the caracteristics of every manure, and to Quebec figures for period and method of maqnure application, and delay before incorporation of manure into the soil (Parent et Gagné, 2010; 2013). See supporting documentation '01 crop production - Québec.pdf' available on ecoinvent reports web page (https://ecoquery.ecoinvent.org/File/Reports).
- Pyraclostrobin (prop) [soil, agricultural]: 1.488e-6 kg; lognormal variance with pedigree 0.0743, pedigree (2,2,5,1,2)
  (same comment as for MCPA-MCPB combined emissions to agricultural soil)
- Water [air, non-urban air or from high stacks]: 0.000777996 m3; = ((MANURE_LIQUID_CATTLE* MANURE_LIQUID_CATTLE_WWM) + (MANURE_LIQUID_SWINE* MANURE_LIQUID_SWINE_WWM) + (MANURE_SOLID_CATTLE* MANURE_SOLID_CATTLE_WWM))* fraction_PW_to_air* UnitConversion(1, 'l', 'm3')
  Calculated value; See Parameters. Water emitted from: irrigated water (if any), process water.
- Water [water, ground-]: 0.000387168 m3; = ((MANURE_LIQUID_CATTLE* MANURE_LIQUID_CATTLE_WWM) + (MANURE_LIQUID_SWINE* MANURE_LIQUID_SWINE_WWM) + (MANURE_SOLID_CATTLE* MANURE_SOLID_CATTLE_WWM))* (1-fraction_PW_to_air)*(1- fraction_PWtoW_to_surface_water)* UnitConversion(1, 'l', 'm3')
  (same comment as for Water)
- Lambda-cyhalothrin [water, surface water]: 2.32e-15 kg; source Dijkman, T.J. 2012; lognormal variance with pedigree 0.0813, pedigree (2,2,5,1,2)
  (same comment as for MCPA-MCPB combined emissions to agricultural soil)
- 2,4-D ester [water, surface water]: 2.09e-9 kg; source Dijkman, T.J. 2012; lognormal variance with pedigree 0.0813, pedigree (2,2,5,1,2)
  (same comment as for MCPA-MCPB combined emissions to agricultural soil)
- Lambda-cyhalothrin [water, ground-]: 9.246e-13 kg; source Dijkman, T.J. 2012; lognormal variance with pedigree 0.0813, pedigree (2,2,5,1,2)
  (same comment as for MCPA-MCPB combined emissions to agricultural soil)
- Water [water, surface water]: 9.67921e-5 m3; = ((MANURE_LIQUID_CATTLE* MANURE_LIQUID_CATTLE_WWM) + (MANURE_LIQUID_SWINE* MANURE_LIQUID_SWINE_WWM) + (MANURE_SOLID_CATTLE* MANURE_SOLID_CATTLE_WWM))* (1-fraction_PW_to_air)*fraction_PWtoW_to_surface_water* UnitConversion(1, 'l', 'm3')
  (same comment as for Water)
- 2,4-D ester [water, ground-]: 5.09e-7 kg; source Dijkman, T.J. 2012; lognormal variance with pedigree 0.0813, pedigree (2,2,5,1,2)
  (same comment as for MCPA-MCPB combined emissions to agricultural soil)
- Lambda-cyhalothrin [air, non-urban air or from high stacks]: 1.832e-9 kg; source Dijkman, T.J. 2012; lognormal variance with pedigree 0.0813, pedigree (2,2,5,1,2)
  (same comment as for MCPA-MCPB combined emissions to agricultural soil)
- 2,4-D ester [air, non-urban air or from high stacks]: 9.92e-8 kg; source Dijkman, T.J. 2012; lognormal variance with pedigree 0.0813, pedigree (2,2,5,1,2)
  (same comment as for MCPA-MCPB combined emissions to agricultural soil)
- Lambda-cyhalothrin [soil, agricultural]: 3.471e-7 kg; lognormal variance with pedigree 0.0743, pedigree (2,2,5,1,2)
  (same comment as for MCPA-MCPB combined emissions to agricultural soil)
- 2,4-D ester [soil, agricultural]: 1.64e-5 kg; lognormal variance with pedigree 0.0813, pedigree (2,2,5,1,2)
  (same comment as for MCPA-MCPB combined emissions to agricultural soil)
- Carbaryl [water, ground-]: 1.305e-9 kg; source Dijkman, T.J. 2012; lognormal variance with pedigree 0.0813, pedigree (2,2,5,1,2)
  (same comment as for MCPA-MCPB combined emissions to agricultural soil)
- Dichlorprop [water, surface water]: 2.09e-9 kg; source Dijkman, T.J. 2012; lognormal variance with pedigree 0.0813, pedigree (2,2,5,1,2)
  (same comment as for MCPA-MCPB combined emissions to agricultural soil)
- Carbaryl [water, surface water]: 1.625e-11 kg; source Dijkman, T.J. 2012; lognormal variance with pedigree 0.0813, pedigree (2,2,5,1,2)
  (same comment as for MCPA-MCPB combined emissions to agricultural soil)
- Dichlorprop [water, ground-]: 5.09e-7 kg; source Dijkman, T.J. 2012; lognormal variance with pedigree 0.0813, pedigree (2,2,5,1,2)
  (same comment as for MCPA-MCPB combined emissions to agricultural soil)
- Carbaryl [soil, agricultural]: 4.246e-7 kg; lognormal variance with pedigree 0.0743, pedigree (2,2,5,1,2)
  (same comment as for MCPA-MCPB combined emissions to agricultural soil)
- Dichlorprop [soil, agricultural]: 1.64e-5 kg; lognormal variance with pedigree 0.0813, pedigree (2,2,5,1,2)
  (same comment as for MCPA-MCPB combined emissions to agricultural soil)
- Carbaryl [air, non-urban air or from high stacks]: 6.647e-8 kg; source Dijkman, T.J. 2012; lognormal variance with pedigree 0.0813, pedigree (2,2,5,1,2)
  (same comment as for MCPA-MCPB combined emissions to agricultural soil)
- Dichlorprop [air, non-urban air or from high stacks]: 9.92e-8 kg; source Dijkman, T.J. 2012; lognormal variance with pedigree 0.0813, pedigree (2,2,5,1,2)
  (same comment as for MCPA-MCPB combined emissions to agricultural soil)
- Methomyl [water, surface water]: 3.424e-11 kg; source Dijkman, T.J. 2012; lognormal variance with pedigree 0.0813, pedigree (2,2,5,1,2)
  (same comment as for MCPA-MCPB combined emissions to agricultural soil)
- Chromium [soil, agricultural]: -1.2231e-5 kg
  Calculated value. See supporting documentation '01 crop production - Québec.pdf' available on ecoinvent reports web page (https://ecoquery.ecoinvent.org/File/Reports).
- Methomyl [water, ground-]: 3.053e-9 kg; source Dijkman, T.J. 2012; lognormal variance with pedigree 0.0813, pedigree (2,2,5,1,2)
  (same comment as for MCPA-MCPB combined emissions to agricultural soil)
- 2,4-D amines [water, ground-]: 5.38e-7 kg; source Dijkman, T.J. 2012; lognormal variance with pedigree 0.0813, pedigree (2,2,5,1,2)
  (same comment as for MCPA-MCPB combined emissions to agricultural soil)
- Methomyl [air, non-urban air or from high stacks]: 1.98e-7 kg; source Dijkman, T.J. 2012; lognormal variance with pedigree 0.0813, pedigree (2,2,5,1,2)
  (same comment as for MCPA-MCPB combined emissions to agricultural soil)
- 2,4-D amines [soil, agricultural]: 1.73e-5 kg; lognormal variance with pedigree 0.0813, pedigree (2,2,5,1,2)
  (same comment as for MCPA-MCPB combined emissions to agricultural soil)
- Zinc [soil, agricultural]: -5.6791e-5 kg
  (same comment as for Chromium)
- Methomyl [soil, agricultural]: 6.239e-7 kg; lognormal variance with pedigree 0.0743, pedigree (2,2,5,1,2)
  (same comment as for MCPA-MCPB combined emissions to agricultural soil)
- 2,4-D amines [air, non-urban air or from high stacks]: 1.03e-7 kg; source Dijkman, T.J. 2012; lognormal variance with pedigree 0.0813, pedigree (2,2,5,1,2)
  (same comment as for MCPA-MCPB combined emissions to agricultural soil)
- Fungicides, unspecified [soil, agricultural]: 3.261e-7 kg; lognormal variance with pedigree 0.1138, pedigree (5,2,5,3,2)
  No possible elementary flow. Because of lack of information on the active ingredient, assumed entirely emitted to soil.
- Pyraclostrobin [air, non-urban air or from high stacks]: 5.377e-9 kg; source Dijkman, T.J. 2012; lognormal variance with pedigree 0.0813, pedigree (2,2,5,1,2)
  (same comment as for MCPA-MCPB combined emissions to agricultural soil)
- Insecticides, unspecified [soil, agricultural]: 1.011e-7 kg; lognormal variance with pedigree 0.1138, pedigree (5,2,5,3,2)
  (same comment as for Fungicides, unspecified)
- Propiconazole [water, surface water]: 1.273e-11 kg; source Dijkman, T.J. 2012; lognormal variance with pedigree 0.0813, pedigree (2,2,5,1,2)
- Herbicides, unspecified [soil, agricultural]: 4.565e-6 kg; lognormal variance with pedigree 0.1138, pedigree (5,2,5,3,2)
  (same comment as for Fungicides, unspecified)
- Tebuconazole [water, surface water]: 1.001e-11 kg; lognormal variance with pedigree 0.0813, pedigree (2,2,5,1,2)
  (same comment as for MCPA-MCPB combined emissions to agricultural soil)
- MCPB [water, surface water]: 6.18e-7 kg; name MCPB_surface; = MCPAB_surface/(MCPA_to_MCPB+1); lognormal variance with pedigree 0.008, pedigree (1,1,4,1,1)
  Calculated value. See Parameters.
- Tebuconazole [water, ground-]: 4.157e-9 kg; lognormal variance with pedigree 0.0813, pedigree (2,2,5,1,2)
  (same comment as for MCPA-MCPB combined emissions to agricultural soil)
- MCPB [water, ground-]: 2.856e-9 kg; name MCPB_ground; = MCPAB_ground/(MCPA_to_MCPB+1); lognormal variance with pedigree 0.008, pedigree (1,1,4,1,1)
  Calculated value. See Parameters.
- Tebuconazole [air, non-urban air or from high stacks]: 1.347e-8 kg; lognormal variance with pedigree 0.0813, pedigree (2,2,5,1,2)
  (same comment as for MCPA-MCPB combined emissions to agricultural soil)
- MCPB [air, non-urban air or from high stacks]: 2.9145e-7 kg; name MCPB_air; = MCPAB_air/(MCPA_to_MCPB+1); lognormal variance with pedigree 0.008, pedigree (1,1,4,1,1)
  Calculated value. See Parameters.
- Tebuconazole [soil, agricultural]: 7.681e-6 kg; lognormal variance with pedigree 0.0743, pedigree (2,2,5,1,2)
  (same comment as for MCPA-MCPB combined emissions to agricultural soil)
- MCPB [soil, agricultural]: 2.2405e-5 kg; name MCPB_soil; = MCPAB_soil/(MCPA_to_MCPB+1); lognormal variance with pedigree 0.008, pedigree (1,1,4,1,1)
  Calculated value. See Parameters.
- Copper, ion [water, surface water]: 1.4111e-5 kg; lognormal variance with pedigree 0.0887, pedigree (5,2,4,1,2)
  (same comment as for Chromium)
- Propiconazole [water, ground-]: 1.332e-7 kg; source Dijkman, T.J. 2012; lognormal variance with pedigree 0.0813, pedigree (2,2,5,1,2)
  (same comment as for MCPA-MCPB combined emissions to agricultural soil)
- Zinc, ion [water, surface water]: 8.2028e-5 kg; lognormal variance with pedigree 0.0887, pedigree (5,2,4,1,2)
  (same comment as for Chromium)
- Propiconazole [air, non-urban air or from high stacks]: 4.641e-8 kg; source Dijkman, T.J. 2012; lognormal variance with pedigree 0.0813, pedigree (2,2,5,1,2)
  (same comment as for MCPA-MCPB combined emissions to agricultural soil)
- Nickel, ion [water, surface water]: 2.3548e-5 kg; lognormal variance with pedigree 0.0887, pedigree (5,2,4,1,2)
  (same comment as for Chromium)
- Propiconazole [soil, agricultural]: 3.737e-6 kg; lognormal variance with pedigree 0.0743, pedigree (2,2,5,1,2)
  (same comment as for MCPA-MCPB combined emissions to agricultural soil)
- Lead [water, surface water]: 5.5843e-6 kg; lognormal variance with pedigree 0.0887, pedigree (5,2,4,1,2)
  (same comment as for Chromium)
- Bromoxynil [water, ground-]: 1.65e-7 kg; source Dijkman, T.J. 2012; lognormal variance with pedigree 0.0813, pedigree (2,2,5,1,2)
  (same comment as for MCPA-MCPB combined emissions to agricultural soil)
- Chromium, ion [water, surface water]: 1.8936e-5 kg; lognormal variance with pedigree 0.0887, pedigree (5,2,4,1,2)
  (same comment as for Chromium)
- Bromoxynil [water, surface water]: 2.565e-11 kg; source Dijkman, T.J. 2012; lognormal variance with pedigree 0.0813, pedigree (2,2,5,1,2)
  (same comment as for MCPA-MCPB combined emissions to agricultural soil)
- Cadmium, ion [water, surface water]: 3.8414e-7 kg; lognormal variance with pedigree 0.0887, pedigree (5,2,4,1,2)
  (same comment as for Chromium)
- Bromoxynil [air, non-urban air or from high stacks]: 6.457e-7 kg; source Dijkman, T.J. 2012; lognormal variance with pedigree 0.0813, pedigree (2,2,5,1,2)
  (same comment as for MCPA-MCPB combined emissions to agricultural soil)
- Ethephon [water, surface water]: 2.315e-11 kg; source Dijkman, T.J. 2012; lognormal variance with pedigree 0.0813, pedigree (2,2,5,1,2)
  (same comment as for MCPA-MCPB combined emissions to agricultural soil)
- Bromoxynil [soil, agricultural]: 3.506e-5 kg; lognormal variance with pedigree 0.0743, pedigree (2,2,5,1,2)
  (same comment as for MCPA-MCPB combined emissions to agricultural soil)
- Ethephon [water, ground-]: 3.82e-9 kg; source Dijkman, T.J. 2012; lognormal variance with pedigree 0.0813, pedigree (2,2,5,1,2)
  (same comment as for MCPA-MCPB combined emissions to agricultural soil)
- MCPA [air, non-urban air or from high stacks]: 2.9145e-7 kg; = MCPAB_air-MCPB_air; lognormal variance with pedigree 0.008, pedigree (1,1,4,1,1)
  Calculated value. See Parameters.
- Cadmium [soil, agricultural]: -3.9804e-7 kg
  (same comment as for Chromium)
- Ethephon [air, non-urban air or from high stacks]: 5.788e-8 kg; source Dijkman, T.J. 2012; lognormal variance with pedigree 0.0813, pedigree (2,2,5,1,2)
  (same comment as for MCPA-MCPB combined emissions to agricultural soil)
- Glyphosate [soil, agricultural]: 8.665e-5 kg; lognormal variance with pedigree 0.0743, pedigree (2,2,5,1,2)
  (same comment as for MCPA-MCPB combined emissions to agricultural soil)
- MCPA [water, ground-]: 2.856e-9 kg; = MCPAB_ground-MCPB_ground; lognormal variance with pedigree 0.008, pedigree (1,1,4,1,1)
  Calculated value. See Parameters.
- Ethephon [soil, agricultural]: 1.698e-7 kg; lognormal variance with pedigree 0.0813, pedigree (2,2,5,1,2)
  (same comment as for MCPA-MCPB combined emissions to agricultural soil)
- Nitrate [water, ground-]: 0.0838319 kg; lognormal variance with pedigree 0.0493, pedigree (2,2,4,1,2)
  Modelled with the 'SQCB-NO3 model' described in '01 crop production-direct field emissions natural resources v1.2.pdf' available on ecoinvent reports web page (https://ecoquery.ecoinvent.org/File/Reports). Québec average conditions are considered for the SQCB-NO3 model input parameters (see supporting documentation '01 crop production - Québec.pdf' available on ecoinvent reports web page (https://ecoquery.ecoinvent.org/File/Reports)).
- MCPA [water, surface water]: 6.18e-7 kg; = MCPAB_surface-MCPB_surface; lognormal variance with pedigree 0.008, pedigree (1,1,4,1,1)
  Calculated value. See Parameters.
- Trifloxystrobin [water, surface water]: 2.504e-12 kg; source Dijkman, T.J. 2012; lognormal variance with pedigree 0.0813, pedigree (2,2,5,1,2)
  (same comment as for MCPA-MCPB combined emissions to agricultural soil)
- Dinitrogen monoxide [air, non-urban air or from high stacks]: 0.00146672 kg; name N2O; source Rochette, P. 2008; lognormal variance with pedigree 0.0393, pedigree (2,2,4,1,2)
  Direct and indirect N2O emissions from all sources of N input (fertilizers, above- and below-ground crop residues). Modelled with Québec conditions using the Tier 2 approach (IPCC 2006; Rochette et al. 2008; Little et al. 2008, 2013). See supporting documentation '01 crop production - Quebec.pdf' available on ecoinvent reports web page (https://ecoquery.ecoinvent.org/File/Reports).
- MCPA [soil, agricultural]: 2.2405e-5 kg; = MCPAB_soil-MCPB_soil; lognormal variance with pedigree 0.008, pedigree (1,1,4,1,1)
  Calculated value. See Parameters.
- Trifloxystrobin [water, ground-]: 1.536e-10 kg; source Dijkman, T.J. 2012; lognormal variance with pedigree 0.0813, pedigree (2,2,5,1,2)
  (same comment as for MCPA-MCPB combined emissions to agricultural soil)
- Lead [soil, agricultural]: -5.6382e-6 kg
  (same comment as for Chromium)
- Glyphosate [water, ground-]: 2.69e-6 kg; source Dijkman, T.J. 2012; lognormal variance with pedigree 0.0813, pedigree (2,2,5,1,2)
  (same comment as for MCPA-MCPB combined emissions to agricultural soil)
- Nickel [soil, agricultural]: -2.2765e-5 kg
  (same comment as for Chromium)
- Trifloxystrobin [air, non-urban air or from high stacks]: 1.269e-8 kg; source Dijkman, T.J. 2012; lognormal variance with pedigree 0.0813, pedigree (2,2,5,1,2)
  (same comment as for MCPA-MCPB combined emissions to agricultural soil)
- Nitrogen oxides [air, non-urban air or from high stacks]: 0.00106246 kg; lognormal variance with pedigree 0.0173, pedigree (2,2,4,1,2)
  Calculated with an emission factor (EF=0.012 kg NO-N/kg N ) from total N application less NH3-N lost through volatilization. Conversion from NO-N to NO2 with factor=46/14. See supporting documentation '01 crop production - Quebec.pdf' available on ecoinvent reports web page (https://ecoquery.ecoinvent.org/File/Reports).
  property emission ratio 0.21 kg/kg; name NOx_to_N2O
- Glyphosate [water, surface water]: 1.161e-8 kg; source Dijkman, T.J. 2012; lognormal variance with pedigree 0.0813, pedigree (2,2,5,1,2)
  (same comment as for MCPA-MCPB combined emissions to agricultural soil)
- Trifloxystrobin [soil, agricultural]: 1.125e-6 kg; lognormal variance with pedigree 0.0813, pedigree (2,2,5,1,2)
  (same comment as for MCPA-MCPB combined emissions to agricultural soil)
- Glyphosate [air, non-urban air or from high stacks]: 3.228e-7 kg; source Dijkman, T.J. 2012; lognormal variance with pedigree 0.0813, pedigree (2,2,5,1,2)
  (same comment as for MCPA-MCPB combined emissions to agricultural soil)
- Prothioconazol [water, surface water]: 8.13e-12 kg; source Dijkman, T.J. 2012; lognormal variance with pedigree 0.0813, pedigree (2,2,5,1,2)
  (same comment as for MCPA-MCPB combined emissions to agricultural soil)
- Carbon dioxide, fossil [air, non-urban air or from high stacks]: 0.0315996 kg; = UREA_N*0.466461632733939*1.571 +LIME_CaCO3*0.44; lognormal variance with pedigree 0.008, pedigree (1,1,4,1,1)
  Carbon dioxide emissions from limestone and urea application calculated from C content (IPCC, 2006). Emission factors are EF=1.57 kg CO2/kg N for urea, and EF=0.44 kg CO2/kg CaCO3 for limestone. See supporting documentation '01 crop production - Quebec.pdf' available on ecoinvent reports web page (https://ecoquery.ecoinvent.org/File/Reports).
- Prothioconazol [water, ground-]: 5.192e-10 kg; source Dijkman, T.J. 2012; lognormal variance with pedigree 0.0813, pedigree (2,2,5,1,2)
  (same comment as for MCPA-MCPB combined emissions to agricultural soil)
- Phosphorus [water, surface water]: 0.0003393 kg; source Michaud, A.R. 2008; lognormal variance with pedigree 0.0493, pedigree (2,2,4,1,2)
  Modelled with Québec conditions with the 'ODEP model' (Michaud et al., 2008). See supporting documentation '01 crop production - Quebec.pdf' available on ecoinvent reports web page (https://ecoquery.ecoinvent.org/File/Reports).
- Prothioconazol [air, non-urban air or from high stacks]: 5.055e-9 kg; source Dijkman, T.J. 2012; lognormal variance with pedigree 0.0813, pedigree (2,2,5,1,2)
  (same comment as for MCPA-MCPB combined emissions to agricultural soil)
- 2,4-D amines [water, surface water]: 2.21e-9 kg; source Dijkman, T.J. 2012; lognormal variance with pedigree 0.0813, pedigree (2,2,5,1,2)
  (same comment as for MCPA-MCPB combined emissions to agricultural soil)
- Phosphate [water, surface water]: 0.0004166 kg; source Michaud, A.R. 2008; lognormal variance with pedigree 0.0493, pedigree (2,2,4,1,2)
  (same comment as for Phosphorus)
  property water in wet mass 0 kg; name WWM
  property water content 0; name water_content
  property dry mass 1 kg; name DM
  property carbon content, fossil 0; name C_content_fossil
  property carbon content, non-fossil 0; name C_content_non_fossil
  property wet mass 1 kg; name WM
- Prothioconazol [soil, agricultural]: 1.361e-6 kg; lognormal variance with pedigree 0.0743, pedigree (2,2,5,1,2)
  (same comment as for MCPA-MCPB combined emissions to agricultural soil)
- Copper [soil, agricultural]: 6.7808e-6 kg; lognormal variance with pedigree 0.0887, pedigree (5,2,4,1,2)
  (same comment as for Chromium)
- Pyraclostrobin [water, ground-]: 6.795e-11 kg; source Dijkman, T.J. 2012; lognormal variance with pedigree 0.0813, pedigree (2,2,5,1,2)
  (same comment as for MCPA-MCPB combined emissions to agricultural soil)
- Water [air, unspecified]: 4.26829e-5 m3; = EVAP_WATER * UnitConversion(1, 'l', 'm3'); lognormal variance with pedigree 0.008, pedigree (1,1,4,1,1)
  Calculated value. Evaporated water from the drying of the grains.

## Sampling procedure
Literature and statistics data, opinions of experts in the field of agricultural production and agroeconomists.

## Extrapolations
This dataset has been extrapolated from year 2012 to the year of the calculation (2021). The uncertainty has been adjusted accordingly.

## Review by Emilia Moreno Ruiz 2015-10-13
activity links to CA-QC machinery added
