# treatment of used cathode ray tube display, mechanical treatment

Dataset: EcoSpold 2, unit process
Geography: GLO
Time period: 2005-01-01 to 2021-12-31
Technology level: current
Classification: ISIC rev.4 ecoinvent: 3830:Materials recovery
Classification: EcoSpold01Categories: waste management/recycling
Tags: Treatment; ConvertedDataset
Scenario: Business-as-Usual
System model: Allocation, cut-off by classification
Generated by: Roland Hischier
Published in: Hischier R. 2007
Database: ecoinvent
isCopyrightProtected: true
accessRestrictedTo: 1

## General comment
manual dismantling plus subsequent shredding/separation procedure, based on common transfer coefficients for both steps. Data from literature and from own experiences in Switzerland.
[This dataset was already contained in the ecoinvent database version 2. It was not individually updated during the transfer to ecoinvent version 3. Life Cycle Impact Assessment results may still have changed, as they are affected by changes in the supply chain, i.e. in other datasets. This dataset was generated following the ecoinvent quality guidelines for version 2. It may have been subject to central changes described in the ecoinvent version 3 change report (http://www.ecoinvent.org/database/ecoinvent-version-3/reports-of-changes/), and the results of the central updates were reviewed extensively. The changes added e.g. consistent water flows and other information throughout the database. The documentation of this dataset can be found in the ecoinvent reports of version 2, which are still available via the ecoinvent website. The change report linked above covers all central changes that were made during the conversion process.]

## Included activities end
This dataset represents the mechanical treatment of a WEEE devices in Switzerland. Two process steps are included: manual depollution and the mechanical treatment (shredder) of the remaining part.

## Geography
European data, used as average for global situation

## Technology
4-step-procedure (shredder - separation - shredder - separation) as used currently often in Europe

## Reference product
- used cathode ray tube display: -1 kg; name used_CRT_RP; CPC 39990: Other wastes n.e.c.; By-product classification Waste
  EcoSpold01Location=GLO
  production volume 0.77 kg; name RP_PV_1
    Unkonwn
    proportion; source: Hischier 2005
  property price 0 EUR2005; name used_CRT_RP_price_EUR2005
    Waste products are assigned a price of zero as they are assumed to require further treatment.
  property carbon content, fossil 0.163203
    Composition data from CRT screen, divided by its weight, 19.86 kg (Tab 4.12, ecoinvent v2.2 report 18_V)
  property carbon content, non-fossil 0.00235652
    (same comment as for used cathode ray tube display)
  property carbon content 0.16556
    carbon content on a dry matter basis (reserved; not for manual entry)
  properties: water content 0, dry mass 1 kg, wet mass 1 kg, water in wet mass 0 kg, carbon allocation 0.16556 kg

## By-products
- electronics scrap: 0 kg; By-product classification Recyclable; CPC 39: Wastes or scraps; pedigree (1,1,1,1,1)
  replaces the original flow "Cu fraction of used cathode ray tube display from mechanical treatment"
  production volume 0 kg
    Unkonwn
    Calculated from the production volume of used cathode ray tube display in proportion to the respective output amounts.
  property price 16.1 EUR2005; name electronics_scrap_BP_price_EUR2005
    Temporary price data. Calculated as 90% of purchasers price based on: 2005 import prices (total trades (USD) divided by total weight (kg) in biggest economies of the world: EU27, USA, Brasil, China, India, Japan and Russia) from UN Commodity Trade Statistics Database (http://data.un.org/Explorer.aspxDatabase [Accessed 2011.06.20]). Commodity: Waste/scrap, precious metals except pure gold/platinum
  property carbon content, fossil 0.317311
    Carbon content assumed equal with the intermediate exchange of "electronic component, passive, unspecified"
  property carbon content, non-fossil 0.0045566
    (same comment as for electronics scrap)
  property carbon content 0.321868
    carbon content on a dry matter basis (reserved; not for manual entry)
  properties: wet mass 1 kg, water in wet mass 0 kg, water content 0, dry mass 1 kg, carbon allocation 0.321868 kg
- aluminium scrap, post-consumer, prepared for melting: 0 kg; By-product classification Recyclable; CPC 39363: Waste and scrap of aluminium; pedigree (1,1,1,1,1)
  replaces the original flow "Al fraction of used cathode ray tube display from mechanical treatment"
  production volume 0 kg
    (same comment as for electronics scrap)
  property price 0.806 EUR2005
    Temporary price data. Calculated as 90% of purchasers price based on: 2005 import and export prices (total trades (USD) divided by total weight (kg) in biggest economies of the world: EU27, USA, Brasil, China, India, Japan and Russia) from UN Commodity Trade Statistics Database (http://data.un.org/Explorer.aspxDatabase [Accessed 2011.06.17]). Commodity: Waste or scrap, aluminium
  property carbon content 0
    carbon content on a dry matter basis (reserved; not for manual entry)
  properties: wet mass 1 kg, carbon content, non-fossil 0, carbon content, fossil 0, dry mass 1 kg, water content 0, water in wet mass 0 kg, carbon allocation 0 kg
- iron scrap, sorted, pressed: 0 kg; CPC 39310: Slag, dross, scalings and other waste from the manufacture of iron or steel; By-product classification Recyclable; pedigree (1,1,1,1,1)
  replaces the original flow "Fe fraction of used cathode ray tube display from mechanical treatment"
  production volume 0 kg
    (same comment as for electronics scrap)
  property water content 0; name water_content
  property wet mass 1 kg; name WM
  property carbon content, fossil 0; name C_content_fossil
  property dry mass 1 kg; name DM
  property water in wet mass 0 kg; name WWM
  property price 0.175 EUR2005
    Temporary price data. Calculated as 90% of purchasers price based on: 2005 import and export prices (total trades (USD) divided by total weight (kg) in biggest economies of the world: EU27, USA, Brasil, China, India, Japan and Russia) from UN Commodity Trade Statistics Database (http://data.un.org/Explorer.aspxDatabase [Accessed 2011.06.20]). Commodity: Waste or scrap, of cast iron
  property carbon content, non-fossil 0; name C_content_non_fossil
  property carbon content 0
    carbon content on a dry matter basis (reserved; not for manual entry)
  properties: carbon allocation 0 kg

## Inputs from technosphere
- waste plastic, consumer electronics: 0 kg; name waste_plastics_2_BP; pedigree (1,1,1,1,1)
  EcoSpold01Location=CH
  Calculated - based on composition data
  Uncertainty: calculated - based on composition data
  production volume 0 kg
    Calculated from the production volume of used cathode ray tube display in proportion to the respective output amounts.
  property price 0 EUR2005; name waste_plastics_2_BP_price_EUR2005
  properties: carbon content, fossil 0.830215, dry mass 0.847 kg, wet mass 1 kg, heating value, net 34.78 MJ, water content 0.180638
  note on carbon content, fossil: C content in 1 kg DM was calculated using data in Tab A.2, ecoinvent v2.2 report 13_I
  note on heating value, net: Assumed equal to "waste plastic, consumer electronics, sorted".
- residue from mechanical treatment, cathode ray tube display: 0 kg; name residue_BP; pedigree (1,1,1,1,1)
  (same comment as for waste plastic, consumer electronics)
  production volume 0 kg
    (same comment as for waste plastic, consumer electronics)
  property price 0 EUR2005; name residue_BP_price_EUR2005
  properties: carbon content, fossil 0.764801, dry mass 1 kg, heating value, net 31.91 MJ, wet mass 1 kg
  note on carbon content, fossil: Tab 4.24, ecoinvent v2.2 report 18_V, for details in fraction composition. Carbon content in plastic was calculated using data in Tab A.2, ecoinvent v2.2 report 13_I. Others was also considered plastic, and calculated the same way (from pg 70, ecoinvent v2.2 report 18_V). Ferro was assumed to have a C content of 0.012 kg C/ kg (C content of steel, calculated out of emission factors published in Commission Decision of 18 July 2007 establishing guidelines for the monitoring and reporting of greenhouse gas emissions pursuant to Directive 2003/87/EC of the European Parliament and of the Council (notified under document number C(2007) 3416)). The other component of the fraction were considered to content no C.
  note on heating value, net: Value taken from the general comment of the treatment dataset.
- glass from used cathode ray tube: -0.5336 kg; name glass_BP; lognormal variance with pedigree 0.054, pedigree (3,4,5,1,1)
  Calculated - based on composition data
  EcoSpold01Location=GLO
  Uncertainty: calculated - based on composition data
  production volume 0.410872 kg
    (same comment as for waste plastic, consumer electronics)
  property price 0 EUR2005; name glass_BP_price_EUR2005
  properties: dry mass 1 kg, carbon content, fossil 0.00299576, wet mass 1 kg
- used cable: -0.0033 kg; name used_cable_BP; lognormal variance with pedigree 0.054, pedigree (3,4,5,1,1)
  Calculated - based on composition data
  Uncertainty: calculated - based on composition data
  production volume 0.002541 kg; = ABS(RP_PV_1 * (used_cable_BP / used_CRT_RP))
    Calculated from production volume of reference product using the relative outputs.
  property price 0 EUR2005; name used_cable_BP_price_EUR2005
  properties: carbon content, fossil 0.27472, wet mass 1 kg, dry mass 1 kg
  note on carbon content, fossil: According to the European company, 1 kg cable is split up into 0.66 kg of copper and 0.34 kg of plastics (ecoinvent v2.2 report 18_V, pg 97). Plastic C content (0.808) was calculated using data in Tab A.2, ecoinvent v2.2 report 13_I.
- waste electric and electronic equipment: -0.2993 kg; name waste_plastics_1_BP; lognormal variance with pedigree 0.134, pedigree (3,4,5,1,4)
  Rough estimation
  EcoSpold01Location=GLO
  Uncertainty: rough estimation
  production volume 0.230461 kg
    (same comment as for waste plastic, consumer electronics)
  property price 0 EUR2005; name waste_plastics_1_BP_price_EUR2005
  properties: wet mass 1 kg, dry mass 1 kg, carbon content, non-fossil 0.000485011, carbon content, fossil 0.0877555
- electronics scrap: -0.035018 kg; lognormal variance with pedigree 0.2106, pedigree (5,5,5,5,5)
  (same comment as for electronics scrap)
  production volume 0.0269639 kg
  properties: carbon content, fossil 0.317311, wet mass 1 kg, carbon content, non-fossil 0.0045566, dry mass 1 kg
  note on carbon content, fossil: Carbon content assumed equal with the intermediate exchange of "electronic component, passive, unspecified"
- aluminium scrap, post-consumer, prepared for melting: -0.023465 kg; lognormal variance with pedigree 0.2106, pedigree (5,5,5,5,5)
  (same comment as for aluminium scrap, post-consumer, prepared for melting)
  production volume 0.018068 kg
  properties: wet mass 1 kg, price 0.806 EUR2005, dry mass 1 kg
- iron scrap, sorted, pressed: -0.10326 kg; lognormal variance with pedigree 0.2106, pedigree (5,5,5,5,5)
  (same comment as for iron scrap, sorted, pressed)
  production volume 0.0795102 kg
  properties: price 0.175 EUR2005
- waste plastic, consumer electronics: -0.00114596, -0.075854 kg (2 entries); lognormal variance with pedigree 0.054, pedigree (3,4,5,1,1)
  (same comment as for waste plastic, consumer electronics)
  production volume 0.05929 kg
- residue from mechanical treatment, cathode ray tube display: -0.00204905, -0.135631 kg (2 entries); lognormal variance with pedigree 0.054, pedigree (3,4,5,1,1)
  (same comment as for waste plastic, consumer electronics)
  production volume 0.106014 kg

## Sampling procedure
literature and own experiences

## Extrapolations
This dataset has been extrapolated from year 2005 to the year of the calculation (2021). The uncertainty has been adjusted accordingly.

## Review by Jürgen Sutter 2007-08-31
passed.

## Review by Bo Weidema 2012-05-31
Passed. This dataset is based on an earlier ecoinvent dataset. The outputs are now specified in terms of materials that can be treated by existing treatment activities.
