# bamboo pole production

Dataset: EcoSpold 2, unit process
Geography: CN
Time period: 2010-01-01 to 2021-12-31
Technology level: current
Classification: ISIC rev.4 ecoinvent: 162:Manufacture of products of wood, cork, straw and plaiting materials
Scenario: Business-as-Usual
System model: Allocation, cut-off by classification
Generated by: Edwin Zea Escamilla
Database: ecoinvent
isCopyrightProtected: true
accessRestrictedTo: 1

## General comment
This dataset represents the production of 1 Kg of bamboo pole. Bamboo culm with a water content of u =80 % is used for the production of bamboo pole. The production takes place at a bamboo processing facility and includes technical drying to a final water content of u =20% and trimming of culms. For this material, bamboos residues were considered the fuel used for the drying process. The figures origin from mainly calculations and literature values.
The pole is derived directly from the bamboo culm and is usually trimmed to between 4 and 6 m and treated against fungi and pests using boric acid. Bamboo poles can be used directly for the construction of columns, beams, or struts and are also the main input for other bamboo-based construction materials (BBCM) (Vogtländer et al., 2010, Vogtländer et al., 2014). This dataset was developed with the support of the International Organization for Bamboo and Rattan INBAR
Ref:
Vogtländer, J., P. van der Lugt, and H. Brezet, The sustainability of bamboo products for local and Western European applications. LCAs and land-use. Journal of Cleaner Production, 2010. 18(13): p. 1260-1269.

Vogtländer, J.G., N.M. van der Velden, and P. van der Lugt, Carbon sequestration in LCA, a proposal for a new approach based on the global carbon cycle; cases on wood and on bamboo. Int. J. Life Cycle Assess., 2014. 19(1): p. 13-23.

## Included activities start
From reception of bamboo culm and treatment products at processing facility

## Included activities end
This activity ends with Bamboo Pole (u=20%) at the processing facility. The dataset includes the inputs drying, treatment, trimming processes, as far as they are available. The dataset includes infrastructure. Losses of boric acid to the environment are not included in the dataset. However, they are not expected to be significant.

## Geography
Data for China

## Technology
Current production technology

## Reference product
- bamboo pole: 1 kg; name RP; CPC 31212: Wood, continuously shaped along any of its edges or faces (including strips and friezes for parquet flooring, […]; By-product classification allocatable product
  production volume 7.7248e8 kg; name PV_RP; = 2328.95616*269728.54+1.25*115435080.66
    The production volume is a rough estimate based on the annual production volume of glued laminated bamboo and flattened bamboo assuming that all bamboo poles are further processed into these products. 1.25 Kg and 2328.96 Kg of bamboo pole are required for the production of flattened bamboo and glued laminated bamboo respectively.Shares of bamboo poles used as such (e.g., for scaffolding) where not considered.
    All production volumes of bamboo products are calculated based on production volumes of glued laminated bamboo and woven bamboo mat panels, which are the end products of the bamboo production chain (as represented in the ecoinvent database). These are based on export data retrieved from INBAR (at <http://trade.inbar.int:10444/>, last accessed in December 2020).
  property price 0.529363 EUR2005; name RP_price_EUR2005
    Based on expert judgement, price given as 0.64 USD/kg. Converted with an exchange rate of 1EURO = 1.209 USD.
  property heating value, net 17.68 MJ
    Jetsada P. & Panmanas S. (2017),Evaluation of lower heating value and elemental composition of bamboo using near infrared spectroscopy,Energy,Volume 121,Pages 147-158,ISSN 0360-5442,https://doi.org/10.1016/j.energy.2017.01.020.
  property carbon content 0.494
    carbon content on a dry matter basis (reserved; not for manual entry)
  properties: carbon content, non-fossil 0.494, dry mass 0.833333 kg, wet mass 1 kg, carbon content, fossil 0, water in wet mass 0.166667 kg, water content 0.2, carbon allocation 0.411667 kg

## Inputs from technosphere
- electricity, medium voltage: 0.3 kWh; lognormal variance with pedigree 0.004425, pedigree (2,3,3,2,2)
  Refers to the electricity required to trim the poles
- bamboo culm: 1.53 kg; name amount_culm; lognormal variance with pedigree 0.004425, pedigree (2,3,3,2,2)
  property wet mass 1 kg; name WM_culm
  properties: carbon content, non-fossil 0.494, dry mass 0.555556 kg, water content 0.8, heating value, net 9.87 MJ
- electricity, low voltage: 0.00134496 kWh; lognormal variance with pedigree 0.484, pedigree (3,5,3,5,4)
  Refers to the electricity required for the combustion of bamboo residues. Value was approximated with the dataset “heat production, softwood chips from forest, at furnace 300kW”. Since the LHV of bamboo (19.27 MJ/Kg) and softwood wood chips (19.1 MJ/Kg) are very similar, the original value was scaled with the required heat input. The efficiency of the heating system was assumed to be the same as in the original dataset
- air compressor, screw-type compressor, 300kW: 4.64e-6 unit; lognormal variance with pedigree 0.303825, pedigree (2,3,3,2,2)
  Used in the treatment process to pump the Boric acid solution into the poles. Amount estimated based on the potential service lifetime of the device.
- boric acid, anhydrous, powder: 0.00019 kg; lognormal variance with pedigree 0.004425, pedigree (2,3,3,2,2)
  Considered as the most common and low impact treatment for bio-based products. The amount reflects the amount of boric acid that is actually absorbed by the poles. The treatment solution is kept in tanks where the poles are submerged, once the treatment is finished the poles are extracted and the solution is recovered
  properties: dry mass 1 kg, wet mass 1 kg
- power sawing, with catalytic converter: 0.00051 hour; = 0.02/60*amount_culm; lognormal variance with pedigree 0.004425, pedigree (2,3,3,2,2)
  0.02 minutes sawing per kg of bamboo culm
- wood ash mixture, pure: -0.000153526 kg; name wood_ash; = (0.2419*0.000634666666666665)*-1; lognormal variance with pedigree 0.0546, pedigree (3,5,3,5,4)
  Bamboo residues which are produced as a by-product are used as internal fuel for the required heat input (0.2419 MJ/ Kg of bamboo pole) for technical drying process. Emissions for the combustion of bamboo residues are approximated with the combustion of wood chips using the dataset “heat production, softwood chips from forest, at furnace 300kW”. Since the LHV of bamboo (19.27 MJ/Kg) and softwood wood chips (19.1 MJ/Kg) are very similar, the original value was scaled with the required heat input of 0.2419 MJ only. The efficiency of the heating system was assumed to be the same as in the original dataset
  production volume 118596 kg; = PV_RP*(wood_ash/RP)
    Calculated from production volume of reference product using the relative outputs.
  property price 0 EUR2005; name wood_ash_price_EUR2005
  properties: dry mass 1 kg, wet mass 1 kg, carbon content, non-fossil 0.012
- technical wood drying facility: 6.09e-7 unit; lognormal variance with pedigree 0.303825, pedigree (2,3,3,2,2)
  Amount calculated based on the lifetime capacity of the plant. Based on the default value of 3.3E-08 unit of “wooden board manufacturing plant, organic bonded boards” taken from Werner F., Althaus H.-J., Künniger T., Richter K. and Jungbluth N. (2007) Life Cycle Inventories of Wood as Fuel and Construction Material. Final report ecoinvent data v2.0 No. 9. Swiss Centre for Life Cycle Inventories, Dübendorf, CH.
- tap water: 0.00234333 kg; lognormal variance with pedigree 0.004425, pedigree (2,3,3,2,2)
  Water used for the dilution of boric acid to create a solution of ca. 7.5 %.
  properties: wet mass 1 kg, dry mass 0.000337476 kg, water content 2962.17, carbon content, fossil 0.00178991
  note on carbon content, fossil: Bicarbonate content is 2.93 mol/m3. CO2 content is 0.1 mol/m3 (ecoinvent v2.2 report 8, Tab 93.1).
- waste bamboo residues: -0.000187425 kg; name bamboo_residues; = (0.030342-0.016886562/ DM_residues)*-1
  Refers to the by-product of the trimming process of panels and other products that require exact dimensions. An amount of 0.0302 Kg (corresponding to a dry mass of 0.016887 Kg) of the bamboo residues per Kg of bamboo pole is used for internal heat production and thus subtracted from the total amount
  production volume 144782 kg; = PV_RP*(bamboo_residues/RP)
    Calculated from production volume of reference product using the relative outputs.
  property price 0 EUR2005; name bamboo_residues_price_EUR2005
  property dry mass 0.56 kg; name DM_residues
  properties: water content 0.785714, wet mass 1 kg, carbon content, non-fossil 0.494, heating value, net 17.68 MJ
  note on heating value, net: Jetsada P. & Panmanas S. (2017),Evaluation of lower heating value and elemental composition of bamboo using near infrared spectroscopy,Energy,Volume 121,Pages 147-158,ISSN 0360-5442,https://doi.org/10.1016/j.energy.2017.01.020.
- furnace, wood chips, with silo, 300kW: 5.59954e-9 unit; = 0.2419*2.31481481481481E-08; lognormal variance with pedigree 0.354, pedigree (3,5,3,5,4)
  Bamboo residues which are produced as a by-product are used as internal fuel for the required heat input (0.2419 MJ/ Kg of bamboo pole) for technical drying process. Infrastructure required for the combustion of bamboo residues is approximated with the combustion of wood chips using the dataset “heat production, softwood chips from forest, at furnace 300kW”. Since the LHV of bamboo (19.27 MJ/Kg) and softwood wood chips (19.1 MJ/Kg) are very similar, the original value was scaled with the required heat input of 0.2419 MJ only. The efficiency of the heating system was assumed to be the same as in the original dataset

## Emissions to nature
- Sodium [air, urban air close to ground]: 4.19293e-7 kg; = 0.2419*1.73333333333333E-06; lognormal variance with pedigree 0.484, pedigree (3,5,3,5,4)
  (same comment as for wood ash mixture, pure)
- Potassium [air, urban air close to ground]: 7.54728e-6 kg; = 0.2419*3.11999999999999E-05; lognormal variance with pedigree 0.484, pedigree (3,5,3,5,4)
  (same comment as for wood ash mixture, pure)
- Benzene, ethyl- [air, urban air close to ground]: 9.676e-9 kg; = 0.2419*3.99999999999999E-08; lognormal variance with pedigree 0.484, pedigree (3,5,3,5,4)
  (same comment as for wood ash mixture, pure)
- Magnesium [air, urban air close to ground]: 1.16112e-7 kg; = 0.2419*4.79999999999999E-07; lognormal variance with pedigree 0.484, pedigree (3,5,3,5,4)
  (same comment as for wood ash mixture, pure)
- PAH, polycyclic aromatic hydrocarbons [air, urban air close to ground]: 3.58012e-9 kg; = 0.2419*0.0000000148; lognormal variance with pedigree 0.484, pedigree (3,5,3,5,4)
  (same comment as for wood ash mixture, pure)
- m-Xylene [air, urban air close to ground]: 3.8704e-8 kg; = 0.2419*0.00000016; lognormal variance with pedigree 0.484, pedigree (3,5,3,5,4)
  (same comment as for wood ash mixture, pure)
- Chlorine [air, urban air close to ground]: 5.8056e-8 kg; = 0.2419*2.39999999999999E-07; lognormal variance with pedigree 0.484, pedigree (3,5,3,5,4)
  (same comment as for wood ash mixture, pure)
- Particulates, > 2.5 um, and < 10um [air, urban air close to ground]: 1.61267e-6 kg; = 0.2419*6.66666666666665E-06; lognormal variance with pedigree 0.484, pedigree (3,5,3,5,4)
  (same comment as for wood ash mixture, pure)
- Lead [air, urban air close to ground]: 8.06333e-9 kg; = 0.2419*3.33333333333332E-08; lognormal variance with pedigree 0.484, pedigree (3,5,3,5,4)
  (same comment as for wood ash mixture, pure)
- Sulfur dioxide [air, urban air close to ground]: 8.06333e-7 kg; = 0.2419*3.33333333333333E-06; lognormal variance with pedigree 0.484, pedigree (3,5,3,5,4)
  (same comment as for wood ash mixture, pure)
- Hydrocarbons, aliphatic, alkanes, unspecified [air, urban air close to ground]: 2.93505e-7 kg; = 0.2419*1.21333333333333E-06; lognormal variance with pedigree 0.522, pedigree (5,5,3,5,4)
  (same comment as for wood ash mixture, pure)
- Hydrocarbons, aliphatic, unsaturated [air, urban air close to ground]: 9.99853e-7 kg; = 0.2419*4.13333333333332E-06; lognormal variance with pedigree 0.484, pedigree (3,5,3,5,4)
  (same comment as for wood ash mixture, pure)
- Phosphorus [air, urban air close to ground]: 9.676e-8 kg; = 0.2419*3.99999999999999E-07; lognormal variance with pedigree 0.484, pedigree (3,5,3,5,4)
  (same comment as for wood ash mixture, pure)
- Calcium [air, urban air close to ground]: 1.88682e-6 kg; = 0.2419*7.79999999999998E-06; lognormal variance with pedigree 0.484, pedigree (3,5,3,5,4)
  (same comment as for wood ash mixture, pure)
- Methane, non-fossil [air, urban air close to ground]: 1.4514e-6 kg; = 0.2419*5.99999999999998E-06; lognormal variance with pedigree 0.484, pedigree (3,5,3,5,4)
  (same comment as for wood ash mixture, pure)
- Chromium VI [air, urban air close to ground]: 1.29013e-11 kg; = 0.2419*5.33333333333332E-11; lognormal variance with pedigree 0.534, pedigree (3,5,3,5,4)
  (same comment as for wood ash mixture, pure)
- Dinitrogen monoxide [air, urban air close to ground]: 8.06333e-7 kg; = 0.2419*3.33333333333333E-06; lognormal variance with pedigree 0.484, pedigree (3,5,3,5,4)
  (same comment as for wood ash mixture, pure)
- Cadmium [air, urban air close to ground]: 2.25773e-10 kg; = 0.2419*9.33333333333331E-10; lognormal variance with pedigree 0.484, pedigree (3,5,3,5,4)
  (same comment as for wood ash mixture, pure)
- Phenol, pentachloro- [air, urban air close to ground]: 2.61252e-12 kg; = 0.2419*0.0000000000108; lognormal variance with pedigree 0.484, pedigree (3,5,3,5,4)
  (same comment as for wood ash mixture, pure)
- Benzo(a)pyrene [air, urban air close to ground]: 1.61267e-10 kg; = 0.2419*6.66666666666665E-10; lognormal variance with pedigree 0.484, pedigree (3,5,3,5,4)
  (same comment as for wood ash mixture, pure)
- NMVOC, non-methane volatile organic compounds, unspecified origin [air, urban air close to ground]: 3.3866e-6 kg; = 0.2419*0.000014; lognormal variance with pedigree 0.214, pedigree (3,5,3,5,4)
  (same comment as for wood ash mixture, pure)
- Copper [air, urban air close to ground]: 7.09573e-9 kg; = 0.2419*2.93333333333333E-08; lognormal variance with pedigree 0.484, pedigree (3,5,3,5,4)
  (same comment as for wood ash mixture, pure)
- Benzene [air, urban air close to ground]: 2.93505e-7 kg; = 0.2419*1.21333333333333E-06; lognormal variance with pedigree 0.484, pedigree (3,5,3,5,4)
  (same comment as for wood ash mixture, pure)
- Particulates, < 2.5 um [air, urban air close to ground]: 2.9028e-5 kg; = 0.2419*0.00012; lognormal variance with pedigree 0.174, pedigree (3,5,3,5,4)
  (same comment as for wood ash mixture, pure)
- Fluorine [air, urban air close to ground]: 1.61267e-8 kg; = 0.2419*6.66666666666665E-08; lognormal variance with pedigree 0.484, pedigree (3,5,3,5,4)
  (same comment as for wood ash mixture, pure)
- Carbon monoxide, non-fossil [air, urban air close to ground]: 0.000161267 kg; = 0.2419*0.000666666666666665; lognormal variance with pedigree 0.484, pedigree (3,5,3,5,4)
  (same comment as for wood ash mixture, pure)
- Nickel [air, urban air close to ground]: 1.9352e-9 kg; = 0.2419*7.99999999999998E-09; lognormal variance with pedigree 0.484, pedigree (3,5,3,5,4)
  (same comment as for wood ash mixture, pure)
- Mercury [air, urban air close to ground]: 9.676e-11 kg; = 0.2419*3.99999999999999E-10; lognormal variance with pedigree 0.484, pedigree (3,5,3,5,4)
  (same comment as for wood ash mixture, pure)
- Chromium [air, urban air close to ground]: 1.27723e-9 kg; = 0.2419*5.27999999999999E-09; lognormal variance with pedigree 0.484, pedigree (3,5,3,5,4)
  (same comment as for wood ash mixture, pure)
- Acetaldehyde [air, urban air close to ground]: 1.96745e-8 kg; = 0.2419*8.13333333333331E-08; lognormal variance with pedigree 0.484, pedigree (3,5,3,5,4)
  (same comment as for wood ash mixture, pure)
- Bromine [air, urban air close to ground]: 1.9352e-8 kg; = 0.2419*7.99999999999998E-08; lognormal variance with pedigree 0.484, pedigree (3,5,3,5,4)
  (same comment as for wood ash mixture, pure)
- Manganese [air, urban air close to ground]: 5.48307e-8 kg; = 0.2419*2.26666666666666E-07; lognormal variance with pedigree 0.484, pedigree (3,5,3,5,4)
  (same comment as for wood ash mixture, pure)
- Zinc [air, urban air close to ground]: 9.676e-8 kg; = 0.2419*3.99999999999999E-07; lognormal variance with pedigree 0.484, pedigree (3,5,3,5,4)
  (same comment as for wood ash mixture, pure)
- Ammonia [air, urban air close to ground]: 5.57983e-7 kg; = 0.2419*2.30666666666666E-06; lognormal variance with pedigree 0.484, pedigree (3,5,3,5,4)
  (same comment as for wood ash mixture, pure)
- Toluene [air, urban air close to ground]: 9.676e-8 kg; = 0.2419*3.99999999999999E-07; lognormal variance with pedigree 0.484, pedigree (3,5,3,5,4)
  (same comment as for wood ash mixture, pure)
- Dioxins, measured as 2,3,7,8-tetrachlorodibenzo-p-dioxin [air, urban air close to ground]: 9.99853e-15 kg; = 0.2419*4.13333333333332E-14; lognormal variance with pedigree 0.484, pedigree (3,5,3,5,4)
  (same comment as for wood ash mixture, pure)
- Formaldehyde [air, urban air close to ground]: 4.19293e-8 kg; = 0.2419*1.73333333333333E-07; lognormal variance with pedigree 0.484, pedigree (3,5,3,5,4)
  (same comment as for wood ash mixture, pure)
- Benzene, hexachloro- [air, urban air close to ground]: 2.32224e-15 kg; = 0.2419*9.59999999999998E-15; lognormal variance with pedigree 0.484, pedigree (3,5,3,5,4)
  (same comment as for wood ash mixture, pure)
- Carbon dioxide, non-fossil [air, urban air close to ground]: 0.0328984 kg; = 0.2419*0.136; lognormal variance with pedigree 0.0546, pedigree (3,5,3,5,4)
  (same comment as for wood ash mixture, pure)
- Nitrogen oxides [air, urban air close to ground]: 3.22533e-5 kg; = 0.2419*0.000133333333333333; lognormal variance with pedigree 0.484, pedigree (3,5,3,5,4)
  (same comment as for wood ash mixture, pure)
- Water [air, unspecified]: 0.000515593 m3; lognormal variance with pedigree 0.004425, pedigree (2,3,3,2,2)
  Value was calculated to maintain water balance. Represents the evaporated water from the drying process
- Arsenic [air, urban air close to ground]: 3.22533e-10 kg; = 0.2419*1.33333333333333E-09; lognormal variance with pedigree 0.484, pedigree (3,5,3,5,4)
  (same comment as for wood ash mixture, pure)

## Sampling procedure
The dataset is mostly based on literature values and was developed with the support of the International Organization for Bamboo and Rattan INBAR

## Extrapolations
This dataset has been extrapolated from year 2020 to the year of the calculation (2021). The uncertainty has been adjusted accordingly.
