# apple production

Dataset: EcoSpold 2, unit process
Geography: RoW
Time period: 2009-01-01 to 2021-12-31
Technology level: current
Classification: ISIC rev.4 ecoinvent: 0124:Growing of pome fruits and stone fruits
Tags: WFLDB
Scenario: Business-as-Usual
System model: Allocation, cut-off by classification
Generated by: [System]
Database: ecoinvent
isCopyrightProtected: true
accessRestrictedTo: 1

## General comment
This dataset is a weighted average of the regional datasets, with weights based on production volume of the reference product. Detailed comments and sources about the exchanges can be found in the regional datasets.
The geographicalCorrelation score of every pedigree matrix of was changed to '5'.
Sum of regional production volumes: 4.288e+10 kg
CN: PV = 3.486e+10 kg; weight = 0.8128
US: PV = 4.250e+9 kg; weight = 0.09912
IT: PV = 2.233e+9 kg; weight = 0.05208
CL: PV = 1.542e+9 kg; weight = 0.03596
Yield of the global dataset = 21327.1595661 kg/ha, calculated as a weighted average of the regional yields.
The comments below were part of the CN regional dataset.
This dataset represents the production of 1 kg of apples. The average yield from 2009 - 2012 is 16.783 t/ha. The data are representative for apple production in China used for the export market. Mineral NPK fertiliser input is 30-20-40 kg/ha. No organic fertilisers are applied. Total active ingredients (a.i.) applied as pesticides amount to 11.8 kg a.i./ha.
The dataset was modelled within the project 'World Food LCA database (WFLDB)'. The aim of this project was to provide inventories of a broad variety of agricultural products and processes and to cover for each product at least 50% of the global export market. The export share of apples produced in China amounts to 14% of the global export (tonnage exported in 2010). The production system regarded in this dataset aimed at representing apples produced in China for the export market.
PEF-Quality: data quality rating (DQR) = 2.7 (i.e. good quality). This dataset refers to an average situation; for specific situations exchanges might differ substantially due to site specific parameters

## Included activities start
This activity starts with the nursery producing fruit tree seedlings, i.e. grafted young trees to be planted.

## Included activities end
This activity ends with the waste treatment after the clearing of the orchard (rooting up the trees). The dataset includes all activities of a year in a year in the productive phase of the orchard including the establishment phase per year of lifetime (15 years, 2000 trees/ha planted), the clearing of the orchard including waste treatment.
The establishment phase of the orchard includes tree nursery, soil cultivation, planting trees, sowing grass, installation of trellis system (posts and wires) and irrigation. Fertiliser and pesticide use in a year of the establishment phase is assumed to be half of the amount of a year in the productive phase.
The productive phase of the orchard includes machine operations, corresponding infrastructure, fuel use and sheds. Machine operations in the productive phase are: soil cultivation (mulching, mowing), fertiliser and pesticide application, harvesting and irrigation. Further, direct field emissions and land use change are included. At the end of the productive phase the orchard is cleared by rooting up the trees.

Heavy metal uptake by the crop is considered.
The inputs of seedlings, fertilisers and pesticides as well as packaging of fertilisers and pesticides are considered.
Statistical data from FAO used to assess land use change is incomplete for China. The original land use of 40.9% of annual cropland and 100% of perennial cropland transformed in the last 20 years is unknown. Land use change impacts may therefore be underestimated.

## Reference product
- apple: 1 kg; By-product classification allocatable product; CPC 01341: Apples
  production volume 2.71608e10 kg
    Source: FAOSTAT. Average, 2009-2013
  property carbon content, non-fossil 0.431788
    calculation: C-content of components according to ecoinvent report No. 15a. Source of composition: Souci, S.W., Fachmann, W., Kraut, H. (Hg.: Bundesminsiterium fur Ernahrung, Landwirtschaft und Forsten, Bonn) 'Die Zusammensetzung der Lebensmittel - Nahrwerttabellen', medpharm Scientific Publishers Stuttgart, CRC Press; 2000.
  property price 0.38 EUR2005
    Calculated from the trade statistics for the year 2005 published by the UN (COMTRADE database, accessed 20151105) as an average of 5 biggest importers of pear in the world; DE, UK, RU, NL and FR. Comtrade cathegory: 80810: Fruit, edible; apples, fresh.
  property carbon content 0.431788
    carbon content on a dry matter basis (reserved; not for manual entry)
  properties: wet mass 1 kg, water in wet mass 0.459167 kg, carbon content, fossil 0, dry mass 0.540833 kg, water content 0.849, carbon allocation 0.233525 kg

## Inputs from technosphere
- dithiocarbamate-compound: 0.000272161 kg; lognormal variance with pedigree 0.0158498, pedigree (2,2,4,5,1)
  Proxy: Source for total amount of pesticides: extrapolated with MEXALCA and data from literature (Personal communication, Alessandro Cerutti, 2015). Active ingredient is calculated based on Ecoinvent dataset Apple US. For calculations see supporting documentation 'WFLDB-Documentation.pdf' (https://ecoquery.ecoinvent.org/File/Reports).
  properties: wet mass 1 kg, carbon content, fossil 0.179339, dry mass 1 kg
- inorganic phosphorus fertiliser, as P2O5: 0 kg; pedigree (1,1,1,1,1)
  3bCalculated based on literature values or expert estimation: The total amount of nutrient (Personal written communication, Fiorenzo Pasquali, Yara, 2015) multiplied by the share of fertiliser type (Personal written communication, Fiorenzo Pasquali, Yara, 2015). See supporting documentation 'WFLDB-Documentation.pdf' chapter 'Fertiliser application' for L3 and L4 data (https://ecoquery.ecoinvent.org/File/Reports).
  Corresponds to 26.3 kg/ha
  properties: wet mass 1 kg, dry mass 1 kg
- application of plant protection product, by field sprayer: 0.00024241 ha; lognormal variance with pedigree 0.126664, pedigree (2,2,4,5,1)
  Proxy: Extrapolated using a modified MEXALCA-approach (Roches et al. 2010; Nemecek et al. 2012). See supporting documentation 'WFLDB-Documentation.pdf' chapter 'Machinery processes' for L1 data (https://ecoquery.ecoinvent.org/File/Reports). Field sprayer used as a proxy for pesticide application in orchards. Corresponds to 11 applications per year.
- phenoxy-compound: 6.11348e-6 kg; lognormal variance with pedigree 0.0158498, pedigree (2,2,4,5,1)
  (same comment as for dithiocarbamate-compound)
  properties: wet mass 1 kg, dry mass 1 kg, carbon content, fossil 0.532559
- cyclic N-compound: 4.66068e-6 kg; lognormal variance with pedigree 0.0158498, pedigree (2,2,4,5,1)
  (same comment as for dithiocarbamate-compound)
  properties: dry mass 1 kg, carbon content, fossil 0.641962, wet mass 1 kg
- organophosphorus-compound, unspecified: 5.20519e-5 kg; lognormal variance with pedigree 0.0158498, pedigree (2,2,4,5,1)
  (same comment as for dithiocarbamate-compound)
  properties: dry mass 1 kg, carbon content, fossil 0.260898, wet mass 1 kg
- ammonium sulfate: 3.75605e-6 kg; lognormal variance with pedigree 0.126177, pedigree (2,1,4,5,1)
  3bCalculated based on literature values or expert estimation: The total amount of nutrient (Personal written communication, Fiorenzo Pasquali, Yara, 2015) multiplied by the share of fertiliser type (Personal written communication, Fiorenzo Pasquali, Yara, 2015). See supporting documentation 'WFLDB-Documentation.pdf' chapter 'Fertiliser application' for L3 and L4 data (https://ecoquery.ecoinvent.org/File/Reports).
  Corresponds to 2.74 kg/ha
  properties: dry mass 1 kg, wet mass 1 kg
- inorganic nitrogen fertiliser, as N: 0 kg; pedigree (1,1,1,1,1)
  3bCalculated based on literature values or expert estimation: The total amount of nutrient (Personal written communication, Fiorenzo Pasquali, Yara, 2015) multiplied by the share of fertiliser type (Personal written communication, Fiorenzo Pasquali, Yara, 2015). See supporting documentation 'WFLDB-Documentation.pdf' chapter 'Fertiliser application' for L3 and L4 data (https://ecoquery.ecoinvent.org/File/Reports).
  Corresponds to 7.78 kg/ha
  properties: dry mass 1 kg, wet mass 1 kg
- ammonium nitrate: 0.0012538 kg; lognormal variance with pedigree 0.126177, pedigree (2,1,4,5,1)
  The exchange has been updated from 'ammonium nitrate, as N' into 'ammonium nitrate' and therefore its amount has been scaled (multiplied) from 0.0004 kg by 2.8573 kg of 'ammonium nitrate' per kg of 'ammonium nitrate, as N'. Original comment of the exchange is: Calculated based on literature values or expert estimation: The total amount of nutrient () multiplied by the share of fertiliser type (). See supporting documentation 'WFLDB-Documentation.pdf' chapter 'Fertiliser application' for L3 and L4 data (https://ecoquery.ecoinvent.org/File/Reports).
  Corresponds to 29.9 kg/ha
  properties: wet mass 1 kg, dry mass 1 kg
- mulching: 0.000462277 ha; lognormal variance with pedigree 0.126177, pedigree (2,1,4,5,1)
  Proxy: Extrapolated using a modified MEXALCA-approach (Roches et al. 2010; Nemecek et al. 2012). See supporting documentation 'WFLDB-Documentation.pdf' chapter 'Machinery processes' for L1 data (https://ecoquery.ecoinvent.org/File/Reports).
- ammonia, anhydrous, liquid: 0 kg; pedigree (1,1,1,1,1)
  Calculated based on literature values: The nutrient content of the crop multiplied by the country-share of the fertiliser type (IFA 2014). See supporting documentation 'WFLDB-Documentation.pdf' chapter 'Fertiliser application' for L1 data and appendix for the source of nutrient content (https://ecoquery.ecoinvent.org/File/Reports).
  Corresponds to 0.0771 kg/ha
  properties: dry mass 1 kg, wet mass 1 kg
- irrigation: 0 m3; pedigree (1,1,1,1,1)
  Calculated value: The total amount of water used for irrigation (Personal written communication, Alessandro Cerutti, Department of Agriculture, Forestry and Food Science - University of Torino, 2015) multiplied by the country-share of irrigation technique (WFLDB-Guidelines.pdf, Appendix 6.1). See supporting documentation 'WFLDB-Documentation.pdf' chapter 'Water use for irrigation' (https://ecoquery.ecoinvent.org/File/Reports).
  properties: dry mass 0.11 kg, water content 9089.91, wet mass 1000 kg
- poultry manure, dried: 0.000100013 kg; lognormal variance with pedigree 0.126177, pedigree (2,1,4,5,1)
  Estimation: See supporting documentation 'WFLDB-Documentation.pdf' chapter 'Fertiliser application' (https://ecoquery.ecoinvent.org/File/Reports).
  Corresponds to 41.2 kg/ha
  properties: nitrogen content 0.532, dry mass 0.865 kg, lead content 2.92e-6, potassium content 0.024, copper content 4.38e-5, phosphorus content 0.0167, carbon content, non-fossil 0.33389, zinc content 0.000349, wet mass 1 kg, nickel content 4e-5, water content 0.156069, cadmium content 2.92e-7, mercury content 2e-7
- glyphosate: 2.69687e-5 kg; lognormal variance with pedigree 0.0158498, pedigree (2,2,4,5,1)
  (same comment as for dithiocarbamate-compound)
  properties: dry mass 1 kg, wet mass 1 kg, carbon content, fossil 0.214286
- manure, solid, cattle: 0.000142922 kg; lognormal variance with pedigree 0.126177, pedigree (2,1,4,5,1)
  Estimation: See supporting documentation 'WFLDB-Documentation.pdf' chapter 'Fertiliser application' (https://ecoquery.ecoinvent.org/File/Reports).
  Corresponds to 58.8 kg/ha
  properties: water content 3.5454, wet mass 1 kg, dry mass 0.22 kg, carbon content, non-fossil 0.441
- establishing orchard: 0.00685747 unit; lognormal variance with pedigree 0.126177, pedigree (2,1,4,5,1)
  Estimation. This is the number of trees per ha divided by the lifetime years of the orchard.
- solid manure loading and spreading, by hydraulic loader and spreader: 0.000242935 kg; lognormal variance with pedigree 0.126177, pedigree (2,1,4,5,1)
  This amount corresponds the input of solid manure.
- fertilising, by broadcaster: 0.000131163 ha; lognormal variance with pedigree 0.126177, pedigree (2,1,4,5,1)
  Literature value or expert estimation (Personal written communication, Alessandro Cerutti, Department of Agriculture, Forestry and Food Science - University of Torino, 2015). Corresponds to 2 applications per year.
- tillage, ploughing: 4.84326e-5 ha; lognormal variance with pedigree 0.126177, pedigree (2,1,4,5,1)
  Literature value or expert estimation (Liu et al. 2013).
- fruit tree seedling, for planting: 0.00685747 unit; lognormal variance with pedigree 0.126177, pedigree (2,1,4,5,1)
  (same comment as for establishing orchard)
  properties: wet mass 1 kg, dry mass 0.578035 kg, carbon content, non-fossil 0.439481, water content 0.73
  note on carbon content, non-fossil: calculation: C-content of components according to ecoinvent report No. 15a. Source of composition: https://ndb.nal.usda.gov/ndb/search/. Unspecific seedling used as proxy.
- trellis system, wooden poles, soft wood, tar impregnated: 5.29939e-5 ha; lognormal variance with pedigree 0.126177, pedigree (2,1,4,5,1)
  Used to attach trees in orchards with a tree density of more than 500 trees per ha.
- waste wood, untreated: 0 kg; pedigree (1,1,1,1,1)
  Wood from trees after 1-2 years of sorrage at the field (20% water) per lifetime year (20 years) of the orchard
  production volume 0 kg
    Calculated from reference product production volume, reference product amount and byproduct amount.
  properties: carbon content, non-fossil 0.48632, water content 0.25, dry mass 0.8 kg, wet mass 1 kg, heating value, net 13.99 MJ
  note on heating value, net: Value taken from the general comment of the treatment dataset.
- urea: 0.00253943 kg; lognormal variance with pedigree 0.126177, pedigree (2,1,4,5,1)
  The exchange has been updated from 'urea, as N' into 'urea' and therefore its amount has been scaled (multiplied) from 0.0012 kg by 2.1438 kg of 'urea' per kg of 'urea, as N'. Original comment of the exchange is: 3bCalculated based on literature values or expert estimation: The total amount of nutrient (Personal written communication, Fiorenzo Pasquali, Yara, 2015) multiplied by the share of fertiliser type (Personal written communication, Fiorenzo Pasquali, Yara, 2015). See supporting documentation 'WFLDB-Documentation.pdf' chapter 'Fertiliser application' for L3 and L4 data (https://ecoquery.ecoinvent.org/File/Reports).
  Corresponds to 6.64 kg/ha
  properties: dry mass 1 kg, wet mass 1 kg, carbon content, fossil 0.2
- packaging, for fertilisers: 0.00994173 kg; lognormal variance with pedigree 0.0592, pedigree (4,3,4,5,4)
  Total amount of active substance/s of fertilisers needed for the production of 'apple' is calculated to be circa 4.97E-03 kg. Fertiliser/s used in this dataset is/are: 'ammonia, liquid', 'ammonium nitrate, as N', 'ammonium sulfate, as N', 'nitrogen fertiliser, as N', 'phosphate fertiliser, as P2O5', 'potassium chloride, as K2O', 'potassium fertiliser, as K2O', 'potassium sulfate, as K2O', 'urea, as N'. The total amount of active substance/s is doubled in order to account for the packaging of the dilluted product of fertiliser/s that is/are applied. Therefore, 9.94E-03 kg of packaging for fertilisers is justified with this exchange.
  properties: heating value, net 25.01 MJ, price 0.0642 EUR2005, carbon content, fossil 0.825301, wet mass 1 kg, dry mass 1 kg
  note on carbon content, fossil: Considering a chemical formula (C2H4)n for polyethylene, carbon content-fossil is calculated to be 0.856286 kg of Carbon per kg of dry mass.
- potassium sulfate: 0.000329729 kg; lognormal variance with pedigree 0.126177, pedigree (2,1,4,5,1)
  The exchange has been updated from 'potassium sulfate, as K2O' into 'potassium sulfate' and therefore its amount has been scaled (multiplied) from 0.0002 kg by 1.85 kg of 'potassium sulfate' per kg of 'potassium sulfate, as K2O'. Original comment of the exchange is: 3bCalculated based on literature values or expert estimation: The total amount of nutrient (Personal written communication, Fiorenzo Pasquali, Yara, 2015) multiplied by the share of fertiliser type (Personal written communication, Fiorenzo Pasquali, Yara, 2015). See supporting documentation 'WFLDB-Documentation.pdf' chapter 'Fertiliser application' for L3 and L4 data (https://ecoquery.ecoinvent.org/File/Reports).
  Corresponds to 48.1 kg/ha
  properties: dry mass 1 kg, wet mass 1 kg
- transport, tractor and trailer, agricultural: 0.00153323 metric ton*km; lognormal variance with pedigree 0.164439, pedigree (4,1,4,5,1)
  On-farm transport: Yield (in tonnes) multiplied by the average distance from field to farm. The distance was obtained by extrapolation (modified MEXALCA approach). See supporting documentation 'WFLDB-Documentation.pdf' chapter 'Machinery processes' (https://ecoquery.ecoinvent.org/File/Reports). Corresponds to 22.9tkm/ha.
- sulfur: 0.000274641 kg; lognormal variance with pedigree 0.0158498, pedigree (2,2,4,5,1)
  (same comment as for dithiocarbamate-compound)
  properties: dry mass 1 kg, wet mass 1 kg
- potassium chloride: 0.00312796 kg; lognormal variance with pedigree 0.126177, pedigree (2,1,4,5,1)
  The exchange has been updated from 'potassium chloride, as K2O' into 'potassium chloride' and therefore its amount has been scaled (multiplied) from 0.002 kg by 1.5829 kg of 'potassium chloride' per kg of 'potassium chloride, as K2O'. Original comment of the exchange is: 3bCalculated based on literature values or expert estimation: The total amount of nutrient (Personal written communication, Fiorenzo Pasquali, Yara, 2015) multiplied by the share of fertiliser type (Personal written communication, Fiorenzo Pasquali, Yara, 2015). See supporting documentation 'WFLDB-Documentation.pdf' chapter 'Fertiliser application' for L3 and L4 data (https://ecoquery.ecoinvent.org/File/Reports).
  properties: wet mass 1 kg, dry mass 1 kg
- inorganic potassium fertiliser, as K2O: 0 kg; pedigree (1,1,1,1,1)
  3bCalculated based on literature values or expert estimation: The total amount of nutrient (Personal written communication, Fiorenzo Pasquali, Yara, 2015) multiplied by the share of fertiliser type (Personal written communication, Fiorenzo Pasquali, Yara, 2015). See supporting documentation 'WFLDB-Documentation.pdf' chapter 'Fertiliser application' for L3 and L4 data (https://ecoquery.ecoinvent.org/File/Reports).
  Corresponds to 6.38 kg/ha
  properties: wet mass 1 kg, dry mass 1 kg
- packaging, for pesticides: 0.00127319 kg; lognormal variance with pedigree 0.0592, pedigree (4,3,4,5,4)
  Total amount of active substance/s of pesticides needed for the production of apple is calculated to be circa 6.37E-04 kg. Pesticide/s used in this dataset is/are: 'cyclic N-compound', 'dithiocarbamate-compound', 'glyphosate', 'organophosphorus-compound, unspecified', 'phenoxy-compound', 'sulfur'. The total amount of active substance/s is doubled in order to account for the packaging of the dilluted product of pesticide/s that is/are applied. Therefore, 1.27E-03 kg of packaging for pesticides is justified with this exchange.
  properties: carbon content, fossil 0.85714, heating value, net 25.97 MJ, wet mass 1 kg, price 0.0642 EUR2005, dry mass 1 kg
- planting tree: 0.00685747 unit; lognormal variance with pedigree 0.126177, pedigree (2,1,4,5,1)
  (same comment as for establishing orchard)
- inorganic phosphorus fertiliser, as P2O5: 1.14592e-7, 9.49437e-6, 6.08749e-7, 1.23181e-5, 1.35612e-7, 9.86354e-6, 2.66403e-7, 1.40283e-6, 7.72312e-5, 1.62735e-5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 kg (59 entries); lognormal variance with pedigree 0.126177, pedigree (2,1,4,5,1)
  (same comment as for inorganic phosphorus fertiliser, as P2O5)
- inorganic nitrogen fertiliser, as N: 9.69706e-9, 5.16768e-7, 6.47892e-8, 7.42784e-7, 1.8808e-8, 6.63876e-7, 8.7135e-8, 2.10938e-7, 2.33209e-6, 1.39275e-6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 kg (59 entries); lognormal variance with pedigree 0.126177, pedigree (2,1,4,5,1)
  (same comment as for inorganic nitrogen fertiliser, as N)
- ammonia, anhydrous, liquid: 5.05278e-9, 5.29585e-10, 2.36744e-9, 5.60068e-8 kg (4 entries); lognormal variance with pedigree 0.126177, pedigree (2,1,4,5,1)
  (same comment as for ammonia, anhydrous, liquid)
- irrigation: 0.0149769, 0.000635724, 2.54289e-5, 0.00219399, 0.000109709, 0.00622954, 0.00101397, 0.257281, 0.00494556, 0.00169028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 m3 (13 entries); lognormal variance with pedigree 0.126177, pedigree (2,1,4,5,1)
  (same comment as for irrigation)
- waste wood, untreated: -0.000165734, -0.000543303, -0.00030009, -0.000506443, -0.000579494, -0.024385, -0.00051609, -0.00302776, -0.000221363, -0.000110355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 kg (40 entries); lognormal variance with pedigree 0.126177, pedigree (2,1,4,5,1)
  (same comment as for waste wood, untreated)
  production volume 1.91866e9 kg
- inorganic potassium fertiliser, as K2O: 6.51645e-10, 1.88877e-8, 1.56395e-8, 9.35963e-8, 4.93245e-9, 1.89839e-7, 2.02062e-8, 6.21569e-9, 2.34713e-6, 1.68024e-7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 kg (59 entries); lognormal variance with pedigree 0.126177, pedigree (2,1,4,5,1)
  (same comment as for inorganic potassium fertiliser, as K2O)

## Inputs from nature
- Transformation, to permanent crop, irrigated [natural resource, land]: 0.0264969 m2; lognormal variance with pedigree 0.0462144, pedigree (2,1,4,5,1)
  10000 m2 divided by the life time of the perennial crop (20 years).
- Occupation, permanent crop, irrigated [natural resource, land]: 0.531369 m2*year; lognormal variance with pedigree 0.0220616, pedigree (2,1,4,5,1)
  Related to the duration from harvest date of previous crop to harvest date of main crop.
- Energy, gross calorific value, in biomass [natural resource, biotic]: 2.70417 MJ; lognormal variance with pedigree 0.0158498, pedigree (2,2,4,5,1)
  Gross energy content is related to MJ/kg dry matter of product. Source: ecoinvent data
- Transformation, from permanent crop, irrigated [natural resource, land]: 0.0264969 m2; lognormal variance with pedigree 0.0462144, pedigree (2,1,4,5,1)
  10000 m2 divided by the life time of the perennial crop (20 years).
- Carbon dioxide, in air [natural resource, in air]: 0.238246 kg; lognormal variance with pedigree 0.0158498, pedigree (2,2,4,5,1)
  CO2 uptake by biomass

## Emissions to nature
- Glyphosate [soil, agricultural]: 2.69687e-5 kg; lognormal variance with pedigree 0.0467216, pedigree (2,2,4,5,1)
  Calculated value - 100% emission in soil. See 'WFLDB-Guidelines.pdf', available at https://ecoquery.ecoinvent.org/File/Reports.
- Water [water, ground-]: 0.0328763 m3; lognormal variance with pedigree 0.126177, pedigree (2,1,4,5,1)
  Calculated value - Emission calculated from water balance. See 'WFLDB-Guidelines.pdf', available at https://ecoquery.ecoinvent.org/File/Reports.
- Cadmium, ion [water, ground-]: 1.6179e-9 kg; lognormal variance with pedigree 0.358938, pedigree (2,2,4,5,1)
  Calculated value - Freiermuth (2006). See 'WFLDB-Guidelines.pdf', available at https://ecoquery.ecoinvent.org/File/Reports.
- Mercury [soil, agricultural]: -4.81986e-9 kg
  Comment on mathematicalRelation:
  8.77375e-10 from Calculated value - Freiermuth (2006). See 'WFLDB-Guidelines.pdf', available at https://ecoquery.ecoinvent.org/File/Reports.
  -6.123956e-09 from Crop, default, heavy metals uptake model
  Heavy metal uptake can be excluded by setting the parameter heavyMetalUptakeSwitch to zero.
- Mancozeb [soil, agricultural]: 0.000272161 kg; lognormal variance with pedigree 0.0467216, pedigree (2,2,4,5,1)
  (same comment as for Glyphosate)
- Cadmium [soil, agricultural]: 4.22759e-8 kg
  Comment on mathematicalRelation:
  4.98975e-08 from Calculated value - Freiermuth (2006). See 'WFLDB-Guidelines.pdf', available at https://ecoquery.ecoinvent.org/File/Reports.
  -1.533254e-08 from Crop, default, heavy metals uptake model
  Heavy metal uptake can be excluded by setting the parameter heavyMetalUptakeSwitch to zero.
- Ammonia [air, non-urban air or from high stacks]: 0.000309355 kg; lognormal variance with pedigree 0.0467216, pedigree (2,2,4,5,1)
  Calculated value - EMEP/EEA (2013). See 'WFLDB-Guidelines.pdf', available at https://ecoquery.ecoinvent.org/File/Reports.
- Lead [water, surface water]: 9.79764e-9 kg; lognormal variance with pedigree 0.358938, pedigree (2,2,4,5,1)
  (same comment as for Cadmium, ion)
- 2,4-D [soil, agricultural]: 6.11348e-6 kg; lognormal variance with pedigree 0.0467216, pedigree (2,2,4,5,1)
  (same comment as for Glyphosate)
- Lead [water, ground-]: 2.36637e-9 kg; lognormal variance with pedigree 0.358938, pedigree (2,2,4,5,1)
  (same comment as for Cadmium, ion)
- Chromium, ion [water, surface water]: 1.06875e-7 kg; lognormal variance with pedigree 0.358938, pedigree (2,2,4,5,1)
  (same comment as for Cadmium, ion)
- Nitrogen oxides [air, non-urban air or from high stacks]: 6.76242e-5 kg; lognormal variance with pedigree 0.126664, pedigree (2,2,4,5,1)
  Calculated value - EEA/EMEP (2013). See 'WFLDB-Guidelines.pdf', available at https://ecoquery.ecoinvent.org/File/Reports.
- Chromium, ion [water, ground-]: 8.67469e-7 kg; lognormal variance with pedigree 0.358938, pedigree (2,2,4,5,1)
  (same comment as for Cadmium, ion)
- Zinc [soil, agricultural]: -3.77112e-6 kg
  Comment on mathematicalRelation:
  6.1715e-07 from Calculated value - Freiermuth (2006). See 'WFLDB-Guidelines.pdf', available at https://ecoquery.ecoinvent.org/File/Reports.
  -4.835473e-06 from Crop, default, heavy metals uptake model
  Heavy metal uptake can be excluded by setting the parameter heavyMetalUptakeSwitch to zero.
- Carbon dioxide, from soil or biomass stock [air, non-urban air or from high stacks]: 0.000342287 kg; normal variance with pedigree 0.5452, pedigree (3,3,5,5,2)
  Global average LUC emissions according 2nd edition of the Quantis-modified tool developed by Blonk Consultants 'WFLDB-adapted-Blonk 2014 direct-land-use-change-assessment-tool_2015-05-18a.xlsx', tab. 'Country & land use unknown'. The emission are based on the relative change in production areas in all countries for a given crop. The weighted average is used which takes into acount relative difference in crop expansion into primary forest, secondary forest, grassland, perennial and annual land.
  Uncertainty: Uncertainty estimated based on IPCC guidlines 2006.
- Water [water, surface water]: 0.131504 m3; lognormal variance with pedigree 0.126177, pedigree (2,1,4,5,1)
  (same comment as for Water)
- Nickel, ion [water, surface water]: 4.15302e-8 kg; lognormal variance with pedigree 0.358938, pedigree (2,2,4,5,1)
  (same comment as for Cadmium, ion)
- Sulfur [soil, agricultural]: 0.000274641 kg; lognormal variance with pedigree 0.0467216, pedigree (2,2,4,5,1)
  (same comment as for Glyphosate)
- Dinitrogen monoxide [air, non-urban air or from high stacks]: 6.48813e-5 kg; lognormal variance with pedigree 0.126664, pedigree (2,2,4,5,1)
  Calculated value - IPCC (2006). See 'WFLDB-Guidelines.pdf', available at https://ecoquery.ecoinvent.org/File/Reports.
- Phosphorus [water, surface water]: 3.39097e-6 kg; lognormal variance with pedigree 0.177866, pedigree (2,2,4,5,1)
  Calculated value - Prasuhn (2006) and SQCB-Erosion. See 'WFLDB-Guidelines.pdf', available at https://ecoquery.ecoinvent.org/File/Reports.
- Copper, ion [water, surface water]: 1.17691e-7 kg; lognormal variance with pedigree 0.358938, pedigree (2,2,4,5,1)
  (same comment as for Cadmium, ion)
- Phosphate [water, surface water]: 4.27857e-5 kg; lognormal variance with pedigree 0.177866, pedigree (2,2,4,5,1)
  Calculated value - Prasuhn (2006). See 'WFLDB-Guidelines.pdf', available at https://ecoquery.ecoinvent.org/File/Reports.
- Copper, ion [water, ground-]: 1.12993e-7 kg; lognormal variance with pedigree 0.358938, pedigree (2,2,4,5,1)
  (same comment as for Cadmium, ion)
- Phosphate [water, ground-]: 9.77048e-6 kg; lognormal variance with pedigree 0.177866, pedigree (2,2,4,5,1)
  (same comment as for Phosphate)
- Copper [soil, agricultural]: -1.04674e-6 kg
  Comment on mathematicalRelation:
  -5.48075e-08 from Calculated value - Freiermuth (2006). See 'WFLDB-Guidelines.pdf', available at https://ecoquery.ecoinvent.org/File/Reports.
  -1.0006619e-06 from Crop, default, heavy metals uptake model
  Heavy metal uptake can be excluded by setting the parameter heavyMetalUptakeSwitch to zero.
- Zinc, ion [water, surface water]: 8.96497e-8 kg; lognormal variance with pedigree 0.358938, pedigree (2,2,4,5,1)
  (same comment as for Cadmium, ion)
- Mercury [water, surface water]: 1.33694e-10 kg; lognormal variance with pedigree 0.358938, pedigree (2,2,4,5,1)
  (same comment as for Cadmium, ion)
- Zinc, ion [water, ground-]: 3.75167e-7 kg; lognormal variance with pedigree 0.358938, pedigree (2,2,4,5,1)
  (same comment as for Cadmium, ion)
- Mercury [water, ground-]: 4.80785e-10 kg; lognormal variance with pedigree 0.358938, pedigree (2,2,4,5,1)
  (same comment as for Cadmium, ion)
- Nitrate [water, ground-]: 0.00681037 kg; lognormal variance with pedigree 0.177866, pedigree (2,2,4,5,1)
- Chromium [soil, agricultural]: -4.0077e-7 kg
  Comment on mathematicalRelation:
  -5.129e-08 from Calculated value - Freiermuth (2006). See 'WFLDB-Guidelines.pdf', available at https://ecoquery.ecoinvent.org/File/Reports.
  -8.2295e-08 from Crop, default, heavy metals uptake model
  Heavy metal uptake can be excluded by setting the parameter heavyMetalUptakeSwitch to zero.
- Chlorpyrifos methyl [soil, agricultural]: 5.20519e-5 kg; lognormal variance with pedigree 0.0467216, pedigree (2,2,4,5,1)
  (same comment as for Glyphosate)
- Nickel, ion [water, ground-]: 9.58248e-11 kg; lognormal variance with pedigree 0.358938, pedigree (2,2,4,5,1)
  (same comment as for Cadmium, ion)
- Carbon dioxide, fossil [air, non-urban air or from high stacks]: 0.00186905 kg; lognormal variance with pedigree 0.0158498, pedigree (2,2,4,5,1)
  Calculated value - CO2 emissions from urea and lime. See 'WFLDB-Guidelines.pdf', available at https://ecoquery.ecoinvent.org/File/Reports.
- Nickel [soil, agricultural]: -5.45115e-8 kg
  Comment on mathematicalRelation:
  7.0935e-08 from Calculated value - Freiermuth (2006). See 'WFLDB-Guidelines.pdf', available at https://ecoquery.ecoinvent.org/File/Reports.
  -1.577346e-07 from Crop, default, heavy metals uptake model
  Heavy metal uptake can be excluded by setting the parameter heavyMetalUptakeSwitch to zero.
- Myclobutanil [soil, agricultural]: 4.66068e-6 kg; lognormal variance with pedigree 0.0467216, pedigree (2,2,4,5,1)
  (same comment as for Glyphosate)
- Cadmium, ion [water, surface water]: 9.56866e-10 kg; lognormal variance with pedigree 0.358938, pedigree (2,2,4,5,1)
  (same comment as for Cadmium, ion)
- Water [air, non-urban air or from high stacks]: 0.15532 m3; lognormal variance with pedigree 0.126177, pedigree (2,1,4,5,1)
  (same comment as for Water)
- Lead [soil, agricultural]: -1.32116e-8 kg
  Comment on mathematicalRelation:
  8.93125e-08 from Calculated value - Freiermuth (2006). See 'WFLDB-Guidelines.pdf', available at https://ecoquery.ecoinvent.org/File/Reports.
  -8.165627e-08 from Crop, default, heavy metals uptake model
  Heavy metal uptake can be excluded by setting the parameter heavyMetalUptakeSwitch to zero.

## Sampling procedure
WFLDB Methodological Guidelines for the Life Cycle Inventory of Agricultural Products in the latest version, available at: http://www.quantis-intl.com/microsites/wfldb. Data sources: Data were categorised from level 0 (L0) to level (L4) as follows: L0 = estimate, proxy; L1 = statistical data (e.g. FAOSTAT); L2 = L1 adapted to crop and country; L3 = literature data or L1 resp. L2 data approved by experts; medium detailing (e.g. kg of total N-fertiliser); L4 = L3 data of higher detailing as L3 data (e.g. kg of a specific N-fertiliser such as Ammonium-Nitrate or Urea).In this dataset data were obtained for yield: L3; Fertilisers: L4; Pesticides: L1; Machinery: L1; Irrigation L2. For information regarding the calculation of individual exchanges see supporting documentation WFLDB-Documentation.pdf.

## Extrapolations
The amount of the exchanges are weighted average of regional datasets.

## Review by Assumpció ANTON 2016-05-30
Be aware that the use of statistics in input calculations could provide some specific inputs not common for specific crops, this should be corrected if better information is available and better reflexed in DQR . Currently, I would dissent for some of good marks provided, being a revision of criteria applied advisable.

Pesticides will need to be amended periodically checking for update of pesticides' ban.
