# sodium nitrite production

Dataset: EcoSpold 2, unit process
Geography: RER
Time period: 2010-01-01 to 2021-12-31
Technology level: current
Classification: ISIC rev.4 ecoinvent: 2011:Manufacture of basic chemicals
Synonyms: NaNO2
Scenario: Business-as-Usual
System model: Allocation, cut-off by classification
Share of production covered: 100 %
Generated by: Jürgen Sutter
Database: ecoinvent
isCopyrightProtected: true
accessRestrictedTo: 1

## General comment
The process “sodium nitrite, at plant, RER” is modelled for the production of sodium nitrite from nitrous dioxide in Europe. Raw materials are modelled with a stoechiometric calculation. Emissions are estimated. Energy consumptions, infrastructure and transports are calculated with standard values.
Sodium nitrite (NaNO2; CAS 7632-00-0) forms colourless crystals. It is hygroscopic. The anhydrous salt has an enthalpy of solution of ΔH298 = +13.9 kJ/mol at infinite dilution. The hydrate NaNO2 • 0.5H2O exists below –5 °C. Sodium nitrite is soluble in liquid ammonia; 2NaNO2 • NH3 forms below –64 °C. The solubility of sodium nitrite in 95% ethanol at 25 °C is ca. 1.4%.

Until the beginning of the 20th century, sodium nitrite was produced by the reduction of sodium nitrate with lead, iron, zinc, manganese dioxide, coke, sulfur dioxide, and calcium carbide. Of these processes, the only one of industrial significance was the reduction of molten sodium nitrate with lead at ca. 400 °C.
Large-scale production of sodium nitrite is now based on the reaction of nitrogen oxides with sodium carbonate or sodium hydroxide solution.
Large amounts of sodium nitrite are consumed in the chemical and pharmaceutical industries for the production of nitroso and isonitroso compounds, diazotization reactions, and the synthesis of pharmaceuticals and agricultural pesticides.
Other applications of sodium nitrite are in metallurgy and corrosion prevention. It is used as an accelerator in phosphating, added to alkaline pickling solutions for aluminum, applied to steel as a descaling agent, added to drilling oils and abrasives, used for passivating metal surfaces and for creating protective coatings on carbon steels, and added as a corrosion inhibitor to lubricating oils and greases as well as to cooling water loops. Sodium nitrite serves as an oxidizing agent in the alkaline detinning of tinplate scrap and a corrosion inhibitor in heat-transfer baths.
Sodium nitrite is used in lubricants for glass-forming equipment. Like sodium nitrate and potassium nitrate, it is used as a heat-transfer medium.
Sodium nitrite is recommended as an additive in concrete and gypsum to improve strength and combat the corrosion of iron reinforcement.
In curing salts used in the food industry, sodium nitrite is still the most reliable agent for protecting against botulism, a dangerous bacterial contaminant of meats. High nitrite concentrations can, however, lead to the formation of carcinogenic nitrosamines; legislative restrictions have, therefore, been imposed on the use of nitrite. Methods have been developed for achieving a satisfactory effect with minimal quantities. The simultaneous addition of other substances (e.g., ascorbic acid) is reported to prevent the formation of nitrosamines.
Frischknecht R., Jungbluth N., Althaus H.-J., Doka G., Dones R., Heck T., Hellweg S., Hischier R., Nemecek T., Rebitzer G. and Spielmann M. (2007) Overview and Methodology. Final report ecoinvent v2.0 No. 1. Swiss Centre for Life Cycle Inventories, Dübendorf, CH, retrieved from: www.ecoinvent.org.

Gendorf (2000) Umwelterklärung 2000, Werk Gendorf. Werk Gendorf, Burgkirchen as pdf-File under: http://www.gendorf.de/pdf/umwelterklaerung2000.pdf
Kim 2003 Kim S., Overcash M.: Energy in chemical manufacturing processes: gate-to-gate information for life cycle assessment. In: Journal of Chemical Technology & Biotechnology vol. 78, no. 9: 995-1005(11). 2003

Wolfgang Laue, Michael Thiemann, Erich Scheibler, Karl Wilhelm Wiegand: Nitrates and Nitrites. Published online: 2002. In: Ullmann's Encyclopedia of Industrial Chemistry, Seventh Edition, 2004 Electronic Release (ed. Fiedler E., Grossmann G., Kersebohm D., Weiss G. and Witte C.). 7 th Electronic Release Edition. Wiley InterScience, New York, Online-Version under: DOI: 10.1002/14356007.a17_265

## Included activities end
production of sodium nitrite including materials, energy uses, infrastructure, and emissions

## Geography
The inventory is modelled for Europe.

## Technology
reaction of nitrous dioxide and sodium hydroxide

## Time period
Time of publications

## Parameters
- fraction, cooling water, to air: 0.3875 dimensionless; name fraction_CW_to_air; = (0.5*fraction_CW_OT_to_air)+(0.5*fraction_CW_R_to_air); lognormal variance with pedigree 0.092025, pedigree (4,4,3,2,4)
  Calculated value based on literature value (see comments of the other parametres present in this dataset) and expert opinion. In the case when no industry/literature data are available about the type of cooling or directly fraction, cooling water, to air specific for the process a default assumption is applied. It is assumed that the once-through cooling system is used in 50% of all cases and recirculating system is used in another 50% of all cases.
- fraction, cooling water, once-through system, to air: 0.004 dimensionless; name fraction_CW_OT_to_air; lognormal variance with pedigree 0.0413, pedigree (2,3,1,3,1)
  Calculated based on literature value (Scown, C.D., 2011, Water Footprint of U.S. Transportation Fuels and supplying information of the article) (Vionnet, S., Quantis Water Database - Technical Report, 2012).
- fraction, cooling water, recirculating system, to air: 0.771 dimensionless; name fraction_CW_R_to_air; lognormal variance with pedigree 0.0413, pedigree (2,3,1,3,1)
  (same comment as for fraction, cooling water, once-through system, to air)
- fraction, cooling water, cooling pond system, to air: 0.032 dimensionless; name fraction_CW_CP_to_air; lognormal variance with pedigree 0.0413, pedigree (2,3,1,3,1)
  (same comment as for fraction, cooling water, once-through system, to air)

## Reference product
- sodium nitrite: 1 kg; CPC 34240: Phosphates of triammonium; salts and peroxysalts of inorganic acids and metals n.e.c.; By-product classification allocatable product; CAS 7632-00-0
  EcoSpold01Location=RER
  production volume 3.3e7 kg
    Expert judgment
  property price 0.3 EUR2005
    Calculated value based on data from United Nations Commodity Trade Statistics Database (comtrade.un.org). UN comtrade category: 2834 Nitrites, nitrates. Year 2005. Using exchange rate of 1EURO = 1.209 USD. Average of price of import into 5 main markets (EU, US, JP, IN and CN).
  property carbon content, fossil 0
    Calculated based on molecular structure. See tab "chemicals".
  property carbon content 0
    carbon content on a dry matter basis (reserved; not for manual entry)
  properties: wet mass 1 kg, water content 0, water in wet mass 0 kg, dry mass 1 kg, carbon content, non-fossil 0, carbon allocation 0 kg

## Inputs from technosphere
- chemical factory, organics: 4e-10 unit; lognormal variance with pedigree 0.3184, pedigree (4,5,5,5,5)
  EcoSpold01Location=RER
  No information was readily available about infrastructure and land-use of production plants. Therefore, in this study, the infrastructure is estimated based on the module "chemical plant, organics". This module assumes a built area of about 4.2 ha, an average output of 50'000 t/a, and plant life of fifty years. For this study, the estimated value is 4.00 E-10 units per kg of produced chemical.
  Uncertainty: Estimation
- hydrochloric acid, without water, in 30% solution state: 0.02746 kg; lognormal variance with pedigree 0.0335, pedigree (4,5,4,1,1)
  The unreacted sodium hydroxide is considered to be neutralized with hydrogen chloride.
  EcoSpold01Location=RER
  Uncertainty: Stoechiometric calculation
  properties: wet mass 1 kg, dry mass 1 kg, heating value, net 3.32 MJ
- nitrous oxide: 0.22883 kg; lognormal variance with pedigree 0.0335, pedigree (4,5,4,1,1)
  EcoSpold01Location=RER
  As there was no data available for the production of sodium nitrite, the values for the consumption of the raw materials are calculated with an assumed yield of 95 % (Frischknecht et al. 2007).
  Uncertainty: Stoechiometric calculation
  properties: wet mass 1 kg, dry mass 1 kg
- sodium hydroxide, without water, in 50% solution state: 0.61022 kg; lognormal variance with pedigree 0.0335, pedigree (4,5,4,1,1)
  As there was no data available for the production of sodium nitrite, the values for the consumption of the raw materials are calculated with an assumed yield of 95 % (Frischknecht et al. 2007).
  EcoSpold01Location=RER
  Uncertainty: Stoechiometric calculation
  properties: wet mass 1 kg, heating value, net 3.03 MJ, dry mass 1 kg
- electricity, medium voltage: 0.019194 kWh; lognormal variance with pedigree 0.0416, pedigree (1,2,5,1,1)
  EcoSpold01Location=UCTE
  Kim (2003) reports values for the energy consumption of sodium nitrite production.
  Uncertainty: Kim 2003
- heat, from steam, in chemical industry: 3.2026 MJ; lognormal variance with pedigree 0.0416, pedigree (1,2,5,1,1)
  Kim (2003) reports values for the energy consumption of sodium nitrite production.
  EcoSpold01Location=RER
  Uncertainty: Kim 2003
  properties: heating value, net 1 MJ
- nitrous dioxide: 0.35088 kg; lognormal variance with pedigree 0.0335, pedigree (4,5,4,1,1)
  (same comment as for sodium hydroxide, without water, in 50% solution state)
  properties: dry mass 1 kg, wet mass 1 kg

## Inputs from nature
- Water, cooling, unspecified natural origin [natural resource, in water]: 0.024 m3; name water_cooling_UNO_input; lognormal variance with pedigree 0.0335, pedigree (4,5,4,1,1)
  There was no information available on the amount of cooling water used within the plant. In order not to neglect the process cooling water demand this value was approximated with data from an large chemical plant site in Germany producing 2.05 Mt a-1 (intermediates included) of different chemicals (Gendorf 2000). In this plant in total an average 24 kg water per kg of product were used for. This value was used in this inventory as approximation for the cooling water consumption.
  Uncertainty: Estimation

## Emissions to nature
- Nitrogen oxides [air, urban air close to ground]: 0.0011594 kg; lognormal variance with pedigree 0.1786, pedigree (4,5,5,5,5)
  There was no data available on process emissions to air for the sodium nitrite production. As approximation the air emissions occurring from the purge vent, the distillation vent and fugitive emission sources were estimated to 0.2% of the input of nitrogen dioxide and nitrogen monoxide. The remaining amount of nitrogen dioxide and nitrogen monoxide is considered to be reduced to nitrogen.
  Uncertainty: Estimation
- Chloride [water, surface water]: 0.026697 kg; lognormal variance with pedigree 0.3184, pedigree (4,5,5,5,5)
  The unreacted sodium hydroxide is considered to be neutralized with hydrogen chloride. From this neutralization sodium and chloride emissions to water are calculated.
  Uncertainty: Estimation
- Water [water, unspecified]: 0.0147 m3; name water_to_water_unspecified; = water_cooling_UNO_input*(1-fraction_CW_to_air); lognormal variance with pedigree 0.130025, pedigree (4,4,5,2,4)
  Calculated value based on literature values and expert opinion. See comments in the parametres' comment field.
  property fraction, origin: unspecified 1; name fraction_origin_unspecified_Ww
  property fraction, origin: fresh water 0; name fraction_origin_fresh_water_Ww
  property fraction, origin: salt water 0; name fraction_origin_salt_water_Ww
- Sodium, ion [water, surface water]: 0.017544 kg; lognormal variance with pedigree 0.6642, pedigree (4,5,5,5,5)
  (same comment as for Chloride)
- Water [air, unspecified]: 0.0093 m3; name water_to_air_unspecified; = water_cooling_UNO_input*fraction_CW_to_air; lognormal variance with pedigree 0.130025, pedigree (4,4,5,2,4)
  (same comment as for Water)
  property fraction, origin: salt water 0; name fraction_origin_salt_water
  property fraction, origin: fresh water 0; name fraction_origin_fresh_water
  property fraction, origin: unspecified 1; name fraction_origin_unspecified

## Sampling procedure
Literature data

## Extrapolations
This dataset has been extrapolated from year 2010 to the year of the calculation (2021). The uncertainty has been adjusted accordingly.

## Review by Roland Hischier 2011-04-12
automatic validation in Excel
none
