# apricot production

Dataset: EcoSpold 2, unit process
Geography: FR
Time period: 2009-01-01 to 2021-12-31
Technology level: current
Classification: ISIC rev.4 ecoinvent: 0124:Growing of pome fruits and stone fruits
Tags: WFLDB
Scenario: Business-as-Usual
System model: Allocation, cut-off by classification
Generated by: Tuija Waldvogel
Published in: Nemecek T. 2015
Database: ecoinvent
isCopyrightProtected: true
accessRestrictedTo: 1

## General comment
This dataset represents the production of 1 kg of apricots. The average yield from 2009 - 2012 is 20 t/ha. The data are representative for apricots production in France used for the export market. Mineral NPK fertiliser input is 60-20-75 kg/ha. Organic fertilisers applied amount to 1 m3/ha of liquid manure and 1 t/ha of solid manure. Total active ingredients (a.i.) applied as pesticides amount to 5.6 kg a.i./ha.
The dataset was modelled within the project 'World Food LCA database (WFLDB)'. The aim of this project was to provide inventories of a broad variety of agricultural products and processes and to cover for each product at least 50% of the global export market. The export share of apricots produced in France amounts to 19% of the global export (tonnage exported in 2010). The production system regarded in this dataset aimed at representing apricots produced in France for the export market.
PEF-Quality: data quality rating (DQR) = 1.8 (i.e. very good quality). This dataset refers to an average situation; for specific situations exchanges might differ substantially due to site specific parameters

## Included activities start
This activity starts with the nursery producing fruit tree seedlings, i.e. grafted young trees to be planted.

## Included activities end
This activity ends with the waste treatment after the clearing of the orchard (rooting up the trees). The dataset includes all activities of a year in a year in the productive phase of the orchard including the establishment phase per year of lifetime (20 years, 500 trees/ha planted), the clearing of the orchard including waste treatment.
The establishment phase of the orchard includes tree nursery, soil cultivation, planting trees, sowing grass, installation of trellis system (posts and wires) and irrigation. Fertiliser and pesticide use in a year of the establishment phase is assumed to be half of the amount of a year in the productive phase.
The productive phase of the orchard includes machine operations, corresponding infrastructure, fuel use and sheds. Machine operations in the productive phase are: soil cultivation (mulching, mowing), fertiliser and pesticide application, harvesting and irrigation. Further, direct field emissions and land use change are included. At the end of the productive phase the orchard is cleared by rooting up the trees.

Heavy metal uptake by the crop is considered.
The inputs of seedlings, fertilisers (mineral and organic) and pesticides as well as packaging of fertilisers and pesticides are considered. The dataset doesn't include emissions from manure storage because these are within the system boundary of animal production.

## Technology
Conventional production

## Parameters
- heavyMetalUptakeSwitch: 1 dimensionless
- LUC_crop_specific: 1 dimensionless
  This parameter allows to switch between a 'crop specific' and a 'country specific' approach when calculating the LUC of a crop. By default, the chosen approach is 'crop specific', so the value of the parameter is 1. If you want to apply a 'country specific' approach, turn the parameter to 0.

## Reference product
- apricot: 1 kg; CPC 01343: Apricots; By-product classification allocatable product
  Reference flow: Yield = 20000 kg/ha table fruit quality
  production volume 1.71401e8 kg
    Source: FAOSTAT. Average, 2009-2012
  property carbon content, non-fossil 0.412732
    calculation: C-content of components according to ecoinvent report No. 15a. Source of composition: Souci, S.W., Fachmann, W., Kraut, H. (Hg.: Bundesminsiterium fur Ernahrung, Landwirtschaft und Forsten, Bonn) 'Die Zusammensetzung der Lebensmittel - Nahrwerttabellen', medpharm Scientific Publishers Stuttgart, CRC Press; 2000. Peach used as proxy.
  property price 2.94 EUR2005
    Calculated value based on data from United Nations Commodity Trade Statistics Database (comtrade.un.org). UN comtrade category: 80910 Apricots, fresh. Year: 2010. Using exchange rate of 1EURO = 1.209 USD. Average of price of import into 5 main markets (EU, US, JP, IN and CN).
  property carbon content 0.412732
    carbon content on a dry matter basis (reserved; not for manual entry)
  properties: wet mass 1 kg, water content 0.853, carbon content, fossil 0, dry mass 0.539665 kg, water in wet mass 0.460335 kg, carbon allocation 0.222737 kg

## Inputs from technosphere
- mowing, by motor mower: 0.0002 ha; source Mouiren C. 2015; lognormal variance with pedigree 0.124177, pedigree (2,1,4,1,1)
  Literature value or expert estimation (Personal written communication, Christophe Mouiren, GRCETA Basse Durance, 2015).
- potassium sulfate: 0.000346868 kg; source Mouiren C. 2015; lognormal variance with pedigree 0.124177, pedigree (2,1,4,1,1)
  The exchange has been updated from 'potassium sulfate, as K2O' into 'potassium sulfate' and therefore its amount has been scaled (multiplied) from 0.0002 kg by 1.85 kg of 'potassium sulfate' per kg of 'potassium sulfate, as K2O'. Original comment of the exchange is: Calculated based on literature values or expert estimation: The total amount of nutrient (Personal written communication, Christophe Mouiren, GRCETA Basse Durance, 2015) multiplied by the share of fertiliser type (Personal written communication, Christophe Mouiren, GRCETA Basse Durance, 2015). See supporting documentation 'WFLDB-Documentation.pdf' chapter 'Fertiliser application' for L3 and L4 data (https://ecoquery.ecoinvent.org/File/Reports).
  properties: dry mass 1 kg, wet mass 1 kg
- application of plant protection product, by field sprayer: 0.00035 ha; source Mouiren C. 2015; lognormal variance with pedigree 0.124664, pedigree (2,2,4,1,1)
  Literature value or expert estimation (Personal written communication, Christophe Mouiren, GRCETA Basse Durance, 2015). Field sprayer used as a proxy for pesticide application in orchards. Corresponds to 7 applications per year.
- ammonium nitrate: 0.00342878 kg; source Mouiren C. 2015; lognormal variance with pedigree 0.124177, pedigree (2,1,4,1,1)
  The exchange has been updated from 'ammonium nitrate, as N' into 'ammonium nitrate' and therefore its amount has been scaled (multiplied) from 0.0012 kg by 2.8573 kg of 'ammonium nitrate' per kg of 'ammonium nitrate, as N'. Original comment of the exchange is: Calculated based on literature values or expert estimation: The total amount of nutrient (Personal written communication, Christophe Mouiren, GRCETA Basse Durance, 2015) multiplied by the share of fertiliser type (Personal written communication, Christophe Mouiren, GRCETA Basse Durance, 2015). See supporting documentation 'WFLDB-Documentation.pdf' chapter 'Fertiliser application' for L3 and L4 data (https://ecoquery.ecoinvent.org/File/Reports).
  Corresponds to 24.0 kg/ha
  properties: wet mass 1 kg, dry mass 1 kg
- liquid manure spreading, by vacuum tanker: 5e-5 m3; lognormal variance with pedigree 0.124177, pedigree (2,1,4,1,1)
  This amount corresponds to the input of liquid manure.
- ammonia, anhydrous, liquid: 7.2855e-5 kg; source Mouiren C. 2015; lognormal variance with pedigree 0.124177, pedigree (2,1,4,1,1)
  Calculated based on literature values or expert estimation: The total amount of nutrient (Personal written communication, Christophe Mouiren, GRCETA Basse Durance, 2015) multiplied by the share of fertiliser type (Personal written communication, Christophe Mouiren, GRCETA Basse Durance, 2015). See supporting documentation 'WFLDB-Documentation.pdf' chapter 'Fertiliser application' for L3 and L4 data (https://ecoquery.ecoinvent.org/File/Reports).
  Corresponds to 1.46 kg/ha
  properties: dry mass 1 kg, wet mass 1 kg
- transport, tractor and trailer, agricultural: 0.002 metric ton*km; lognormal variance with pedigree 0.162439, pedigree (4,1,4,1,1)
  On-farm transport: Yield (in tonnes) multiplied by the average distance from field to farm. The distance was assumed to be 2 km (proxy).
- land use change, perennial crop: 0 ha
  Based data from FAOSTAT, the harvested area of apricots in France did not expand but rather shrank between a 20 year period that lasted and until 2011. Based on that information, LUC is manually set to zero (0) as no LUC can be attributed to this crop.
  Assessed at 19/11/2018 based on data from FAOSTAT.
- packaging, for pesticides: 0.000587436 kg; lognormal variance with pedigree 0.0592, pedigree (4,3,4,5,4)
  Total amount of active substance/s of pesticides needed for the production of apricot is calculated to be circa 2.94E-04 kg. Pesticide/s used in this dataset is/are: 'copper oxide', 'cyclic N-compound', 'glyphosate', 'phenoxy-compound', 'phthalimide-compound'. The total amount of active substance/s is doubled in order to account for the packaging of the dilluted product of pesticide/s that is/are applied. Therefore, 5.87E-04 kg of packaging for pesticides is justified with this exchange.
  properties: price 0.0642 EUR2005, heating value, net 25.97 MJ, wet mass 1 kg, dry mass 1 kg, carbon content, fossil 0.85714
- cyclic N-compound: 6.9885e-5 kg; source Objectifs Info Arbo 2014; lognormal variance with pedigree 0.0138498, pedigree (2,2,4,1,1)
  Literature value or expert estimation (Objectifs Info Arbo 2014).
  properties: carbon content, fossil 0.641962, wet mass 1 kg, dry mass 1 kg
- packaging, for fertilisers: 0.0155257 kg; lognormal variance with pedigree 0.0592, pedigree (4,3,4,5,4)
  Total amount of active substance/s of fertilisers needed for the production of 'apricot' is calculated to be circa 7.76E-03 kg. Fertiliser/s used in this dataset is/are: 'ammonia, liquid', 'ammonium nitrate, as N', 'ammonium sulfate, as N', 'nitrogen fertiliser, as N', 'phosphate fertiliser, as P2O5', 'potassium fertiliser, as K2O', 'potassium sulfate, as K2O', 'urea, as N'. The total amount of active substance/s is doubled in order to account for the packaging of the dilluted product of fertiliser/s that is/are applied. Therefore, 1.55E-02 kg of packaging for fertilisers is justified with this exchange.
  properties: wet mass 1 kg, heating value, net 25.01 MJ, carbon content, fossil 0.825301, price 0.0642 EUR2005, dry mass 1 kg
  note on carbon content, fossil: Considering a chemical formula (C2H4)n for polyethylene, carbon content-fossil is calculated to be 0.856286 kg of Carbon per kg of dry mass.
- solid manure loading and spreading, by hydraulic loader and spreader: 0.05 kg; lognormal variance with pedigree 0.124177, pedigree (2,1,4,1,1)
  This amount corresponds the input of solid manure.
- copper oxide: 6.606e-5 kg; source Objectifs Info Arbo 2014; lognormal variance with pedigree 0.0138498, pedigree (2,2,4,1,1)
  Literature value or expert estimation (Objectifs Info Arbo 2014).
  properties: dry mass 1 kg, wet mass 1 kg
- mulching: 5e-5 ha; source Mouiren C. 2015; lognormal variance with pedigree 0.124177, pedigree (2,1,4,1,1)
  (same comment as for mowing, by motor mower)
- waste wood, untreated: -0.06665 kg; lognormal variance with pedigree 0.124177, pedigree (2,1,4,1,1)
  Wood from trees after 1-2 years of sorrage at the field (20% water) per lifetime year (20 years) of the orchard
  production volume 1.14239e7 kg
    Calculated from the reference product amount and production volume
  properties: dry mass 0.8 kg, water content 0.25, carbon content, non-fossil 0.48632, wet mass 1 kg, heating value, net 13.99 MJ
  note on heating value, net: Value taken from the general comment of the treatment dataset.
- fertilising, by broadcaster: 0.0001 ha; source Mouiren C. 2015; lognormal variance with pedigree 0.124177, pedigree (2,1,4,1,1)
  Literature value or expert estimation (Personal written communication, Christophe Mouiren, GRCETA Basse Durance, 2015). Corresponds to 2 applications per year.
- establishing orchard: 0.00125 unit; source Mouiren C. 2015; lognormal variance with pedigree 0.124177, pedigree (2,1,4,1,1)
  Literature value or expert estimation (Personal written communication, Christophe Mouiren, GRCETA Basse Durance, 2015). This is the number of trees per ha divided by the lifetime years of the orchard.
- poultry manure, dried: 0.00772084 kg; source Marc Lambert 2015; lognormal variance with pedigree 0.124177, pedigree (2,1,4,1,1)
  Calculated based on literature values: The total amount of manure (Personal written communication, Marc Lambert, Yara, 2015) multiplied by the country-share of manure per animal category (FAOSTAT 2015). See supporting documentation 'WFLDB-Documentation.pdf' chapter 'Fertiliser application' (https://ecoquery.ecoinvent.org/File/Reports).
  Corresponds to 154.0 kg/ha
  properties: nitrogen content 0.532, lead content 2.92e-6, potassium content 0.024, wet mass 1 kg, cadmium content 2.92e-7, nickel content 4e-5, water content 0.156069, phosphorus content 0.0167, mercury content 2e-7, zinc content 0.000349, copper content 4.38e-5, carbon content, non-fossil 0.33389, dry mass 0.865 kg
- inorganic phosphorus fertiliser, as P2O5: 0.001 kg; source Mouiren C. 2015; lognormal variance with pedigree 0.124177, pedigree (2,1,4,1,1)
  Calculated based on literature values or expert estimation: The total amount of nutrient (Personal written communication, Christophe Mouiren, GRCETA Basse Durance, 2015) multiplied by the share of fertiliser type (Personal written communication, Christophe Mouiren, GRCETA Basse Durance, 2015). See supporting documentation 'WFLDB-Documentation.pdf' chapter 'Fertiliser application' for L3 and L4 data (https://ecoquery.ecoinvent.org/File/Reports).
  Corresponds to 18.0 kg/ha
  properties: wet mass 1 kg, dry mass 1 kg
- trellis system, wooden poles, soft wood, tar impregnated: 5e-5 ha; lognormal variance with pedigree 0.124177, pedigree (2,1,4,1,1)
  Used to attach trees in orchards with a tree density of more than 500 trees per ha.
- inorganic nitrogen fertiliser, as N: 0.00141 kg; source Mouiren C. 2015; lognormal variance with pedigree 0.124177, pedigree (2,1,4,1,1)
  Calculated based on literature values or expert estimation: The total amount of nutrient (Personal written communication, Christophe Mouiren, GRCETA Basse Durance, 2015) multiplied by the share of fertiliser type (Personal written communication, Christophe Mouiren, GRCETA Basse Durance, 2015). See supporting documentation 'WFLDB-Documentation.pdf' chapter 'Fertiliser application' for L3 and L4 data (https://ecoquery.ecoinvent.org/File/Reports).
  properties: wet mass 1 kg, dry mass 1 kg
- manure, liquid, cattle: 0.0429995 kg; source Marc Lambert 2015; lognormal variance with pedigree 0.124177, pedigree (2,1,4,1,1)
  Calculated based on literature values: The total amount of manure (Personal written communication, Marc Lambert, Yara, 2015) multiplied by the country-share of manure per animal category (FAOSTAT 2015). See supporting documentation 'WFLDB-Documentation.pdf' chapter 'Fertiliser application' (https://ecoquery.ecoinvent.org/File/Reports).
  Corresponds to 0.86 m3/ha
  properties: water content 12.333, dry mass 0.075 kg, wet mass 1 kg, carbon content, non-fossil 0.68
- fruit tree seedling, for planting: 0.00125 unit; source Mouiren C. 2015; lognormal variance with pedigree 0.124177, pedigree (2,1,4,1,1)
  (same comment as for establishing orchard)
  properties: wet mass 1 kg, dry mass 0.578035 kg, water content 0.73, carbon content, non-fossil 0.439481
  note on carbon content, non-fossil: calculation: C-content of components according to ecoinvent report No. 15a. Source of composition: https://ndb.nal.usda.gov/ndb/search/. Unspecific seedling used as proxy.
- manure, liquid, swine: 0.00645309 kg; source Marc Lambert 2015; lognormal variance with pedigree 0.124177, pedigree (2,1,4,1,1)
  Calculated based on literature values: The total amount of manure (Personal written communication, Marc Lambert, Yara, 2015) multiplied by the country-share of manure per animal category (FAOSTAT 2015). See supporting documentation 'WFLDB-Documentation.pdf' chapter 'Fertiliser application' (https://ecoquery.ecoinvent.org/File/Reports).
  Corresponds to 0.129 m3/ha
  properties: water content 19, carbon content, non-fossil 0.64, dry mass 0.05 kg, wet mass 1 kg
- irrigation: 0.122925 m3; lognormal variance with pedigree 0.124177, pedigree (2,1,4,1,1)
  Calculated value: The total amount of water used for irrigation (calculated from evapotranspiration, Pfister et al. 2011) multiplied by the country-share of irrigation technique (Personal written communication, Christophe Mouiren, GRCETA Basse Durance, 2015). See supporting documentation 'WFLDB-Documentation.pdf' chapter 'Water use for irrigation' for L1 data (https://ecoquery.ecoinvent.org/File/Reports).
  properties: water content 9089.91, wet mass 1000 kg, dry mass 0.11 kg
- manure, solid, cattle: 0.0422792 kg; source Marc Lambert 2015; lognormal variance with pedigree 0.124177, pedigree (2,1,4,1,1)
  Calculated based on literature values: The total amount of manure (Personal written communication, Marc Lambert, Yara, 2015) multiplied by the country-share of manure per animal category (FAOSTAT 2015). See supporting documentation 'WFLDB-Documentation.pdf' chapter 'Fertiliser application' (https://ecoquery.ecoinvent.org/File/Reports).
  Corresponds to 846.0 kg/ha
  properties: water content 3.5454, carbon content, non-fossil 0.441, dry mass 0.22 kg, wet mass 1 kg
- planting tree: 0.00125 unit; source Mouiren C. 2015; lognormal variance with pedigree 0.124177, pedigree (2,1,4,1,1)
  (same comment as for establishing orchard)
- poultry manure, fresh: 0.000273728 kg; source Marc Lambert 2015; lognormal variance with pedigree 0.124177, pedigree (2,1,4,1,1)
  Calculated based on literature values: The total amount of manure (Personal written communication, Marc Lambert, Yara, 2015) multiplied by the country-share of manure per animal category (FAOSTAT 2015). See supporting documentation 'WFLDB-Documentation.pdf' chapter 'Fertiliser application' (https://ecoquery.ecoinvent.org/File/Reports).
  Corresponds to 0.0109 m3/ha
  properties: water content 1.63158, carbon content, non-fossil 0.33389, wet mass 1 kg, dry mass 0.38 kg
- phenoxy-compound: 2.5452e-6 kg; lognormal variance with pedigree 0.0138498, pedigree (2,2,4,1,1)
  Proxy: Apple US used.
  properties: carbon content, fossil 0.532559, dry mass 1 kg, wet mass 1 kg
- urea: 0.000128628 kg; source Mouiren C. 2015; lognormal variance with pedigree 0.124177, pedigree (2,1,4,1,1)
  The exchange has been updated from 'urea, as N' into 'urea' and therefore its amount has been scaled (multiplied) from 0.0001 kg by 2.1438 kg of 'urea' per kg of 'urea, as N'. Original comment of the exchange is: Calculated based on literature values or expert estimation: The total amount of nutrient (Personal written communication, Christophe Mouiren, GRCETA Basse Durance, 2015) multiplied by the share of fertiliser type (Personal written communication, Christophe Mouiren, GRCETA Basse Durance, 2015). See supporting documentation 'WFLDB-Documentation.pdf' chapter 'Fertiliser application' for L3 and L4 data (https://ecoquery.ecoinvent.org/File/Reports).
  Corresponds to 1.2 kg/ha
  properties: dry mass 1 kg, carbon content, fossil 0.2, wet mass 1 kg
- phthalimide-compound: 0.000144 kg; source Objectifs Info Arbo 2014; lognormal variance with pedigree 0.0138498, pedigree (2,2,4,1,1)
  Literature value or expert estimation (Objectifs Info Arbo 2014).
  properties: dry mass 1 kg, carbon content, fossil 0.361204, wet mass 1 kg
- inorganic potassium fertiliser, as K2O: 0.0035625 kg; source Mouiren C. 2015; lognormal variance with pedigree 0.124177, pedigree (2,1,4,1,1)
  Calculated based on literature values or expert estimation: The total amount of nutrient (Personal written communication, Christophe Mouiren, GRCETA Basse Durance, 2015) multiplied by the share of fertiliser type (Personal written communication, Christophe Mouiren, GRCETA Basse Durance, 2015). See supporting documentation 'WFLDB-Documentation.pdf' chapter 'Fertiliser application' for L3 and L4 data (https://ecoquery.ecoinvent.org/File/Reports).
  Corresponds to 71.3 kg/ha
  properties: dry mass 1 kg, wet mass 1 kg
- glyphosate: 1.1228e-5 kg; lognormal variance with pedigree 0.0138498, pedigree (2,2,4,1,1)
  Proxy: Apple US used.
  properties: wet mass 1 kg, dry mass 1 kg, carbon content, fossil 0.214286
- ammonium sulfate: 0.00027 kg; source Mouiren C. 2015; lognormal variance with pedigree 0.124177, pedigree (2,1,4,1,1)
  Calculated based on literature values or expert estimation: The total amount of nutrient (Personal written communication, Christophe Mouiren, GRCETA Basse Durance, 2015) multiplied by the share of fertiliser type (Personal written communication, Christophe Mouiren, GRCETA Basse Durance, 2015). See supporting documentation 'WFLDB-Documentation.pdf' chapter 'Fertiliser application' for L3 and L4 data (https://ecoquery.ecoinvent.org/File/Reports).
  Corresponds to 5.4 kg/ha
  properties: dry mass 1 kg, wet mass 1 kg

## Inputs from nature
- Occupation, permanent crop, irrigated [natural resource, land]: 0.50135 m2*year; lognormal variance with pedigree 0.0200616, pedigree (2,1,4,1,1)
  Related to the duration from harvest date of previous crop to harvest date of main crop.
- Transformation, to permanent crop, irrigated [natural resource, land]: 0.025 m2; lognormal variance with pedigree 0.0442144, pedigree (2,1,4,1,1)
  10000 m2 divided by the life time of the perennial crop (20 years).
- Carbon dioxide, in air [natural resource, in air]: 0.255865 kg; lognormal variance with pedigree 0.0138498, pedigree (2,2,4,1,1)
  CO2 uptake by biomass
- Energy, gross calorific value, in biomass [natural resource, biotic]: 2.71045 MJ; lognormal variance with pedigree 0.0138498, pedigree (2,2,4,1,1)
  Gross energy content is related to MJ/kg dry matter of product. Source: ecoinvent data
- Transformation, from permanent crop, irrigated [natural resource, land]: 0.025 m2; lognormal variance with pedigree 0.0442144, pedigree (2,1,4,1,1)
  10000 m2 divided by the life time of the perennial crop (20 years).

## Emissions to nature
- Copper, ion [water, surface water]: 3.4135e-7 kg; source Freiermuth R.  2006; lognormal variance with pedigree 0.356938, pedigree (2,2,4,1,1)
  Calculated value - Freiermuth (2006). See 'WFLDB-Guidelines.pdf', available at https://ecoquery.ecoinvent.org/File/Reports.
- Glyphosate [soil, agricultural]: 1.1228e-5 kg; lognormal variance with pedigree 0.0447216, pedigree (2,2,4,1,1)
  Calculated value - 100% emission in soil. See 'WFLDB-Guidelines.pdf', available at https://ecoquery.ecoinvent.org/File/Reports.
- Cadmium, ion [water, surface water]: 1.7438e-9 kg; source Freiermuth R.  2006; lognormal variance with pedigree 0.356938, pedigree (2,2,4,1,1)
  (same comment as for Copper, ion)
- Carbon dioxide, fossil [air, non-urban air or from high stacks]: 0.0001413 kg; lognormal variance with pedigree 0.0138498, pedigree (2,2,4,1,1)
  Calculated value - CO2 emissions from urea and lime. See 'WFLDB-Guidelines.pdf', available at https://ecoquery.ecoinvent.org/File/Reports.
- Chromium, ion [water, surface water]: 1.90295e-7 kg; source Freiermuth R.  2006; lognormal variance with pedigree 0.356938, pedigree (2,2,4,1,1)
  (same comment as for Copper, ion)
- Zinc [soil, agricultural]: -1.64928e-6 kg; = 3.0581e-06 + ( - 4.707381e-06)*heavyMetalUptakeSwitch; source Freiermuth R.  2006
  Comment on mathematicalRelation:
  -4.707381e-06 from Crop, default, heavy metals uptake model
  Heavy metal uptake can be excluded by setting the parameter heavyMetalUptakeSwitch to zero.
- Captan [soil, agricultural]: 0.000144 kg; lognormal variance with pedigree 0.0447216, pedigree (2,2,4,1,1)
  (same comment as for Glyphosate)
- Mercury [water, surface water]: 5.0405e-10 kg; source Freiermuth R.  2006; lognormal variance with pedigree 0.356938, pedigree (2,2,4,1,1)
  (same comment as for Copper, ion)
- 2,4-D [soil, agricultural]: 2.5452e-6 kg; lognormal variance with pedigree 0.0447216, pedigree (2,2,4,1,1)
  (same comment as for Glyphosate)
- Lead [water, surface water]: 3.34365e-8 kg; source Freiermuth R.  2006; lognormal variance with pedigree 0.356938, pedigree (2,2,4,1,1)
  (same comment as for Copper, ion)
- Iprodion [soil, agricultural]: 6.4875e-5 kg; lognormal variance with pedigree 0.0447216, pedigree (2,2,4,1,1)
  (same comment as for Glyphosate)
- Phosphate [water, ground-]: 9.232e-6 kg; source Prasuhn V.  2006; lognormal variance with pedigree 0.175866, pedigree (2,2,4,1,1)
  Calculated value - Prasuhn (2006). See 'WFLDB-Guidelines.pdf', available at https://ecoquery.ecoinvent.org/File/Reports.
- Phosphorus [water, surface water]: 5.826e-6 kg; source Prasuhn V.  2006; lognormal variance with pedigree 0.175866, pedigree (2,2,4,1,1)
  Calculated value - Prasuhn (2006) and SQCB-Erosion. See 'WFLDB-Guidelines.pdf', available at https://ecoquery.ecoinvent.org/File/Reports.
- Mercury [soil, agricultural]: 1.04377e-9 kg; = 7.0055e-09 + ( - 5.961732e-09)*heavyMetalUptakeSwitch; source Freiermuth R.  2006
  Comment on mathematicalRelation:
  7.0055e-09 from Calculated value - Freiermuth (2006). See 'WFLDB-Guidelines.pdf', available at https://ecoquery.ecoinvent.org/File/Reports.
  -5.961732e-09 from Crop, default, heavy metals uptake model
  Heavy metal uptake can be excluded by setting the parameter heavyMetalUptakeSwitch to zero.
- Copper [soil, agricultural]: 6.87258e-5 kg; = 6.97e-05 + ( - 9.741543e-07)*heavyMetalUptakeSwitch; source Freiermuth R.  2006
  Comment on mathematicalRelation:
  6.97e-05 from Calculated value - Freiermuth (2006). See 'WFLDB-Guidelines.pdf', available at https://ecoquery.ecoinvent.org/File/Reports.
  -9.741543e-07 from Crop, default, heavy metals uptake model
  Heavy metal uptake can be excluded by setting the parameter heavyMetalUptakeSwitch to zero.
- Nickel [soil, agricultural]: 2.23238e-8 kg; = 1.7588e-07 + ( - 1.535562e-07)*heavyMetalUptakeSwitch; source Freiermuth R.  2006
  Comment on mathematicalRelation:
  1.7588e-07 from Calculated value - Freiermuth (2006). See 'WFLDB-Guidelines.pdf', available at https://ecoquery.ecoinvent.org/File/Reports.
  -1.535562e-07 from Crop, default, heavy metals uptake model
  Heavy metal uptake can be excluded by setting the parameter heavyMetalUptakeSwitch to zero.
- Lead [soil, agricultural]: 5.26918e-8 kg; = 1.32185e-07 + ( - 7.949319e-08)*heavyMetalUptakeSwitch; source Freiermuth R.  2006
  Comment on mathematicalRelation:
  1.32185e-07 from Calculated value - Freiermuth (2006). See 'WFLDB-Guidelines.pdf', available at https://ecoquery.ecoinvent.org/File/Reports.
  -7.949319e-08 from Crop, default, heavy metals uptake model
  Heavy metal uptake can be excluded by setting the parameter heavyMetalUptakeSwitch to zero.
- Phosphate [water, surface water]: 4.0911e-5 kg; source Prasuhn V.  2006; lognormal variance with pedigree 0.175866, pedigree (2,2,4,1,1)
  (same comment as for Phosphate)
- Chromium [soil, agricultural]: -3.6356e-7 kg; = -2.83445e-07 + ( - 8.0115e-08)*heavyMetalUptakeSwitch; source Freiermuth R.  2006
  Comment on mathematicalRelation:
  -2.83445e-07 from Calculated value - Freiermuth (2006). See 'WFLDB-Guidelines.pdf', available at https://ecoquery.ecoinvent.org/File/Reports.
  -8.0115e-08 from Crop, default, heavy metals uptake model
  Heavy metal uptake can be excluded by setting the parameter heavyMetalUptakeSwitch to zero.
- Nickel, ion [water, ground-]: 2.9226e-11 kg; source Freiermuth R.  2006; lognormal variance with pedigree 0.356938, pedigree (2,2,4,1,1)
  (same comment as for Copper, ion)
- Dinitrogen monoxide [air, non-urban air or from high stacks]: 7.0297e-5 kg; source IPCC 2006; lognormal variance with pedigree 0.124664, pedigree (2,2,4,1,1)
  Calculated value - IPCC (2006). See 'WFLDB-Guidelines.pdf', available at https://ecoquery.ecoinvent.org/File/Reports.
- Cadmium [soil, agricultural]: 4.70236e-8 kg; = 6.195e-08 + ( - 1.492638e-08)*heavyMetalUptakeSwitch; source Freiermuth R.  2006
  Comment on mathematicalRelation:
  6.195e-08 from Calculated value - Freiermuth (2006). See 'WFLDB-Guidelines.pdf', available at https://ecoquery.ecoinvent.org/File/Reports.
  -1.492638e-08 from Crop, default, heavy metals uptake model
  Heavy metal uptake can be excluded by setting the parameter heavyMetalUptakeSwitch to zero.
- Water [water, ground-]: 0.0046711 m3; lognormal variance with pedigree 0.124177, pedigree (2,1,4,1,1)
  Calculated value - Emission calculated from water balance. See 'WFLDB-Guidelines.pdf', available at https://ecoquery.ecoinvent.org/File/Reports.
- Water [air, non-urban air or from high stacks]: 0.09957 m3; lognormal variance with pedigree 0.124177, pedigree (2,1,4,1,1)
  (same comment as for Water)
- Mercury [water, ground-]: 1.59835e-10 kg; source Freiermuth R.  2006; lognormal variance with pedigree 0.356938, pedigree (2,2,4,1,1)
  (same comment as for Copper, ion)
- Nitrogen oxides [air, non-urban air or from high stacks]: 0.00012908 kg; source EEA 2013; lognormal variance with pedigree 0.124664, pedigree (2,2,4,1,1)
  Calculated value - EEA/EMEP (2013). See 'WFLDB-Guidelines.pdf', available at https://ecoquery.ecoinvent.org/File/Reports.
- Zinc, ion [water, ground-]: 7.9005e-7 kg; source Freiermuth R.  2006; lognormal variance with pedigree 0.356938, pedigree (2,2,4,1,1)
  (same comment as for Copper, ion)
- Lead [water, ground-]: 4.6313e-9 kg; source Freiermuth R.  2006; lognormal variance with pedigree 0.356938, pedigree (2,2,4,1,1)
  (same comment as for Copper, ion)
- Ammonia [air, non-urban air or from high stacks]: 0.0009463 kg; source EEA 2013; lognormal variance with pedigree 0.0447216, pedigree (2,2,4,1,1)
  Calculated value - EMEP/EEA (2013). See 'WFLDB-Guidelines.pdf', available at https://ecoquery.ecoinvent.org/File/Reports.
- Chromium, ion [water, ground-]: 8.58e-7 kg; source Freiermuth R.  2006; lognormal variance with pedigree 0.356938, pedigree (2,2,4,1,1)
  (same comment as for Copper, ion)
- Copper, ion [water, ground-]: 1.80175e-7 kg; source Freiermuth R.  2006; lognormal variance with pedigree 0.356938, pedigree (2,2,4,1,1)
  (same comment as for Copper, ion)
- Water [water, surface water]: 0.0186845 m3; lognormal variance with pedigree 0.124177, pedigree (2,1,4,1,1)
  (same comment as for Water)
- Nickel, ion [water, surface water]: 1.1053e-7 kg; source Freiermuth R.  2006; lognormal variance with pedigree 0.356938, pedigree (2,2,4,1,1)
  (same comment as for Copper, ion)
- Zinc, ion [water, surface water]: 2.93465e-7 kg; source Freiermuth R.  2006; lognormal variance with pedigree 0.356938, pedigree (2,2,4,1,1)
  (same comment as for Copper, ion)
- Cadmium, ion [water, ground-]: 1.63235e-9 kg; source Freiermuth R.  2006; lognormal variance with pedigree 0.356938, pedigree (2,2,4,1,1)
  (same comment as for Copper, ion)
- Indoxacarb [soil, agricultural]: 5.01e-6 kg; lognormal variance with pedigree 0.0447216, pedigree (2,2,4,1,1)
  (same comment as for Glyphosate)

## Sampling procedure
WFLDB Methodological Guidelines for the Life Cycle Inventory of Agricultural Products in the latest version, available at: http://www.quantis-intl.com/microsites/wfldb. Data sources: Data were categorised from level 0 (L0) to level (L4) as follows: L0 = estimate, proxy; L1 = statistical data (e.g. FAOSTAT); L2 = L1 adapted to crop and country; L3 = literature data or L1 resp. L2 data approved by experts; medium detailing (e.g. kg of total N-fertiliser); L4 = L3 data of higher detailing as L3 data (e.g. kg of a specific N-fertiliser such as Ammonium-Nitrate or Urea).In this dataset data were obtained for yield: L3; Fertilisers: L4; Pesticides: L4; Machinery: L4; Irrigation: L3. For information regarding the calculation of individual exchanges see supporting documentation WFLDB-Documentation.pdf.

## Extrapolations
This dataset has been extrapolated from year 2012 to the year of the calculation (2021). The uncertainty has been adjusted accordingly.

## Review by Assumpció ANTON 2016-05-30
Be aware that the use of statistics in input calculations could provide some specific inputs not common for specific crops, this should be corrected if better information is available and better reflexed in DQR . Currently, I would dissent for some of good marks provided, being a revision of criteria applied advisable.

Pesticides will need to be amended periodically checking for update of pesticides' ban.
