# milk production, from cow

Dataset: EcoSpold 2, unit process
Geography: ZA
Time period: 2016-01-01 to 2021-12-31
Technology level: current
Classification: ISIC rev.4 ecoinvent: 0141:Raising of cattle and buffaloes
Scenario: Business-as-Usual
System model: Allocation, cut-off by classification
Generated by: Philippa Notten
Published in: Russo, V, 2017
Database: ecoinvent
isCopyrightProtected: true
accessRestrictedTo: 1

## General comment
This dataset represents the production of average milk from dairy cows in South Africa. The activity includes the consumption of feed, the production of feed (silage) and pasture where this is produced on site, the operation of cattle housing systems for the management of the dairy herd and the production of cow milk. The functional unit is 1 kg of Fat and Protein Corrected Milk (FPCM) raw milk from dairy farms. The FPCM correction is made for a conversion to a 4.0% fat and 3.3% true protein content, following the equation provided by the International Dairy Federation (IDF): FPCM (kg/yr) = Production (kg/yr) x [0.1226 x Fat% + 0.0776 x Protein% + 0.2534]. Live animals sold for slaughter (cull cows - cows slaughtered when no longer productive - and male calves) are by-products of the milk system, as are solid and liquid manure.
This dataset does not cover organic milk production.
Pasture-based system: 90% of manure is generated on pasture during grazing and is thus not collected, with the remaining 10% collected in slurry and stored prior to treatment. Total-mixed ration (TMR) system: 35% of manure is generated on pasture during grazing and is thus not collected, about 44% of the manure is managed as solid manure and the remainder is managed as liquid manure.

## Included activities start
This activity starts from the reception and storage of feed materials, and dairy herd housing.

## Included activities end
This activity ends with the provision of milk at the farm gate, ready for delivery. The dataset includes the consumption of feed; the production of pasture and feed (sliage) taking place on-site; the livestock management operations (including bedding, drinking water, milking equipment, cleaning products and water), methane emissions from enteric fermentation and manure management emissions (methane, ammonia and nitrous oxide); emissions from the application of synthetic fertilisers in pasture and silage production (ammonia, nitrous oxide, nitrates and phosphates); energy and buildings (including electricity used in cattle housing and milk parlour equipment, and diesel for regular operations). The dataset does not include fodder and feed production and processing into meal for animals where this takes place off site; nor milk transportation beyond the farm gate (e.g. to dairy processing plants). The dataset does not include the emissions associated with using the manure as a fertiliser on the farms (this is because manure is modelled as a by-product in the ecoinvent datasets, even though it is used in the growing of pasture in most South African dairy operations). Also, the dataset does not include particulate matter emissions, nor any drugs used on the dairy farm.

## Geography
South African values: not applicable worldwide. The dairy system is South Africa is modelled as 48% of milk produced via total-mixed ration (TMR) intensive production systems and 52% produced via pasture-based systems.

## Technology
Data and assumptions are intended to reflect current equipment, processes, and market conditions.

## Time period
The production volume data are from Milk Producers Organisation (MPO) data for 2016. 2016 is therefore taken as the reference year. National herd statistics and dependent emissions (methane and nitrous oxide) are from the latest national GHG inventory (2012), whilst farm data is circa 2010.

## Parameters
- fraction, process water, to air: 0.15 dimensionless; name fraction_PW_to_air
  Literature value. In case when no industry/process specific data are available, default evaporation fraction value is used. This value is 15% and is based on literature (Statistics Canada, 2007 & Shaffer, K.H., 2008, Consumptive water use in the Great Lakes Basin, USGS & Shiklomanov, 2003, World Water Resources at the Beginning of the 21st Century) and has been approved by an expert.

## Reference product
- cow milk: 1 kg; name milk_output; By-product classification allocatable product; CPC 02211: Raw milk of cattle
  kg of Fat and Protein Corrected Milk. FPCM is 4.0% fat and 3.3% true protein content. Conversion to FPCM is as follow, according to the International Dairy Federation: FPCM (kg/yr) = Production (kg/yr) x [0.1226 x Fat% + 0.0776 x Protein% + 0.2534]. Raw milk density: 1031 kg/m3
  production volume 3.15484e9 kg; name ref_product_PV
    2016 production volume of raw milk, 3158 thousand tonnes (MPO, 2017), corrected to fat and protein content of 4% and 3.3%, respectively based on FAO method (2013). Reference(s): MPO (2017) Lactodata Vol. 20 No. 2 November 2017, Milk Producers' Organisation, Available at: http://www.milksa.co.za/sites/default/files/LAC004%20Nov%202017.pdf. (Accessed October 2017); FAO (2013) Greenhouse Gas Emissions from Ruminant Supply Chains - A Global Life Cycle Assessment, Food and Agricultural Organisation of the United Nations, Available at: http://www.fao.org/docrep/018/i3461e/i3461e.pdf. (Accessed October 2017).
  property water in wet mass 0.8769 kg; name WWM_milk
  property energy content 2.615 MJ
    as gross calorific value (when relevant). Composition data obtained from the Canadian Nutrient Database 2010 ((http://webprod3.hc-sc.gc.ca/cnf-fce/index-eng.jsp), Food Code 123: Milk, fluid, whole, producer, 3.7% M.F.
  property carbon content, non-fossil 0.53797
    biogene carbon content on a dry matter basis.
    Composition data obtained from the Canadian Nutrient Database 2010 ((http://webprod3.hc-sc.gc.ca/cnf-fce/index-eng.jsp), Food Code 123: Milk, fluid, whole, producer, 3.7% M.F. First, composition data were refered to 1 kg dry mass. Then, C-contents were calculated considering a C-content/dry mass of 46% in carbohydrates, 53% in proteins and 75% in fats. All data from "Evolutionary and Biochemical Aspects", A.D. Kay and T. Vrede (in Global Ecology, 2010, Elsevier B.V., S.E. Jørgensen Ed.). Note that these figures are approximative for milk constituents. Finally, C-content in kg was multiplied by kg dry mass in the exchange.
  property price 0.349 EUR2005
    Calculated based on data from FAOSTAT (accessed 20140428). The price is calculated as a weighted average (by yearly production) of prices of "Milk, whole fresh cow" for all the countries in the world where data for both price and production volume are available. The Producer Prices -Annual from the year 2005. Using the same calculation and data the price in 2010 was 458.7 Euro.
  property carbon content 0.53797
    carbon content on a dry matter basis (reserved; not for manual entry)
  property true value 0.349; name milk_output_true_value
    allocation property applied in "true value" allocation // value calculated from revenue
  properties: dry mass 0.1231 kg, carbon content, fossil 0, wet mass 1 kg, water content 7.12348, carbon allocation 0.0662241 kg

## By-products
- cattle for slaughtering, live weight: 0 kg; name cattle_byproduct; CPC 02111: Cattle; By-product classification allocatable product; pedigree (1,1,1,1,1)
  Culled cows, surplus heifers and calves sold for slaughter.
  production volume 9.39827e7 kg; = cattle_byproduct*ref_product_PV
    Calculated from production volume of reference product using the relative outputs.
  property price 2.8 EUR2005
    Current price for A Grade cattle (feedlot) is R 48/kg and for C Grade (cull cows) R 41/kg. Suggested price [7]: 2.8 /kg. Source: http://www.mpo.co.za/wp-content/uploads/2018/04/Agri-Trends-23-April-2018-GrainsOilseedsLlivestock-Fibre-.pdf
  property true value 0.083412; name cattle_byproduct_true_value
    allocation property applied in "true value" allocation // value calculated from revenue
- manure, solid, cattle: 0 kg; CPC 34654: Excreta of animals useful for manure/fertilizer and fuel preparation; By-product classification Recyclable; pedigree (1,1,1,1,1)
  Solid manure generated excluding that left on pasture during grazing (60% of total manure). Calculated from number of animals and a manure generation rate of 7.7 tonnes/(head.year) for dairy cattle, based on the manure generated in pens and total heads of dairy in South Africa (DEA, 2017). These figures are based on manure management practices at representative operations in the region for intensive and pasture based operations. Reference(s): DEA (2017) Unlocking Barriers and Opportunities for Land-use Based Climate-Change Mitigation Activities in South Africa, Department of Environmental Affairs of South Africa, Available at: https://www.environment.gov.za/sites/default/files/reports/unlockingbarriers_land-usebasedclimatechangemitigation.pdf. (Accessed September 2017).
  production volume 0 kg; = manure_solid_byproduct*ref_product_PV
    Calculated from production volume of reference product using the relative outputs.
  property water in wet mass 0.8285 kg; name WWM_manure_liquid
  property price 0.0042 EUR2005
    World market value of manure, deflated with barley world market price and consumer price index, based on [http://www.gov.pe.ca/photos/original/af_NM_manconv.pdf].
  property carbon content 0.441
    carbon content on a dry matter basis (reserved; not for manual entry)
  properties: water content 4.8309, carbon content, non-fossil 0.441, nitrogen content 0.0277, carbon content, fossil 0, wet mass 1 kg, dry mass 0.1715 kg, carbon allocation 0.0756315 kg
- manure, liquid, cattle: 0 kg; CPC 34654: Excreta of animals useful for manure/fertilizer and fuel preparation; By-product classification Recyclable; pedigree (1,1,1,1,1)
  Liquid/slurry manure generated. Assumed to be 10% of the total manure generated (excluding manure generated on pasture). Manure generated in milking parlour assumed to be liquid (washed down) whilst remainder (90%) accumulated in deep bedding system.
  production volume 0 kg; = manure_liquid_byproduct*ref_product_PV
    Calculated from production volume of reference product using the relative outputs.
  property water in wet mass 0.928 kg; name WWM_manure_solid
  property price 0.0042 EUR2005
    (same comment as for manure, solid, cattle)
  property carbon content 0.68
    carbon content on a dry matter basis (reserved; not for manual entry)
  properties: carbon content, non-fossil 0.68, dry mass 0.072 kg, nitrogen content 0.04306, water content 12.8889, wet mass 1 kg, carbon content, fossil 0, carbon allocation 0.04896 kg

## Inputs from technosphere
- limestone, crushed, washed: 0.00397901 kg; lognormal variance with pedigree 0.0067, pedigree (3,2,3,5,1)
  Feedlime (finely ground limestone) as calcium supplementation for cattle either in dairy concentrate or in mineral packs.
  properties: water content 0.00200401, wet mass 1 kg, dry mass 0.998 kg, carbon content, fossil 0.117257
  note on carbon content, fossil: Table 3.1, ecoinvent v2.2 report 7, part VII, pg 3. MW CaCO3=100, MW MgCO3=84. C content of limestone is 0.117257 kg/kg DM
- diesel, burned in agricultural machinery: 0.355124 MJ; lognormal variance with pedigree 0.0113, pedigree (3,3,4,3,1)
  Average diesel use on dairy farms, primarily for feed operations (sample of five farms).
- magnesium oxide: 0.000443905 kg; lognormal variance with pedigree 0.0067, pedigree (3,2,3,5,1)
  Magnesium oxide for animal supplementation, either in dairy concentrate or in mineral packs.
  properties: wet mass 1 kg, dry mass 1 kg
- alfalfa-grass silage: 0.0574414 kg; lognormal variance with pedigree 0.0047, pedigree (1,2,3,5,1)
  Alfalfa (lucerne) is fed in intensive systems. On the extensive farms grass or maize silage is grown on the farm (i.e. it is not represented as a feed input to the system)
  properties: carbon content, non-fossil 0.484, water content 1.1739, wet mass 2.1739 kg, energy content 18.55 MJ, dry mass 1 kg
- inorganic potassium fertiliser, as K2O: 0.00101695 kg; lognormal variance with pedigree 0.0113, pedigree (3,3,4,3,1)
  Average potassium fertiliser used for cultivating pasture and growing silage.
  properties: dry mass 1 kg, wet mass 1 kg
- straw: 0.064221 kg; lognormal variance with pedigree 0.0053, pedigree (2,2,3,5,1)
  wheat straw, fed in intensive systems only.
  properties: carbon content, non-fossil 0.437377, wet mass 1 kg, dry mass 0.85 kg, water content 0.176471, heating value, net 14.25 MJ
  note on heating value, net: Literature value, Source: Phyllis2, database for (treated) biomass, algae, feedstocks for biogas production and biochar, https://phyllis.nl/Biomass/View/1271, ECN.TNO
- electricity, low voltage: 0.0846649 kWh; lognormal variance with pedigree 0.0113, pedigree (3,3,4,3,1)
  Average electricity use on dairy farms for milking, housing and feed operations (sample of five farms). Extensive farms irrigating pasture have the highest electricity use (0.15 kWh/kg FPCM), whilst intensive farms have lower electricity use (average of 0.07 kWh/kg FPCM).
- sodium chloride, powder: 0.00132365 kg; lognormal variance with pedigree 0.0067, pedigree (3,2,3,5,1)
  Salt in dairy concentrate and/or mineral pack supplements to cattle
  properties: wet mass 1 kg, dry mass 1 kg
- soybean, feed: 0.0281113 kg; lognormal variance with pedigree 0.0047, pedigree (1,2,3,5,1)
  Soya oilcake in diary concentrate (pellets) or as direct feed component
  properties: dry mass 0.89 kg, water content 0.1236, wet mass 1 kg, carbon content, non-fossil 0.52451
- rape meal: 0.0113236 kg; lognormal variance with pedigree 0.0098, pedigree (2,3,4,1,1)
  Oilcake (canola (rapeseed) and/or soya) makes up approximately 10% of diary feed concentrate (pellets)
  properties: carbon content, non-fossil 0.457233, wet mass 1 kg, dry mass 0.9 kg, water content 0.111111
- wood chips, dry, measured as dry mass: 0.0460537 kg; lognormal variance with pedigree 0.0053, pedigree (2,2,3,5,1)
  Generic value taken from ecoinvent dataset "milk production, from cow, GLO" (i.e. not specific to South Africa). Comment from "milk production, from cow, GLO": 650 kg dried wood chips (wet mass) per dairy cow per year is used for animal litter. Sawdust may also be used. The division by 1.4 is to add up to the wet mass of the exchange.
  properties: dry mass 1 kg, water content 0.4, heating value, net 9.99 MJ, wet mass 1.4 kg, carbon content, non-fossil 0.494
  note on carbon content, non-fossil: C content of dry mass is 0.494 kgC/kg dry wood (ecoinvent v2.2 report 9).
- operation, housing system, cattle, tied, per animal unit: 0.000115489 unit; lognormal variance with pedigree 0.004, pedigree (1,1,3,5,1)
  Generic value taken from ecoinvent dataset "milk production, from cow, GLO" (i.e. not specific to South Africa). Comment from "milk production, from cow, GLO": considering the whole herd of the dairy farm, in livestock unit, and total milk produced over the year
  Uncertainty: math relation
- wheat bran: 0.0377562 kg; lognormal variance with pedigree 0.0098, pedigree (2,3,4,1,1)
  Wheat bran, a by-product from flour production for human consumption, makes up 20% of dairy concentrate feed (2nd highest component of feed after maize).
  properties: dry mass 0.87 kg, wet mass 1 kg, water content 0.149425, carbon content, non-fossil 0.475
  note on carbon content, non-fossil: Assumed carbon content, on a dry mass basis according to FAOSTAT. Reference: http://www.fao.org/forestry/17111/en
- operation, housing system, cattle, loose, per animal unit: 1.1703e-5 unit; lognormal variance with pedigree 0.004, pedigree (1,1,3,5,1)
  (same comment as for operation, housing system, cattle, tied, per animal unit)
- maize grain, feed: 0.271541 kg; lognormal variance with pedigree 0.0047, pedigree (1,2,3,5,1)
  Maize grain is the primary component of dairy concentrate (66% by mass), and is also fed directly to cattle
  properties: carbon content, non-fossil 0.46957, dry mass 0.86 kg, water content 0.162791, wet mass 1 kg
- urea: 0.00190329 kg; lognormal variance with pedigree 0.0098, pedigree (2,3,4,1,1)
  The exchange has been updated from 'urea, as N' into 'urea' and therefore its amount has been scaled (multiplied) from 0.0011 kg by 2.1438 kg of 'urea' per kg of 'urea, as N'. Original comment of the exchange is: Urea is a component of dairy concentrate and/or mineral pack supplements to cattle
  properties: carbon content, fossil 0.2, wet mass 1 kg, dry mass 1 kg
- inorganic nitrogen fertiliser, as N: 0.00736076 kg; lognormal variance with pedigree 0.0113, pedigree (3,3,4,3,1)
  Average nitrate fertiliser used for cultivating pasture and growing silage.
  properties: wet mass 1 kg, dry mass 1 kg
- barley grain, feed: 0.0197417 kg; lognormal variance with pedigree 0.0067, pedigree (3,2,3,5,1)
  Brewers' grain is occasionally a feed component (as on one of the sample farms) where an appropriate source is available.
  properties: water content 0.16279, dry mass 0.86 kg, wet mass 1 kg, carbon content, non-fossil 0.46538
- inorganic phosphorus fertiliser, as P2O5: 0.00245359 kg; lognormal variance with pedigree 0.0113, pedigree (3,3,4,3,1)
  Average phosphate fertiliser used for cultivating pasture and growing silage.
  properties: wet mass 1 kg, dry mass 1 kg
- manure, solid, cattle: -1.25101 kg; lognormal variance with pedigree 0.0161, pedigree (3,2,4,5,1)
  (same comment as for manure, solid, cattle)
  production volume 4.89001e9 kg
  properties: water content 4.8309, carbon content, non-fossil 0.441, nitrogen content 0.0277, wet mass 1 kg, price 0.0042 EUR2005, dry mass 0.1715 kg
- manure, liquid, cattle: -0.138821 kg; lognormal variance with pedigree 0.0161, pedigree (3,2,4,5,1)
  (same comment as for manure, liquid, cattle)
  production volume 5.42633e8 kg
  properties: carbon content, non-fossil 0.68, dry mass 0.072 kg, nitrogen content 0.04306, water content 12.8889, wet mass 1 kg, price 0.0042 EUR2005

## Inputs from nature
- Occupation, grassland, natural, for livestock grazing [natural resource, land]: 7.81273 m2*year; lognormal variance with pedigree 0.0127, pedigree (3,3,4,3,1)
  On the dairy farms, pasture is predominantly cultivated (70% in the extensive systems and 100% in the intensive systems). A nominal farm life of 30 years is assumed.
- Water, unspecified natural origin [natural resource, in ground]: 0.120258 m3; name water_input; lognormal variance with pedigree 0.0098, pedigree (2,3,4,1,1)
  Water used during milking (washing, sluicing), watering cows and irrigating pastures. Estimate based on an average of the water requirement data reported by representative farm(s) in the region.
- Occupation, pasture, man made [natural resource, land]: 14.2292 m2*year; lognormal variance with pedigree 0.0127, pedigree (3,3,4,3,1)
  (same comment as for Occupation, grassland, natural, for livestock grazing)
- Transformation, to grassland, natural, for livestock grazing [natural resource, land]: 0.258272 m2; lognormal variance with pedigree 0.0187, pedigree (3,3,4,3,1)
  On the dairy farms, pasture is predominantly cultivated (70% in the extensive systems and 100% in the intensive systems).
- Transformation, to pasture, man made [natural resource, land]: 0.476189 m2; lognormal variance with pedigree 0.0187, pedigree (3,3,4,3,1)
  (same comment as for Transformation, to grassland, natural, for livestock grazing)
- Transformation, from grassland, natural (non-use) [natural resource, land]: 0.734462 m2; lognormal variance with pedigree 0.0192, pedigree (3,3,4,4,1)
  Total land use on farm, both cultivated and natural. Stocking rate varies from 0.5 to 3 heads/ha in extensive farms, and 3 to 10 heads/ha in intensive farms. Pre-farm land is assumed to be grassland, although this is a simplification.

## Emissions to nature
- Methane, non-fossil [air, non-urban air or from high stacks]: 0.0140436 kg; source du Toit C.J.L. 2013; lognormal variance with pedigree 0.0201, pedigree (3,2,4,5,1)
  Methane emissions from enteric fermentation from lactating cows, heifers ad calves, and from manure management. Value is from Du Toit et al. (2013) for the national dairy herd across all age groups (cattle numbers for 2010). The values of Du Toit et al (2013) are used as they are representative of South African dairy production as a whole and are applied in South Africa's national GHG reporting. Direct methane emissions for South African dairy cattle are estimated using the Tier 2 methodology of the Intergovernmental Panel on Climate Change (IPCC), but adapted for tropical production systems. Full details available in the publication: du Toit C.J.L., Meissner H.H. and van Niekerk W.A. (2013) Direct Methane and Nitrous Oxide Emissions of South African Dairy and Beef Cattle, South African Journal of Animal Science, Volume 43 (3), pp 320-339.
- Nitrate [water, unspecified]: 0.00225988 kg; lognormal variance with pedigree 0.0567, pedigree (4,3,4,3,1)
  Nitrate emissions from synthetic fertilisers applied to cultivated field. Estimated as 0.3 kg N / kg N additions on irrigated fields only (IPCC 2006)
- Ammonia [air, non-urban air or from high stacks]: 0.00447941 kg; lognormal variance with pedigree 0.0201, pedigree (3,2,4,5,1)
  Ammonia emissions due to volatilisation from manure management are estimated at 21 and 10 kg NH3 per head per year for milking cows and heifers, respectively, using the Tier 2 methodology of the Intergovernmental Panel on Climate Change (IPCC) with factors for tropical production systems. Ammonia emissions from synthetic fertiliser application is estimated at 1.02 tonnes N2O per year and is very farm specific depending on the degree of cultivated pasture and fertiliser applied. Range across five farms is from zero to 6.9 tonnes NH3 per year, calculated using farm-specific fertiliser application rates and with emissions estimated using the Tier 2 methodology of the Intergovernmental Panel on Climate Change (IPCC).
- Water [air, unspecified]: 0.0175259 m3; = (water_input-((milk_output*WWM_milk)+((50-18)/18)+(manure_solid_byproduct*WWM_manure_solid)+(manure_liquid_byproduct*WWM_manure_liquid))/1000)*fraction_PW_to_air
  Cattle drinking water is modelled as emitted to air, after accounting for water in milk (assuming cattle consume 50 liters water per head per day and produce18 litres of milk per head per day). For the remaining water(wash water), 15% is assumed to evaporate, with the balance to surface run-off.
- Water [water, surface water]: 0.0993135 m3; = (water_input-((milk_output*WWM_milk)+((50-18)/18)+(manure_solid_byproduct*WWM_manure_solid)+(manure_liquid_byproduct*WWM_manure_liquid))/1000)*(1-fraction_PW_to_air)
  (same comment as for Water)
- Phosphate [water, unspecified]: 0.000250201 kg; lognormal variance with pedigree 0.0887, pedigree (5,3,4,3,1)
  Phosphate emissions from synthetic fertilisers applied to cultivated field. Estimated as 0.3 kg P / kg P additions on irrigated fields only
- Dinitrogen monoxide [air, non-urban air or from high stacks]: 0.000282485 kg; source du Toit C.J.L. 2013; lognormal variance with pedigree 0.0551, pedigree (3,2,4,5,4)
  Direct and indirect emissions from manure management are estimated at 0.22 and 0.61 kg N2O per head per year, respectively, using the Tier 2 methodology of the Intergovernmental Panel on Climate Change (IPCC) with factors for tropical production systems. Value is from Du Toit et al. (2013) for the national dairy herd across all age groups (cattle numbers for 2010). Direct and indirect nitrous oxide emissions from synthetic fertiliser application is estimated at 3.3 tonnes NH3 per year and is very farm specific depending on the degree of cultivated pasture and fertiliser applied. Range across five farms is from zero to 6.9 tonnes NH3 per year, calculated using farm-specific fertiliser application rates and with emissions estimated using the Tier 2 methodology of the Intergovernmental Panel on Climate Change (IPCC). Reference: du Toit C.J.L., Meissner H.H. and van Niekerk W.A. (2013) Direct Methane and Nitrous Oxide Emissions of South African Dairy and Beef Cattle, South African Journal of Animal Science, Volume 43 (3), pp 320-339.

## Sampling procedure
The inventory data is primarily from five farms in the Western Cape for the 2008/2009 production year, and supplemented with data from literature and expert knowledge, where necessary. The Western Cape is responsible for about 27% of the total milk produced in South Africa, second only to the Eastern Cape in 2014 (DAFF, 2015b). The coastal areas in South Africa, including the Western Cape itself, accounted for 82% of the total production due to the more suitable climate for dairy farming, with mild temperatures and good rainfall ensuring good quality natural and artificial pastures (DAFF, 2015b). Although the sample size is small, the five farms represent a reasonable cross section of farming practices in the Western Cape which encompass different farming approaches (i.e. intensive stall based systems and pasture based systems), a range in farm sizes and a range of geographical areas within the Western Cape Province. Academic publications (Banga et al., 2014, Du Toit et al., 2013) provided further information, such as that on enteric fermentation, conception rates, culling practices etc. Emissions from the agricultural process estimated according to Nemecek and Schnetzer (2011) and other references cited where appropriate. Reference(s): DAFF (2015) A profile of the South African dairy market value chain 2015. Available at: http://www.nda.agric.za/doaDev/sideMenu/Marketing/Annual%20Publications/Commodity%20Profiles/field%20crops/Dairy%20market%20value%20chain%20profile%202015.pdf; du Toit C.J.L., Meissner H.H. and van Niekerk W.A. (2013) Direct Methane and Nitrous Oxide Emissions of South African Dairy and Beef Cattle, South African Journal of Animal Science, Volume 43 (3), pp 320-339.; Nemecek and Schnetzer (2011) Methods of Assessment of Direct Field Emissions for LCIs of Agricultural Production Systems, Life cycle inventories of Swiss and European agricultural production systems; IPCC (2006). IPCC Guidelines for national greenhouse gas inventories‚ Prepared by the National Greenhouse Gas Inventories Programme.
