# jute production, irrigated

Dataset: EcoSpold 2, unit process
Geography: IN
Time period: 2015-12-15 to 2021-12-15
Technology level: current
Classification: EcoSpold01Categories: agricultural production/plant production
Classification: ISIC rev.4 ecoinvent: 0116:Growing of fibre crops
Scenario: Business-as-Usual
System model: Allocation, cut-off by classification
Generated by: Madhuri Nigam
Published in: Faist Emmenegger, M. 2018
Database: ecoinvent
isCopyrightProtected: true
accessRestrictedTo: 1

## General comment
Jute farming activity in India starts right after the harvest of the previous non-jute crops in the field. Jute farming covers soil preparation (fall tillage), inputs of seeds, application of mineral fertilizers, jute plant harvesting. Two species of jute viz., Corchorus capsularis, known as white jute and Corchorus olitorius known as tossa/deshi jute belonging to the family Sparrmanniaceae, are being cultivated for fibre purpose. Jute is generally sown in February on lowlands and in March-May on uplands. The crop is harvested in about 110 days, but different varieties take different time to mature. The harvesting period generally ranges from July till October.
Jute cultivation does not involve heavy doses of pesticides, however for better crop, manuring with farm yard manure and fertilizers is recommended. Usually, Jute crop can be grown in rain-fed and irrigated conditions both, but in irrigated condition, higher production can be obtained.
The dataset represents the production of 1 kg of jute plant in India in 2016. The farm has a yield of 40,000 kg fresh green matter per ha for this crop cycle. Mineral NPK fertilizer input is 80-40-40 kg/ha. Organic fertilizer applied amounts to 5,000 kg/ha of manure from cattle dung. The activity covers soil preparation (fall tillage), inputs of seeds, mineral fertilizers, harvesting. Machinery and fixed overhead are excluded.
This dataset covers only the field activities for the production of jute. That means the technical boundary ends at the harvesting of the mature jute plant. The transformation of jute from the jute plant - the jute retting process - is covered in a separate dataset.

## Included activities start
This activity starts right after the harvest of the previous crop. The soil is prepared for the jute cultivation.

## Included activities end
The activity ends at the harvesting of the mature jute plant.

## Technology
Cultivation of Jute from conventional production standards

## Time period
Soil cultivating date for main crop: 15 April 2016; Harvesting date main crop: 15 Aug, 2016. Total harvesting time is approx 110 days. Data is for one crop cycle. Cycle of one year considered for entry in ecoeditor

## Reference product
- jute plant, harvested: 1 kg; By-product classification allocatable product; CPC 01922: Jute, kenaf, and other textile bast fibres, raw or retted, except flax, true hemp and ramie
  The output of the jute cultivation activity. Mature jute plant s harvested. Jute is generally harvested when the plants are at early pod stage. The harvest index remains more or less constant over 60–105 day period following sowing. However, it reaches its peak during 110-120 day period following sowing.
  The plants are usually cut close to the ground by hand. A curved, sickle type knife is used to cut the plants. The plants are then sorted out according to height and diameter. The assorted plants are tied into bundles. Each bundle weighs 8-10 kg. The bundles are kept standing in the field for 3–4 days for defoliation.
  production volume 6.2784e8 kg; name PV_RP; = 3488000*180
    Data for year 2016-17. Source: http://texmin.nic.in/sites/default/files/finalrawjute_dec2016.pdf
  property price 0.362736 EUR2005
    Literature value. Price from FAOSTAT data Producer Prices - Annual (retrieved from: http://www.fao.org/faostat/en/#data/PP, accessed 15Feb2018). Data from 2005.
  properties: dry mass 0.177647 kg

## Inputs from technosphere
- lime: 0.00285138 kg; lognormal variance with pedigree 0.0126, pedigree (4,4,3,1,1)
  This exchange is an aggregation of amounts:
  0.0010405428165078095. Comment:
  0.0010405428165078095. Comment:
  7.702966714905932E-4. Comment:
  properties: wet mass 1 kg, carbon content, fossil 0.120005, dry mass 1 kg
- potassium sulfate: 8.9955e-6 kg; lognormal variance with pedigree 0.0126, pedigree (4,4,3,1,1)
  The exchange has been updated from 'potassium sulfate, as K2O' into 'potassium sulfate' and therefore its amount has been scaled (multiplied) from 0 kg by 1.85 kg of 'potassium sulfate' per kg of 'potassium sulfate, as K2O'. Original comment of the exchange is: Calculated Value. This value has been calculated by using the Ecoinvent LCI calculation tool for crop production.
  properties: dry mass 1 kg, wet mass 1 kg
- waste wood, untreated: -0.1575 kg; name wastewood; lognormal variance with pedigree 0.0046, pedigree (1,4,3,1,1)
  This exchange is an aggregation of amounts:
  0.1125. Comment: Sticks, Used in burning as fuel
  0.0075. Comment: seeds
  0.0375. Comment: leaves. Added to field itself during crop growth
  production volume 9.88848e7 kg; = PV_RP*wastewood
    Calculated from production volume of reference product using the relative outputs.
  property price 0 EUR2005; name wastewood_price_EUR2005
  properties: heating value, net 13.99 MJ
  note on heating value, net: Value taken from the general comment of the treatment dataset.
- inorganic potassium fertiliser, as K2O: 0.00029221 kg; lognormal variance with pedigree 0.0126, pedigree (4,4,3,1,1)
  Calculated Value. This value has been calculated by using the Ecoinvent LCI calculation tool for crop production.
  properties: wet mass 1 kg, dry mass 1 kg
- inorganic nitrogen fertiliser, as N: 0.0011925 kg; lognormal variance with pedigree 0.0046, pedigree (1,4,3,1,1)
  This exchange is an aggregation of amounts:
  7.94002417686234E-4. Comment:
  1.2144723120596059E-4. Comment:
  1.2144723120596059E-4. Comment:
  1.231525904104482E-4. Comment:
  3.1481232748329797E-6. Comment:
  2.93065224707486E-5. Comment:
  properties: wet mass 1 kg, dry mass 1 kg
- linseed seed, at farm: 0.00015 kg; lognormal variance with pedigree 0.0126, pedigree (4,4,3,1,1)
  data for jute seeds. kg/ha broadcast
  properties: wet mass 1 kg, dry mass 1 kg, carbon content, non-fossil 1
- benzimidazole-compound: 1.875e-5 kg; lognormal variance with pedigree 0.0126, pedigree (4,4,3,1,1)
  Calculated Value. This value has been calculated by using the ecoinvent LCI calculation tool for crop production.
  properties: dry mass 1 kg, wet mass 1 kg, carbon content, fossil 0.529668
- urea: 0.00170218 kg; lognormal variance with pedigree 0.0126, pedigree (4,4,3,1,1)
  The exchange has been updated from 'urea, as N' into 'urea' and therefore its amount has been scaled (multiplied) from 0.0008 kg by 2.1438 kg of 'urea' per kg of 'urea, as N'. Original comment of the exchange is: The data was collected for a hectare area through interview
  properties: wet mass 1 kg, carbon content, fossil 0.2, dry mass 1 kg
- packaging, for pesticides: 0.000175 kg; lognormal variance with pedigree 0.0532, pedigree (4,3,3,5,4)
  Total amount of active substance/s of pesticides needed for the production of jute plant, harvested is calculated to be circa 8.75E-05 kg. Pesticide/s used in this dataset is/are: '[thio]carbamate-compound', 'benzimidazole-compound', 'pendimethalin'. The total amount of active substance/s is doubled in order to account for the packaging of the dilluted product of pesticide/s that is/are applied. Therefore, 1.75E-04 kg of packaging for pesticides is justified with this exchange.
  properties: heating value, net 25.97 MJ, dry mass 1 kg, wet mass 1 kg, carbon content, fossil 0.85714, price 0.0642 EUR2005
- [thio]carbamate-compound: 1.875e-5 kg; lognormal variance with pedigree 0.0126, pedigree (4,4,3,1,1)
  The data was collected for a hectare area through interview
  properties: dry mass 1 kg, wet mass 1 kg, carbon content, fossil 0.626349
- ammonium nitrate: 4.03188e-7 kg; lognormal variance with pedigree 0.0126, pedigree (4,4,3,1,1)
  The exchange has been updated from 'ammonium nitrate, as N' into 'ammonium nitrate' and therefore its amount has been scaled (multiplied) from 0 kg by 2.8573 kg of 'ammonium nitrate' per kg of 'ammonium nitrate, as N'. Original comment of the exchange is: Calculated Value. This value has been calculated by using the Ecoinvent LCI calculation tool for crop production.
  properties: dry mass 1 kg, wet mass 1 kg
- potassium chloride: 0.00111266 kg; lognormal variance with pedigree 0.0126, pedigree (4,4,3,1,1)
  The exchange has been updated from 'potassium chloride, as K2O' into 'potassium chloride' and therefore its amount has been scaled (multiplied) from 0.0007 kg by 1.5829 kg of 'potassium chloride' per kg of 'potassium chloride, as K2O'. Original comment of the exchange is: Calculated Value. This value has been calculated by using the Ecoinvent LCI calculation tool for crop production.
  properties: wet mass 1 kg, dry mass 1 kg
- pendimethalin: 5e-5 kg; lognormal variance with pedigree 0.0046, pedigree (1,4,3,1,1)
  The data was collected for a hectare area through interview
  properties: wet mass 1 kg, dry mass 1 kg, carbon content, fossil 0.55516
- inorganic phosphorus fertiliser, as P2O5: 0.000999094 kg; lognormal variance with pedigree 0.0046, pedigree (1,4,3,1,1)
  This exchange is an aggregation of amounts:
  4.44211040383734E-6. Comment:
  8.163715852112509E-5. Comment:
  3.66667558656708E-4. Comment:
  3.66667558656708E-4. Comment:
  1.79679128882526E-4. Comment:
  properties: wet mass 1 kg, dry mass 1 kg
- phosphate rock, beneficiated: 2.83277e-6 kg; lognormal variance with pedigree 0.018, pedigree (4,4,3,1,1)
  The exchange has been updated from 'phosphate rock, as P2O5, beneficiated, dry' into 'phosphate rock, beneficiated' and therefore its amount has been scaled (multiplied) from 0 kg by 3.125 kg of 'phosphate rock, beneficiated' per kg of 'phosphate rock, as P2O5, beneficiated, dry'. Original comment of the exchange is: Calculated Value. This value has been calculated by using the Ecoinvent LCI calculation tool for crop production.
  properties: dry mass 1 kg, wet mass 1 kg
- ammonia, anhydrous, liquid: 1.7157e-7 kg; lognormal variance with pedigree 0.0126, pedigree (4,4,3,1,1)
  (same comment as for inorganic potassium fertiliser, as K2O)
  properties: wet mass 1 kg, dry mass 1 kg
- irrigation: 0.1105 m3; lognormal variance with pedigree 0.0046, pedigree (1,4,3,1,1)
  The data was collected for a hectare area through interview.
  properties: dry mass 0.11 kg, wet mass 1000 kg, water content 9089.91
- packaging, for fertilisers: 0.0137028 kg; lognormal variance with pedigree 0.0532, pedigree (4,3,3,5,4)
  Total amount of active substance/s of fertilisers needed for the production of 'jute plant, harvested' is calculated to be circa 6.85E-03 kg. Fertiliser/s used in this dataset is/are: 'ammonia, liquid', 'ammonium nitrate, as N', 'ammonium sulfate, as N', 'lime', 'nitrogen fertiliser, as N', 'phosphate fertiliser, as P2O5', 'phosphate rock, as P2O5, beneficiated, dry', 'potassium chloride, as K2O', 'potassium fertiliser, as K2O', 'potassium sulfate, as K2O', 'urea, as N'. The total amount of active substance/s is doubled in order to account for the packaging of the dilluted product of fertiliser/s that is/are applied. Therefore, 1.37E-02 kg of packaging for fertilisers is justified with this exchange.
  properties: wet mass 1 kg, dry mass 1 kg, heating value, net 25.01 MJ, carbon content, fossil 0.825301, price 0.0642 EUR2005
  note on carbon content, fossil: Considering a chemical formula (C2H4)n for polyethylene, carbon content-fossil is calculated to be 0.856286 kg of Carbon per kg of dry mass.
- manure, solid, cattle: 0.125 kg; lognormal variance with pedigree 0.0046, pedigree (1,4,3,1,1)
  The data was collected for a hectare area through interview
  properties: wet mass 1 kg, dry mass 0.22 kg, carbon content, non-fossil 0.441, water content 3.5454
- ammonium sulfate: 1.32113e-5 kg; lognormal variance with pedigree 0.0126, pedigree (4,4,3,1,1)
  (same comment as for inorganic potassium fertiliser, as K2O)
  properties: wet mass 1 kg, dry mass 1 kg
- tillage, harrowing, by rotary harrow: 3.85652e-5 ha; lognormal variance with pedigree 0.0126, pedigree (4,4,3,1,1)
  The data was collected for a hectare area through interview. The tillage activity was scaled based on the diesel used for tillage in the ecoinvent dataset and the diesel consumption data collected in the project

## Inputs from nature
- Energy, gross calorific value, in biomass [natural resource, biotic]: 11.25 MJ; lognormal variance with pedigree 0.0126, pedigree (4,4,3,1,1)
  The data was collected for a hectare area through interview
- Transformation, to annual crop, irrigated [natural resource, land]: 0.25 m2; lognormal variance with pedigree 0.02, pedigree (4,4,3,1,1)
  (same comment as for inorganic potassium fertiliser, as K2O)
- Transformation, from annual crop, irrigated [natural resource, land]: 0.25 m2; lognormal variance with pedigree 0.02, pedigree (4,4,3,1,1)
  (same comment as for inorganic potassium fertiliser, as K2O)
- Occupation, annual crop, irrigated [natural resource, land]: 0.166667 m2*year; lognormal variance with pedigree 0.014, pedigree (4,4,3,1,1)
  (same comment as for inorganic potassium fertiliser, as K2O)
- Carbon dioxide, in air [natural resource, in air]: 0.967346 kg; lognormal variance with pedigree 0.0126, pedigree (4,4,3,1,1)
  (same comment as for inorganic potassium fertiliser, as K2O)

## Emissions to nature
- Lead [water, ground-]: 2.64161e-9 kg; lognormal variance with pedigree 0.102, pedigree (4,4,3,1,1)
  (same comment as for inorganic potassium fertiliser, as K2O)
- Phosphorus [water, surface water]: 0.000110504 kg; lognormal variance with pedigree 0.052, pedigree (4,4,3,1,1)
  (same comment as for inorganic potassium fertiliser, as K2O)
- Phosphate [water, ground-]: 3.57722e-6 kg; lognormal variance with pedigree 0.052, pedigree (4,4,3,1,1)
  (same comment as for inorganic potassium fertiliser, as K2O)
- Copper, ion [water, ground-]: 4.81412e-8 kg; lognormal variance with pedigree 0.102, pedigree (4,4,3,1,1)
  (same comment as for inorganic potassium fertiliser, as K2O)
- Phosphate [water, surface water]: 1.0441e-5 kg; lognormal variance with pedigree 0.052, pedigree (4,4,3,1,1)
  (same comment as for inorganic potassium fertiliser, as K2O)
- Nitrogen oxides [air, non-urban air or from high stacks]: 0.000161753 kg; lognormal variance with pedigree 0.052, pedigree (4,4,3,1,1)
  (same comment as for inorganic potassium fertiliser, as K2O)
- Cadmium [soil, agricultural]: -2.94601e-8 kg
  (same comment as for inorganic potassium fertiliser, as K2O)
- Carbon dioxide, fossil [air, non-urban air or from high stacks]: 0.0032437 kg; lognormal variance with pedigree 0.0126, pedigree (4,4,3,1,1)
  (same comment as for inorganic potassium fertiliser, as K2O)
- Zinc, ion [water, ground-]: 2.26312e-7 kg; lognormal variance with pedigree 0.102, pedigree (4,4,3,1,1)
  (same comment as for inorganic potassium fertiliser, as K2O)
- Cadmium, ion [water, surface water]: 1.0551e-8 kg; lognormal variance with pedigree 0.14, pedigree (4,4,5,1,1)
  (same comment as for inorganic potassium fertiliser, as K2O)
- Zinc, ion [water, surface water]: 1.09765e-6 kg; lognormal variance with pedigree 0.102, pedigree (4,4,3,1,1)
  (same comment as for inorganic potassium fertiliser, as K2O)
- Dinitrogen monoxide [air, non-urban air or from high stacks]: 5.97876e-5 kg; lognormal variance with pedigree 0.042, pedigree (4,4,3,1,1)
  (same comment as for inorganic potassium fertiliser, as K2O)
- Lead [water, surface water]: 2.77039e-7 kg; lognormal variance with pedigree 0.102, pedigree (4,4,3,1,1)
  (same comment as for inorganic potassium fertiliser, as K2O)
- Ammonia [air, non-urban air or from high stacks]: 0.000420115 kg; lognormal variance with pedigree 0.02, pedigree (4,4,3,1,1)
  (same comment as for inorganic potassium fertiliser, as K2O)
- Cadmium, ion [water, ground-]: 6.81184e-10 kg; lognormal variance with pedigree 0.102, pedigree (4,4,3,1,1)
  (same comment as for inorganic potassium fertiliser, as K2O)
- Lead [soil, agricultural]: -5.74587e-7 kg
  (same comment as for inorganic potassium fertiliser, as K2O)
- Water [air, non-urban air or from high stacks]: 0.056355 m3; lognormal variance with pedigree 0.0126, pedigree (4,4,3,1,1)
  (same comment as for inorganic potassium fertiliser, as K2O)
- Nickel, ion [water, surface water]: 7.37768e-7 kg; lognormal variance with pedigree 0.102, pedigree (4,4,3,1,1)
  (same comment as for inorganic potassium fertiliser, as K2O)
- Copper [soil, agricultural]: -4.76135e-6 kg
  (same comment as for inorganic potassium fertiliser, as K2O)
- Chromium [soil, agricultural]: -9.39014e-7 kg
  (same comment as for inorganic potassium fertiliser, as K2O)
- Mercury [soil, agricultural]: -2.57192e-8 kg
  (same comment as for inorganic potassium fertiliser, as K2O)
- Copper, ion [water, surface water]: 8.67361e-7 kg; lognormal variance with pedigree 0.102, pedigree (4,4,3,1,1)
  (same comment as for inorganic potassium fertiliser, as K2O)
- Nickel [soil, agricultural]: -1.2841e-6 kg
  (same comment as for inorganic potassium fertiliser, as K2O)
- Carbofuran [soil, agricultural]: 1.875e-5 kg; lognormal variance with pedigree 0.037, pedigree (1,4,3,1,1)
  (same comment as for inorganic potassium fertiliser, as K2O)
- Chromium, ion [water, ground-]: 3.33076e-7 kg; lognormal variance with pedigree 0.102, pedigree (4,4,3,1,1)
  (same comment as for inorganic potassium fertiliser, as K2O)
- Zinc [soil, agricultural]: -2.01043e-5 kg
  (same comment as for inorganic potassium fertiliser, as K2O)
- Pendimethalin [soil, agricultural]: 5e-5 kg; lognormal variance with pedigree 0.037, pedigree (1,4,3,1,1)
  (same comment as for inorganic potassium fertiliser, as K2O)
- Water [water, ground-]: 0.043095 m3; lognormal variance with pedigree 0.0126, pedigree (4,4,3,1,1)
  (same comment as for inorganic potassium fertiliser, as K2O)
- Chromium, ion [water, surface water]: 1.22184e-6 kg; lognormal variance with pedigree 0.108, pedigree (4,5,3,1,1)
  (same comment as for inorganic potassium fertiliser, as K2O)
- Carbendazim [soil, agricultural]: 1.875e-5 kg; lognormal variance with pedigree 0.037, pedigree (1,4,3,1,1)
  (same comment as for inorganic potassium fertiliser, as K2O)
- Mercury [water, surface water]: 2.76255e-9 kg; lognormal variance with pedigree 0.102, pedigree (4,4,3,1,1)
  (same comment as for inorganic potassium fertiliser, as K2O)
- Water [water, surface water]: 0.01105 m3; lognormal variance with pedigree 0.0126, pedigree (4,4,3,1,1)
  (same comment as for inorganic potassium fertiliser, as K2O)
- Mercury [water, ground-]: 1.52455e-11 kg; lognormal variance with pedigree 0.102, pedigree (4,4,3,1,1)
  (same comment as for inorganic potassium fertiliser, as K2O)
- Nitrate [water, ground-]: 0.00456323 kg; lognormal variance with pedigree 0.052, pedigree (4,4,3,1,1)
  (same comment as for inorganic potassium fertiliser, as K2O)

## Sampling procedure
Focus group discussion, expert interviews, literature data and assumptions. Standardized questionnaires were developed and adapted to jute-specific cultivation and post-harvest situation. The secondary data from literature and the primary data from surveys were compared and matched to obtain highest data quality.

## Extrapolations
This dataset has been extrapolated from year 2016 to the year of the calculation (2021). The uncertainty has been adjusted accordingly.
