# soft solder production, Sn97Cu3

Dataset: EcoSpold 2, unit process
Geography: RER
Time period: 1995-01-01 to 2021-12-31
Technology level: current
Classification: ISIC rev.4 ecoinvent: 2029:Manufacture of other chemical products n.e.c.
Classification: EcoSpold01Categories: metals/extraction
Tags: ConvertedDataset
Scenario: Business-as-Usual
System model: Allocation, cut-off by classification
Generated by: Niels Jungbluth
Published in: Althaus H.-J. 2000
Database: ecoinvent
isCopyrightProtected: true
accessRestrictedTo: 1

## General comment
The inventory is meant to be used as a background dataset for technical processes using soft solder. The lead-free product investigated is Sn97Cu3 that is made from tin (97%) and copper (3%). The investigation is based on data provided by a producer and information from literature.
[This dataset was already contained in the ecoinvent database version 2. It was not individually updated during the transfer to ecoinvent version 3. Life Cycle Impact Assessment results may still have changed, as they are affected by changes in the supply chain, i.e. in other datasets. This dataset was generated following the ecoinvent quality guidelines for version 2. It may have been subject to central changes described in the ecoinvent version 3 change report (http://www.ecoinvent.org/database/ecoinvent-version-3/reports-of-changes/), and the results of the central updates were reviewed extensively. The changes added e.g. consistent water flows and other information throughout the database. The documentation of this dataset can be found in the ecoinvent reports of version 2, which are still available via the ecoinvent website. The change report linked above covers all central changes that were made during the conversion process.]

## Included activities end
Gate to gate including solder mixing and casting, atomisation and paste mixing, including estimate for emissions and infrastructure.

## Geography
Producer in Germany and literature data for Europe

## Technology
Production of lead-free soft solder from metals tin and copper.

## Time period
Time of publications. Most data for 2000.

## Parameters
- fraction, process water, to air: 0.15 dimensionless; name fraction_PW_to_air; lognormal variance with pedigree 0.092025, pedigree (4,4,3,2,4)
  Literature value. In case when no industry/process specific data are available, default evaporation fraction value is used. This value is 15% and is based on literature (Statistics Canada, 2007 & Shaffer, K.H., 2008, Consumptive water use in the Great Lakes Basin, USGS & Shiklomanov, 2003, World Water Resources at the Beginning of the 21st Century) and has been approved by an expert.
- fraction, tap water, to air: 0.15 dimensionless; name fraction_TW_to_air; = fraction_PW_to_air; lognormal variance with pedigree 0.092025, pedigree (4,4,3,2,4)
  Calculated value. See comment in the other parametres present in this dataset. Tap water is considered to be always used as process water, thus process water fractions to air are applied to all tap water input flows to calculate the amount of water consumed in the processes.

## Reference product
- soft solder, Sn97Cu3: 1 kg; By-product classification allocatable product; CPC 35499: Other chemical products n.e.c.
  EcoSpold01Location=RER
  production volume 1.32237 kg
    This is a placeholder value that does not reflect real-world production volumes. This dataset does not currently require a real-world production volume to work in the database framework, and no actual data were collected yet. This has no negative effect on the results of the ecoinvent database. The placeholder value of this activity was scaled according to the nominal GDP of 2005 (source: United Nations, http://data.un.org/Glossary.aspx?q=GDP+%28current+US%24%29, accessed 20130726) to reflect an appropriate share of the global production volume, which is also a placeholder value.
  property price 9.26092 EUR2005
    Calculated based on inputs: The price of the product has been calculated as a sum of the values of the material and energy inputs for this product. This value is therefore a rough estimation. It may underestimate the real price since there are additional expenses when producing any product. These expences can include for example labour costs, treatment of waste materials and profit for the producer. Please consider carefully whether this level of data quality is acceptable for your application.
  property carbon content 0
    carbon content on a dry matter basis (reserved; not for manual entry)
  properties: carbon content, fossil 0, dry mass 1 kg, water in wet mass 0 kg, carbon content, non-fossil 0, water content 0, wet mass 1 kg, carbon allocation 0 kg

## Inputs from technosphere
- copper, cathode: 0.0273 kg; lognormal variance with pedigree 0.0413, pedigree (2,3,5,3,1)
  1% losses
  EcoSpold01Location=RER
  Uncertainty: 1% losses
  properties: dry mass 1 kg, wet mass 1 kg
- electricity, medium voltage: 0.25 kWh; lognormal variance with pedigree 0.0413, pedigree (2,3,5,3,1)
  Questionnaire
  EcoSpold01Location=UCTE
  Uncertainty: Questionnaire
- municipal solid waste: -0.025 kg; lognormal variance with pedigree 0.0413, pedigree (2,3,5,3,1)
  Unspecified wastes
  EcoSpold01Location=CH
  Uncertainty: Unspecified wastes
  production volume 0.025 kg
    Calculated from the production volume of soft solder, Sn97Cu3 in proportion to the respective output amounts.
  properties: dry mass 0.771 kg, carbon content, non-fossil 0.261655, heating value, net 11.74 MJ, water content 0.297017, carbon content, fossil 0.171549, wet mass 1 kg
  note on carbon content, non-fossil: MSW composition in tab 4.1, ecoinvent v2.2 report 13_I. C content referred to 1 kg DM
  note on heating value, net: Value taken from the general comment of the treatment dataset.
- tin: 0.882 kg; lognormal variance with pedigree 0.0413, pedigree (2,3,5,3,1)
  EcoSpold01Location=RER
  1% losses
  Uncertainty: 1% losses
  properties: wet mass 1 kg, dry mass 1 kg
- fly ash and scrubber sludge: 0 kg; pedigree (1,1,1,1,1)
  EcoSpold01Location=CH
  Waste water from production
  Uncertainty: Waste water from production
  production volume 0 kg
    (same comment as for municipal solid waste)
  properties: wet mass 1 kg, dry mass 0.1 kg, carbon content, fossil 0.167, water content 9
  note on carbon content, fossil: Tab A.6, ecoinvent v2.2 report 13_I. C content has been calculated after data in the tables, and then referred to 1 kg DM
- tap water: 0.0075 kg; name tap_water_input; lognormal variance with pedigree 0.0413, pedigree (2,3,5,3,1)
  Produced waste water
  EcoSpold01Location=RER
  Uncertainty: Produced waste water
  properties: dry mass 0.000337476 kg, wet mass 1 kg, carbon content, fossil 0.00178991, water content 2962.17
  note on carbon content, fossil: Bicarbonate content is 2.93 mol/m3. CO2 content is 0.1 mol/m3 (ecoinvent v2.2 report 8, Tab 93.1).
- nitrogen, liquid: 0.774 kg; lognormal variance with pedigree 0.0427, pedigree (3,3,5,3,1)
  Literature, Inert gas
  EcoSpold01Location=RER
  Uncertainty: Literature, Inert gas
  properties: dry mass 1 kg, wet mass 1 kg
- heat, district or industrial, natural gas: 0.7866 MJ; lognormal variance with pedigree 0.0413, pedigree (2,3,5,3,1)
  Questionnaire
  EcoSpold01Location=RER
  Uncertainty: Questionnaire
  properties: heating value, net 1 MJ
- chemical, organic: 0.111 kg; lognormal variance with pedigree 0.0427, pedigree (3,3,5,3,1)
  EcoSpold01Location=GLO
  Assumption for additives based on literature
  Uncertainty: Assumption for additives based on literature
  properties: wet mass 1 kg, carbon content, fossil 0.628, dry mass 1 kg, heating value, net 19.03 MJ
  note on carbon content, fossil: This dataset is an unweighted average of 20 organic substances (listed in Tab 88.1, ecoinvent v2.2 report 8, part II), being part of the top100 chemicals included in this database. The C-content has also been calculated as an unweighted average of the C content of the substances composing this dataset.
- solder factory: 2e-10 unit; lognormal variance with pedigree 0.3413, pedigree (2,3,5,3,1)
  EcoSpold01Location=RER
  Calculation for plant with 100'000t/a and a life time of 50a
  Uncertainty: Calculation for plant with 100'000t/a and a life time of 50a
- fly ash and scrubber sludge: -0.0072815, -0.000218499 kg (2 entries); lognormal variance with pedigree 0.0413, pedigree (2,3,5,3,1)
  EcoSpold01Location=CH
  Waste water from production
  Uncertainty: Waste water from production
  production volume 0.0075 kg

## Emissions to nature
- NMVOC, non-methane volatile organic compounds, unspecified origin [air, unspecified]: 3.08e-5 kg; lognormal variance with pedigree 0.3707, pedigree (5,3,5,3,5)
  Maximum estimation in inert gas flow
  Uncertainty: Maximum estimation in inert gas flow
- Copper [air, unspecified]: 9.29e-8 kg; lognormal variance with pedigree 0.9807, pedigree (5,3,5,3,5)
  Estimation (3% of 5mg/m3 in flow rate of inert gas)
  Uncertainty: Estimation (3% of 5mg/m3 in flow rate of inert gas)
- Ammonia [air, unspecified]: 9.25e-6 kg; lognormal variance with pedigree 0.3307, pedigree (5,3,5,3,5)
  Maximum estimation in inert gas flow
  Uncertainty: Maximum estimation in inert gas flow
- Water [air, unspecified]: 1.125e-6 m3; name water_to_air_unspecified; = (tap_water_input/1000*fraction_TW_to_air); lognormal variance with pedigree 0.0807, pedigree (2,2,5,1,1)
  Calculated value based on literature values and expert opinion. See comments in the parametres' comment field.
  property fraction, origin: fresh water 1; name fraction_origin_fresh_water
  property fraction, origin: unspecified 0; name fraction_origin_unspecified
  property fraction, origin: salt water 0; name fraction_origin_salt_water
- Tin [air, unspecified]: 3e-6 kg; lognormal variance with pedigree 0.9807, pedigree (5,3,5,3,5)
  Estimation (97% of 5mg/m3 in flow rate of inert gas)
  Uncertainty: Estimation (97% of 5mg/m3 in flow rate of inert gas)
- Hydrogen chloride [air, unspecified]: 1.86e-5 kg; lognormal variance with pedigree 0.3707, pedigree (5,3,5,3,5)
  Maximum estimation in inert gas flow
  Uncertainty: Maximum estimation in inert gas flow
- Water [water, unspecified]: 6.375e-6 m3; name water_to_water_unspecified; = (tap_water_input/1000)*(1-fraction_TW_to_air); lognormal variance with pedigree 0.0807, pedigree (2,2,5,1,1)
  (same comment as for Water)
  property fraction, origin: salt water 0; name fraction_origin_salt_water_Ww
  property fraction, origin: fresh water 1; name fraction_origin_fresh_water_Ww
  property fraction, origin: unspecified 0; name fraction_origin_unspecified_Ww
  property carbon content, non-fossil 0; name C_content_non_fossil
  property carbon content, fossil 0; name C_content_fossil
  property wet mass 1000 kg; name WM
  property water in wet mass 1000 kg; name WWM
  property dry mass 0 kg; name DM
- Particulates, > 10 um [air, unspecified]: 6.17e-6 kg; lognormal variance with pedigree 0.4407, pedigree (5,3,5,3,5)
  Maximum estimation in inert gas flow
  Uncertainty: Maximum estimation in inert gas flow

## Sampling procedure
Questionnaire and literature

## Extrapolations
This dataset has been extrapolated from year 2000 to the year of the calculation (2021). The uncertainty has been adjusted accordingly.

## Review by Hans-Jörg Althaus 2003-06-16
passed
