# natural gas production

Dataset: EcoSpold 2, unit process
Geography: US
Time period: 2010-01-01 to 2021-12-31
Technology level: current
Classification: ISIC rev.4 ecoinvent: 0620:Extraction of natural gas
Classification: EcoSpold01Categories: natural gas/production
Scenario: Business-as-Usual
System model: Allocation, cut-off by classification
Generated by: Pablo Tirado
Published in: National Renewable Energy Laboratory 2010
Database: ecoinvent
isCopyrightProtected: true
accessRestrictedTo: 1

## General comment
This dataset represents the production of natural gas on-shore in the United States in 2010.
The datasets describes the extraction and the transformation processes, including sweetening. This dataset was already contained in the ecoinvent database version 2 but it has been adapted to split RNA into US and CA.

It is based on NREL data ("Natural gas, at extraction site" and "Natural gas, processed, at plant" NREL 2007) and replaces the "natural gas production, RNA" dataset (as more specific data were available for canadian produciton). NREL data are split in extraction and processing but they have been joint to keep the same structure as other natural gas datasets in the database. Some flows have been extrapolated from the natural gas production in Germany. These data describe the gas production in US in general, so some flows may be over-estimated.

[This dataset was already contained in the ecoinvent database version 2. It was not individually updated during the transfer to ecoinvent version 3. Life Cycle Impact Assessment results may still have changed, as they are affected by changes in the supply chain, i.e. in other datasets. This dataset was generated following the ecoinvent quality guidelines for version 2. It may have been subject to central changes described in the ecoinvent version 3 change report (http://www.ecoinvent.org/database/ecoinvent-version-3/reports-of-changes/), and the results of the central updates were reviewed extensively. The changes added e.g. consistent water flows and other information throughout the database. The documentation of this dataset can be found in the ecoinvent reports of version 2, which are still available via the ecoinvent website. The change report linked above covers all central changes that were made during the conversion process.]
[This dataset was already contained in the ecoinvent database version 2. It was not individually updated during the transfer to ecoinvent version 3. Life Cycle Impact Assessment results may still have changed, as they are affected by changes in the supply chain, i.e. in other datasets. This dataset was generated following the ecoinvent quality guidelines for version 2. It may have been subject to central changes described in the ecoinvent version 3 change report (http://www.ecoinvent.org/database/ecoinvent-version-3/reports-of-changes/), and the results of the central updates were reviewed extensively. The changes added e.g. consistent water flows and other information throughout the database. The documentation of this dataset can be found in the ecoinvent reports of version 2, which are still available via the ecoinvent website. The change report linked above covers all central changes that were made during the conversion process.]

## Included activities start
The activity starts with the drilling of the wells

## Included activities end
The activity ends at the gate of the processing plant.
It includes all the fuels and emissions related to well testing, exploration, extraction and treatment (sweetening and drying): fugitive emissions, flaring, venting, use of gas in turbines.

## Geography
US data (NREL) for emissions completed with german data. The uncertainty has been adjusted accordingly.

## Technology
US data (NREL) for emissions completed with german data. Emissions from NREL include combined production (petroleumm and gas) and off-shore production. The uncertainty has been adjusted accordingly. Data used in original data contains no information on technology.

## Time period
US data (NREL) from 2003. The uncertainty has been adjusted accordingly.

## Reference product
- natural gas, high pressure: 0 m3; name RP_amount_1; CPC 12020: Natural gas, liquefied or in the gaseous state; By-product classification allocatable product; CAS 14493-06-2
  EcoSpold01Location=RNA
  production volume 4.62192e11 m3; name PV_Ref; = 681.235705411649*10^9*37.8/39*0.7
    m3 of natural gas produced stand-alone in the US in 2012 (BP, 2014). Value converted from BP LHV (1 cubic meter natural gas in (BP, 2014) corresponds to 0.9 kg oil equivalent. 1 kg oil equivalent corresponds to 42 MJ) to ecoinvent standard LHV of 39MJ/m3. (The source does not specify if the cubic meters are standard or norm cubic meters. See 2015, Faist Emmenegger, Mireille, Del Duce, Andrea; Zah, Rainer, Update and extension of the inventory data for energy gases, 3 - SeparatePublication.) It is further estimated that app. 70% of natural gas is produced in stand alone production activities and the rest is produced in activities where both natural gas and petroleum are produced and that all combined oil and gas production is on-shore. Refrence(s): BP (2014). Statistical Review of World Energy, June 2014. Retrieved online from http://www.bp.com/content/dam/bp/excel/energy-economics/statistical-review-2015/bp-statistical-review-of-world-energy-2015-workbook.xlsx, 30 August, 2017
  property price 0.166 EUR2005
    Temporary price data. Calculated as 90% of purchasers price based on: 2005 price for Europe-27 Import (US$ and kg) in UN Commodity Trade Statistics Database - Natural gas in gaseous state (http://data.un.org/Data.aspx?q=natural+gas&d=ComTrade&f=_l1Code%3a28%3bcmdCode%3a271121; accessed 4 January 2011), using density of natural gas of 0.8 kg/m3 for unit conversion.
  property heating value, net 39 MJ
    Literature value, Source: United Nations Statistics Division (2018) International Recommendations for Energy Statistics (IRES). Available at: http://unstats.un.org/unsd/statcom/doc11/BG-IRES.pdf.
  property carbon content, fossil 0.602381
    An average C content of 0.506 kg C/ m3 has been assumed (this average has been calculated using data in Tab 3.5, ecoinvent v2.2 report 6_V
  property carbon content 0.602381
    carbon content on a dry matter basis (reserved; not for manual entry)
  property true value 0.166; name RP_amount_1_true_value
    allocation property applied in "true value" allocation // value calculated from revenue
  properties: wet mass 0.84 kg, water content 0, dry mass 0.84 kg, water in wet mass 0 kg, carbon content, non-fossil 0, carbon allocation 0.506 kg
- sulfur: 1 kg; name BP_amount_1; = 1170000000/ PV_Ref; CPC 34520: Sulphur, except sublimed sulphur, precipitated sulphur and colloidal sulphur; By-product classification allocatable product; CAS 7704-34-9
  The amount of sulfur produced as a byproduct from natural gas processing in the US was 1170 thousand metric tonnes in 2010 (USGS, 2010). This amount is averaged over the entire US natural gas production, i.e. both sweet and sour gas. The actual ratio of sulfur recovered per m3 of NG depends on the gas composition and process parameters which may vary locally and over time. Reference(s): USGS. 2010. Minerals Yearbook 2014, volume I, Commodity Report. Retrieved online from https://minerals.usgs.gov/minerals/pubs/commodity/sulfur/myb1-2010-sulfu.xls, August 9th, 2017
  production volume 1.17e9 kg; name PV_sulfur; = PV_Ref * (BP_amount_1 / RP_amount_1)
    Calculated from production volume of reference product using the relative outputs.
  property price 0.0551778 EUR2005
    Price calculated based on price of elemental sulfur (f.o.b. mine or plant) reported in the USGS Minerals Yearbook for Sulfur from 2010 to 2019 (https://www.usgs.gov/centers/nmic/sulfur-statistics-and-information). The prices given in USD were converted to EUR based on the annual exchange rates published by the European Central Bank (https://sdw.ecb.europa.eu/quickview.do?SERIES_KEY=120.EXR.A.USD.EUR.SP00.A), and then adjusted for inflation relative to 2005 by using the Harmonised Index of Consumer Prices (HICP) of the euro area, published by eurostat (https://ec.europa.eu/eurostat/databrowser/view/PRC_HICP_AIND/default/table).
  property carbon content 0
    carbon content on a dry matter basis (reserved; not for manual entry)
  property true value 0.000139678; name BP_amount_1_true_value
    allocation property applied in "true value" allocation // value calculated from revenue
  properties: wet mass 1 kg, dry mass 1 kg, water in wet mass 0 kg, carbon content, non-fossil 0, water content 0, carbon content, fossil 0, carbon allocation 0 kg

## Inputs from technosphere
- methanol: 1.18566e-5 kg; lognormal variance with pedigree 0.0601, pedigree (1,2,5,5,3)
  Estimated value. As in original dataset (natural gas production, DE)
  Uncertainty: DQP adapted considering the original source of data (Dutch environmental report)
  properties: dry mass 1 kg, wet mass 1 kg, carbon content, fossil 0.375, heating value, net 26.49 MJ
- diesel: 1.98938e-6 kg; lognormal variance with pedigree 0.008, pedigree (1,1,4,1,1)
  Estimated value. As in original dataset (natural gas production, DE)
  properties: dry mass 1 kg, carbon content, fossil 0.865, wet mass 1 kg, heating value, net 42.8 MJ
  note on carbon content, fossil: C-content of diesel is 86.5% (ecoinvent v2.2 report 6_IV, Tab 3.14)
- soda ash, light, crystalline, heptahydrate: 7.00766e-7 kg; lognormal variance with pedigree 0.0405, pedigree (1,1,5,1,1)
  Estimated value. As in original dataset (natural gas production, DE)
  properties: heating value, net 3.43 MJ, wet mass 1 kg, carbon content, fossil 0.0517241, dry mass 1 kg
- electricity, medium voltage: 0.0152226 kWh; = .0157+nat_gas_unprocessed*.0287; lognormal variance with pedigree 0.08, pedigree (1,1,5,1,1)
  Calculated value. Sum of emissions from production (0.0157kg/m3) and extraction (0.0287kg/m3 unprocessed).
  Source: NREL 2007
  EcoSpold01Location=US
- onshore well, oil/gas: 6.70876e-7 m; lognormal variance with pedigree 0.35, pedigree (1,1,5,5,3)
  Estimated value. As in original dataset (natural gas production, DE)
  Uncertainty: Variance from default table. DQP adapted considering the original source of data (environmental report for whole Germany)
- natural gas processing plant: 1.72115e-13 unit; lognormal variance with pedigree 0.34, pedigree (1,1,5,1,1)
  Estimated value. As in original dataset (natural gas production, DE)
- heat, district or industrial, natural gas: 0.691079 MJ; = fuel_inp_NG* LHV_NG*45.4/ fuel_use_NG; lognormal variance with pedigree 0.008, pedigree (1,1,4,1,1)
  Calculated value. Sum of natural gas combustion from production (0.02.41e-2m3/m3) and extraction (0.0255e-2m3/m3 unprocessed)
  Source: NREL 2007
  property heating value, net 1 MJ; name LHV_NG
  property fuel input in m3 0.050875 m3; name fuel_inp_NG; = 2.41e-02+2.55e-02* nat_gas_unprocessed
  property Corresponding fuel use 1.11 MJ; name fuel_use_NG
  note on fuel input in m3: Calculated value. Sum of natural gas combustion from production (0.02.41e-2m3/m3) and extraction (0.0255e-2m3/m3 unprocessed). Source: NREL 2007
  note on Corresponding fuel use: Lower heating value of the fuel input related to the heat/electricity output
- chemical, inorganic: 8.80109e-7 kg; lognormal variance with pedigree 0.06, pedigree (1,1,5,5,3)
  Estimated value. As in original dataset (natural gas production, DE)
  Uncertainty: DQP adapted considering the original source of data (environmental report)
  properties: carbon content, fossil 0.003, dry mass 1 kg, wet mass 1 kg
  note on carbon content, fossil: This dataset is an unweighted average of 20 inorganic substances (listed in Tab 88.1, ecoinvent v2.2 report 8, part II), being part of the top100 chemicals included in this database. The C-content has also been calculated as an unweighted average of the C content of the substances composing this dataset.
- ethylene glycol: 7.4062e-6 kg; lognormal variance with pedigree 0.0601, pedigree (1,2,5,5,3)
  (same comment as for methanol)
  properties: dry mass 1 kg, carbon content, fossil 0.387097, heating value, net 23.44 MJ, wet mass 1 kg
- chemical, organic: 1.15734e-6 kg; lognormal variance with pedigree 0.0405, pedigree (1,1,5,1,1)
  Estimated value. As in original dataset (natural gas production, DE)
  properties: wet mass 1 kg, carbon content, fossil 0.628, heating value, net 19.03 MJ, dry mass 1 kg
  note on carbon content, fossil: This dataset is an unweighted average of 20 organic substances (listed in Tab 88.1, ecoinvent v2.2 report 8, part II), being part of the top100 chemicals included in this database. The C-content has also been calculated as an unweighted average of the C content of the substances composing this dataset.
- onshore natural gas field infrastructure: 2.21522e-10 unit; lognormal variance with pedigree 0.4246, pedigree (2,4,5,5,4)
  Estimated value. As in original dataset (natural gas production, DE)
  Uncertainty: DQP adapted considering the original source of data (environmental report for 50% market share in Germany, standard module)

## Inputs from nature
- Gas, natural, in ground [natural resource, in ground]: 0.348722 m3; name nat_gas_unprocessed; lognormal variance with pedigree 0.04, pedigree (1,1,5,1,1)
  Literature value. NREL 2007

## Emissions to nature
- Tin, ion [water, unspecified]: 1.15909e-7 kg; lognormal variance with pedigree 0.69, pedigree (1,1,5,1,1)
  Literature value. NREL 2007. Extraction emissions
- Ammonium, ion [water, unspecified]: 1.29858e-5 kg; lognormal variance with pedigree 0.69, pedigree (1,1,5,1,1)
  Literature value. NREL 2007. Extraction emissions
- Benzene, ethyl- [air, unspecified]: 2.93591e-6 kg; lognormal variance with pedigree 0.34, pedigree (1,1,5,1,1)
  Literature value. NREL 2007. Replaces "Hydrocarbons, aromatic" in previous versions
- Chromium, ion [water, unspecified]: 5.34708e-7 kg; lognormal variance with pedigree 0.69, pedigree (1,1,5,1,1)
  Literature value. NREL 2007. Extraction emissions
- Copper, ion [water, unspecified]: 1.48788e-7 kg; lognormal variance with pedigree 0.69, pedigree (1,1,5,1,1)
  Literature value. NREL 2007. Extraction emissions
- Beryllium [water, unspecified]: 1.05613e-8 kg; lognormal variance with pedigree 0.69, pedigree (1,1,5,1,1)
  Literature value. NREL 2007. Extraction emissions
- Benzene [air, unspecified]: 2.35139e-5 kg; lognormal variance with pedigree 0.34, pedigree (1,1,5,1,1)
  Literature value. NREL 2007. Replaces "Hydrocarbons, aromatic" in previous versions
- Oils, unspecified [water, unspecified]: 2.02259e-5 kg; lognormal variance with pedigree 0.69, pedigree (1,1,5,1,1)
  Literature value. NREL 2007. Extraction emissions
- Lead [water, unspecified]: 3.35438e-7 kg; lognormal variance with pedigree 0.69, pedigree (1,1,5,1,1)
  Literature value. NREL 2007. Extraction emissions
- Thallium [water, unspecified]: 2.50416e-9 kg; lognormal variance with pedigree 0.69, pedigree (1,1,5,1,1)
  Literature value. NREL 2007. Extraction emissions
- NMVOC, non-methane volatile organic compounds, unspecified origin [air, unspecified]: 0.00019296 kg; lognormal variance with pedigree 0.34, pedigree (1,1,5,1,1)
  Literature value. NREL 2007
- Sulfate [water, unspecified]: 7.77153e-5 kg; lognormal variance with pedigree 0.69, pedigree (1,1,5,1,1)
  Literature value. NREL 2007. Extraction emissions
- Lithium, ion [water, unspecified]: 0.00113252 kg; lognormal variance with pedigree 0.69, pedigree (1,1,5,1,1)
  Literature value. NREL 2007. Extraction emissions
- o-Xylene [water, unspecified]: 2.32482e-8 kg; lognormal variance with pedigree 0.69, pedigree (1,1,5,1,1)
  Literature value. NREL 2007. Extraction emissions
- Sulfur dioxide [air, unspecified]: 2.60018e-5 kg; = PV_sulfur/0.97*0.03/ PV_Ref; lognormal variance with pedigree 0.34, pedigree (1,1,5,1,1)
  For a lack of better data this value was derived from the amount of elemental sulfur recovered from natural gas production. 1170 thousand metric tonnes of elemental sulfur were recovered from natural gas in the US in 2010 (USGS, 2014). Based on EPA (2015) An average efficiency of sulfur extraction at the processing plant of 97% was assumed. The remaining 3% are assumed to be lost in the form of SO2 emissions and averaged over the entire natural gas production, i.e. both sweet and sour gas. Reference(s): EPA. 2015. AP 42, Fifth Edition, Volume I
  Chapter 8: Inorganic Chemical Industry. Retrieved online from https://www3.epa.gov/ttn/chief/ap42/ch08/final/c08s13_2015.pdf, August 9th, 2017. USGS. 2010. Minerals Yearbook 2014, volume I, Commodity Report. Retrieved online from https://minerals.usgs.gov/minerals/pubs/commodity/sulfur/myb1-2010-sulfu.xls, August 9th, 2017
- Vanadium, ion [water, unspecified]: 2.86285e-8 kg; lognormal variance with pedigree 0.69, pedigree (1,1,5,1,1)
  Literature value. NREL 2007. Extraction emissions
- COD, Chemical Oxygen Demand [water, unspecified]: 0.000303223 kg; lognormal variance with pedigree 0.69, pedigree (1,1,5,1,1)
  Literature value. NREL 2007. Extraction emissions
- Acidity, unspecified [water, unspecified]: 2.21522e-7 kg; lognormal variance with pedigree 0.69, pedigree (1,1,5,1,1)
  Literature value. NREL 2007. Extraction emissions
- Methane, fossil [air, unspecified]: 0.00353721 kg; = .00140+nat_gas_unprocessed*.00881; lognormal variance with pedigree 0.34, pedigree (1,1,5,1,1)
  Calculated value. Sum of emissions from production (0.0014kg/m3) and extraction (0.00881kg/m3 unprocessed).
  Source: NREL 2007
- Fluoride [water, unspecified]: 3.68649e-10 kg; lognormal variance with pedigree 0.69, pedigree (1,1,5,1,1)
  Literature value. NREL 2007. Extraction emissions
- Cobalt [water, unspecified]: 2.33478e-8 kg; lognormal variance with pedigree 0.69, pedigree (1,1,5,1,1)
  Literature value. NREL 2007. Extraction emissions
- BOD5, Biological Oxygen Demand [water, unspecified]: 0.000183328 kg; lognormal variance with pedigree 0.69, pedigree (1,1,5,1,1)
  Literature value. NREL 2007. Extraction emissions
- Antimony [water, unspecified]: 1.18566e-8 kg; lognormal variance with pedigree 0.69, pedigree (1,1,5,1,1)
  Literature value. NREL 2007. Extraction emissions
- Benzene [water, unspecified]: 1.76686e-6 kg; lognormal variance with pedigree 0.69, pedigree (1,1,5,1,1)
  Literature value. NREL 2007. Extraction emissions
- Barite [water, unspecified]: 0.000299901 kg
  The literature source of this dataset, NREL 2007, reports Barium emission to water of 0.000903 kg/m3 of natural gas. These were found to be incorrect and therefore corrected to be Barite emissions (contained in and released with the drilling fuid) instead.
- Molybdenum [water, unspecified]: 2.42113e-8 kg; lognormal variance with pedigree 0.69, pedigree (1,1,5,1,1)
  Literature value. NREL 2007. Extraction emissions
- Manganese [water, unspecified]: 1.06942e-6 kg; lognormal variance with pedigree 0.69, pedigree (1,1,5,1,1)
  Literature value. NREL 2007. Extraction emissions
- Strontium [water, unspecified]: 5.74562e-5 kg; lognormal variance with pedigree 0.69, pedigree (1,1,5,1,1)
  Literature value. NREL 2007. Extraction emissions
- DOC, Dissolved Organic Carbon [water, unspecified]: 0.000112305 kg; lognormal variance with pedigree 0.658, pedigree (1,1,4,1,1)
  Literature value. NREL 2007. Extraction emissions
- Cyanide [water, unspecified]: 7.60547e-11 kg; lognormal variance with pedigree 0.658, pedigree (1,1,4,1,1)
  Literature value. NREL 2007. Extraction emissions
- Nickel, ion [water, unspecified]: 1.84325e-7 kg; lognormal variance with pedigree 0.69, pedigree (1,1,5,1,1)
  Literature value. NREL 2007. Extraction emissions
- Radium-228 [water, unspecified]: 0.00196281 kBq; lognormal variance with pedigree 0.69, pedigree (1,1,5,1,1)
  Literature value. NREL 2007. Extraction emissions
- Sodium, ion [water, unspecified]: 0.0107274 kg; lognormal variance with pedigree 0.69, pedigree (1,1,5,1,1)
  Literature value. NREL 2007. Extraction emissions
- Dissolved solids [water, unspecified]: 0.0468284 kg; lognormal variance with pedigree 0.658, pedigree (1,1,4,1,1)
  Literature value. NREL 2007. Extraction emissions
- Magnesium [water, unspecified]: 0.000660912 kg; lognormal variance with pedigree 0.69, pedigree (1,1,5,1,1)
  Literature value. NREL 2007. Extraction emissions
- Selenium [water, unspecified]: 2.34142e-9 kg; lognormal variance with pedigree 0.69, pedigree (1,1,5,1,1)
  Literature value. NREL 2007. Extraction emissions
- Mercury [water, unspecified]: 2.06909e-10 kg; lognormal variance with pedigree 0.69, pedigree (1,1,5,1,1)
  Literature value. NREL 2007. Extraction emissions
- 4-Methyl-2-pentanone [water, unspecified]: 4.41715e-9 kg; lognormal variance with pedigree 0.69, pedigree (1,1,5,1,1)
  Literature value. NREL 2007. Extraction emissions
- Sulfur [water, unspecified]: 2.7931e-6 kg; lognormal variance with pedigree 0.69, pedigree (1,1,5,1,1)
  Literature value. NREL 2007. Extraction emissions
- Phenol [water, unspecified]: 4.71606e-7 kg; lognormal variance with pedigree 0.69, pedigree (1,1,5,1,1)
  Literature value. NREL 2007. Extraction emissions
- Calcium, ion [water, unspecified]: 0.00338759 kg; lognormal variance with pedigree 0.69, pedigree (1,1,5,1,1)
  Literature value. NREL 2007. Extraction emissions
- Iron, ion [water, unspecified]: 6.11095e-5 kg; lognormal variance with pedigree 0.69, pedigree (1,1,5,1,1)
  Literature value. NREL 2007. Extraction emissions
- Benzene, ethyl- [water, unspecified]: 9.93029e-8 kg; lognormal variance with pedigree 0.69, pedigree (1,1,5,1,1)
  Literature value. NREL 2007. Extraction emissions
- Acetone [water, unspecified]: 1.05281e-8 kg; lognormal variance with pedigree 0.69, pedigree (1,1,5,1,1)
  Literature value. NREL 2007. Extraction emissions
- Chloride [water, unspecified]: 0.0381934 kg; lognormal variance with pedigree 0.69, pedigree (1,1,5,1,1)
  Literature value. NREL 2007. Extraction emissions
- Boron [water, unspecified]: 3.30788e-6 kg; lognormal variance with pedigree 0.69, pedigree (1,1,5,1,1)
  Literature value. NREL 2007. Extraction emissions
- Lead-210 [water, unspecified]: 0.000304883 kBq; lognormal variance with pedigree 0.69, pedigree (1,1,5,1,1)
  Literature value. NREL 2007. Extraction emissions
- Zinc, ion [water, unspecified]: 5.21423e-7 kg; lognormal variance with pedigree 0.69, pedigree (1,1,5,1,1)
  Literature value. NREL 2007. Extraction emissions
- Aluminium [water, unspecified]: 1.93956e-5 kg; lognormal variance with pedigree 0.69, pedigree (1,1,5,1,1)
  Literature value. NREL 2007. Extraction emissions
- Cadmium, ion [water, unspecified]: 3.38759e-8 kg; lognormal variance with pedigree 0.69, pedigree (1,1,5,1,1)
  Literature value. NREL 2007. Extraction emissions
- m-Xylene [water, unspecified]: 3.19164e-8 kg; lognormal variance with pedigree 0.69, pedigree (1,1,5,1,1)
  Literature value. NREL 2007. Extraction emissions
- Toluene [water, unspecified]: 1.67055e-6 kg; lognormal variance with pedigree 0.69, pedigree (1,1,5,1,1)
  Literature value. NREL 2007. Extraction emissions
- Xylene [water, unspecified]: 8.43576e-7 kg; lognormal variance with pedigree 0.69, pedigree (1,1,5,1,1)
  Literature value. NREL 2007. Extraction emissions
- Silver, ion [water, unspecified]: 2.20858e-6 kg; lognormal variance with pedigree 0.69, pedigree (1,1,5,1,1)
  Literature value. NREL 2007. Extraction emissions
- Radium-226 [water, unspecified]: 0.00139489 kBq; lognormal variance with pedigree 0.69, pedigree (1,1,5,1,1)
  Literature value. NREL 2007. Extraction emissions
- Xylene [air, unspecified]: 2.12887e-5 kg; lognormal variance with pedigree 0.34, pedigree (1,1,5,1,1)
  Literature value. NREL 2007. Replaces "Hydrocarbons, aromatic" in previous versions
- Arsenic, ion [water, unspecified]: 2.32814e-7 kg; lognormal variance with pedigree 0.69, pedigree (1,1,5,1,1)
  Literature value. NREL 2007. Extraction emissions
- TOC, Total Organic Carbon [water, unspecified]: 0.000112305 kg; lognormal variance with pedigree 0.69, pedigree (1,1,5,1,1)
  Literature value. NREL 2007. Extraction emissions
- Titanium, ion [water, unspecified]: 1.82e-7 kg; lognormal variance with pedigree 0.69, pedigree (1,1,5,1,1)
  Literature value. NREL 2007. Extraction emissions
- Toluene [air, unspecified]: 3.68649e-5 kg; lognormal variance with pedigree 0.34, pedigree (1,1,5,1,1)
  Literature value. NREL 2007. Replaces "Hydrocarbons, aromatic" in previous versions
- Bromine [water, unspecified]: 0.000225839 kg; lognormal variance with pedigree 0.69, pedigree (1,1,5,1,1)
  Literature value. NREL 2007. Extraction emissions

## Sampling procedure
Data based on environmental LCI

## Extrapolations
Data describing the gas production in US in general are assumed to be equal to non-associated natural gas production, so some flows may be over-estimated. Some inputs (infrastructures, chemicals) have been extrapolated from the natural gas production in Germany. The uncertainty has been adjusted accordingly.

## Review by Emilia Moreno Ruiz 2017-09-06
PV adjusted; emissions corrected
