# pomegranate production

Dataset: EcoSpold 2, unit process
Geography: IN
Time period: 2015-01-01 to 2021-12-31
Technology level: current
Classification: ISIC rev.4 ecoinvent: 0124:Growing of pome fruits and stone fruits
Scenario: Business-as-Usual
System model: Allocation, cut-off by classification
Generated by: Sanjeevan Bajaj
Database: ecoinvent
isCopyrightProtected: true
accessRestrictedTo: 1

## General comment
This dataset represents the production of 1 kg of fresh Pomegranate which is a peripheral crop harvested in May, 2016 at a farm located in village- Vadner Bhairav and District- Nashik of Maharashtra. The farm has a yield of 60,000 kg fresh matter per ha for this crop cycle. Harvesting date is 15-May, 2016. Mineral NPK fertilizer input is 54.68-89.69-166.25 kg/ha. Micro/macro nutrients applied are Mg 135.47 kg/ha, Zinc 54.26 kg/ha, Borax 51.67, Manganese sulfate 27.13 kg/ha, Portafer 72.34 kg/ha, and Sulfite 103.62 kg/ha. Organic fertilizer applied amounts to 9000 kg of manure from Local mix slurry. Fungicides used has active ingredient as Carbendazin 750g/ha, Mancozeb 6187.5g/ha. Insecticides used has active ingredient as Dimethoate 900g/ha, Dichlorovos 2280g/ha, Chlorpyriphos 450g/ha, Imidacloprid 267g/ha. Other pesticide used is plant based horticultural oil (neem and Karanj) 15.19 kg/ha. Machinery is used for Pesticide spray with fuel consumption of 6.24 kg/ha and for Nutrient spray with fuel consumption of 18.72 kg/ha.

## Included activities start
This is a perennial crop with periodic harvesting

## Included activities end
The activity ends with the harvesting of the mature Pomegranate from the tree.

## Technology
Cultivation of Pomegranate follows conventional production standards

## Time period
Harvesting date main crop: 15-May, 2016. The cycle of one year is considered for entry in ecoeditor.

## Parameters
- LUC_crop_specific: 1 dimensionless
  This parameter allows to switch between a "crop specific" and a "country specific" approach when calculating the LUC of a crop. By default, the chosen approach is "crop specific", so the value of the parameter is 1. If you want to apply a "country specific" approach, turn the parameter to 0.

## Reference product
- pomegranate: 1 kg; By-product classification allocatable product; CPC 01359: Other fruits, n.e.c.
  production volume 2.30645e9 kg; = 2306.45*1000*1000
    http://agriexchange.apeda.gov.in/India%20Production/India_Productions.aspx?cat=fruit&hscode=1058 Data is for the year 2015-16. Figures are given in thousand tonnes. Farm from which data is collected is located in the State of Maharashtra which accounts for 64.43% of the pomegranate production in India and hence considered representative of India production.
  property carbon content, non-fossil 0.475
    biogenic carbon content on a dry matter basis from faostat.
    Reference: http://www.fao.org/forestry/17111/en
  property price 0.644593 EUR2005
    Literature value. Price taken from Agri Exchange (retrieved from: http://agriexchange.apeda.gov.in/Market%20Profile/one/POMEGRANATE.aspx, accessed 15Feb2018). The procurament price, defined as "Cost Calculation from harvest to packhouse to port Showing the cost involved in exporting pomegranate (as per information collected during 2008)" is reported to be 40-60Rs./kg. An averag of 50Rs./kg is here assumed.
  property carbon content 0.475
    carbon content on a dry matter basis (reserved; not for manual entry)
  properties: dry mass 0.2207 kg, water content 3.53104, carbon content, fossil 0, water in wet mass 0.7793 kg, wet mass 1 kg, carbon allocation 0.104832 kg

## Inputs from technosphere
- potassium sulfate: 0.00512594 kg; lognormal variance with pedigree 0.0034, pedigree (2,4,2,1,1)
  The exchange has been updated from 'potassium sulfate, as K2O' into 'potassium sulfate' and therefore its amount has been scaled (multiplied) from 0.0028 kg by 1.85 kg of 'potassium sulfate' per kg of 'potassium sulfate, as K2O'. Original comment of the exchange is: The data was collected for a hectare area through interview
  properties: dry mass 1 kg, wet mass 1 kg
- dolomite: 0.0171301 kg; lognormal variance with pedigree 0.0034, pedigree (2,4,2,1,1)
  The data was collected for a hectare area through interview
  properties: heating value, net 3.95 MJ, wet mass 1 kg, dry mass 1 kg, carbon content, fossil 0.130435
- borax, anhydrous, powder: 0.000861167 kg; lognormal variance with pedigree 0.0034, pedigree (2,4,2,1,1)
  The data was collected for a hectare area through interview
  properties: wet mass 1 kg, dry mass 1 kg
- zinc monosulfate: 0.0023845 kg; lognormal variance with pedigree 0.0034, pedigree (2,4,2,1,1)
  The data was collected for a hectare area through interview
  properties: dry mass 1 kg, wet mass 1 kg
- sulfite: 0.001727 kg; lognormal variance with pedigree 0.0034, pedigree (2,4,2,1,1)
  The data was collected for a hectare area through interview
  properties: dry mass 1 kg, wet mass 1 kg
- portafer: 0.00120567 kg; lognormal variance with pedigree 0.0034, pedigree (2,4,2,1,1)
  The data was collected for a hectare area through interview
  properties: dry mass 1 kg, wet mass 1 kg
- compost: 0.15 kg; lognormal variance with pedigree 0.0034, pedigree (2,4,2,1,1)
  The data was collected for a hectare area through interview
  property nitrogen content 0.014; name N_content
  property lead content 4.9e-5; name Pb_content
  property mercury content 1.2e-7; name Hg_content
  property phosphorus content 0.0035; name P_content
  property nickel content 1.63e-5; name Ni_content
  property potassium content 0.01; name K_content
  property dry mass 0.5 kg; name DM
  property chromium content 2.23e-5; name Cr_content
  property copper content 5.77e-5; name Cu_content
  property cadmium content 3.6e-7; name Cd_content
  property zinc content 0.000184; name Zn_content
  properties: wet mass 1 kg, carbon content, non-fossil 0.183645, water content 1
- diesel, burned in agricultural machinery: 0.0140414 MJ; lognormal variance with pedigree 0.0034, pedigree (2,4,2,1,1)
  The data was collected for a hectare area through interview
- application of plant protection product, by field sprayer: 5.90909e-5 ha; lognormal variance with pedigree 0.0034, pedigree (2,4,2,1,1)
  The data was collected for a hectare area through interview
- polyethylene, high density, granulate: 0.00416667 kg; lognormal variance with pedigree 0.0034, pedigree (2,4,2,1,1)
  The data was collected for a hectare area through interview
  properties: heating value, net 42.47 MJ, dry mass 1 kg, carbon content, fossil 0.857143, wet mass 1 kg
  note on carbon content, fossil: Polyethylene is formed out of a huge amount of ethylene monomers (C2H4) (ecoinvent v2.2 report 11_II). MW=28 g/mol
- packaging, for pesticides: 0.0136221 kg; lognormal variance with pedigree 0.0514, pedigree (4,3,2,5,4)
  Total amount of active substance/s of pesticides needed for the production of pomegranate is calculated to be circa 6.81E-03 kg. Pesticide/s used in this dataset is/are: 'benzimidazole-compound', 'borax, anhydrous, powder', 'cyclic N-compound', 'mancozeb', 'manganese sulfate', 'organophosphorus-compound, unspecified', 'portafer', 'sulfite', 'zinc monosulfate'. The total amount of active substance/s is doubled in order to account for the packaging of the dilluted product of pesticide/s that is/are applied. Therefore, 1.36E-02 kg of packaging for pesticides is justified with this exchange.
  properties: carbon content, fossil 0.85714, wet mass 1 kg, heating value, net 25.97 MJ, dry mass 1 kg, price 0.0642 EUR2005
- land use change, perennial crop: 3.28139e-6 ha; = (0.19688328313253 * LUC_crop_specific + 0.0769954146475059 * (1-LUC_crop_specific))/60000
  The data was collected for a hectare area through interview
- trellis system, wooden poles, soft wood, tar impregnated: 1.66667e-5 ha; lognormal variance with pedigree 0.0034, pedigree (2,4,2,1,1)
  The data was collected for a hectare area through interview
- irrigation: 0.479733 m3; lognormal variance with pedigree 0.0034, pedigree (2,4,2,1,1)
  The data was collected for a hectare area through interview
  properties: dry mass 0.11 kg, water content 9089.91, wet mass 1000 kg
- naphtha: 0.000253167 kg; lognormal variance with pedigree 0.0034, pedigree (2,4,2,1,1)
  Neem & Karanj
  properties: carbon content, fossil 0.919743, wet mass 1 kg, dry mass 1 kg, heating value, net 45 MJ
- establishing orchard: 0.000729167 unit; lognormal variance with pedigree 0.0034, pedigree (2,4,2,1,1)
  The data was collected for a hectare area through interview
- organophosphorus-compound, unspecified: 6.05e-5 kg; lognormal variance with pedigree 0.0034, pedigree (2,4,2,1,1)
  This exchange is an aggregation of amounts:
  1.5E-5. Comment:
  7.5E-6. Comment:
  3.7999999999999995E-5. Comment:
  properties: carbon content, fossil 0.260898, dry mass 1 kg, wet mass 1 kg
- fruit tree seedling, for planting: 0.000729167 unit; lognormal variance with pedigree 0.0034, pedigree (2,4,2,1,1)
  The data was collected for a hectare area through interview
  properties: dry mass 0.03 kg, wet mass 0.03 kg, carbon content, non-fossil 1
- benzimidazole-compound: 1.25e-5 kg; lognormal variance with pedigree 0.0034, pedigree (2,4,2,1,1)
  The data was collected for a hectare area through interview
  properties: wet mass 1 kg, carbon content, fossil 0.529668, dry mass 1 kg
- planting tree: 0.000729167 unit; lognormal variance with pedigree 0.0034, pedigree (2,4,2,1,1)
  The data was collected for a hectare area through interview
- cyclic N-compound: 4.45e-6 kg; lognormal variance with pedigree 0.0034, pedigree (2,4,2,1,1)
  The data was collected for a hectare area through interview
  properties: carbon content, fossil 0.641962, wet mass 1 kg, dry mass 1 kg
- inorganic nitrogen fertiliser, as N: 0.0009115 kg; lognormal variance with pedigree 0.0034, pedigree (2,4,2,1,1)
  The data was collected for a hectare area through interview
  properties: wet mass 1 kg, dry mass 1 kg
- mancozeb: 0.000103125 kg; lognormal variance with pedigree 0.0034, pedigree (2,4,2,1,1)
  The data was collected for a hectare area through interview
  properties: carbon content, fossil 0.17759, wet mass 1 kg, dry mass 1 kg
- inorganic phosphorus fertiliser, as P2O5: 0.00149483 kg; lognormal variance with pedigree 0.0034, pedigree (2,4,2,1,1)
  The data was collected for a hectare area through interview
  properties: dry mass 1 kg, wet mass 1 kg
- packaging, for fertilisers: 0.0446145 kg; lognormal variance with pedigree 0.0514, pedigree (4,3,2,5,4)
  Total amount of active substance/s of fertilisers needed for the production of 'pomegranate' is calculated to be circa 2.23E-02 kg. Fertiliser/s used in this dataset is/are: 'dolomite', 'nitrogen fertiliser, as N', 'phosphate fertiliser, as P2O5', 'potassium sulfate, as K2O'. The total amount of active substance/s is doubled in order to account for the packaging of the dilluted product of fertiliser/s that is/are applied. Therefore, 4.46E-02 kg of packaging for fertilisers is justified with this exchange.
  properties: wet mass 1 kg, dry mass 1 kg, price 0.0642 EUR2005, heating value, net 25.01 MJ, carbon content, fossil 0.825301
  note on carbon content, fossil: Considering a chemical formula (C2H4)n for polyethylene, carbon content-fossil is calculated to be 0.856286 kg of Carbon per kg of dry mass.
- manganese sulfate: 0.000452167 kg; lognormal variance with pedigree 0.0034, pedigree (2,4,2,1,1)
  The data was collected for a hectare area through interview
  property molecular weight 0 g/mol; name manganese_sulfate_output_MW
  properties: wet mass 1 kg, dry mass 1 kg

## Inputs from nature
- Occupation, permanent crop, irrigated [natural resource, land]: 0.166667 m2*year; lognormal variance with pedigree 0.0048, pedigree (2,4,2,1,1)
  Calculated Value. This value has been calculated by using the ecoinvent LCI calculation tool for crop production.
- Transformation, to permanent crop, irrigated [natural resource, land]: 0.00833333 m2; lognormal variance with pedigree 0.0108, pedigree (2,4,2,1,1)
  (same comment as for Occupation, permanent crop, irrigated)
- Carbon dioxide, in air [natural resource, in air]: 0.379683 kg; lognormal variance with pedigree 0.0034, pedigree (2,4,2,1,1)
  (same comment as for Occupation, permanent crop, irrigated)
- Energy, gross calorific value, in biomass [natural resource, biotic]: 4.367 MJ; lognormal variance with pedigree 0.0034, pedigree (2,4,2,1,1)
  The data was collected for a hectare area through interview
- Transformation, from permanent crop, irrigated [natural resource, land]: 0.00833333 m2; lognormal variance with pedigree 0.0108, pedigree (2,4,2,1,1)
  (same comment as for Occupation, permanent crop, irrigated)

## Emissions to nature
- Zinc, ion [water, surface water]: 3.52239e-7 kg; lognormal variance with pedigree 0.0928, pedigree (2,4,2,1,1)
  (same comment as for Occupation, permanent crop, irrigated)
- Mineral oil [soil, agricultural]: 0.000253167 kg; lognormal variance with pedigree 0.0358, pedigree (2,4,2,1,1)
  Neem & Karanj
- Phosphate [water, surface water]: 1.56404e-5 kg; lognormal variance with pedigree 0.0428, pedigree (2,4,2,1,1)
  (same comment as for Occupation, permanent crop, irrigated)
- Nickel, ion [water, surface water]: 1.17199e-7 kg; lognormal variance with pedigree 0.0928, pedigree (2,4,2,1,1)
  (same comment as for Occupation, permanent crop, irrigated)
- Dimethoate [soil, agricultural]: 1.5e-5 kg; lognormal variance with pedigree 0.0358, pedigree (2,4,2,1,1)
  Dimethoate is used as pesticide
- Zinc, ion [water, ground-]: 5.49112e-7 kg; lognormal variance with pedigree 0.0928, pedigree (2,4,2,1,1)
  (same comment as for Occupation, permanent crop, irrigated)
- Dichlorvos [soil, agricultural]: 3.8e-5 kg; lognormal variance with pedigree 0.0358, pedigree (2,4,2,1,1)
  The data was collected for a hectare area through interview
- Water [water, ground-]: 0.187096 m3; lognormal variance with pedigree 0.0034, pedigree (2,4,2,1,1)
  (same comment as for Occupation, permanent crop, irrigated)
- Imidacloprid [soil, agricultural]: 4.45e-6 kg; lognormal variance with pedigree 0.0358, pedigree (2,4,2,1,1)
  Metalaxil is used as pesticide
- Phosphorus [water, surface water]: 1.03409e-5 kg; lognormal variance with pedigree 0.0428, pedigree (2,4,2,1,1)
  (same comment as for Occupation, permanent crop, irrigated)
- Ammonia [air, non-urban air or from high stacks]: 0.000171516 kg; lognormal variance with pedigree 0.0108, pedigree (2,4,2,1,1)
  (same comment as for Occupation, permanent crop, irrigated)
- Mancozeb [soil, agricultural]: 0.000103125 kg; lognormal variance with pedigree 0.0358, pedigree (2,4,2,1,1)
  Mancozeb is used as pesticide
- Cadmium, ion [water, surface water]: 1.39093e-9 kg; lognormal variance with pedigree 0.0928, pedigree (2,4,2,1,1)
  (same comment as for Occupation, permanent crop, irrigated)
- Nitrogen oxides [air, non-urban air or from high stacks]: 0.000120295 kg; lognormal variance with pedigree 0.0428, pedigree (2,4,2,1,1)
  (same comment as for Occupation, permanent crop, irrigated)
- Nitrate [water, ground-]: 0.00450965 kg; lognormal variance with pedigree 0.0428, pedigree (2,4,2,1,1)
  (same comment as for Occupation, permanent crop, irrigated)
- Carbon dioxide, fossil [air, non-urban air or from high stacks]: 0.0081766 kg; lognormal variance with pedigree 0.0034, pedigree (2,4,2,1,1)
  (same comment as for Occupation, permanent crop, irrigated)
- Phosphate [water, ground-]: 3.06619e-6 kg; lognormal variance with pedigree 0.0428, pedigree (2,4,2,1,1)
  (same comment as for Occupation, permanent crop, irrigated)
- Dinitrogen monoxide [air, non-urban air or from high stacks]: 4.56135e-5 kg; lognormal variance with pedigree 0.0328, pedigree (2,4,2,1,1)
  (same comment as for Occupation, permanent crop, irrigated)
- Cadmium, ion [water, ground-]: 7.50177e-10 kg; lognormal variance with pedigree 0.0928, pedigree (2,4,2,1,1)
  (same comment as for Occupation, permanent crop, irrigated)
- Chromium [soil, agricultural]: 1.92043e-6 kg; lognormal variance with pedigree 0.0428, pedigree (2,4,2,1,1)
  (same comment as for Occupation, permanent crop, irrigated)
- Copper, ion [water, surface water]: 1.95593e-7 kg; lognormal variance with pedigree 0.0928, pedigree (2,4,2,1,1)
  (same comment as for Occupation, permanent crop, irrigated)
- Water [air, non-urban air or from high stacks]: 0.244664 m3; lognormal variance with pedigree 0.0034, pedigree (2,4,2,1,1)
  (same comment as for Occupation, permanent crop, irrigated)
- Chromium, ion [water, surface water]: 1.32756e-7 kg; lognormal variance with pedigree 0.0928, pedigree (2,4,2,1,1)
  (same comment as for Occupation, permanent crop, irrigated)
- Cadmium [soil, agricultural]: 7.02655e-8 kg; lognormal variance with pedigree 0.0428, pedigree (2,4,2,1,1)
  (same comment as for Occupation, permanent crop, irrigated)
- Chromium, ion [water, ground-]: 3.45187e-7 kg; lognormal variance with pedigree 0.0928, pedigree (2,4,2,1,1)
  (same comment as for Occupation, permanent crop, irrigated)
- Mercury [soil, agricultural]: 7.89622e-10 kg; lognormal variance with pedigree 0.0428, pedigree (2,4,2,1,1)
  (same comment as for Occupation, permanent crop, irrigated)
- Lead [water, surface water]: 1.15769e-7 kg; lognormal variance with pedigree 0.0928, pedigree (2,4,2,1,1)
  (same comment as for Occupation, permanent crop, irrigated)
- Copper [soil, agricultural]: 2.8532e-6 kg; lognormal variance with pedigree 0.0428, pedigree (2,4,2,1,1)
  (same comment as for Occupation, permanent crop, irrigated)
- Copper, ion [water, ground-]: 5.94834e-8 kg; lognormal variance with pedigree 0.0928, pedigree (2,4,2,1,1)
  (same comment as for Occupation, permanent crop, irrigated)
- Nickel [soil, agricultural]: 9.71135e-7 kg; lognormal variance with pedigree 0.0428, pedigree (2,4,2,1,1)
  (same comment as for Occupation, permanent crop, irrigated)
- Mercury [water, surface water]: 3.59932e-10 kg; lognormal variance with pedigree 0.0928, pedigree (2,4,2,1,1)
  (same comment as for Occupation, permanent crop, irrigated)
- Zinc [soil, agricultural]: 0.000922237 kg; lognormal variance with pedigree 0.0428, pedigree (2,4,2,1,1)
  (same comment as for Occupation, permanent crop, irrigated)
- Lead [water, ground-]: 9.23788e-9 kg; lognormal variance with pedigree 0.0928, pedigree (2,4,2,1,1)
  (same comment as for Occupation, permanent crop, irrigated)
- Chlorpyrifos [soil, agricultural]: 7.5e-6 kg; lognormal variance with pedigree 0.0358, pedigree (2,4,2,1,1)
  Chlorpyrifos is used as pesticide
- Mercury [water, ground-]: 2.01234e-11 kg; lognormal variance with pedigree 0.0928, pedigree (2,4,2,1,1)
  (same comment as for Occupation, permanent crop, irrigated)
- Lead [soil, agricultural]: 3.24592e-6 kg; lognormal variance with pedigree 0.0428, pedigree (2,4,2,1,1)
  (same comment as for Occupation, permanent crop, irrigated)
- Water [water, surface water]: 0.0479733 m3; lognormal variance with pedigree 0.0034, pedigree (2,4,2,1,1)
  (same comment as for Occupation, permanent crop, irrigated)
- Carbendazim [soil, agricultural]: 1.25e-5 kg; lognormal variance with pedigree 0.0358, pedigree (2,4,2,1,1)
  Carbendazim is used as pesticide

## Sampling procedure
The farmer was identified and contacted by agriculture science faculty through agriculture consultant familiar with the local farmers in the region. Data was collected directly from the farmer through semi-structured interview using a questionnaire based on the input requirements of the ecoinvent LCI calculation tool for crop production. Supplemented with information collected from farming community of the area.

## Extrapolations
This dataset has been extrapolated from year 2018 to the year of the calculation (2021). The uncertainty has been adjusted accordingly.
