# electricity production, nuclear, pressure water reactor, heavy water moderated

Dataset: EcoSpold 2, unit process
Geography: AR
Time period: 2012-01-01 to 2021-12-31
Technology level: modern
Classification: ISIC rev.4 ecoinvent: 3510:Electric power generation, transmission and distribution
Classification: EcoSpold01Categories: nuclear power/power plants
Synonyms: PWR
Scenario: Business-as-Usual
System model: Allocation, cut-off by classification
Share of production covered: 100 %
Generated by: Alejandro P Arena
Published in: Suppen, N. 2017
Database: ecoinvent
isCopyrightProtected: true
accessRestrictedTo: 1

## General comment
This dataset represents the production of high voltage electricity at a grid-connected nuclear pressurized heavy water reactor (PHWR) power plant in Argentina in 2014.
During the reference year three nuclear power plants operated in the country. Atucha Nuclear Complex has two power stations, Atucha I (340 MW) and Atucha II (692 MW), located on the right side of the Paraná de las Palmas River, about 115 km northwest of the city of Buenos Aires. Atucha II reached its first criticality in mid-2014, so the power generation of this plant during the reference year of this study is limited.The third plant (600 MW) is located in the town of Embalse, in the province of Córdoba. All of them are PHWR, but the last one is a special type of PHWR developed in Canada, known as CANDU (Canned Deuterium Uranium),
This dataset has therefore been constructed based on the CANDU technology. It is characterised by the use of heavy water (deuterium oxide) as moderator and coolant and the use of natural uranium (not enriched) as fuel. This dataset is based on the database for "electricity production, nuclear, pressure water reactor, heavy water moderated"/ CA-QC 2015 (accessed: January 26th, 2018). Lifetime is estimated to 30 years . Only main consumed products, wastes and emissions are included. Operation data were collected for the nuclear production in Argentina during 2014 period. All emission data have been taken from the CA (Quebec) dataset.
Baumann J. (1949) Kraftwerk Rupperswil-Auenstein. Verlag Kraftwerk
Rupperswil-Auenstein AG, Rupperswil.
Nordostschweizerische Kraftwerke AG (NOK) (1956) Das Kraftwerk
Wildegg-Brugg. In: Schweizerische Bauzeitung, 74 (4), 47-52; 74 (5), 63-67; 74
(6), 83-88; 74 (7), 93-99; 74 (8), 111-116; 74 (10), 145-147; 74 (12), 167-172.

Aegerter A., Dr. Bosshardt O. (1954) Das Kraftwerk Birsfelden. In: Wasser- und
Energiewirtschaft, 46 (5-7), 165-176.

Brux G. (1983) Das Donaukraftwerk Greifenstein. In: Wasser, Energie, Luft, 75
(1-2), 11-13.

Radag A. (1979) 50 Jahre Rheinkraftwerk Albbruck-Dogern Aktiengesellschaft.
Waldshut/Rhein, 1929-1979.

Bundesamt für Energiewirtschaft (2001) Elektrizitätsstatistik 2000. Bern,
Schweiz.CAMMESA "COMPAÑÍA ADMINISTRADORA DEL MERCADO MAYORISTA ELÉCTRICO SOCIEDAD ANÓNIMA" Informe anual 2014. Supporting documentation available at: http://portalweb.cammesa.com/Memnet1/default.aspx
Baumann J. (1949) Kraftwerk Rupperswil-Auenstein. Verlag Kraftwerk
Rupperswil-Auenstein AG, Rupperswil.
Nordostschweizerische Kraftwerke AG (NOK) (1956) Das Kraftwerk
Wildegg-Brugg. In: Schweizerische Bauzeitung, 74 (4), 47-52; 74 (5), 63-67; 74
(6), 83-88; 74 (7), 93-99; 74 (8), 111-116; 74 (10), 145-147; 74 (12), 167-172.

Aegerter A., Dr. Bosshardt O. (1954) Das Kraftwerk Birsfelden. In: Wasser- und
Energiewirtschaft, 46 (5-7), 165-176.

Brux G. (1983) Das Donaukraftwerk Greifenstein. In: Wasser, Energie, Luft, 75
(1-2), 11-13.

Radag A. (1979) 50 Jahre Rheinkraftwerk Albbruck-Dogern Aktiengesellschaft.
Waldshut/Rhein, 1929-1979.

Bundesamt für Energiewirtschaft (2001) Elektrizitätsstatistik 2000. Bern,
Schweiz CAMMESA "COMPAÑÍA ADMINISTRADORA DEL MERCADO MAYORISTA ELÉCTRICO SOCIEDAD ANÓNIMA" . Supporting documentation available at: <http://portalweb.cammesa.com/Memnet1/default.aspx> Additional information can be obtained from CAMMESA under request

## Included activities start
From the constructed power plant ready to produce electricity and from the fuel ready in the power plant.

## Included activities end
This activity ends with 1kWh of high voltage electricity produced at the power plant and arrived at the busbar.

The module includes: fuel elements, chemicals, and diesel requirements as well as the relevant transport requirements. Water use for cooling is included, but no cooling tower infrastructure. Considered radioactive waste streams are: spent fuel to conditioning (no reprocessing); operational low active waste for conditioning in the intermediate repository; and, contaminated waste from dismantling. Non-radioactive wastes are accounted for.

## Geography
Data extrapolated from Quebec dataset and adapted for Argentina. Emissions have been taken from that dataset without modification. Uncertainty has been adjusted accordingly.

## Technology
There are three nuclear power plants in Argentina, all of them are pressurized heavy water reactors (PHWR), characterized by the use of heavy water as moderator and non-refined uranium as fuel. One of the Argentiean nuclear power plants (Embalse power plant) is a 600 MW Canadian design (CANDU 6) which uses the system of pressurized tubes.The other two PHWRs (Atucha 1 and Atucha 2) use presurized recipients instead. This dataset is based on the CANDU 6 technology. Some emission data were extrapolated from other nuclear technology. Uncertainty has been adjusted accordingly.

## Time period
The Annual Production Volume for Argentina is valid for the year 2014, obtained from the national energy statistics (CAMMESA)

## Reference product
- electricity, high voltage: 1 kWh; name amount_RP; By-product classification allocatable product; CPC 17100: Electrical energy
  production volume 5.25773e9 kWh; name apv_electricity
    Literature value/statistics. CAMMESA "COMPAÑÍA ADMINISTRADORA DEL MERCADO MAYORISTA ELÉCTRICO SOCIEDAD ANÓNIMA". The source (CAMMESA) provides statistics about net energy exchanges through the electric wholesale market .
    Supporting documentation available at: <http://portalweb.cammesa.com/Memnet1/default.aspx>
    Additional information available under request
  property price 0.0977 EUR2005
    Temporary price data. Calculated as 90% of purchasers price based on: 94% of the average price (to account for a 6% loss in transformation and transmission) for electricity for industrial consumersin 2005 (excluded taxes). From IEA.

## By-products
- waste paper, unsorted: 0 kg; By-product classification Recyclable; CPC 39240: Waste and scrap of paper or paperboard; pedigree (1,1,1,1,1)
  Estimated value. This figure have been taken from the CA (Quebec) dataset
  production volume 0 kg; = waste_paper* apv_electricity/amount_RP
    Calculated from production volume of reference product using the relative outputs.
  property price 0.093 EUR2005; name waste_paper_price_EUR2005
    Temporary price data. Calculated as 90% of purchasers price based on: Assumed to be 10% less than for sorted waste paper
  properties: heating value, net 14.11 MJ
- iron scrap, unsorted: 0 kg; CPC 39310: Slag, dross, scalings and other waste from the manufacture of iron or steel; By-product classification Recyclable; pedigree (1,1,1,1,1)
  Estimated value. This figure have been taken from the CA (Quebec) dataset. Same amount entering the dataset is estimated as by-product
  production volume 0 kg; = apv_electricity * (iron_scrap / amount_RP)
    Calculated from production volume of reference product using the relative outputs.
  property price 0.149 EUR2005
    Temporary price data. Calculated as 90% of purchasers price based on: estimated at 85% of sorted scrap
  property carbon content 0
    carbon content on a dry matter basis (reserved; not for manual entry)
  properties: carbon content, fossil 0, water content 0, carbon content, non-fossil 0, water in wet mass 0 kg, wet mass 1 kg, dry mass 1 kg, carbon allocation 0 kg

## Inputs from technosphere
- nitrogen, liquid: 5.64516e-7 kg; lognormal variance with pedigree 0.0059, pedigree (2,4,3,3,2)
  Estimated value. This figure have been taken from the CA (Quebec) dataset
  properties: dry mass 1 kg, wet mass 1 kg
- heavy water: 5.56174e-7 kg; lognormal variance with pedigree 0.0059, pedigree (2,4,3,3,2)
  Estimated value. This figure have been taken from the CA (Quebec) dataset
  properties: wet mass 1 kg
- chemical, organic: 1.19855e-6 kg; lognormal variance with pedigree 0.0059, pedigree (2,4,3,3,2)
  Estimated value. This figure have been taken from the CA (Quebec) dataset
  properties: wet mass 1 kg, dry mass 1 kg, heating value, net 19.03 MJ, carbon content, fossil 0.628
  note on carbon content, fossil: This dataset is an unweighted average of 20 organic substances (listed in Tab 88.1, ecoinvent v2.2 report 8, part II), being part of the top100 chemicals included in this database. The C-content has also been calculated as an unweighted average of the C content of the substances composing this dataset.
- spent nuclear fuel: -2.25899e-5 kg; name spent_nuclear_fuel; lognormal variance with pedigree 0.0059, pedigree (2,4,3,3,2)
  Estimated value. This figure have been taken from the CA (Quebec) dataset.Amount of spent fuel produced per year plus concrete of storage modules
  production volume 118772 kg; = spent_nuclear_fuel * apv_electricity/amount_RP
    Calculated from production volume of reference product using the relative outputs.
  property price 0 EUR2005; name spent_nuclear_fuel_price_EUR2005
  properties: dry mass 1 kg, wet mass 1 kg
- paper, woodfree, coated: 1.16796e-5 kg; = waste_paper; lognormal variance with pedigree 0.002, pedigree (1,1,3,1,1)
  Estimated value. This figure have been taken from the CA (Quebec) dataset
  Uncertainty: C
  properties: carbon content, non-fossil 0.22775, dry mass 0.945 kg, water content 0.0582011, heating value, net 14.11 MJ, carbon content, fossil 0.0590617, wet mass 1 kg
  note on carbon content, non-fossil: Biogenic C content was calculated after biogenic C contents of chemicals used in the production of the paper (in Tab 8.72 & 8.73 ecoinvent v2.2 report 11_III, part 8). The cellulose content in 1 kg of paper (on a wet mas basis) was estimated as (1-chemical content), C content of cellulose was considered 0.44 kgC/kg dry mass (ecoinvent v2.2 report, n 15a, pg 40)
  note on carbon content, fossil: Fossil C content was calculated after fossil C contents of chemicals used in the production of the paper (in Tab 8.72 & 8.73 ecoinvent v2.2 report 11_III, part 8).
- scrap steel: -2.29522e-6 kg; name scrap_steel; = (reinforcing_steel+ steel)*-1; lognormal variance with pedigree 0.21, pedigree (5,5,5,5,5)
  (same comment as for iron scrap, unsorted)
  production volume 12067.6 kg; = apv_electricity * (scrap_steel / amount_RP)
    Calculated from production volume of reference product using the relative outputs.
  property price 0 EUR2005; name scrap_steel_price_EUR2005
  properties: wet mass 1 kg, dry mass 1 kg
- helium: 4.89433e-7 kg; lognormal variance with pedigree 0.0059, pedigree (2,4,3,3,2)
  Estimated value. This figure have been taken from the CA (Quebec) dataset
  properties: wet mass 1 kg, dry mass 1 kg
- carbon dioxide, liquid: 4.53281e-7 kg; lognormal variance with pedigree 0.0053, pedigree (2,4,3,3,1)
  Estimated value. This figure have been taken from the CA (Quebec) dataset
  properties: heating value, net 8.27 MJ, dry mass 1 kg, wet mass 1 kg, carbon content, fossil 0.272727
- sodium percarbonate, powder: 1.6129e-6 kg; lognormal variance with pedigree 0.0059, pedigree (2,4,3,3,2)
  Estimated value. This figure have been taken from the CA (Quebec) dataset
  properties: heating value, net 4.63 MJ, wet mass 1 kg, dry mass 1 kg, carbon content, fossil 0.0902256
- hazardous waste, for incineration: -2.36374e-6 kg; name haz_waste; lognormal variance with pedigree 0.0059, pedigree (2,4,3,3,2)
  Estimated value. This figure have been taken from the CA (Quebec) dataset
  production volume 12427.7 kg; = 0,0000023637* 5257727446/1
    Calculated from production volume of reference product using the relative outputs.
  property price 0 EUR2005; name haz_waste_price_EUR2005
  properties: carbon content, fossil 0.554667, wet mass 1 kg, water content 0.333333, dry mass 0.75 kg, heating value, net 17 MJ
  note on carbon content, fossil: Tab A.6, ecoinvent v2.2 report 13_I. C content has been calculated after data in the tables, and then referred to 1 kg DM
  note on heating value, net: Value taken from the general comment of the treatment dataset.
- uranium hexafluoride: 2.36374e-5 kg; lognormal variance with pedigree 0.0059, pedigree (2,4,3,3,2)
  Estimated value.This figure have been taken from the CA (Quebec) dataset As CANDU reactors use natural uranium (unenriched UO2) but no data were collected for UO2 production (impurities removal from yellowcake, refining to UO3 and conversion to UO2) uranium hexafluoride is used as proxy (UO3 is used to produce both UO2 and UF6).
  properties: wet mass 1 kg, dry mass 1 kg
- lubricating oil: 4.89433e-7 kg; name lubricatingOil; lognormal variance with pedigree 0.0059, pedigree (2,4,3,3,2)
  Estimated value. This figure have been taken from the CA (Quebec) dataset
  properties: wet mass 1 kg, heating value, net 40.2 MJ, dry mass 1 kg, carbon content, fossil 0.75
  note on heating value, net: Literature value, Source: IPCC 2006, 2006 IPCC Guidelines for National Greenhouse Gas Inventories, Prepared by the National Greenhouse Gas Inventories Programme, Eggleston H.S., Buendia L., Miwa K., Ngara T. and Tanabe K. (eds). Published: IGES, Japan
  note on carbon content, fossil: Lubricating oil is produced from diesel. C-content/dry mass of fats and oils considered 75%, from: ecoinvent v2.2 report, n 15a, pg 40
- fly ash and scrubber sludge: -2.41935e-5 kg; name fly_ash; lognormal variance with pedigree 0.0059, pedigree (2,4,3,3,2)
  Estimated value. This figure have been taken from the CA (Quebec) dataset
  production volume 127203 kg; = fly_ash* apv_electricity/amount_RP
    Calculated from production volume of reference product using the relative outputs.
  property price 0 EUR2005; name fly_ash_price_EUR2005
  properties: dry mass 0.1 kg, wet mass 1 kg, water content 9, carbon content, fossil 0.167
- cationic resin: 4.03671e-10 kg; lognormal variance with pedigree 0.0059, pedigree (2,4,3,3,2)
  Estimated value. This figure have been taken from the CA (Quebec) dataset
  property density 0.76 kg/l; name density_resinC
  properties: dry mass 0.5 kg, heating value, net 6.68 MJ, water content 1, wet mass 1 kg, carbon content, fossil 0.521606
  note on density: Literature value. Bulk density between 560 and 960. Source: DOWEX. Fundamentals of Ion Exchange http://msdssearch.dow.com/PublishedLiteratureDOWCOM/dh_0032/0901b803800326ca.pdf?filepath=liquidseps/pdfs/noreg/177-01837.pdf&fromPage=GetDoc
  note on carbon content, fossil: Chemically inert polystyrene beads are treated with concentrated sulfuric or chlorosulfonic acid to give cross-linked polystyrene 3-sulfonic acid (Cation exchange resins, Ullmann). The resine was approximated as C8H8O3S (from Ullmann, Cation exchange resins). The resine is hydrated (ecoinvent v2.2 report 8, part II, Tab 93.5)
- waste reinforced concrete: -0.0142102 kg; name waste_concrete; = (concrete*DM_concrete)*-1; lognormal variance with pedigree 0.21, pedigree (5,5,5,5,5)
  Estimated value. This figure have been taken from the CA (Quebec) dataset. Same amount entering the dataset is estimated as by-product.
  production volume 7.47135e7 kg; = apv_electricity * (waste_concrete / amount_RP)
    Calculated from production volume of reference product using the relative outputs.
  property price 0 EUR2005; name waste_concrete_price_EUR2005
  properties: wet mass 1 kg, water content 0.00585407, dry mass 0.99418 kg
- waste mineral oil: -2.64182e-6 kg; name waste_oil; lognormal variance with pedigree 0.0059, pedigree (2,4,3,3,2)
  Estimated value. This figure have been taken from the CA (Quebec) dataset
  production volume 13890 kg; = waste_oil* apv_electricity/amount_RP
    Calculated from production volume of reference product using the relative outputs.
  property price 0 EUR2005; name waste_oil_price_EUR2005
  properties: heating value, net 34.7 MJ, dry mass 0.9 kg, water content 0.111111, carbon content, fossil 0.864444, wet mass 1 kg
- transport, passenger car: 4.27451e-5 km; lognormal variance with pedigree 0.0059, pedigree (2,4,3,3,2)
  Estimated value. This figure have been taken from the CA (Quebec) dataset
  This vehicle use corresponds to maintenance and operation services related to the operation of the whole company. Transports have been distributed among different activities (electricity production, transport and distribution) according to their respective use of these transports and, when the exact distribution was not available, according to the relative expenses of each activity
- tap water: 0.0182147 kg; name drinking_water; lognormal variance with pedigree 0.0059, pedigree (2,4,3,3,2)
  Estimated value. This figure have been taken from the CA (Quebec) dataset
  properties: water content 2962.17, wet mass 1 kg, carbon content, fossil 0.00178991, dry mass 0.000337476 kg
  note on carbon content, fossil: Bicarbonate content is 2.93 mol/m3. CO2 content is 0.1 mol/m3 (ecoinvent v2.2 report 8, Tab 93.1).
- sodium hypochlorite, without water, in 15% solution state: 5.56174e-8 kg; lognormal variance with pedigree 0.0059, pedigree (2,4,3,3,2)
  Estimated value. This figure have been taken from the CA (Quebec) dataset
  properties: dry mass 1 kg, wet mass 1 kg
- hydrazine: 3.42047e-7 kg; lognormal variance with pedigree 0.0059, pedigree (2,4,3,3,2)
  Estimated value. This figure have been taken from the CA (Quebec) dataset
  properties: dry mass 1 kg, wet mass 1 kg, heating value, net 15.13 MJ
- concrete, normal: 6.48869e-6 m3; name concrete; lognormal variance with pedigree 0.0059, pedigree (2,4,3,3,2)
  Estimated value. This figure have been taken from the CA (Quebec) dataset
  property dry mass 2190 kg; name DM_concrete
  properties: wet mass 2380 kg, water content 0.086758
- transport, freight, light commercial vehicle: 5.06863e-5 metric ton*km; lognormal variance with pedigree 0.0059, pedigree (2,4,3,3,2)
  Estimated value. This figure have been taken from the CA (Quebec) dataset. This vehicle use corresponds to maintenance and operation services related to the operation of the whole company. Transports have been distributed among different activities (electricity production, transport and distribution) according to their respective use of these transports and, when the exact distribution was not available, according to the relative expenses of each activity.
- chlorodifluoromethane: 2.8921e-8 kg; lognormal variance with pedigree 0.0059, pedigree (2,4,3,3,2)
  Estimated value. This figure have been taken from the CA (Quebec) dataset
  properties: carbon content, fossil 0.139535, wet mass 1 kg, dry mass 1 kg, heating value, net 5.61 MJ
- diesel, burned in diesel-electric generating set, 10MW: 7.19027e-5 MJ; lognormal variance with pedigree 0.0059, pedigree (2,4,3,3,2)
  Estimated value. This figure have been taken from the CA (Quebec) dataset
  property kgFuel_Input 5695.2 kg; name inputDiesel; = 6.78E+03*densityDiesel
  property heating value, gross 45.4 MJ; name GHVDiesel
  property density 0.84 kg/l; name densityDiesel
  properties: heating value, net 1 MJ
  note on heating value, gross: Literature value. gross (upper) heating (calorific) value. Ecoinvent
- low level radioactive waste: -1.91046e-9 m3; name low_level_waste; lognormal variance with pedigree 0.0059, pedigree (2,4,3,3,2)
  Estimated value. This figure have been taken from the CA (Quebec) dataset
  production volume 10.0449 m3; = 0,0000000019105* 5257727446/1
    Estimated value. Measured/calculated value for Quebec is extrapolated for AR.Amount of spent fuel produced per year plus concrete of storage modules
  property price 0 EUR2005; name low_level_waste_price_EUR2005
  properties: wet mass 2500 kg, dry mass 2500 kg
- anionic resin: 1.01235e-9 kg; lognormal variance with pedigree 0.0059, pedigree (2,4,3,3,2)
  Estimated value. This figure have been taken from the CA (Quebec) dataset
  property density 0.76 kg/l; name density_resinA
  properties: carbon content, fossil 0.680721, water content 1, wet mass 1 kg, dry mass 0.5 kg, heating value, net 9.09 MJ
  note on carbon content, fossil: Cross-linked polystyrene beads are treated with chloromethyl methyl ether under anhydrous conditions, with either aluminum chloride or tin(IV) chloride as catalyst. Chloromethylated polystyrene is obtained. In a second stage, the chlorine in the chloromethylated group can be replaced by an amine (Anion exchange resins, in Ullmann). In this case, Trimethylamine, C3H9N, is used (ecoinvent v2.2 report 8-part 93). That is, the resine can be formulated as C12H18NCl (after Ullmann, Anion exchange resins). The resine is hydrated (ecoinvent v2.2 report 8, part II, Tab 93.7)
- municipal solid waste: -1.87987e-5 kg; name municipal_solid_waste; lognormal variance with pedigree 0.0059, pedigree (2,4,3,3,2)
  Estimated value. This figure have been taken from the CA (Quebec) dataset
  production volume 98845.3 kg; = 5257727446* 1,88E-05/1
    Calculated from production volume of reference product using the relative outputs.
  property price 0 EUR2005; name municipal_solid_waste_price_EUR2005
  properties: carbon content, fossil 0.171549, wet mass 1 kg, water content 0.297017, heating value, net 11.74 MJ, carbon content, non-fossil 0.261655, dry mass 0.771 kg
  note on carbon content, fossil: MSW composition in tab 4.1, ecoinvent v2.2 report 13_I. C content referred to 1 kg DM
- low level radioactive waste for final repository: -8.95439e-9 m3; name low_level_waste_final; lognormal variance with pedigree 0.0059, pedigree (2,4,3,3,2)
  Estimated value. This figure have been taken from the CA (Quebec) dataset
  production volume 47.0798 m3; = low_level_waste_final * apv_electricity/amount_RP
    Estimated value. Measured/calculated value for Quebec is extrapolated for AR
  property price 0 EUR2005; name low_level_waste_final_price_EUR2005
  properties: dry mass 2500 kg, wet mass 2500 kg
- sulfuric acid: 7.31368e-5 kg; lognormal variance with pedigree 0.0059, pedigree (2,4,3,3,2)
  Estimated value. This figure have been taken from the CA (Quebec) dataset
  properties: wet mass 1 kg, dry mass 1 kg
- steel, low-alloyed, hot rolled: 1.6e-6 kg; name steel; lognormal variance with pedigree 0.0059, pedigree (2,4,3,3,2)
  Estimated value. This figure have been taken from the CA (Quebec) dataset
  properties: wet mass 1 kg, dry mass 1 kg, carbon content, fossil 0.005
  note on carbon content, fossil: Low alloyed steel composition given in Tab. 3.2 ecoinvent v2.2 report 10_partII. Steel assumed to have a C content of 0.5%
- nuclear power plant, pressure water reactor, 650MW: 4.00967e-12 unit; = 1/(60* 8760*650000*0.73); lognormal variance with pedigree 0.0059, pedigree (2,4,3,3,2)
  Calculated value. The life time of Atucha I and Embalse have recently been prolonged for another 30 years, and so the total lifetime have been estimated in 60 years. An average load factor for nuclear power plants of 73% was applied (PRIS database, 2018).
  Reference(s): International Atomic Energy Agency. 2018. Power Reactor Information System (PRIS), World Statistics, Load Factor, accessible online athttps://pris.iaea.org/PRIS/WorldStatistics/WorldTrendinAverageLoadFactor.aspx, last accessed February 2018
  property lifetime 30 year; name lifetime
- reinforcing steel: 6.95217e-7 kg; name reinforcing_steel; lognormal variance with pedigree 0.0059, pedigree (2,4,3,3,2)
  Estimated value. This figure have been taken from the CA (Quebec) dataset
  properties: carbon content, fossil 0.004, dry mass 1 kg, wet mass 1 kg
- hydrogen, liquid: 1.28754e-6 kg; lognormal variance with pedigree 0.0059, pedigree (2,4,3,3,2)
  Estimated value. This figure have been taken from the CA (Quebec) dataset
  properties: wet mass 1 kg, dry mass 1 kg, heating value, net 120.21 MJ
- transport, freight, lorry, unspecified: 9.55882e-5 metric ton*km; lognormal variance with pedigree 0.1253, pedigree (2,4,3,3,2)
  Estimated value. This figure have been taken from the CA (Quebec) dataset
  This vehicle use corresponds to maintenance and operation services related to the operation of the whole company. Transports have been distributed among different activities (electricity production, transport and distribution) according to their respective use of these transports and, when the exact distribution was not available, according to the relative expenses of each activity.
- sodium hydroxide, without water, in 50% solution state: 2.34983e-5 kg; lognormal variance with pedigree 0.0059, pedigree (2,4,3,3,2)
  Estimated value. This figure have been taken from the CA (Quebec) dataset
  properties: heating value, net 3.03 MJ, dry mass 1 kg, wet mass 1 kg
- chlorine, liquid: 2.52503e-6 kg; lognormal variance with pedigree 0.0059, pedigree (2,4,3,3,2)
  Estimated value. This figure have been taken from the CA (Quebec) dataset
  properties: wet mass 1 kg, dry mass 1 kg
- aluminium sulfate, powder: 1.00389e-5 kg; lognormal variance with pedigree 0.0059, pedigree (2,4,3,3,2)
  Estimated value. This figure have been taken from the CA (Quebec) dataset
  properties: dry mass 1 kg, wet mass 1 kg
- cast iron: 6.95217e-7 kg; name iron; lognormal variance with pedigree 0.0059, pedigree (2,4,3,3,2)
  Estimated value. This figure have been taken from the CA (Quebec) dataset
  properties: carbon content, fossil 0.04, wet mass 1 kg, dry mass 1 kg
  note on carbon content, fossil: Cast iron is made by remelting pig iron in small furnaces (e.g. cupola furnaces or electric arc furnaces) and poured into moulds to make castings. It usually contains 2% to 6% carbon (ecoinvent v2.2 report 10_partII). An average content of 4% was considered
- waste paper, unsorted: -1.16796e-5 kg; lognormal variance with pedigree 0.0059, pedigree (2,4,3,3,2)
  Estimated value. This figure have been taken from the CA (Quebec) dataset
  production volume 61408.4 kg
- iron scrap, unsorted: -6.95217e-7 kg; lognormal variance with pedigree 0.21, pedigree (5,5,5,5,5)
  (same comment as for iron scrap, unsorted)
  production volume 3655.26 kg
  properties: price 0.149 EUR2005, wet mass 1 kg, dry mass 1 kg

## Inputs from nature
- Water, cooling, unspecified natural origin [natural resource, in water]: 0.165934 m3; name cooling_water; lognormal variance with pedigree 0.0064, pedigree (2,4,3,4,2)
  Estimated value. This figure have been taken from the CA (Quebec) dataset
- Water, river [natural resource, in water]: 0.0184372 m3; name process_water; lognormal variance with pedigree 0.0059, pedigree (2,4,3,3,2)
  Estimated value. This figure have been taken from the CA (Quebec) dataset

## Emissions to nature
- Cobalt-58 [water, surface water]: 0.00114 kBq; lognormal variance with pedigree 0.4706, pedigree (2,5,5,5,5)
  Estimated value. This figure have been taken from the CA (Quebec) dataset. Value extrapolated from a different PWR technology.
- Cesium-137 [water, surface water]: 0.000206897 kBq; lognormal variance with pedigree 0.0059, pedigree (2,4,3,3,2)
  Estimated value. This figure have been taken from the CA (Quebec) dataset
- Sodium-24 [water, surface water]: 9.98e-6 kBq; lognormal variance with pedigree 0.4706, pedigree (2,5,5,5,5)
  (same comment as for Cobalt-58)
- Antimony-125 [air, non-urban air or from high stacks]: 2.34e-8 kBq; lognormal variance with pedigree 0.4706, pedigree (2,5,5,5,5)
  (same comment as for Cobalt-58)
- Carbon-14 [water, surface water]: 0.00286429 kBq; lognormal variance with pedigree 0.0059, pedigree (2,4,3,3,2)
  Estimated value. This figure have been taken from the CA (Quebec) dataset. Measured/calculated value for Quebec is extrapolated for AR.
- Strontium-89 [water, surface water]: 3.65e-6 kBq; lognormal variance with pedigree 0.4706, pedigree (2,5,5,5,5)
  (same comment as for Cobalt-58)
- Water [air, non-urban air or from high stacks]: 0.0368743 m3; = 0.2*(cooling_water+process_water); lognormal variance with pedigree 0.0073, pedigree (3,4,3,3,2)
  Estimated value. This figure have been taken from the CA (Quebec) dataset, based on input of water. It is assumed that 20% of cooling water is evaporated and 80% is rejected to the river
- Iodine-133 [water, surface water]: 4.16e-7 kBq; lognormal variance with pedigree 0.4706, pedigree (2,5,5,5,5)
  (same comment as for Cobalt-58)
- Zirconium-95 [air, non-urban air or from high stacks]: 5.78e-8 kBq; lognormal variance with pedigree 0.4706, pedigree (2,5,5,5,5)
  (same comment as for Cobalt-58)
- Water [water, surface water]: 0.147515 m3; = 0.8*(cooling_water+process_water)+(drinking_water/1000); lognormal variance with pedigree 0.0133, pedigree (4,4,3,3,2)
  (same comment as for Water)
- Barium-140 [air, non-urban air or from high stacks]: 3.17e-10 kBq; lognormal variance with pedigree 0.4706, pedigree (2,5,5,5,5)
  (same comment as for Cobalt-58)
- Xenon-133 [air, non-urban air or from high stacks]: 0.604 kBq; lognormal variance with pedigree 0.4706, pedigree (2,5,5,5,5)
  (same comment as for Cobalt-58)
- Antimony-122 [water, surface water]: 9.04e-7 kBq; lognormal variance with pedigree 0.4706, pedigree (2,5,5,5,5)
  (same comment as for Cobalt-58)
- Technetium-99m [water, surface water]: 2.81e-6 kBq; lognormal variance with pedigree 0.4706, pedigree (2,5,5,5,5)
  (same comment as for Cobalt-58)
- Antimony-125 [water, surface water]: 4.17e-5 kBq; lognormal variance with pedigree 0.4706, pedigree (2,5,5,5,5)
  (same comment as for Cobalt-58)
- Noble gases, radioactive, unspecified [air, non-urban air or from high stacks]: 0.259 kBq; lognormal variance with pedigree 0.4706, pedigree (2,5,5,5,5)
  (same comment as for Cobalt-58)
- Zirconium-95 [water, surface water]: 0.0116796 kBq; lognormal variance with pedigree 0.3053, pedigree (2,4,3,3,2)
  Estimated value. This figure have been taken from the CA (Quebec) dataset
- Cobalt-60 [water, surface water]: 0.000700779 kBq; lognormal variance with pedigree 0.0059, pedigree (2,4,3,3,2)
  (same comment as for Carbon-14)
- Carbon-14 [air, non-urban air or from high stacks]: 2.45829e-5 kBq; lognormal variance with pedigree 0.3053, pedigree (2,4,3,3,2)
  Estimated value. This figure have been taken from the CA (Quebec) dataset
- Cesium-137 [air, non-urban air or from high stacks]: 7.28e-9 kBq; lognormal variance with pedigree 0.4706, pedigree (2,5,5,5,5)
  (same comment as for Cobalt-58)
- Hydrogen-3, Tritium [water, surface water]: 133.482 kBq; lognormal variance with pedigree 0.0059, pedigree (2,4,3,3,2)
  Estimated value. This figure have been taken from the CA (Quebec) dataset
- Cobalt-60 [air, non-urban air or from high stacks]: 7.57e-8 kBq; lognormal variance with pedigree 0.4706, pedigree (2,5,5,5,5)
  (same comment as for Cobalt-58)
- Manganese-54 [water, surface water]: 1.31e-5 kBq; lognormal variance with pedigree 0.4706, pedigree (2,5,5,5,5)
  (same comment as for Cobalt-58)
- Radioactive species, other beta emitters [air, non-urban air or from high stacks]: 8.67e-8 kBq; lognormal variance with pedigree 0.4706, pedigree (2,5,5,5,5)
  (same comment as for Cobalt-58)
- Cesium-136 [water, surface water]: 2.81e-7 kBq; lognormal variance with pedigree 0.4706, pedigree (2,5,5,5,5)
  (same comment as for Cobalt-58)
- Niobium-95 [water, surface water]: 3.07e-6 kBq; lognormal variance with pedigree 0.4706, pedigree (2,5,5,5,5)
  (same comment as for Cobalt-58)
- Ruthenium-103 [water, surface water]: 2.85e-7 kBq; lognormal variance with pedigree 0.4706, pedigree (2,5,5,5,5)
  (same comment as for Cobalt-58)
- Suspended solids, unspecified [water, surface water]: 1.76585e-5 kg; lognormal variance with pedigree 0.0059, pedigree (2,4,3,3,2)
  Estimated value. This figure have been taken from the CA (Quebec) dataset
- Iodine-131 [water, surface water]: 0.00500556 kBq; lognormal variance with pedigree 0.0059, pedigree (2,4,3,3,2)
  Estimated value. This figure have been taken from the CA (Quebec) dataset
- Tellurium-132 [water, surface water]: 8.42e-8 kBq; lognormal variance with pedigree 0.4706, pedigree (2,5,5,5,5)
  Estimated value. This figure have been taken from the CA (Quebec) dataset Value extrapolated from a different PWR technology.
- Cesium-134 [water, surface water]: 0.00014683 kBq; lognormal variance with pedigree 0.0059, pedigree (2,4,3,3,2)
  Estimated value. This figure have been taken from the CA (Quebec) dataset
- Antimony-124 [air, non-urban air or from high stacks]: 4.75e-10 kBq; lognormal variance with pedigree 0.4706, pedigree (2,5,5,5,5)
  (same comment as for Cobalt-58)
- Cerium-141 [water, surface water]: 1.76e-7 kBq; lognormal variance with pedigree 0.4706, pedigree (2,5,5,5,5)
  (same comment as for Cobalt-58)
- Strontium-90 [water, surface water]: 1.3e-6 kBq; lognormal variance with pedigree 0.4706, pedigree (2,5,5,5,5)
  (same comment as for Cobalt-58)
- Zinc-65 [water, surface water]: 0.00183537 kBq; lognormal variance with pedigree 0.0059, pedigree (2,4,3,3,2)
  Estimated value. This figure have been taken from the CA (Quebec) dataset
- Tellurium-123m [water, surface water]: 1.57e-6 kBq; lognormal variance with pedigree 0.4706, pedigree (2,5,5,5,5)
  (same comment as for Cobalt-58)
- Aerosols, radioactive, unspecified [air, non-urban air or from high stacks]: 1.3376e-6 kBq; lognormal variance with pedigree 0.0059, pedigree (2,4,3,3,2)
  Estimated value. This figure have been taken from the CA (Quebec) dataset
- Niobium-95 [air, non-urban air or from high stacks]: 0.0286429 kBq; lognormal variance with pedigree 0.0059, pedigree (2,4,3,3,2)
  Estimated value. This figure have been taken from the CA (Quebec) dataset
- Krypton-85m [air, non-urban air or from high stacks]: 0.00987 kBq; lognormal variance with pedigree 0.4706, pedigree (2,5,5,5,5)
  (same comment as for Cobalt-58)
- Molybdenum-99 [water, surface water]: 6e-9 kBq; lognormal variance with pedigree 0.3433, pedigree (2,2,5,5,2)
  (same comment as for Cobalt-58)
- Iodine-133 [air, non-urban air or from high stacks]: 1.82e-6 kBq; lognormal variance with pedigree 0.4706, pedigree (2,5,5,5,5)
  (same comment as for Cobalt-58)
- Xenon-135 [air, non-urban air or from high stacks]: 0.166 kBq; lognormal variance with pedigree 0.4706, pedigree (2,5,5,5,5)
  (same comment as for Cobalt-58)
- Cobalt-58 [air, non-urban air or from high stacks]: 1.64e-8 kBq; lognormal variance with pedigree 0.4706, pedigree (2,5,5,5,5)
  (same comment as for Cobalt-58)
- Chromium-51 [water, surface water]: 7.56e-6 kBq; lognormal variance with pedigree 0.4706, pedigree (2,5,5,5,5)
  (same comment as for Cobalt-58)
- Silver-110 [water, surface water]: 4.43e-6 kBq; lognormal variance with pedigree 0.4706, pedigree (2,5,5,5,5)
  (same comment as for Cobalt-58)
- Iodine-131 [air, non-urban air or from high stacks]: 3.61513e-7 kBq; lognormal variance with pedigree 0.0059, pedigree (2,4,3,3,2)
  Estimated value. This figure have been taken from the CA (Quebec) dataset
- Antimony-124 [water, surface water]: 0.0256952 kBq; lognormal variance with pedigree 0.3053, pedigree (2,4,3,3,2)
  (same comment as for Carbon-14)
- Cerium-144 [water, surface water]: 4.82e-7 kBq; lognormal variance with pedigree 0.4706, pedigree (2,5,5,5,5)
  (same comment as for Cobalt-58)
- Iron-59 [water, surface water]: 0.0233593 kBq; lognormal variance with pedigree 0.0059, pedigree (2,4,3,3,2)
  Estimated value. This figure have been taken from the CA (Quebec) dataset
- Lanthanum-140 [water, surface water]: 4.95e-7 kBq; lognormal variance with pedigree 0.4706, pedigree (2,5,5,5,5)
  (same comment as for Cobalt-58)
- Silver-110 [air, non-urban air or from high stacks]: 3.13e-9 kBq; lognormal variance with pedigree 0.4706, pedigree (2,5,5,5,5)
  (same comment as for Cobalt-58)
- Radioactive species, alpha emitters [water, surface water]: 3.02e-8 kBq; lognormal variance with pedigree 0.4706, pedigree (2,5,5,5,5)
  (same comment as for Cobalt-58)
- Hydrocarbons, unspecified [water, surface water]: 1.23471e-6 kg; lognormal variance with pedigree 0.0059, pedigree (2,4,3,3,2)
  Estimated value. This figure have been taken from the CA (Quebec) dataset
- Cobalt-57 [water, surface water]: 8.92e-6 kBq; lognormal variance with pedigree 0.4706, pedigree (2,5,5,5,5)
  (same comment as for Cobalt-58)

## Sampling procedure
This dataset is based on electricity produced in the following nuclear power plants (electricity generated MWh):
Atucha (2631698.775 MWh), Atucha II (1092914.527 MWh), Embalse (1533114.144 MWh). Total net electricity generated from this source during 2014: 5257727.446 MWh
Percentage representativenes in the total installed capacity of this technology for 2014 was 100 %

Source: CAMMESA "COMPAÑÍA ADMINISTRADORA DEL MERCADO MAYORISTA ELÉCTRICO SOCIEDAD ANÓNIMA"Supporting documentation available at: http://portalweb.cammesa.com/Memnet1/default.aspxNOTE: ""

## Extrapolations
This dataset has been extrapolated from year 2017 to the year of the calculation (2021). The uncertainty has been adjusted accordingly.
