# treatment of wastewater from liquid crystal display production, capacity 1.1E10l/year

Dataset: EcoSpold 2, unit process
Geography: RoW
Time period: 1994-01-01 to 2021-12-31
Technology level: current
Classification: ISIC rev.4 ecoinvent: 3700:Sewerage
Classification: EcoSpold01Categories: waste management/wastewater treatment
Tags: Treatment; ConvertedDataset
Scenario: Business-as-Usual
System model: Allocation, cut-off by classification
Generated by: Roland Hischier
Published in: Hischier R. 2007
Database: ecoinvent
isCopyrightProtected: true
accessRestrictedTo: 1

## General comment
Wastewater purified in a moderatly large municipal wastewater treatment plant (capacity class 2), with an average capacity size of 71100 per-captia-equivalents PCE.
Wastewater contains (in kg/m3): COD: 2.6 (GSD=122.5%); BOD: 3.37 (GSD=122.5%); Ntot.: 0.773 (GSD=122.5%); F: 0.016 (GSD=224.1%);
[This dataset was already contained in the ecoinvent database version 2. It was not individually updated during the transfer to ecoinvent version 3. Life Cycle Impact Assessment results may still have changed, as they are affected by changes in the supply chain, i.e. in other datasets. This dataset was generated following the ecoinvent quality guidelines for version 2. It may have been subject to central changes described in the ecoinvent version 3 change report (http://www.ecoinvent.org/database/ecoinvent-version-3/reports-of-changes/), and the results of the central updates were reviewed extensively. The changes added e.g. consistent water flows and other information throughout the database. The documentation of this dataset can be found in the ecoinvent reports of version 2, which are still available via the ecoinvent website. The change report linked above covers all central changes that were made during the conversion process.]

## Included activities end
Infrastructure materials for municipal wastewater treatment plant, transports, dismantling. Land use burdens.

## Geography
Specific to the technology mix encountered in Switzerland in 2000. Well applicable to modern treatment practices in Europe, North America or Japan.

## Technology
Three stage wastewater treatment (mechanical, biological, chemical) including sludge digestion (fermentation) according to the average technology in Switzerland

## Parameters
- fraction, process water, to air: 0.1 dimensionless; name fraction_PW_to_air; lognormal variance with pedigree 0.092025, pedigree (4,4,3,2,4)

## Reference product
- wastewater from liquid crystal display production: -1 m3; CPC 39920: Sewage sludge; By-product classification Waste
  EcoSpold01Location=CH
  production volume 3.96633 m3
    This is a placeholder value that does not reflect real-world production volumes. This dataset does not currently require a real-world production volume to work in the database framework, and no actual data were collected yet. This has no negative effect on the results of the ecoinvent database.
  property carbon content, fossil 0.734985
    BOD is 3.37e-3 kg/kg (Tab 12.12, ecoinvent v2.2 report 18_III). BOD was converted to TOC, using conversion factors in Tab 4.10 (ecoinvent v2.2 report 13_IV). TOC was considered as Total Carbon.
  property price 0 EUR2005
    Waste products are assigned a price of zero as they are assumed to require further treatment.
  property carbon content 0.734985
    carbon content on a dry matter basis (reserved; not for manual entry)
  properties: water in wet mass 997.023 kg, carbon content, non-fossil 0, water content 334.868, wet mass 1000 kg, dry mass 2.97736 kg, carbon allocation 2.18831 kg

## Inputs from technosphere
- process-specific burdens, slag landfill: 0 kg; pedigree (1,1,1,1,1)
  EcoSpold01Location=CH
  burden from sludge incineration. Uncertainty calculated from wastewater composition and treatment model
- waste plastic, mixture: 0 kg; pedigree (1,1,1,1,1)
  EcoSpold01Location=CH
  direct wastewater treatment plant burden. Uncertainty calculated from wastewater composition and treatment model
  production volume 0 kg
    Calculated from the production volume of wastewater from liquid crystal display production in proportion to the respective output amounts.
  properties: heating value, net 30.79 MJ, water content 0.180638, carbon content, fossil 0.747344, wet mass 1 kg, dry mass 0.847 kg
  note on heating value, net: Value taken from the general comment of the treatment dataset.
  note on carbon content, fossil: C content in 1 kg DM was calculated using data in Tab A.2, ecoinvent v2.2 report 13_I
- process-specific burdens, residual material landfill: 0 kg; pedigree (1,1,1,1,1)
  burden from sludge incineration. Uncertainty calculated from wastewater composition and treatment model
  EcoSpold01Location=CH
- hydrochloric acid, without water, in 30% solution state: 8.8797e-8 kg; lognormal variance with pedigree 0.092, pedigree (1,1,5,5,1)
  burden from sludge incineration. Uncertainty calculated from wastewater composition and treatment model
  EcoSpold01Location=RER
  properties: wet mass 1 kg, dry mass 1 kg, heating value, net 3.32 MJ
- ammonia, anhydrous, liquid: 0 kg; pedigree (1,1,1,1,1)
  (same comment as for process-specific burdens, residual material landfill)
  properties: dry mass 1 kg, wet mass 1 kg
- heat, district or industrial, natural gas: 0 MJ; pedigree (1,1,1,1,1)
  (same comment as for hydrochloric acid, without water, in 30% solution state)
  properties: heating value, net 1 MJ
- electricity, high voltage: 0 kWh; pedigree (1,1,1,1,1)
  (same comment as for process-specific burdens, residual material landfill)
- cement, unspecified: 0 kg; pedigree (1,1,1,1,1)
  (same comment as for process-specific burdens, slag landfill)
  properties: dry mass 1 kg, wet mass 1 kg
- wastewater treatment facility, capacity 1.1E10l/year: 1.9883e-9 unit; lognormal variance with pedigree 0.042, pedigree (1,1,5,5,1)
  uncertainty heeded in exchanges of the module
  EcoSpold01Location=CH
- process-specific burdens, municipal waste incineration: 0 kg; pedigree (1,1,1,1,1)
  (same comment as for process-specific burdens, slag landfill)
- chromium oxide, flakes: 1.1592e-6 kg; lognormal variance with pedigree 0.542, pedigree (1,1,5,5,1)
  (same comment as for hydrochloric acid, without water, in 30% solution state)
  properties: dry mass 1 kg, wet mass 1 kg
- chemical, inorganic: 1.48e-7 kg; lognormal variance with pedigree 0.092, pedigree (1,1,5,5,1)
  EcoSpold01Location=GLO
  burden from sludge incineration. Uncertainty calculated from wastewater composition and treatment model
  properties: carbon content, fossil 0.003, wet mass 1 kg, dry mass 1 kg
  note on carbon content, fossil: This dataset is an unweighted average of 20 inorganic substances (listed in Tab 88.1, ecoinvent v2.2 report 8, part II), being part of the top100 chemicals included in this database. The C-content has also been calculated as an unweighted average of the C content of the substances composing this dataset.
- waste graphical paper: -0.0155 kg; lognormal variance with pedigree 0.042, pedigree (1,1,5,5,1)
  (same comment as for waste plastic, mixture)
  production volume 0.062 kg
    (same comment as for waste plastic, mixture)
  properties: heating value, net 14.12 MJ, water content 0.126126, carbon content, non-fossil 0.454955, wet mass 1 kg, dry mass 0.888 kg
- municipal waste incineration facility: 4.5077e-10 unit; lognormal variance with pedigree 0.042, pedigree (1,1,5,5,1)
  (same comment as for process-specific burdens, residual material landfill)
- sewer grid, 1.1E10l/year, 242 km: 1.6832e-7 km; lognormal variance with pedigree 0.042, pedigree (1,1,5,5,1)
  EcoSpold01Location=CH
  uncertainty heeded in exchanges of the module
- titanium dioxide: 5.6801e-5 kg; lognormal variance with pedigree 0.542, pedigree (1,1,5,5,1)
  (same comment as for hydrochloric acid, without water, in 30% solution state)
  properties: wet mass 1 kg, dry mass 1 kg
- electricity, low voltage: 0 kWh; pedigree (1,1,1,1,1)
  (same comment as for waste plastic, mixture)
- liquid manure spreading, by vacuum tanker: 0.005854 m3; lognormal variance with pedigree 0.042, pedigree (1,1,5,5,1)
  EcoSpold01Location=CH
  burden from sludge spreading. Uncertainty calculated from wastewater composition and treatment model
- residual material landfill: 2.5799e-12 unit; lognormal variance with pedigree 0.072, pedigree (1,1,5,5,1)
  (same comment as for process-specific burdens, slag landfill)
- slag landfill: 7.8367e-12 unit; lognormal variance with pedigree 0.072, pedigree (1,1,5,5,1)
  (same comment as for process-specific burdens, residual material landfill)
- heat, district or industrial, other than natural gas: 0 MJ; pedigree (1,1,1,1,1)
  (same comment as for process-specific burdens, slag landfill)
  properties: heating value, net 1 MJ
- waste cement, hydrated: 0 kg; pedigree (1,1,1,1,1)
  (same comment as for process-specific burdens, slag landfill)
  production volume 0 kg
    (same comment as for waste plastic, mixture)
  properties: wet mass 1 kg, dry mass 1 kg
- quicklime, milled, packed: 1.7877e-5 kg; lognormal variance with pedigree 0.112, pedigree (1,1,5,5,1)
  (same comment as for process-specific burdens, slag landfill)
  properties: water content 0.010101, dry mass 0.99 kg, wet mass 1 kg
- sodium hydroxide, without water, in 50% solution state: 9.8603e-5 kg; lognormal variance with pedigree 0.102, pedigree (1,1,5,5,1)
  (same comment as for hydrochloric acid, without water, in 30% solution state)
  properties: heating value, net 3.03 MJ, wet mass 1 kg, dry mass 1 kg
- process-specific burdens, slag landfill: 0.00124697, 0.00316123 kg (2 entries); lognormal variance with pedigree 0.072, pedigree (1,1,5,5,1)
  (same comment as for process-specific burdens, slag landfill)
- waste plastic, mixture: -0.00172425, -0.000115208, -8.71297e-6, -4.75849e-5, -1.92238e-5, -4.51863e-5, -0.00146914, -0.0120707 kg (8 entries); lognormal variance with pedigree 0.042, pedigree (1,1,5,5,1)
  (same comment as for waste plastic, mixture)
  production volume 0.0614782 kg
- process-specific burdens, residual material landfill: 0.000350283, 0.000888017 kg (2 entries); lognormal variance with pedigree 0.072, pedigree (1,1,5,5,1)
  (same comment as for process-specific burdens, residual material landfill)
- ammonia, anhydrous, liquid: 0.000415935, 3.57546e-5, 5.5625e-5, 0.000110213, 0.000107979, 1.13174e-5, 5.0593e-5, 0.00119688 kg (8 entries); lognormal variance with pedigree 0.222, pedigree (1,1,5,5,1)
  (same comment as for process-specific burdens, residual material landfill)
- heat, district or industrial, natural gas: 0.00193852, 0.0464506, 0.125779 MJ (3 entries); lognormal variance with pedigree 0.222, pedigree (1,1,5,5,1)
  (same comment as for hydrochloric acid, without water, in 30% solution state)
- electricity, high voltage: 0.00261968, 0.000502217, 0.0115679, 0.0379099, 0.00851509, 0.122614, 0.0194455, 0.0560558 kWh (8 entries); lognormal variance with pedigree 0.492, pedigree (1,1,5,5,1)
  (same comment as for process-specific burdens, residual material landfill)
- cement, unspecified: 7.1525e-5, 1.48822e-5, 1.09002e-6, 3.10692e-6, 7.02639e-5, 2.06807e-6, 2.27136e-5, 2.74809e-6, 0.000306942 kg (9 entries); lognormal variance with pedigree 0.082, pedigree (1,1,5,5,1)
  (same comment as for process-specific burdens, slag landfill)
- process-specific burdens, municipal waste incineration: 0.510051, 1.29305 kg (2 entries); lognormal variance with pedigree 0.042, pedigree (1,1,5,5,1)
  (same comment as for process-specific burdens, slag landfill)
- electricity, low voltage: 0.0423038, 0.00770271, 0.173879, 0.607495, 0.124023, 1.90415, 0.308058, 0.884585 kWh (8 entries); lognormal variance with pedigree 0.072, pedigree (1,1,5,5,1)
  (same comment as for waste plastic, mixture)
- heat, district or industrial, other than natural gas: 0.000598318, 0.0361293, 1.47547 MJ (3 entries); lognormal variance with pedigree 0.042, pedigree (1,1,5,5,1)
  (same comment as for process-specific burdens, slag landfill)
- waste cement, hydrated: -0.000350283, -0.000888017 kg (2 entries); lognormal variance with pedigree 0.082, pedigree (1,1,5,5,1)
  (same comment as for process-specific burdens, slag landfill)
  production volume 0.00491151 kg

## Emissions to nature
- Cyanide [air, urban air close to ground]: 3.5399e-5 kg; lognormal variance with pedigree 0.242, pedigree (1,1,5,5,1)
  emission from sludge incineration. Uncertainty calculated from wastewater composition and treatment model
- BOD5, Biological Oxygen Demand [water, surface water]: 0.31953 kg; lognormal variance with pedigree 0.072, pedigree (1,1,5,5,1)
  sewer overload discharge plus direct wastewater treatment plant emission plus emission from sludge incineration. Uncertainty calculated from wastewater composition and treatment model
- Nitrate [water, surface water]: 1.3302 kg; lognormal variance with pedigree 0.062, pedigree (1,1,5,5,1)
  (same comment as for BOD5, Biological Oxygen Demand)
- DOC, Dissolved Organic Carbon [water, surface water]: 0.24376 kg; lognormal variance with pedigree 0.082, pedigree (1,1,5,5,1)
  (same comment as for BOD5, Biological Oxygen Demand)
- Ammonium, ion [water, surface water]: 0.30365 kg; lognormal variance with pedigree 0.062, pedigree (1,1,5,5,1)
  direct wastewater treatment plant emission. Uncertainty calculated from wastewater composition and treatment model
- Nitrogen [water, surface water]: 0.013494 kg; lognormal variance with pedigree 0.082, pedigree (1,1,5,5,1)
  (same comment as for Ammonium, ion)
- Nitrate [water, ground-, long-term]: 0.0014129 kg; lognormal variance with pedigree 0.082, pedigree (1,1,5,5,1)
  (same comment as for Cyanide)
- Carbon monoxide, fossil [air, urban air close to ground]: 0.0054259 kg; lognormal variance with pedigree 0.162, pedigree (1,1,5,5,1)
  (same comment as for Cyanide)
- TOC, Total Organic Carbon [water, surface water]: 0.26035 kg; lognormal variance with pedigree 0.072, pedigree (1,1,5,5,1)
  (same comment as for BOD5, Biological Oxygen Demand)
- Fluoride [water, surface water]: 0.016 kg; lognormal variance with pedigree 0.672, pedigree (1,1,5,5,1)
  (same comment as for BOD5, Biological Oxygen Demand)
- Nitrite [water, surface water]: 0.017734 kg; lognormal variance with pedigree 0.082, pedigree (1,1,5,5,1)
  (same comment as for Ammonium, ion)
- Methane, fossil [air, urban air close to ground]: 0.016997 kg; lognormal variance with pedigree 0.142, pedigree (1,1,5,5,1)
  (same comment as for Cyanide)
- Water [water, unspecified]: 0.9 m3; name water_to_water_unspecified; lognormal variance with pedigree 0.0827, pedigree (2,2,5,5,1)
  Calculated value based on water balance.
  property carbon content, fossil 0; name C_content_fossil
  property wet mass 1000 kg; name WM
  property carbon content, non-fossil 0; name C_content_non_fossil
  property water in wet mass 1000 kg; name WWM
  property fraction, origin: unspecified 0; name fraction_origin_unspecified_Ww
  property fraction, origin: salt water 0; name fraction_origin_salt_water_Ww
  property fraction, origin: fresh water 1; name fraction_origin_fresh_water_Ww
  property dry mass 0 kg; name DM
- DOC, Dissolved Organic Carbon [water, ground-, long-term]: 0.0035052 kg; lognormal variance with pedigree 0.112, pedigree (1,1,5,5,1)
  (same comment as for Cyanide)
- NMVOC, non-methane volatile organic compounds, unspecified origin [air, urban air close to ground]: 7.7225e-5 kg; lognormal variance with pedigree 0.262, pedigree (1,1,5,5,1)
  direct digester gas emission. Uncertainty calculated from wastewater composition and treatment model
- Ammonia [air, urban air close to ground]: 0.0098071 kg; lognormal variance with pedigree 0.282, pedigree (1,1,5,5,1)
  direct digester gas emission plus emission from sludge incineration plus emission from sludge spreading. Uncertainty calculated from wastewater composition and treatment model
- Water [air, unspecified]: 0.1 m3; name water_to_air_unspecified; lognormal variance with pedigree 0.0827, pedigree (2,2,5,5,1)
  Calculated value based on water balance.
  property fraction, origin: unspecified 1; name fraction_origin_unspecified
  property fraction, origin: salt water 0; name fraction_origin_salt_water
  property fraction, origin: fresh water 0; name fraction_origin_fresh_water
- COD, Chemical Oxygen Demand [water, ground-, long-term]: 0.0088583 kg; lognormal variance with pedigree 0.112, pedigree (1,1,5,5,1)
  (same comment as for Cyanide)
- TOC, Total Organic Carbon [water, ground-, long-term]: 0.0035052 kg; lognormal variance with pedigree 0.112, pedigree (1,1,5,5,1)
  (same comment as for Cyanide)
- BOD5, Biological Oxygen Demand [water, ground-, long-term]: 0.0028975 kg; lognormal variance with pedigree 0.112, pedigree (1,1,5,5,1)
  (same comment as for Cyanide)
- Dinitrogen monoxide [air, urban air close to ground]: 0.0028538 kg; lognormal variance with pedigree 0.072, pedigree (1,1,5,5,1)
  direct wastewater treatment plant emission plus direct digester gas emission plus emission from sludge incineration plus emission from sludge spreading. Uncertainty calculated from wastewater composition and treatment model
- COD, Chemical Oxygen Demand [water, surface water]: 0.50384 kg; lognormal variance with pedigree 0.082, pedigree (1,1,5,5,1)
  (same comment as for BOD5, Biological Oxygen Demand)
- Carbon dioxide, fossil [air, urban air close to ground]: 6.2311 kg; lognormal variance with pedigree 0.062, pedigree (1,1,5,5,1)
  (same comment as for Cyanide)
- Carbon [soil, agricultural]: 0.22637 kg; lognormal variance with pedigree 0.112, pedigree (1,1,5,5,1)
  emission from sludge spreading. Uncertainty calculated from wastewater composition and treatment model
- Nitrogen oxides [air, urban air close to ground]: 0.019275 kg; lognormal variance with pedigree 0.082, pedigree (1,1,5,5,1)
  direct digester gas emission plus emission from sludge incineration. Uncertainty calculated from wastewater composition and treatment model

## Extrapolations
wastewater compositions from literature and/or estimates This dataset has been copied from an original dataset covering the geography CH. The uncertainty has been adjusted accordingly.

## Review by Jürgen Sutter 2009-02-07
passed.
