# sugar beet seed production, for sowing

Dataset: EcoSpold 2, unit process
Geography: GLO
Time period: 1999-01-01 to 2021-12-31
Technology level: current
Classification: EcoSpold01Categories: agricultural means of production/seed
Classification: ISIC rev.4 ecoinvent: 0164:Seed processing for propagation
Tags: ConvertedDataset
Scenario: Business-as-Usual
System model: Allocation, cut-off by classification
Share of production covered: 50 %
Generated by: Thomas Nemecek
Published in: Nemecek, T. 2007
Database: ecoinvent
isCopyrightProtected: true
accessRestrictedTo: 1

## General comment
Refers to 1 kg of sugar beet seed (fresh weight)
[This dataset was already contained in the ecoinvent database version 2. It was not individually updated during the transfer to ecoinvent version 3. Life Cycle Impact Assessment results may still have changed, as they are affected by changes in the supply chain, i.e. in other datasets. This dataset was generated following the ecoinvent quality guidelines for version 2. It may have been subject to central changes described in the ecoinvent version 3 change report (http://www.ecoinvent.org/database/ecoinvent-version-3/reports-of-changes/), and the results of the central updates were reviewed extensively. The changes added e.g. consistent water flows and other information throughout the database. The documentation of this dataset can be found in the ecoinvent reports of version 2, which are still available via the ecoinvent website. The change report linked above covers all central changes that were made during the conversion process.]

## Included activities end
The seed produced at the farm is transported to the processing centre, treated (pre-cleaning, cleaning, eventually drying, chemical dressing (for integrated production) and bag filling), stored and afterwards transported to the regional storage centre. No data on wastewater production were available.

## Technology
Refers to average seed processing

## Time period
Date of the major data sources.

## Reference product
- sugar beet seed, for sowing: 1 kg; CPC 01803: Sugar beet seeds; By-product classification allocatable product
  production volume 6.63361e9 kg
    Calculated from the average global "sugar beet" production of the years 1999-2002. (FAOSTAT 2011: http://faostat.fao.org/) and the required seed input for 1 kg of sugar beet (with sugar beet yield of 77640 kg/ha & seed input 2.1 kg/ha; cf. ecoinvent dataset "sugar beet production, Swiss integrated production"). The original value was split into conventional/integrated seed (98%) and organic seed (2%), where 2% organic production is an extrapolation from Europe to the world (http://www.fao.org/docrep/004/y3557e/y3557e09.htm).
  property wet mass 1 kg; name WM
  property price 1.78167 EUR2005
    Calculated based on inputs: The price of the product has been calculated as a sum of the values of the material and energy inputs for this product. This value is therefore a rough estimation. It may underestimate the real price since there are additional expenses when producing any product. These expences can include for example labour costs, treatment of waste materials and profit for the producer. Please consider carefully whether this level of data quality is acceptable for your application.
  property carbon content, non-fossil 0.381818; name C_content_non_fossil; = 12/44*1.4
    biogene carbon content on a dry matter basis
  property dry mass 0.9 kg; name DM
  property energy content 14.877 MJ; name energy_content; = 16.53*DM
    as gross calorific value (when relevant)
  property water in wet mass 0.1 kg; name WWM; = 1-DM
  property carbon content, fossil 0; name C_content_fossil
    fossil carbon content on a dry matter basis
  property water content 0.111111; name water_content; = (1-DM)/DM
  property carbon content 0.381818
    carbon content on a dry matter basis (reserved; not for manual entry)
  properties: carbon allocation 0.343636 kg

## Inputs from technosphere
- building, multi-storey: 2e-5 m3; lognormal variance with pedigree 0.0426, pedigree (2,1,5,5,1)
  See "01_crop production - seed production & processing_v1.0.pdf" - pdf-document on the dedicated talk page of ecoinvent (www.ecoinvent.org/documentation)
  EcoSpold01Location=RER
- pesticide, unspecified: 0.054 kg; lognormal variance with pedigree 0.0426, pedigree (2,1,5,5,1)
  EcoSpold01Location=CH
  See "01_crop production - seed production & processing_v1.0.pdf" - pdf-document on the dedicated talk page of ecoinvent (www.ecoinvent.org/documentation)
  properties: wet mass 1 kg, dry mass 1 kg, carbon content, fossil 0.486978
  note on carbon content, fossil: Mean of C content in all pesticides whose formula has been documented in Sutter 2010
- packaging, for pesticides: 0.108 kg; lognormal variance with pedigree 0.0912, pedigree (4,3,5,5,4)
  Total amount of active substance/s of pesticides needed for the production of sugar beet seed, for sowing is calculated to be circa 5.40E-02 kg. Pesticide/s used in this dataset is/are: 'pesticide, unspecified'. The total amount of active substance/s is doubled in order to account for the packaging of the dilluted product of pesticide/s that is/are applied. Therefore, 1.08E-01 kg of packaging for pesticides is justified with this exchange.
  properties: carbon content, fossil 0.85714, wet mass 1 kg, dry mass 1 kg, price 0.0642 EUR2005, heating value, net 25.97 MJ
- sugar beet: 0 kg; pedigree (1,1,1,1,1)
  (same comment as for pesticide, unspecified)
  properties: wet mass 1 kg, dry mass 0.23 kg, carbon content, non-fossil 0.433043, water content 3.34783
  note on carbon content, non-fossil: Composition data obtained from Beets raw, in (http://www.nal.usda.gov/fnic/foodcomp/search/). First, composition data were refered to 1 kg dry mass. Then, C-contents were calculated considering a C-content/dry mass of 46% in carbohydrates (including fibres), 53% in proteins and 75% in fats. All data from "Evolutionary and Biochemical Aspects", A.D. Kay and T. Vrede (in Global Ecology, 2010, Elsevier B.V., S.E. Jørgensen Ed.).
- electricity, low voltage: 0.1 kWh; lognormal variance with pedigree 0.0426, pedigree (2,1,5,5,1)
  See "01_crop production - seed production & processing_v1.0.pdf" - pdf-document on the dedicated talk page of ecoinvent (www.ecoinvent.org/documentation)
  EcoSpold01Location=CH
- sugar beet: 0.167475, 28.5925 kg (2 entries); lognormal variance with pedigree 0.0426, pedigree (2,1,5,5,1)
  (same comment as for pesticide, unspecified)

## Inputs from nature
- Occupation, construction site [natural resource, land]: 8e-6 m2*year; lognormal variance with pedigree 0.0826, pedigree (2,1,5,5,1)
  See "01_crop production - seed production & processing_v1.0.pdf" - pdf-document on the dedicated talk page of ecoinvent (www.ecoinvent.org/documentation)
- Transformation, to industrial area [natural resource, land]: 4e-6 m2; lognormal variance with pedigree 0.1626, pedigree (2,1,5,5,1)
  (same comment as for Occupation, construction site)
- Occupation, industrial area [natural resource, land]: 0.0002 m2*year; lognormal variance with pedigree 0.0826, pedigree (2,1,5,5,1)
  (same comment as for Occupation, construction site)
- Carbon dioxide, in air [natural resource, in air]: -7.2086 kg
  (same comment as for Occupation, construction site)
- Transformation, from unspecified [natural resource, land]: 4e-6 m2; lognormal variance with pedigree 0.1626, pedigree (2,1,5,5,1)
  (same comment as for Occupation, construction site)

## Sampling procedure
Data based on a literature, expert information and enquiry of seed processing plants.

## Extrapolations
This dataset has been extrapolated from year 2002 to the year of the calculation (2021). The uncertainty has been adjusted accordingly.
