# iceberg lettuce production

Dataset: EcoSpold 2, unit process
Geography: GLO
Time period: 2010-01-01 to 2021-12-31
Technology level: current
Classification: ISIC rev.4 ecoinvent: 0113:Growing of vegetables and melons, roots and tubers
Scenario: Business-as-Usual
System model: Allocation, cut-off by classification
Generated by: Franziska Stössel
Published in: Stoessel, Franziska; 2012
Database: ecoinvent
isCopyrightProtected: false
accessRestrictedTo: 1

## General comment
This dataset represents iceberg lettuce production according to the Integrated Production standard in CH.
Yield: 27 t / ha.
Duration of one cropping cycle: 2.75 months.
Field production.
The LCA study, from which this LCI has been derived, contains detailed descriptions of the system boundaries and the data sources used (Stoessel et al. 2012). The publication is published and freely available with comprehensive supporting information:
http://pubs.acs.org/doi/pdf/10.1021/es2030577
Franziska Stoessel, Ronnie Juraske, Stephan Pfister, Stefanie Hellweg. (2012) Life Cycle Inventory and Carbon and Water FoodPrint of Fruits and Vegetables: Application to a Swiss Retailer. Environmental Science & Technology 6(46) 3253-3262.
This activity was adapted to include the global average land use change (LUC) emissions according 2nd edition of the Quantis-modified tool developed by Blonk Consultants 'WFLDB-adapted-Blonk 2014 direct-land-use-change-assessment-tool_2015-05-18a.xlsx', tab. 'Country & land use unknown'. The size of the emission depends on (i) the relative crop expansion in all countries of the crop during the last 20 years and (ii) the corresponding, country specific land transformations. The current results are based on the average FAOSTAT data (harvested area) of 2009-2011 and 1989-1991. The weighted average is used which takes into account relative difference in crop expansion into primary forest, secondary forest, grassland, perennial and annual land.

## Included activities start
From seedling production.

## Included activities end
This activity ends with harvest and storage.
The dataset includes a storage period of 0.3 month and it's use of electricity. And the greenhouse heating energy for the seedling production.The pesticide inputs are classified according to their chemical classes and the emmssions are assigned to the soil (100%).Mercury emissions are neglected due to a lack of data while other heavy metal emissions are included.

The dataset doesn't include infrastructure for production and storage facilities. No transports for agricultural means of production from the regional storage to the farm are included.

## Technology
Integrated Production

## Parameters
- fraction, irrigation water to surface water: 0.2 dimensionless; name fraction_IW_to_surface_water; lognormal variance with pedigree 0.0886, pedigree (4,3,1,1,4)
  Literature value (Doll, 2011) cross referenced with expert opinion.
- fraction, process water, to air: 0.15 dimensionless; name fraction_PW_to_air; lognormal variance with pedigree 0.092025, pedigree (4,4,3,2,4)
  Literature value. In case when no industry/process specific data are available, default evaporation fraction value is used. This value is 15% and is based on literature (Statistics Canada, 2007 & Shaffer, K.H., 2008, Consumptive water use in the Great Lakes Basin, USGS & Shiklomanov, 2003, World Water Resources at the Beginning of the 21st Century) and has been approved by an expert.
- fraction, irrigation water, to ground water: 0.8 dimensionless; name fraction_IW_to_ground_water; lognormal variance with pedigree 0.0886, pedigree (4,3,1,1,4)
  Literature value (Doll, 2011) cross referenced with expert opinion.
- fraction, irrigation water, to air: 0.586986 dimensionless; name fraction_IW_to_air; lognormal variance with pedigree 0.0409, pedigree (2,2,2,1,1)
  Literature value (Siebert, 2010) (Vionnet, S., Quantis Water Database - Technical Report, 2012).
- fraction, tap water, to air: 0.15 dimensionless; name fraction_TW_to_air; = fraction_PW_to_air; lognormal variance with pedigree 0.092025, pedigree (4,4,3,2,4)
  Calculated value. See comment in the other parametres present in this dataset. Tap water is considered to be always used as process water, thus process water fractions to air are applied to all tap water input flows to calculate the amount of water consumed in the processes.

## Reference product
- iceberg lettuce: 1 kg; source Stoessel, Franziska; 2012; CPC 01214: Lettuce and chicory; By-product classification allocatable product
  production volume 2.36224e10 kg
    in kg / year (2010) including lettuce and chicory
  property price 1.2 EUR2005
    Calculated from the trade statistics for the year 2005 published by the UN (COMTRADE database, accessed 20151105) as an average of 5 biggest importers of lettuce in the world; DE, CA, UK, NL and FR. Comtrade cathegory: 70519: Lettuce, fresh or chilled except cabbage lettuce.
  property carbon content 0.0282798
    carbon content on a dry matter basis (reserved; not for manual entry)
  properties: dry mass 0.054 kg, carbon content, non-fossil 0.0282798, water content 17.5185, wet mass 1 kg, water in wet mass 0.946 kg, carbon content, fossil 0, carbon allocation 0.00152711 kg

## Inputs from technosphere
- potassium sulfate: 0 kg; source Stoessel, Franziska; 2012; pedigree (1,1,1,1,1)
  The exchange has been updated from 'potassium sulfate, as K2O' into 'potassium sulfate' and therefore its amount has been scaled (multiplied) from 0.0013 kg by 1.85 kg of 'potassium sulfate' per kg of 'potassium sulfate, as K2O'.
  properties: wet mass 1 kg, dry mass 1 kg
- heat, central or small-scale, other than natural gas: 0.153 MJ; source Stoessel, Franziska; 2012; lognormal variance with pedigree 0.0105, pedigree (2,3,4,3,2)
  properties: heating value, net 1 MJ
- pyrethroid-compound: 4.075e-7 kg; = pyre1; source Stoessel, Franziska; 2012; lognormal variance with pedigree 0.0453, pedigree (3,4,5,3,2)
  sum of compounds in this family
  property carbon content, fossil 0.623; name C_content_fossil
  property dry mass 1 kg; name DM
  property water in wet mass 0 kg; name WWM
  property wet mass 1 kg; name WM
  property carbon content, non-fossil 0; name C_content_non_fossil
  property water content 0; name water_content
- packaging, for fertilisers: 0.010628 kg; lognormal variance with pedigree 0.0592, pedigree (4,3,4,5,4)
  Total amount of active substance/s of fertilisers needed for the production of 'iceberg lettuce' is calculated to be circa 5.31E-03 kg. Fertiliser/s used in this dataset is/are: 'ammonium nitrate, as N', 'phosphate fertiliser, as P2O5', 'potassium sulfate, as K2O'. The total amount of active substance/s is doubled in order to account for the packaging of the dilluted product of fertiliser/s that is/are applied. Therefore, 1.06E-02 kg of packaging for fertilisers is justified with this exchange.
  properties: price 0.0642 EUR2005, heating value, net 25.01 MJ, dry mass 1 kg, carbon content, fossil 0.825301, wet mass 1 kg
  note on carbon content, fossil: Considering a chemical formula (C2H4)n for polyethylene, carbon content-fossil is calculated to be 0.856286 kg of Carbon per kg of dry mass.
- ammonium nitrate: 0 kg; source Stoessel, Franziska; 2012; pedigree (1,1,1,1,1)
  The exchange has been updated from 'ammonium nitrate, as N' into 'ammonium nitrate' and therefore its amount has been scaled (multiplied) from 0.0035 kg by 2.8573 kg of 'ammonium nitrate' per kg of 'ammonium nitrate, as N'.
  properties: dry mass 1 kg, wet mass 1 kg
- fertilising, by broadcaster: 0.00201 ha; source Stoessel, Franziska; 2012; lognormal variance with pedigree 0.0105, pedigree (2,3,4,3,2)
  Fertilizing by broadcaster is used as a proxy for all the machinery work done in horticultural processes.
- tap water: 0.4 kg; name tap_water_input; source Stoessel, Franziska; 2012; lognormal variance with pedigree 0.0105, pedigree (2,3,4,3,2)
  properties: dry mass 0.000337476 kg, water content 2962.17, wet mass 1 kg, carbon content, fossil 0.00178991
  note on carbon content, fossil: Bicarbonate content is 2.93 mol/m3. CO2 content is 0.1 mol/m3 (ecoinvent v2.2 report 8, Tab 93.1).
- irrigation: 0.0152 m3; name water_irrigation_input; source Stoessel, Franziska; 2012; lognormal variance with pedigree 0.0198, pedigree (2,4,4,4,3)
  Switzerland
  properties: water content 9089.91, wet mass 1000 kg, dry mass 0.11 kg
- inorganic phosphorus fertiliser, as P2O5: 0 kg; source Stoessel, Franziska; 2012; pedigree (1,1,1,1,1)
  properties: dry mass 1 kg, wet mass 1 kg
- electricity, low voltage: 0.015 kWh; source Stoessel, Franziska; 2012; lognormal variance with pedigree 0.0105, pedigree (2,3,4,3,2)
- pesticide, unspecified: 2.22e-5 kg; = unsp1; source Stoessel, Franziska; 2012; lognormal variance with pedigree 0.0105, pedigree (2,3,4,3,2)
  sum of compounds in this family
  properties: wet mass 1 kg, dry mass 1 kg, carbon content, fossil 0.486978
  note on carbon content, fossil: Mean of C content in all pesticides whose formula has been documented in Sutter 2010
- [sulfonyl]urea-compound: 1.11e-5 kg; = sulfo1; source Stoessel, Franziska; 2012; lognormal variance with pedigree 0.0453, pedigree (3,4,5,3,2)
  sum of compounds in this family
  properties: dry mass 1 kg, carbon content, fossil 0.540853, wet mass 1 kg
- cyclic N-compound: 7.4e-6 kg; = cyclic1; source Stoessel, Franziska; 2012; lognormal variance with pedigree 0.0453, pedigree (3,4,5,3,2)
  sum of compounds in this family
  properties: carbon content, fossil 0.641962, dry mass 1 kg, wet mass 1 kg
- packaging, for pesticides: 8.2215e-5 kg; lognormal variance with pedigree 0.0592, pedigree (4,3,4,5,4)
  Total amount of active substance/s of pesticides needed for the production of iceberg lettuce is calculated to be circa 4.11E-05 kg. Pesticide/s used in this dataset is/are: '[sulfonyl]urea-compound', 'cyclic N-compound', 'pesticide, unspecified', 'pyrethroid-compound'. The total amount of active substance/s is doubled in order to account for the packaging of the dilluted product of pesticide/s that is/are applied. Therefore, 8.22E-05 kg of packaging for pesticides is justified with this exchange.
  properties: heating value, net 25.97 MJ, carbon content, fossil 0.85714, dry mass 1 kg, price 0.0642 EUR2005, wet mass 1 kg
- potassium sulfate: 0.000428119, 0.00203233 kg (2 entries); source Stoessel, Franziska; 2012; lognormal variance with pedigree 0.0105, pedigree (2,3,4,3,2)
  (same comment as for potassium sulfate)
- ammonium nitrate: 0.00250606, 0.00173805, 0.00133588, 0.00453492 kg (4 entries); source Stoessel, Franziska; 2012; lognormal variance with pedigree 0.0105, pedigree (2,3,4,3,2)
  (same comment as for ammonium nitrate)
- inorganic phosphorus fertiliser, as P2O5: 1.65739e-5, 1.68408e-6, 6.01468e-5, 8.40052e-7, 1.18303e-7, 3.25384e-6, 1.20292e-7, 1.94107e-6, 1.08411e-6, 3.98105e-6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 kg (30 entries); source Stoessel, Franziska; 2012; lognormal variance with pedigree 0.0105, pedigree (2,3,4,3,2)

## Inputs from nature
- Transformation, from annual crop, irrigated, intensive [natural resource, land]: 0.370473 m2; source Stoessel, Franziska; 2012; lognormal variance with pedigree 0.0119, pedigree (2,3,4,3,2)
- Energy, gross calorific value, in biomass [natural resource, biotic]: 1.22274 MJ; lognormal variance with pedigree 0.0099, pedigree (2,3,4,3,1)
  Calculated value based on literature. The gross energy is calculated using following formula; gross energy (MJ) = crude protein (kg)*23.04 (MJ/kg)+crude fat (kg)*38.96 (MJ/kg)+crude fibre (kg)*17.95 (MJ/kg)+carbohydrates (kg)*17.17 (MJ/kg) (formula based on expert opinion, cross referenced; Diepenbrock, 2012, Energy Balance in Crop Production). The product composition of fruits and vegetables is extracted from the USDA National Nutrient Database for Standard Reference (http://ndb.nal.usda.gov/, accessed 20131114). Crude protein (g)= 9, crude fat (g)= 1.4, crude fibre (g)= 12, ash (g)= 3.6, water (g)= 956.4, carbohydrates (g)= 29.7. The gross energy per kg of DM is 18.28MJ. The calculated gross energy per kg of reference product is thus 1.22MJ.
- Transformation, to annual crop, irrigated, intensive [natural resource, land]: 0.370473 m2; source Stoessel, Franziska; 2012; lognormal variance with pedigree 0.0119, pedigree (2,3,4,3,2)
- Peat, in ground [natural resource, biotic]: 0.0533 kg; source Stoessel, Franziska; 2012; lognormal variance with pedigree 0.0105, pedigree (2,3,4,3,2)
- Occupation, annual crop, irrigated, intensive [natural resource, land]: 0.0849 m2*year; source Stoessel, Franziska; 2012; lognormal variance with pedigree 0.0119, pedigree (2,3,4,3,2)

## Emissions to nature
- Pirimicarb [soil, agricultural]: 2.22e-5 kg; name unsp1; source Stoessel, Franziska; 2012; lognormal variance with pedigree 0.0777, pedigree (3,4,5,3,2)
- Nickel [soil, agricultural]: 8.35017e-8 kg; source Thomas Nemecek 2011; lognormal variance with pedigree 0.0847, pedigree (3,4,5,3,2)
- Chromium [soil, agricultural]: -5.89914e-8 kg; source Thomas Nemecek 2011
- Phosphorus [water, surface water]: 2.08e-6 kg; source Stoessel, Franziska; 2012; lognormal variance with pedigree 0.0847, pedigree (3,4,5,3,2)
- Nitrogen oxides [air, non-urban air or from high stacks]: 1.45441e-5 kg; source Thomas Nemecek 2011; lognormal variance with pedigree 0.0747, pedigree (3,4,5,3,2)
- Zinc [soil, agricultural]: -1.36907e-7 kg; source Thomas Nemecek 2011
- Water [water, ground-]: 0.00502225 m3; name water_to_water_ground; = water_irrigation_input*(1-fraction_IW_to_air)*fraction_IW_to_ground_water; lognormal variance with pedigree 0.0966, pedigree (4,3,4,1,4)
  Calculated value. See the parameters and their comments to understand the calculation.
  property fraction, origin: salt water 0; name fraction_origin_salt_water_Wgw
  property fraction, origin: fresh water 1; name fraction_origin_fresh_water_Wgw
  property fraction, origin: unspecified 0; name fraction_origin_unspecified_Wgw
- Dinitrogen monoxide [air, non-urban air or from high stacks]: 6.92576e-5 kg; source Thomas Nemecek 2011; lognormal variance with pedigree 0.0747, pedigree (3,4,5,3,2)
- Cadmium [soil, agricultural]: 1.85205e-8 kg; source Thomas Nemecek 2011; lognormal variance with pedigree 0.0847, pedigree (3,4,5,3,2)
- Lead [soil, agricultural]: 2.15742e-7 kg; source Thomas Nemecek 2011; lognormal variance with pedigree 0.0847, pedigree (3,4,5,3,2)
- Carbon dioxide, from soil or biomass stock [air, non-urban air or from high stacks]: 0.00725604 kg; normal variance with pedigree 0.5452, pedigree (3,3,5,5,2)
  Global average LUC emissions according 2nd edition of the Quantis-modified tool developed by Blonk Consultants 'WFLDB-adapted-Blonk 2014 direct-land-use-change-assessment-tool_2015-05-18a.xlsx', tab. 'Country & land use unknown'. The emission are based on the relative change in production areas in all countries for a given crop. The weighted average is used which takes into acount relative difference in crop expansion into primary forest, secondary forest, grassland, perennial and annual land.
  Uncertainty: Uncertainty estimated based on IPCC 2006
- Water [water, surface water]: 0.00125556 m3; name water_to_water_surface; = water_irrigation_input*(1-fraction_IW_to_air)*fraction_IW_to_surface_water; lognormal variance with pedigree 0.0966, pedigree (4,3,4,1,4)
  Calculated value. See the parameters and their comments to understand the calculation.
  property fraction, origin: salt water 0; name fraction_origin_salt_water_Wsw
  property fraction, origin: fresh water 1; name fraction_origin_fresh_water_Wsw
- Cyprodinil [soil, agricultural]: 1.11e-5 kg; name sulfo1; source Stoessel, Franziska; 2012; lognormal variance with pedigree 0.0777, pedigree (3,4,5,3,2)
- Water [air, unspecified]: 0.00898219 m3; name water_to_air_unspecified; = (tap_water_input/1000)*fraction_TW_to_air+water_irrigation_input*fraction_IW_to_air; lognormal variance with pedigree 0.0487, pedigree (2,2,4,1,1)
  Calculated value based on literature values and expert opinion. See comments in the parametres' comment field.
  property fraction, origin: fresh water 1; name fraction_origin_fresh_water
  property fraction, origin: unspecified 0; name fraction_origin_unspecified
  property fraction, origin: salt water 0; name fraction_origin_salt_water
- Copper [soil, agricultural]: -3.44265e-7 kg; source Thomas Nemecek 2011
- Ammonia [air, non-urban air or from high stacks]: 8.59714e-5 kg; source Thomas Nemecek 2011; lognormal variance with pedigree 0.0527, pedigree (3,4,5,3,2)
- Lambda-cyhalothrin [soil, agricultural]: 4.075e-7 kg; name pyre1; source Stoessel, Franziska; 2012; lognormal variance with pedigree 0.0777, pedigree (3,4,5,3,2)
- Nitrate [water, ground-]: 0.00470314 kg; source Thomas Nemecek 2011; lognormal variance with pedigree 0.0847, pedigree (3,4,5,3,2)
- Phosphate [water, ground-]: 5.94e-7 kg; source Stoessel, Franziska; 2012; lognormal variance with pedigree 0.0847, pedigree (3,4,5,3,2)
- Fludioxonil [soil, agricultural]: 7.4e-6 kg; name cyclic1; source Stoessel, Franziska; 2012; lognormal variance with pedigree 0.0777, pedigree (3,4,5,3,2)

## Sampling procedure
The LCI is based on iceberg lettuce production cost tables from Switzerland which is well representative for an Integrated Production in Switzerland. Most probably it is representative for productions in industrialized countries or farms which produces similarly.
Please refer to Stoessel et al. (2012) for more information: http://pubs.acs.org/doi/pdf/10.1021/es2030577
Franziska Stoessel, Ronnie Juraske, Stephan Pfister, Stefanie Hellweg. (2012) Life Cycle Inventory and Carbon and Water FoodPrint of Fruits and Vegetables: Application to a Swiss Retailer. Environmental Science & Technology 6(46) 3253-3262.

## Extrapolations
This dataset has been extrapolated from year 2010 to the year of the calculation (2021). The uncertainty has been adjusted accordingly.

## Review by Bo Weidema 2011-12-31
Production volume too large. Infrastructure missing.
