# barley production, Swiss integrated production, extensive

Dataset: EcoSpold 2, unit process
Geography: CH
Time period: 1996-01-01 to 2021-12-31
Technology level: current
Classification: ISIC rev.4 ecoinvent: 0111:Growing of cereals (except rice), leguminous crops and oil seeds
Synonyms: Hordeum vulgare L.
Tags: ConvertedDataset
Scenario: Business-as-Usual
System model: Allocation, cut-off by classification
Share of production covered: 71 %
Generated by: Thomas Nemecek
Published in: Nemecek, T. 2007
Database: ecoinvent
isCopyrightProtected: true
accessRestrictedTo: 1

## General comment
This dataset represents the cultivation of barley on an area of 1 ha producing the co-products barley grain and straw. The yield of barley grain is 5403 kg/ha at a moisture content at storage of 15%, the yield of straw is 5854 kg/ha at a moisture content of 15%.
[This dataset was already contained in the ecoinvent database version 2. It was not individually updated during the transfer to ecoinvent version 3. Life Cycle Impact Assessment results may still have changed, as they are affected by changes in the supply chain, i.e. in other datasets. This dataset was generated following the ecoinvent quality guidelines for version 2. It may have been subject to central changes described in the ecoinvent version 3 change report (http://www.ecoinvent.org/database/ecoinvent-version-3/reports-of-changes/), and the results of the central updates were reviewed extensively. The changes added e.g. consistent water flows and other information throughout the database. The documentation of this dataset can be found in the ecoinvent reports of version 2, which are still available via the ecoinvent website. The change report linked above covers all central changes that were made during the conversion process.]

## Included activities start
This activity starts after the harvest of the previous crop. The inputs of seeds, mineral fertilisers and pesticides are considered. Farm manure as an organic fertiliser is only accounted for in terms of direct field emissions; all pre-processes are included in the animal production systems.

## Included activities end
The dataset includes all machine operations and corresponding machine infrastructure and sheds. Machine operations are: soil cultivation, sowing, fertilisation, weed control, pest and pathogen control, combine-harvest, transport from field to regional processing centre (10 km) and drying of grains. Further, direct field emissions are included. This activity ends after drying of grains at the regional processing centre.

## Geography
Refers to an average production in the Swiss lowlands.

## Technology
Integrated production with extensive plant protection (no fungicides, insecticides and growth regulators)

## Time period
The yield data have been collected for the years 1996-2003.

## Parameters
- fraction, irrigation water, to ground water: 0.8 dimensionless; name fraction_IW_to_ground_water; lognormal variance with pedigree 0.0886, pedigree (4,3,1,1,4)
  Literature value (Döll, 2011) cross referenced with expert opinion.
- fraction, irrigation water to surface water: 0.2 dimensionless; name fraction_IW_to_surface_water; lognormal variance with pedigree 0.0886, pedigree (4,3,1,1,4)
  Literature value (Döll, 2011) cross referenced with expert opinion.
- fraction, irrigation water, to air: 0.3353 dimensionless; name fraction_IW_to_air; lognormal variance with pedigree 0.0409, pedigree (2,2,2,1,1)
  Literature value (Siebert, 2010) (Vionnet, S., Quantis Water Database - Technical Report, 2012).

## Reference product
- barley grain, Swiss integrated production: 1 kg; name REF_PRODUCT; CPC 01152: Barley, other; By-product classification allocatable product
  The amount represents the average yield from 1 ha.
  production volume 1.27309e8 kg
    CH prod of barley: 257400t in 2004. % repr ref to fract of tot area in lowlands
    Area with barley 37401 ha in 2004 ; 63% extensive ; 5403 kg/ha
  property wet mass 1 kg; name REF_PRODUCT_WM
  property dry mass 0.85 kg; name REF_PRODUCT_DM
  property water in wet mass 0.15 kg; name REF_PRODUCT_WWM; = 1-REF_PRODUCT_DM
  property carbon content, fossil 0; name REF_PRODUCT_C_content_fossil
    fossil carbon content on a dry matter basis
  property price 0.117 EUR2005; name REF_PRODUCT_price_EUR2005
    Temporary price data. Calculated as 90% of purchasers price based on: 2004 prices for World import/export data (tonnes and US$) from FaoStat statistics (http://faostat.fao.org/site/535/default.aspx#ancor, TRADE)- [Accessed 24 May 2010].
  property energy content 15.402 MJ
    See chapter 'Product Properties' in '01_crop production - yields & inputs CH & Europe_v1.0.pdf', section 'AGRICULTURAL PRODUCTION IN SWITZERLAND' - pdf-document on the dedicated talk page of ecoinvent (www.ecoinvent.org/documentation)
  property carbon content, non-fossil 0.46538; name REF_PRODUCT_C_content_non_fossil
    biogene carbon content on a dry matter basis
    Composition data obtained from Barley hulled, in (http://www.nal.usda.gov/fnic/foodcomp/search/). First, composition data were refered to 1 kg dry mass. Then, C-contents were calculated considering a C-content/dry mass of 46% in carbohydrates (including fibres), 53% in proteins and 75% in fats. All data from 'Evolutionary and Biochemical Aspects', A.D. Kay and T. Vrede (in Global Ecology, 2010, Elsevier B.V., S.E. Jørgensen Ed.).
  property water content 0.176471; name REF_PRODUCT_water_content; = (1-REF_PRODUCT_DM)/REF_PRODUCT_DM
  property carbon content 0.46538
    carbon content on a dry matter basis (reserved; not for manual entry)
  property true value 632.198; name REF_PRODUCT_true_value
    allocation property applied in "true value" allocation // value calculated from revenue
  properties: carbon allocation 0.395573 kg

## By-products
- straw: 0 kg; name BY_PRODUCT; CPC 01913: Cereal straw, husks, unprepared, ground, pressed, or in the form of pellets; By-product classification allocatable product
  The amount represents the average yield from 1 ha.
  production volume 6.72477e7 kg
    CH prod of barley: 257400t in 2004. % repr ref to fract of tot area in lowlands
    Area with barley 37401 ha in 2004 ; 63% extensive ; 2854 kg/ha
  property heating value, net 14.25 MJ
    Literature value, Source: Phyllis2, database for (treated) biomass, algae, feedstocks for biogas production and biochar, https://phyllis.nl/Biomass/View/1271, ECN.TNO
  property energy content 17.459 MJ
    (same comment as for barley grain, Swiss integrated production)
  property carbon content, fossil 0; name BY_PRODUCT_C_content_fossil
    fossil carbon content on a dry matter basis
  property water in wet mass 0.15 kg; name BY_PRODUCT_WWM; = 1-BY_PRODUCT_DM
  property dry mass 0.85 kg; name BY_PRODUCT_DM
  property carbon content, non-fossil 0.437377; name BY_PRODUCT_C_content_non_fossil
    biogene carbon content on a dry matter basis
    Composition data obtained as the average of those of Rye straw (http://beefmagazine.com/images/2009%20feed%20table.pdf), and Barley straw and Wheat straw (http://www.uwex.edu/ces/crops/uwforage/StrawFOF.pdf). First, composition data were refered to 1 kg dry mass. Then, C-contents were calculated considering a C-content/dry mass of 46% in carbohydrates (including fibres), 53% in proteins and 75% in fats. All data from 'Evolutionary and Biochemical Aspects', A.D. Kay and T. Vrede (in Global Ecology, 2010, Elsevier B.V., S.E. Jørgensen Ed.).
  property water content 0.176471; name BY_PRODUCT_water_content; = (1-BY_PRODUCT_DM)/BY_PRODUCT_DM
  property price 0.012 EUR2005; name BY_PRODUCT_price_EUR2005
    Temporary price data. Calculated as 90% of purchasers price based on: Based on price allocation ratio from EcoInvent v2 report number 17, page 118.
  property wet mass 1 kg; name BY_PRODUCT_WM
  property carbon content 0.437377
    carbon content on a dry matter basis (reserved; not for manual entry)
  property true value 34.2444; name BY_PRODUCT_true_value
    allocation property applied in "true value" allocation // value calculated from revenue
  properties: carbon allocation 0.37177 kg

## Inputs from technosphere
- drying of feed grain: 0.011293 l; lognormal variance with pedigree 0.0406, pedigree (2,1,5,1,1)
  See chapter 'Yields and Inputs of Arable Crop Production' in '01_crop production - yields & inputs CH & Europe_v1.0.pdf', section 'AGRICULTURAL PRODUCTION IN SWITZERLAND' - pdf-document on the dedicated talk page of ecoinvent (www.ecoinvent.org/documentation)
  This exchange has an activity link directly to the producing activity because the product is primarily consumed in the same geographical area where it is produced.
- tillage, harrowing, by spring tine harrow: 0.000351118 ha; lognormal variance with pedigree 0.0406, pedigree (2,1,5,1,1)
  (same comment as for drying of feed grain)
- transport, tractor and trailer, agricultural: 0.00959905 metric ton*km; lognormal variance with pedigree 0.0406, pedigree (2,1,5,1,1)
  See chapter 'Yields and Inputs of Arable Crop Production' in '01_crop production - yields & inputs CH & Europe_v1.0.pdf', section 'AGRICULTURAL PRODUCTION IN SWITZERLAND' - pdf-document on the dedicated talk page of ecoinvent (www.ecoinvent.org/documentation)
  See chapter 'Yields and Inputs of Arable Crop Production' in '01_crop production - yields & inputs CH & Europe_v1.0.pdf', section 'AGRICULTURAL PRODUCTION IN SWITZERLAND' - pdf-document on the dedicated talk page of ecoinvent (www.ecoinvent.org/documentation)
- urea: 0.00584191 kg; lognormal variance with pedigree 0.0406, pedigree (2,1,5,1,1)
  The exchange has been updated from 'urea, as N' into 'urea' and therefore its amount has been scaled (multiplied) from 15.522 kg by 2.1438 kg of 'urea' per kg of 'urea, as N'. Original comment of the exchange is: See chapter 'Yields and Inputs of Arable Crop Production' in '01_crop production - yields & inputs CH & Europe_v1.0.pdf', section 'AGRICULTURAL PRODUCTION IN SWITZERLAND' - pdf-document on the dedicated talk page of ecoinvent (www.ecoinvent.org/documentation)
  See chapter 'Yields and Inputs of Arable Crop Production' in '01_crop production - yields & inputs CH & Europe_v1.0.pdf', section 'AGRICULTURAL PRODUCTION IN SWITZERLAND' - pdf-document on the dedicated talk page of ecoinvent (www.ecoinvent.org/documentation)
  properties: carbon content, fossil 0.2, wet mass 1 kg, dry mass 1 kg
- ammonium nitrate: 0.0221705 kg; lognormal variance with pedigree 0.0406, pedigree (2,1,5,1,1)
  The exchange has been updated from 'ammonium nitrate, as N' into 'ammonium nitrate' and therefore its amount has been scaled (multiplied) from 44.197 kg by 2.8573 kg of 'ammonium nitrate' per kg of 'ammonium nitrate, as N'. Original comment of the exchange is: See chapter 'Yields and Inputs of Arable Crop Production' in '01_crop production - yields & inputs CH & Europe_v1.0.pdf', section 'AGRICULTURAL PRODUCTION IN SWITZERLAND' - pdf-document on the dedicated talk page of ecoinvent (www.ecoinvent.org/documentation)
  See chapter 'Yields and Inputs of Arable Crop Production' in '01_crop production - yields & inputs CH & Europe_v1.0.pdf', section 'AGRICULTURAL PRODUCTION IN SWITZERLAND' - pdf-document on the dedicated talk page of ecoinvent (www.ecoinvent.org/documentation)
  properties: wet mass 1 kg, dry mass 1 kg
- combine harvesting: 0.000175559 ha; lognormal variance with pedigree 0.0406, pedigree (2,1,5,1,1)
  (same comment as for drying of feed grain)
- liquid manure spreading, by vacuum tanker: 0.00134742 m3; lognormal variance with pedigree 0.0406, pedigree (2,1,5,1,1)
  (same comment as for drying of feed grain)
- pesticide, unspecified: 5.26677e-6 kg; lognormal variance with pedigree 0.0407, pedigree (2,2,5,1,1)
  (same comment as for transport, tractor and trailer, agricultural)
  properties: dry mass 1 kg, wet mass 1 kg, carbon content, fossil 0.486978
  note on carbon content, fossil: Mean of C content in all pesticides whose formula has been documented in Sutter 2010
- inorganic nitrogen fertiliser, as N: 0.00484541 kg; lognormal variance with pedigree 0.0406, pedigree (2,1,5,1,1)
  (same comment as for transport, tractor and trailer, agricultural)
  properties: dry mass 1 kg, wet mass 1 kg
- sowing: 0.000175559 ha; lognormal variance with pedigree 0.0406, pedigree (2,1,5,1,1)
  (same comment as for drying of feed grain)
- nitrile-compound: 1.35119e-6 kg; lognormal variance with pedigree 0.0407, pedigree (2,2,5,1,1)
  (same comment as for transport, tractor and trailer, agricultural)
  properties: wet mass 1 kg, dry mass 1 kg, carbon content, fossil 0.344995
  note on carbon content, fossil: An unweighted average of the C content in chlorothalonil, dichlobenil, bromoxynil, ioxynil, substances classified as nitrile-compounds in Tab 2.25, Sutter 2010
- potassium sulfate: 0.000786093 kg; lognormal variance with pedigree 0.0406, pedigree (2,1,5,1,1)
  The exchange has been updated from 'potassium sulfate, as K2O' into 'potassium sulfate' and therefore its amount has been scaled (multiplied) from 2.4204 kg by 1.85 kg of 'potassium sulfate' per kg of 'potassium sulfate, as K2O'. Original comment of the exchange is: See chapter 'Yields and Inputs of Arable Crop Production' in '01_crop production - yields & inputs CH & Europe_v1.0.pdf', section 'AGRICULTURAL PRODUCTION IN SWITZERLAND' - pdf-document on the dedicated talk page of ecoinvent (www.ecoinvent.org/documentation)
  See chapter 'Yields and Inputs of Arable Crop Production' in '01_crop production - yields & inputs CH & Europe_v1.0.pdf', section 'AGRICULTURAL PRODUCTION IN SWITZERLAND' - pdf-document on the dedicated talk page of ecoinvent (www.ecoinvent.org/documentation)
  properties: wet mass 1 kg, dry mass 1 kg
- phosphate rock, beneficiated: 0.00654561 kg; lognormal variance with pedigree 0.0406, pedigree (2,1,5,1,1)
  The exchange has been updated from 'phosphate rock, as P2O5, beneficiated, dry' into 'phosphate rock, beneficiated' and therefore its amount has been scaled (multiplied) from 11.931 kg by 3.125 kg of 'phosphate rock, beneficiated' per kg of 'phosphate rock, as P2O5, beneficiated, dry'. Original comment of the exchange is: See chapter 'Yields and Inputs of Arable Crop Production' in '01_crop production - yields & inputs CH & Europe_v1.0.pdf', section 'AGRICULTURAL PRODUCTION IN SWITZERLAND' - pdf-document on the dedicated talk page of ecoinvent (www.ecoinvent.org/documentation)
  See chapter 'Yields and Inputs of Arable Crop Production' in '01_crop production - yields & inputs CH & Europe_v1.0.pdf', section 'AGRICULTURAL PRODUCTION IN SWITZERLAND' - pdf-document on the dedicated talk page of ecoinvent (www.ecoinvent.org/documentation)
  properties: dry mass 1 kg, wet mass 1 kg
- barley seed, Swiss integrated production, for sowing: 0.0193115 kg; name SEED; lognormal variance with pedigree 0.0406, pedigree (2,1,5,1,1)
  (same comment as for transport, tractor and trailer, agricultural)
  property carbon content, non-fossil 0.46538; name SEED_C_content_non_fossil
  property dry mass 0.85 kg; name SEED_DM
  property energy content 15.402 MJ; name SEED_energy_content
  properties: water content 0.176471, wet mass 1 kg
  note on carbon content, non-fossil: biogene carbon content on a dry matter basis Composition data obtained from Barley hulled, in (http://www.nal.usda.gov/fnic/foodcomp/search/). First, composition data were refered to 1 kg dry mass. Then, C-contents were calculated considering a C-content/dry mass of 46% in carbohydrates (including fibres), 53% in proteins and 75% in fats. All data from 'Evolutionary and Biochemical Aspects', A.D. Kay and T. Vrede (in Global Ecology, 2010, Elsevier B.V., S.E. Jørgensen Ed.).
  note on energy content: See chapter 'Product Properties' in '01_crop production - yields & inputs CH & Europe_v1.0.pdf', section 'AGRICULTURAL PRODUCTION IN SWITZERLAND' - pdf-document on the dedicated talk page of ecoinvent (www.ecoinvent.org/documentation)
- irrigation: 0.0885268 m3; name water_irrigation_input; source Siebert, S. 2010; lognormal variance with pedigree 0.0427, pedigree (2,2,5,1,1)
  Calculated based on literature values (Döll, 2010) and partially modelled at ETH (Pfister, S.).
  property carbon content, fossil 0; name C_content_fossil
  property wet mass 1000 kg; name WM
  property dry mass 0.11 kg; name DM
  property carbon content, non-fossil 0; name C_content_non_fossil
  property water in wet mass 999.89 kg; name WWM
  property water content 9089.91; name water_content
- tillage, currying, by weeder: 0.000175559 ha; lognormal variance with pedigree 0.0406, pedigree (2,1,5,1,1)
  (same comment as for drying of feed grain)
- cyclic N-compound: 3.40497e-7 kg; lognormal variance with pedigree 0.0407, pedigree (2,2,5,1,1)
  (same comment as for transport, tractor and trailer, agricultural)
  properties: wet mass 1 kg, carbon content, fossil 0.641962, dry mass 1 kg
  note on carbon content, fossil: Calculated as an unweigthed average of the C content of the cyclic N-compounds where information was avaliable in Sutter, 2010, following the classification in Tab 2.25 in Sutter 2010: Difenoconazole (C19H17Cl2N3O3), Fenpropidin (C19H31N), Fenpropimorph (C20H33NO), Flusilazole (C16H15F2N3Si), Metconazole (C17H22ClN3O), Penconazole (C13H15Cl2N3), Propiconazole (C15H17Cl2N3O2), Tebuconazole (C16H22ClN3O)
- potassium chloride: 0.0102542 kg; lognormal variance with pedigree 0.0406, pedigree (2,1,5,1,1)
  The exchange has been updated from 'potassium chloride, as K2O' into 'potassium chloride' and therefore its amount has been scaled (multiplied) from 36.9 kg by 1.5829 kg of 'potassium chloride' per kg of 'potassium chloride, as K2O'. Original comment of the exchange is: See chapter 'Yields and Inputs of Arable Crop Production' in '01_crop production - yields & inputs CH & Europe_v1.0.pdf', section 'AGRICULTURAL PRODUCTION IN SWITZERLAND' - pdf-document on the dedicated talk page of ecoinvent (www.ecoinvent.org/documentation)
  See chapter 'Yields and Inputs of Arable Crop Production' in '01_crop production - yields & inputs CH & Europe_v1.0.pdf', section 'AGRICULTURAL PRODUCTION IN SWITZERLAND' - pdf-document on the dedicated talk page of ecoinvent (www.ecoinvent.org/documentation)
  properties: wet mass 1 kg, dry mass 1 kg
- bale loading: 0.0031311 unit; lognormal variance with pedigree 0.0406, pedigree (2,1,5,1,1)
  (same comment as for drying of feed grain)
- dinitroaniline-compound: 7.37348e-5 kg; lognormal variance with pedigree 0.0407, pedigree (2,2,5,1,1)
  (same comment as for transport, tractor and trailer, agricultural)
  properties: dry mass 1 kg, wet mass 1 kg, carbon content, fossil 0.55516
  note on carbon content, fossil: C content of dinitroaniline-compound was calculated after the C content of the herbicide pendimethalin, classified as dinitroaniline-compound in Tab 2.25 of Sutter 2010
- fertilising, by broadcaster: 0.000702236 ha; lognormal variance with pedigree 0.0406, pedigree (2,1,5,1,1)
  (same comment as for drying of feed grain)
- inorganic phosphorus fertiliser, as P2O5: 0.00661319 kg; lognormal variance with pedigree 0.0406, pedigree (2,1,5,1,1)
  (same comment as for transport, tractor and trailer, agricultural)
  properties: dry mass 1 kg, wet mass 1 kg
- tillage, cultivating, chiselling: 0.000175559 ha; lognormal variance with pedigree 0.0406, pedigree (2,1,5,1,1)
  (same comment as for drying of feed grain)
- packaging, for fertilisers: 0.0630552 kg; lognormal variance with pedigree 0.0912, pedigree (4,3,5,5,4)
  Total amount of active substance/s of fertilisers needed for the production of 'barley grain, Swiss integrated production' is calculated to be circa 1.80E+02 kg. Fertiliser/s used in this dataset is/are: 'ammonium nitrate, as N', 'ammonium sulfate, as N', 'nitrogen fertiliser, as N', 'phosphate fertiliser, as P2O5', 'phosphate rock, as P2O5, beneficiated, dry', 'potassium chloride, as K2O', 'potassium sulfate, as K2O', 'urea, as N'. The total amount of active substance/s is doubled in order to account for the packaging of the dilluted product of fertiliser/s that is/are applied. Therefore, 3.59E+02 kg of packaging for fertilisers is justified with this exchange.
  properties: carbon content, fossil 0.825301, wet mass 1 kg, price 0.0642 EUR2005, dry mass 1 kg, heating value, net 25.01 MJ
  note on carbon content, fossil: Considering a chemical formula (C2H4)n for polyethylene, carbon content-fossil is calculated to be 0.856286 kg of Carbon per kg of dry mass.
- [sulfonyl]urea-compound: 0.000203649 kg; lognormal variance with pedigree 0.0407, pedigree (2,2,5,1,1)
  (same comment as for transport, tractor and trailer, agricultural)
  properties: carbon content, fossil 0.540853, wet mass 1 kg, dry mass 1 kg
  note on carbon content, fossil: Approximated as an unweighted average of the C-content of the [sulfonyl]urea-compounds (Tab 2.25 Sutter, 2010) chlorotoluron, Diuron, Linuron and Isoproturon.
- tillage, ploughing: 0.000175559 ha; lognormal variance with pedigree 0.0406, pedigree (2,1,5,1,1)
  (same comment as for drying of feed grain)
- application of plant protection product, by field sprayer: 0.000210671 ha; lognormal variance with pedigree 0.0406, pedigree (2,1,5,1,1)
  (same comment as for drying of feed grain)
- solid manure loading and spreading, by hydraulic loader and spreader: 0.0488054 kg; lognormal variance with pedigree 0.0406, pedigree (2,1,5,1,1)
  (same comment as for drying of feed grain)
- baling: 0.000720161 unit; lognormal variance with pedigree 0.0406, pedigree (2,1,5,1,1)
  (same comment as for drying of feed grain)
- packaging, for pesticides: 0.000568684 kg; lognormal variance with pedigree 0.0912, pedigree (4,3,5,5,4)
  Total amount of active substance/s of pesticides needed for the production of barley grain, Swiss integrated production is calculated to be circa 1.62E+00 kg. Pesticide/s used in this dataset is/are: '[sulfonyl]urea-compound', 'cyclic N-compound', 'dinitroaniline-compound', 'nitrile-compound', 'pesticide, unspecified'. The total amount of active substance/s is doubled in order to account for the packaging of the dilluted product of pesticide/s that is/are applied. Therefore, 3.24E+00 kg of packaging for pesticides is justified with this exchange.
  properties: price 0.0642 EUR2005, dry mass 1 kg, heating value, net 25.97 MJ, carbon content, fossil 0.85714, wet mass 1 kg
- ammonium sulfate: 0.000587157 kg; lognormal variance with pedigree 0.0406, pedigree (2,1,5,1,1)
  (same comment as for transport, tractor and trailer, agricultural)
  properties: dry mass 1 kg, wet mass 1 kg

## Inputs from nature
- Transformation, from pasture, man made, intensive [natural resource, land]: 0.509121 m2; lognormal variance with pedigree 0.0506, pedigree (2,1,5,1,1)
  Modelled, see chapter 'Land use' in '01_crop production_direct field emissions and natural resources_v1.0.pdf' - pdf-document on the dedicated talk page of ecoinvent (www.ecoinvent.org/documentation)
- Transformation, from annual crop, non-irrigated, extensive [natural resource, land]: 1.24647 m2; lognormal variance with pedigree 0.0506, pedigree (2,1,5,1,1)
  (same comment as for Transformation, from pasture, man made, intensive)
- Carbon dioxide, in air [natural resource, in air]: 2.03083 kg; = 44/12 * (REF_PRODUCT_C_content_non_fossil * REF_PRODUCT * REF_PRODUCT_DM + BY_PRODUCT_C_content_non_fossil * BY_PRODUCT * BY_PRODUCT_DM - SEED_C_content_non_fossil * SEED * SEED_DM); lognormal variance with pedigree 0.0406, pedigree (2,1,5,1,1)
  Modelled,see chapter 'CO2 binding' in '01_crop production_direct field emissions and natural resources_v1.0.pdf' - pdf-document on the dedicated talk page of ecoinvent (www.ecoinvent.org/documentation)
- Energy, gross calorific value, in biomass [natural resource, biotic]: 23.0597 MJ; lognormal variance with pedigree 0.0411891, pedigree (2,1,5,1,1)
- Occupation, annual crop, non-irrigated, extensive [natural resource, land]: 1.4386 m2*year; lognormal variance with pedigree 0.0406, pedigree (2,1,5,1,1)
  (same comment as for Transformation, from pasture, man made, intensive)
- Transformation, to annual crop, non-irrigated, extensive [natural resource, land]: 1.75559 m2; lognormal variance with pedigree 0.0506, pedigree (2,1,5,1,1)
  (same comment as for Transformation, from pasture, man made, intensive)

## Emissions to nature
- Lead [water, surface water]: 8.01814e-8 kg; lognormal variance with pedigree 0.1307, pedigree (2,2,5,1,1)
  Modelled, see chapter 'Emissions of heavy metals to agricultural soil, surface water and ground water' in '01_crop production_direct field emissions and natural resources_v1.0.pdf' - pdf-document on the dedicated talk page of ecoinvent (www.ecoinvent.org/documentation)
- Ammonia [air, non-urban air or from high stacks]: 0.0015434 kg; lognormal variance with pedigree 0.0507, pedigree (2,2,5,1,1)
  Modelled with the 'AGRAMMON model' described in '01_crop production_direct field emissions and natural resources_v1.0.pdf' - pdf-document on the dedicated talk page of ecoinvent (www.ecoinvent.org/documentation)
- Lead [water, ground-]: 1.92307e-8 kg; lognormal variance with pedigree 0.1307, pedigree (2,2,5,1,1)
  (same comment as for Lead)
- Copper, ion [water, ground-]: 5.66494e-7 kg; lognormal variance with pedigree 0.1307, pedigree (2,2,5,1,1)
  (same comment as for Lead)
- Phosphate [water, ground-]: 3.87441e-5 kg; lognormal variance with pedigree 0.0807, pedigree (2,2,5,1,1)
  Modelled, see chapter 'Emissions of phosphorous to the water' in '01_crop production_direct field emissions and natural resources_v1.0.pdf' - pdf-document on the dedicated talk page of ecoinvent (www.ecoinvent.org/documentation)
- Isoproturon [soil, agricultural]: 9.30463e-5 kg; lognormal variance with pedigree 0.0507, pedigree (2,2,5,1,1)
  Modelled, see chapter 'Emissions of pesticides to agricultural soil' in '01_crop production_direct field emissions and natural resources_v1.0.pdf' - pdf-document on the dedicated talk page of ecoinvent (www.ecoinvent.org/documentation)
- Nitrate [water, ground-]: 0.0545427 kg; lognormal variance with pedigree 0.0807, pedigree (2,2,5,1,1)
  Modelled with the 'SALCA-NO3 model' described in '01_crop production_direct field emissions and natural resources_v1.0.pdf' - pdf-document on the dedicated talk page of ecoinvent (www.ecoinvent.org/documentation)
- Cadmium [soil, agricultural]: 6.3649e-7 kg; lognormal variance with pedigree 0.0807, pedigree (2,2,5,1,1)
  (same comment as for Lead)
- Phosphorus [water, surface water]: 2.13971e-5 kg; lognormal variance with pedigree 0.0807, pedigree (2,2,5,1,1)
  (same comment as for Phosphate)
- Lead [soil, agricultural]: 5.72902e-7 kg; lognormal variance with pedigree 0.0807, pedigree (2,2,5,1,1)
  (same comment as for Lead)
- Metaldehyde [soil, agricultural]: 5.26677e-6 kg; lognormal variance with pedigree 0.0507, pedigree (2,2,5,1,1)
  (same comment as for Isoproturon)
- Phosphate [water, surface water]: 0.000139419 kg; lognormal variance with pedigree 0.0807, pedigree (2,2,5,1,1)
  (same comment as for Phosphate)
- Chlortoluron [soil, agricultural]: 0.000110602 kg; lognormal variance with pedigree 0.0507, pedigree (2,2,5,1,1)
  (same comment as for Isoproturon)
- Zinc, ion [water, surface water]: 6.11894e-7 kg; lognormal variance with pedigree 0.1307, pedigree (2,2,5,1,1)
  (same comment as for Lead)
- Carbon dioxide, fossil [air, non-urban air or from high stacks]: 0.0042782 kg; lognormal variance with pedigree 0.0407, pedigree (2,2,5,1,1)
  Modelled, see chapter 'Release of fossil CO2 after urea applications' in '01_crop production_assessment methods of direct field emissions_v1.0.pdf' - pdf-document on the dedicated talk page of ecoinvent (www.ecoinvent.org/documentation)
- Cyprodinil [soil, agricultural]: 1.35119e-6 kg; lognormal variance with pedigree 0.0507, pedigree (2,2,5,1,1)
  (same comment as for Isoproturon)
- Zinc, ion [water, ground-]: 3.17323e-6 kg; lognormal variance with pedigree 0.1307, pedigree (2,2,5,1,1)
  (same comment as for Lead)
- Mercury [soil, agricultural]: 2.04825e-8 kg; lognormal variance with pedigree 0.0807, pedigree (2,2,5,1,1)
  (same comment as for Lead)
- Cyproconazole [soil, agricultural]: 3.40497e-7 kg; lognormal variance with pedigree 0.0507, pedigree (2,2,5,1,1)
  (same comment as for Isoproturon)
- Chromium, ion [water, ground-]: 3.5233e-6 kg; lognormal variance with pedigree 0.1307, pedigree (2,2,5,1,1)
  (same comment as for Lead)
- Water [water, surface water]: 0.0117688 m3; name water_to_water_surface; = water_irrigation_input*(1-fraction_IW_to_air)*fraction_IW_to_surface_water; lognormal variance with pedigree 0.1286, pedigree (4,3,5,1,4)
  Calculated value. See the parameters and their comments to understand the calculation.
  property fraction, origin: fresh water 1; name fraction_origin_fresh_water_Wsw
  property fraction, origin: salt water 0; name fraction_origin_salt_water_Wsw
- Chromium [soil, agricultural]: 7.05906e-6 kg; lognormal variance with pedigree 0.0807, pedigree (2,2,5,1,1)
  (same comment as for Lead)
- Water [air, unspecified]: 0.0296831 m3; name water_to_air_unspecified; = (water_irrigation_input*fraction_IW_to_air); lognormal variance with pedigree 0.0807, pedigree (2,2,5,1,1)
  Calculated value based on literature values and expert opinion. See comments in the parametres' comment field.
  property fraction, origin: unspecified 0; name fraction_origin_unspecified
  property fraction, origin: fresh water 1; name fraction_origin_fresh_water
  property fraction, origin: salt water 0; name fraction_origin_salt_water
- Nickel, ion [water, surface water]: 3.25627e-7 kg; lognormal variance with pedigree 0.1307, pedigree (2,2,5,1,1)
  (same comment as for Lead)
- Water [water, ground-]: 0.047075 m3; name water_to_water_ground; = water_irrigation_input*(1-fraction_IW_to_air)*fraction_IW_to_ground_water; lognormal variance with pedigree 0.1286, pedigree (4,3,5,1,4)
  Calculated value. See the parameters and their comments to understand the calculation.
  property fraction, origin: unspecified 0; name fraction_origin_unspecified_Wgw
  property fraction, origin: fresh water 1; name fraction_origin_fresh_water_Wgw
  property fraction, origin: salt water 0; name fraction_origin_salt_water_Wgw
- Mercury [water, ground-]: 1.43776e-9 kg; lognormal variance with pedigree 0.1307, pedigree (2,2,5,1,1)
  (same comment as for Lead)
- Mercury [water, surface water]: 1.19161e-9 kg; lognormal variance with pedigree 0.1307, pedigree (2,2,5,1,1)
  (same comment as for Lead)
- Nickel [soil, agricultural]: 1.06236e-6 kg; lognormal variance with pedigree 0.0807, pedigree (2,2,5,1,1)
  (same comment as for Lead)
- Cadmium, ion [water, surface water]: 4.60386e-9 kg; lognormal variance with pedigree 0.1307, pedigree (2,2,5,1,1)
  (same comment as for Lead)
- Cadmium, ion [water, ground-]: 7.47601e-9 kg; lognormal variance with pedigree 0.1307, pedigree (2,2,5,1,1)
  (same comment as for Lead)
- Chromium, ion [water, surface water]: 5.13862e-7 kg; lognormal variance with pedigree 0.1307, pedigree (2,2,5,1,1)
  (same comment as for Lead)
- Zinc [soil, agricultural]: 5.16916e-7 kg; lognormal variance with pedigree 0.0807, pedigree (2,2,5,1,1)
  (same comment as for Lead)
- Pendimethalin [soil, agricultural]: 7.37348e-5 kg; lognormal variance with pedigree 0.0507, pedigree (2,2,5,1,1)
  (same comment as for Isoproturon)
- Copper, ion [water, surface water]: 4.05787e-7 kg; lognormal variance with pedigree 0.1307, pedigree (2,2,5,1,1)
  (same comment as for Lead)
- Nitrogen oxides [air, non-urban air or from high stacks]: 0.000103229 kg; = 0.21 * N2O; lognormal variance with pedigree 0.0707, pedigree (2,2,5,1,1)
  Modelled, see chapter 'Emissions of NOx to the air' in '01_crop production_direct field emissions and natural resources_v1.0.pdf' - pdf-document on the dedicated talk page of ecoinvent (www.ecoinvent.org/documentation)
- Dinitrogen monoxide [air, non-urban air or from high stacks]: 0.000491566 kg; name N2O; lognormal variance with pedigree 0.0707, pedigree (2,2,5,1,1)
  Modelled, see chapter 'Emissions of N2O to the air' in '01_crop production_direct field emissions and natural resources_v1.0.pdf' - pdf-document on the dedicated talk page of ecoinvent (www.ecoinvent.org/documentation)
- Copper [soil, agricultural]: -1.69513e-6 kg
  (same comment as for Lead)

## Sampling procedure
Data were compiled from statistics, pilot network, fertilising recommendations, documents from extension services, information provided by retailers and expert knowledge. The production data were verified and adjusted by a group of experts.

## Review by Hans-Jörg Althaus 2009-01-22
passed
none
