# treatment of waste polystyrene, municipal incineration

Dataset: EcoSpold 2, unit process
Geography: CH
Time period: 1994-01-01 to 2021-12-31
Technology level: outdated
Classification: EcoSpold01Categories: waste management/municipal incineration
Classification: ISIC rev.4 ecoinvent: 3821:Treatment and disposal of non-hazardous waste
Synonyms: PS
Tags: ConvertedDataset; Treatment
Scenario: Business-as-Usual
System model: Allocation, cut-off by classification
Generated by: Gabor Doka (obsolete)
Published in: Doka G. 2007
Database: ecoinvent
isCopyrightProtected: true
accessRestrictedTo: 1

## General comment
Inventoried waste contains 100% PS; .
waste composition (wet, in ppm): upper heating value 38.88 MJ/kg; lower heating value 38.67 MJ/kg; H2O 2000; O 38852; H 78046; C 868490; S 678.75; N 1942.6; P n.a.; B n.a.; Cl 1132.1; Br 882.12; F 14.25; I n.a.; Ag n.a.; As 1.8418; Ba 180.79; Cd 23.336; Co 30.622; Cr 39.613; Cu 107.56; Hg 0.82311; Mn 77.469; Mo n.a.; Ni 19.968; Pb 14.935; Sb 41.65; Se 2.0357; Sn 25.403; V 279.32; Zn 834.61; Be 0.48468; Sc n.a.; Sr 85.789; Ti 969.36; Tl 0.38774; W n.a.; Si n.a.; Fe 3611.5; Ca n.a.; Al 193.87; K n.a.; Mg n.a.; Na 1420.6;
Share of carbon in waste that is biogenic 0%.
Share of iron in waste that is metallic/recyclable 0%.
Net energy produced in MSWI: 4.51MJ/kg waste electric energy and 9.05MJ/kg waste thermal energy
Allocation of energy production: no substitution or expansion. Total burden allocated to waste disposal function of MSWI.
One kg of this waste produces 0.01649 kg of slag and 0.007036 kg of residues, which are landfilled. Additional solidification with 0.002814 kg of cement.
[This dataset was already contained in the ecoinvent database version 2. It was not individually updated during the transfer to ecoinvent version 3. Life Cycle Impact Assessment results may still have changed, as they are affected by changes in the supply chain, i.e. in other datasets. This dataset was generated following the ecoinvent quality guidelines for version 2. It may have been subject to central changes described in the ecoinvent version 3 change report (http://www.ecoinvent.org/database/ecoinvent-version-3/reports-of-changes/), and the results of the central updates were reviewed extensively. The changes added e.g. consistent water flows and other information throughout the database. The documentation of this dataset can be found in the ecoinvent reports of version 2, which are still available via the ecoinvent website. The change report linked above covers all central changes that were made during the conversion process.]

## Included activities end
waste-specific air and water emisions from incineration, auxiliary material consumption for flue gas cleaning. Short-term emissions to river water and long-term emisisons to ground water from slag compartment (from bottom slag) and residual material landfill (from solidified fly ashes and scrubber slugde). Process energy demands for MSWI.

## Geography
Specific to the technology mix encountered in Switzerland in 2000. Well applicable to modern incineration practices in Europe, North America or Japan.

## Technology
replaced by newer incineration technology with fly ash extraction. Average Swiss MSWI plants in 2000 with electrostatic precipitator for fly ash (ESP), wet flue gas scrubber and 29.4% SNCR , 32.2% SCR-high dust , 24.6% SCR-low dust -DeNOx facilities and 13.8% without Denox (by burnt waste, according to Swiss average). Share of waste incinerated in plants with magnetic scrap separation from slag : 50%. Gross electric efficiency technology mix 12.997% and Gross thermal efficiency technology mix 25.57%

## Time period
Waste composition as given in literature reference, theoretical data or other source. Transfer coefficients for modern Swiss MSWI. Emission speciation based on early 90ies data.

## Reference product
- waste polystyrene: -1 kg; CPC 39270: Waste, parings and scrap of plastics; By-product classification Waste; CAS 9003-53-6
  EcoSpold01Location=CH
  production volume 0 kg; name RP_PV_1
    outdated. Replaced by newer incineration technology with fly ash extraction.
  property price 0 EUR2005
    Waste products are assigned a price of zero as they are assumed to require further treatment.
  property heating value, net 38.67 MJ
    Value taken from the general comment of the treatment dataset.
  property carbon content 0.922579
    carbon content on a dry matter basis (reserved; not for manual entry)
  properties: water in wet mass 0.002 kg, wet mass 1 kg, carbon content, fossil 0.922579, water content 0.00200401, dry mass 0.998 kg, carbon content, non-fossil 0, carbon allocation 0.920734 kg

## Inputs from technosphere
- waste cement, hydrated: -0.00704 kg; name BP_amount_1; lognormal variance with pedigree 0.09, pedigree (1,1,5,1,1)
  EcoSpold01Location=CH
  Hydrated cement for solidification of landfilled residual material. Uncertainty calculated from unertainty of the waste composition of this waste and transfer coefficients in the incinerator and of the solidification recipe.
  production volume 0 kg; = RP_PV_1* BP_amount_1
    Calculated from the production volume of waste polystyrene, 0.2% water in proportion to the respective output amounts.
  property price 0 EUR2005; name BP_amount_1_price_EUR2005
  properties: dry mass 1 kg, wet mass 1 kg
- chromium oxide, flakes: 5.73e-8 kg; lognormal variance with pedigree 2.24, pedigree (1,1,5,1,1)
  Proxy for vanadium pentoxide V2O5 in SCR catalyst, uncertainty calculated from uncertainty in average DeNOx input, uncertainty in the share of thermal NOx, uncertainty of nitrogen content in average municipal waste and the unertainty in nitrogen content in *this* waste.
  EcoSpold01Location=RER
  properties: dry mass 1 kg, wet mass 1 kg
- hydrochloric acid, without water, in 30% solution state: 2.67e-6 kg; lognormal variance with pedigree 0.46, pedigree (1,1,5,1,1)
  uncertainty calculated from uncertainty in average auxiliary material input, and the unertainty of the waste composition of this waste
  EcoSpold01Location=RER
  properties: heating value, net 3.32 MJ, wet mass 1 kg, dry mass 1 kg
- ammonia, anhydrous, liquid: 9.8e-5 kg; lognormal variance with pedigree 1.53, pedigree (1,1,5,1,1)
  uncertainty calculated from uncertainty in average DeNOx input, uncertainty in the share of thermal NOx, uncertainty of nitrogen content in average municipal waste and the unertainty in nitrogen content in *this* waste.
  EcoSpold01Location=CH
  properties: dry mass 1 kg, wet mass 1 kg
- heat, district or industrial, natural gas: 0.008604 MJ; lognormal variance with pedigree 1.53, pedigree (1,1,5,1,1)
  EcoSpold01Location=RER
  uncertainty calculated from uncertainty in average DeNOx input, uncertainty in the share of thermal NOx, uncertainty of nitrogen content in average municipal waste and the unertainty in nitrogen content in *this* waste.
  properties: heating value, net 1 MJ
- residual material landfill: 1.47e-11 unit; lognormal variance with pedigree 0.08, pedigree (1,1,5,1,1)
  EcoSpold01Location=CH
  uncertainty is calculated from uncertainties in waste composition and transfer coefficients in incinerator
- cement, unspecified: 0.00281 kg; lognormal variance with pedigree 0.09, pedigree (1,1,5,1,1)
  EcoSpold01Location=CH
  Cement for solidification of landfilled residual material. Uncertainty calculated from unertainty of the waste composition of this waste, of transfer coefficients in the incinerator and of the solidification recipe.
  properties: dry mass 1 kg, wet mass 1 kg
- sodium hydroxide, without water, in 50% solution state: 0.00136 kg; lognormal variance with pedigree 0.53, pedigree (1,1,5,1,1)
  (same comment as for hydrochloric acid, without water, in 30% solution state)
  properties: heating value, net 3.03 MJ, wet mass 1 kg, dry mass 1 kg
- slag landfill: 2.93e-11 unit; lognormal variance with pedigree 0.09, pedigree (1,1,5,1,1)
  uncertainty is calculated from uncertainties in waste composition and transfer coefficients in incinerator
  EcoSpold01Location=CH
- titanium dioxide: 2.81e-6 kg; lognormal variance with pedigree 2.24, pedigree (1,1,5,1,1)
  (same comment as for heat, district or industrial, natural gas)
  properties: dry mass 1 kg, wet mass 1 kg
- chemical, inorganic: 4.46e-6 kg; lognormal variance with pedigree 0.46, pedigree (1,1,5,1,1)
  Proxy for Polyelectrolyte. uncertainty calculated from uncertainty in average auxiliary material input, and the unertainty of the waste composition of this waste
  EcoSpold01Location=GLO
  properties: wet mass 1 kg, dry mass 1 kg, carbon content, fossil 0.003
  note on carbon content, fossil: This dataset is an unweighted average of 20 inorganic substances (listed in Tab 88.1, ecoinvent v2.2 report 8, part II), being part of the top100 chemicals included in this database. The C-content has also been calculated as an unweighted average of the C content of the substances composing this dataset.
- chemical, organic: 9.46e-5 kg; lognormal variance with pedigree 1.17, pedigree (1,1,5,1,1)
  EcoSpold01Location=GLO
  Proxy for TMT15. uncertainty calculated from uncertainty in average auxiliary material input, and the unertainty of the waste composition of this waste
  properties: carbon content, fossil 0.628, heating value, net 19.03 MJ, wet mass 1 kg, dry mass 1 kg
  note on carbon content, fossil: This dataset is an unweighted average of 20 organic substances (listed in Tab 88.1, ecoinvent v2.2 report 8, part II), being part of the top100 chemicals included in this database. The C-content has also been calculated as an unweighted average of the C content of the substances composing this dataset.
- iron (III) chloride, without water, in 40% solution state: 0.000106 kg; lognormal variance with pedigree 0.54, pedigree (1,1,5,1,1)
  uncertainty calculated from uncertainty in average auxiliary material input, and the unertainty of the waste composition of this waste
  EcoSpold01Location=CH
  properties: dry mass 1 kg, wet mass 1 kg
- municipal waste incineration facility: 2.5e-10 unit; lognormal variance with pedigree 0.04, pedigree (1,1,5,1,1)
  demands per kilogram waste. uncertainty is heeded in the module
  EcoSpold01Location=CH
- quicklime, milled, packed: 0.000197 kg; lognormal variance with pedigree 0.68, pedigree (1,1,5,1,1)
  EcoSpold01Location=CH
  uncertainty calculated from uncertainty in average auxiliary material input, and the unertainty of the waste composition of this waste
  properties: wet mass 1 kg, dry mass 0.99 kg, water content 0.010101
- process-specific burdens, municipal waste incineration: 1 kg; lognormal variance with pedigree 0.04, pedigree (1,1,5,1,1)
  EcoSpold01Location=CH
  demands per kilogram waste. uncertainty is heeded in the module;activityLink introduced to establish a direct link to the corresponding regional supply of this product
- process-specific burdens, slag landfill: 0.0165 kg; lognormal variance with pedigree 0.09, pedigree (1,1,5,1,1)
  EcoSpold01Location=CH
  uncertainty is calculated from uncertainties in waste composition and transfer coefficients in incinerator;activityLink introduced to establish a direct link to the corresponding regional supply of this product
- process-specific burdens, residual material landfill: 0.00704 kg; lognormal variance with pedigree 0.08, pedigree (1,1,5,1,1)
  uncertainty is calculated from uncertainties in waste composition and transfer coefficients in incinerator;activityLink introduced to establish a direct link to the corresponding regional supply of this product
  EcoSpold01Location=CH

## Emissions to nature
- Manganese [water, ground-, long-term]: 6.67e-5 kg; lognormal variance with pedigree 1.13, pedigree (1,1,5,1,1)
  Long-term emissions from landfilling of incineration residues. uncertainty is calculated from uncertainties in waste composition and transfer coefficients in incinerator and landfills.
- Nitrate [water, ground-, long-term]: 6.98e-5 kg; lognormal variance with pedigree 0.62, pedigree (1,1,5,1,1)
  (same comment as for Manganese)
- Zinc, ion [water, ground-, long-term]: 1.29e-5 kg; lognormal variance with pedigree 5.36, pedigree (1,1,5,1,1)
  (same comment as for Manganese)
- Antimony [water, surface water]: 1.45e-5 kg; lognormal variance with pedigree 0.94, pedigree (1,1,5,1,1)
  uncertainty is calculated from uncertainties in waste composition and transfer coefficients in incinerator and landfills
- Nickel, ion [water, surface water]: 1.25e-8 kg; lognormal variance with pedigree 1.79, pedigree (1,1,5,1,1)
  (same comment as for Antimony)
- Sodium, ion [water, ground-, long-term]: 0.0011 kg; lognormal variance with pedigree 0.43, pedigree (1,1,5,1,1)
  (same comment as for Manganese)
- Iron [air, urban air close to ground]: 1.21e-7 kg; lognormal variance with pedigree 0.58, pedigree (1,1,5,1,1)
  uncertainty is calculated from uncertainties in waste composition and transfer coefficients in incinerator
- Arsenic [air, urban air close to ground]: 1.88e-14 kg; lognormal variance with pedigree 1.64, pedigree (1,1,5,1,1)
  (same comment as for Iron)
- Antimony [air, urban air close to ground]: 1.62e-13 kg; lognormal variance with pedigree 1.25, pedigree (1,1,5,1,1)
  (same comment as for Iron)
- Copper [air, urban air close to ground]: 7.94e-10 kg; lognormal variance with pedigree 1.05, pedigree (1,1,5,1,1)
  (same comment as for Iron)
- Titanium [air, urban air close to ground]: 9.69e-7 kg; lognormal variance with pedigree 0.72, pedigree (1,1,5,1,1)
  (same comment as for Iron)
- Cobalt [air, urban air close to ground]: 9.72e-13 kg; lognormal variance with pedigree 1.26, pedigree (1,1,5,1,1)
  (same comment as for Iron)
- Bromine [water, ground-, long-term]: 0.000154 kg; lognormal variance with pedigree 0.72, pedigree (1,1,5,1,1)
  (same comment as for Manganese)
- Beryllium [water, ground-, long-term]: 3.9e-7 kg; lognormal variance with pedigree 1.48, pedigree (1,1,5,1,1)
  (same comment as for Manganese)
- Hydrogen fluoride [air, urban air close to ground]: 7.5e-9 kg; lognormal variance with pedigree 1.28, pedigree (1,1,5,1,1)
  (same comment as for Iron)
- Cadmium, ion [water, ground-, long-term]: 2.34e-7 kg; lognormal variance with pedigree 6.99, pedigree (1,1,5,1,1)
  (same comment as for Manganese)
- Carbon monoxide, fossil [air, urban air close to ground]: 0.000223 kg; lognormal variance with pedigree 0.690625, pedigree (1,3,5,2,1)
  Literature data from switzerland and germany adapted to plant age distribution in switzerland
  Uncertainty: & basic uncertainty of 5; literature data from switzerland and germany adapted to plant age distribution in switzerland
- Strontium [air, urban air close to ground]: 8.58e-9 kg; lognormal variance with pedigree 1.06, pedigree (1,1,5,1,1)
  (same comment as for Iron)
- Antimony [water, ground-, long-term]: 2.66e-5 kg; lognormal variance with pedigree 0.91, pedigree (1,1,5,1,1)
  (same comment as for Manganese)
- Chromium VI [water, surface water]: 1.29e-6 kg; lognormal variance with pedigree 1.07, pedigree (1,1,5,1,1)
  (same comment as for Antimony)
- Sodium, ion [water, surface water]: 0.000307 kg; lognormal variance with pedigree 0.35, pedigree (1,1,5,1,1)
  (same comment as for Antimony)
- Manganese [water, surface water]: 4.33e-9 kg; lognormal variance with pedigree 1.8, pedigree (1,1,5,1,1)
  (same comment as for Antimony)
- Tin, ion [water, ground-, long-term]: 1.28e-5 kg; lognormal variance with pedigree 1.54, pedigree (1,1,5,1,1)
  (same comment as for Manganese)
- TOC, Total Organic Carbon [water, surface water]: 2.38e-5 kg; lognormal variance with pedigree 0.27, pedigree (1,1,5,1,1)
  (same comment as for Antimony)
- Carbon dioxide, fossil [air, urban air close to ground]: 3.15 kg; lognormal variance with pedigree 0.04, pedigree (1,1,5,1,1)
  (same comment as for Iron)
- BOD5, Biological Oxygen Demand [water, surface water]: 3.25e-5 kg; lognormal variance with pedigree 0.16, pedigree (1,1,5,1,1)
  (same comment as for Antimony)
- Methane, fossil [air, urban air close to ground]: 6.38e-6 kg; lognormal variance with pedigree 0.091225, pedigree (2,3,5,2,1)
  Confidential data from 5 plants in Switzerland and Germany
  Uncertainty: & basic uncertainty of 1.5; confidential data from 5 plants in Switzerland and Germany
- Nickel, ion [water, ground-, long-term]: 1.87e-5 kg; lognormal variance with pedigree 1.17, pedigree (1,1,5,1,1)
  (same comment as for Manganese)
- Strontium [water, ground-, long-term]: 8.57e-5 kg; lognormal variance with pedigree 1.02, pedigree (1,1,5,1,1)
  (same comment as for Manganese)
- Chromium [air, urban air close to ground]: 2.93e-12 kg; lognormal variance with pedigree 1.22, pedigree (1,1,5,1,1)
  (same comment as for Iron)
- Mercury [water, ground-, long-term]: 4.28e-8 kg; lognormal variance with pedigree 3.4, pedigree (1,1,5,1,1)
  (same comment as for Manganese)
- Vanadium, ion [water, surface water]: 1.88e-7 kg; lognormal variance with pedigree 1.08, pedigree (1,1,5,1,1)
  (same comment as for Antimony)
- Cobalt [water, ground-, long-term]: 2.68e-5 kg; lognormal variance with pedigree 1.11, pedigree (1,1,5,1,1)
  (same comment as for Manganese)
- Manganese [air, urban air close to ground]: 4.22e-13 kg; lognormal variance with pedigree 1.16, pedigree (1,1,5,1,1)
  (same comment as for Iron)
- Thallium [water, ground-, long-term]: 2.26e-7 kg; lognormal variance with pedigree 1.31, pedigree (1,1,5,1,1)
  (same comment as for Manganese)
- Iron, ion [water, ground-, long-term]: 0.00169 kg; lognormal variance with pedigree 1.31, pedigree (1,1,5,1,1)
  (same comment as for Manganese)
- Iron, ion [water, surface water]: 1.24e-6 kg; lognormal variance with pedigree 0.53, pedigree (1,1,5,1,1)
  (same comment as for Antimony)
- Nitrate [water, surface water]: 2.48e-5 kg; lognormal variance with pedigree 0.44, pedigree (1,1,5,1,1)
  (same comment as for Antimony)
- Beryllium [air, urban air close to ground]: 4.85e-10 kg; lognormal variance with pedigree 1.72, pedigree (1,1,5,1,1)
  (same comment as for Iron)
- Aluminium [water, ground-, long-term]: 0.000143 kg; lognormal variance with pedigree 0.85, pedigree (1,1,5,1,1)
  (same comment as for Manganese)
- Cobalt [water, surface water]: 5.24e-9 kg; lognormal variance with pedigree 1.61, pedigree (1,1,5,1,1)
  (same comment as for Antimony)
- Cadmium, ion [water, surface water]: 1.06e-8 kg; lognormal variance with pedigree 1.16, pedigree (1,1,5,1,1)
  (same comment as for Antimony)
- Arsenic, ion [water, ground-, long-term]: 1.01e-6 kg; lognormal variance with pedigree 1.53, pedigree (1,1,5,1,1)
  (same comment as for Manganese)
- Aluminium [air, urban air close to ground]: 3.03e-7 kg; lognormal variance with pedigree 0.93, pedigree (1,1,5,1,1)
  (same comment as for Iron)
- Lead [water, ground-, long-term]: 1.06e-6 kg; lognormal variance with pedigree 7.3, pedigree (1,1,5,1,1)
  (same comment as for Manganese)
- Sodium [air, urban air close to ground]: 1.34e-5 kg; lognormal variance with pedigree 0.66, pedigree (1,1,5,1,1)
  (same comment as for Iron)
- Chromium VI [water, ground-, long-term]: 4.19e-6 kg; lognormal variance with pedigree 1.35, pedigree (1,1,5,1,1)
  (same comment as for Manganese)
- COD, Chemical Oxygen Demand [water, ground-, long-term]: 0.0214 kg; lognormal variance with pedigree 0.05, pedigree (1,1,5,1,1)
  (same comment as for Manganese)
- TOC, Total Organic Carbon [water, ground-, long-term]: 0.00848 kg; lognormal variance with pedigree 0.05, pedigree (1,1,5,1,1)
  (same comment as for Manganese)
- Thallium [air, urban air close to ground]: 3.88e-10 kg; lognormal variance with pedigree 1.75, pedigree (1,1,5,1,1)
  (same comment as for Iron)
- Chloride [water, surface water]: 0.00111 kg; lognormal variance with pedigree 0.62, pedigree (1,1,5,1,1)
  (same comment as for Antimony)
- Selenium [water, surface water]: 6.63e-7 kg; lognormal variance with pedigree 1.21, pedigree (1,1,5,1,1)
  (same comment as for Antimony)
- DOC, Dissolved Organic Carbon [water, ground-, long-term]: 0.00848 kg; lognormal variance with pedigree 0.05, pedigree (1,1,5,1,1)
  (same comment as for Manganese)
- Dinitrogen monoxide [air, urban air close to ground]: 8.2e-6 kg; lognormal variance with pedigree 1.63, pedigree (1,1,5,1,1)
  uncertainty calculated from uncertainty in average N-emissions, uncertainty in the share of thermal NOx, uncertainty of nitrogen content in average municipal waste and the unertainty in nitrogen content in *this* waste.
- Chromium, ion [water, surface water]: 1.26e-7 kg; lognormal variance with pedigree 1.14, pedigree (1,1,5,1,1)
  (same comment as for Antimony)
- BOD5, Biological Oxygen Demand [water, ground-, long-term]: 0.00701 kg; lognormal variance with pedigree 0.05, pedigree (1,1,5,1,1)
  (same comment as for Manganese)
- Bromine [water, surface water]: 0.000727 kg; lognormal variance with pedigree 0.58, pedigree (1,1,5,1,1)
  (same comment as for Antimony)
- Copper, ion [water, surface water]: 4.37e-9 kg; lognormal variance with pedigree 1.61, pedigree (1,1,5,1,1)
  (same comment as for Antimony)
- Selenium [air, urban air close to ground]: 1.02e-14 kg; lognormal variance with pedigree 1.63, pedigree (1,1,5,1,1)
  (same comment as for Iron)
- Mercury [air, urban air close to ground]: 2.84e-14 kg; lognormal variance with pedigree 1.73, pedigree (1,1,5,1,1)
  (same comment as for Iron)
- Thallium [water, surface water]: 2.38e-10 kg; lognormal variance with pedigree 1.91, pedigree (1,1,5,1,1)
  (same comment as for Antimony)
- Titanium, ion [water, ground-, long-term]: 0.00029 kg; lognormal variance with pedigree 1.06, pedigree (1,1,5,1,1)
  (same comment as for Manganese)
- Selenium [water, ground-, long-term]: 1.37e-6 kg; lognormal variance with pedigree 1.03, pedigree (1,1,5,1,1)
  (same comment as for Manganese)
- Copper, ion [water, ground-, long-term]: 8.69e-5 kg; lognormal variance with pedigree 0.97, pedigree (1,1,5,1,1)
  (same comment as for Manganese)
- Zinc [air, urban air close to ground]: 1.36e-8 kg; lognormal variance with pedigree 0.77, pedigree (1,1,5,1,1)
  (same comment as for Iron)
- Chloride [water, ground-, long-term]: 2.67e-5 kg; lognormal variance with pedigree 0.34, pedigree (1,1,5,1,1)
  (same comment as for Manganese)
- Strontium [water, surface water]: 5.4e-8 kg; lognormal variance with pedigree 1.73, pedigree (1,1,5,1,1)
  (same comment as for Antimony)
- Lead [water, surface water]: 4.16e-10 kg; lognormal variance with pedigree 1.25, pedigree (1,1,5,1,1)
  (same comment as for Antimony)
- Aluminium [water, surface water]: 1.61e-8 kg; lognormal variance with pedigree 1.21, pedigree (1,1,5,1,1)
  (same comment as for Antimony)
- COD, Chemical Oxygen Demand [water, surface water]: 5.8e-5 kg; lognormal variance with pedigree 0.28, pedigree (1,1,5,1,1)
  (same comment as for Antimony)
- DOC, Dissolved Organic Carbon [water, surface water]: 2.38e-5 kg; lognormal variance with pedigree 0.27, pedigree (1,1,5,1,1)
  (same comment as for Antimony)
- Barium [air, urban air close to ground]: 1.81e-7 kg; lognormal variance with pedigree 0.95, pedigree (1,1,5,1,1)
  (same comment as for Iron)
- Vanadium [air, urban air close to ground]: 2.79e-8 kg; lognormal variance with pedigree 0.9, pedigree (1,1,5,1,1)
  (same comment as for Iron)
- Cyanide [air, urban air close to ground]: 1.75e-6 kg; lognormal variance with pedigree 1.63, pedigree (1,1,5,1,1)
  (same comment as for Dinitrogen monoxide)
- Tin, ion [water, surface water]: 9.42e-10 kg; lognormal variance with pedigree 1.29, pedigree (1,1,5,1,1)
  (same comment as for Antimony)
- Mercury [water, surface water]: 8.8e-9 kg; lognormal variance with pedigree 1.6, pedigree (1,1,5,1,1)
  (same comment as for Antimony)
- Titanium, ion [water, surface water]: 4.67e-9 kg; lognormal variance with pedigree 2.06, pedigree (1,1,5,1,1)
  (same comment as for Antimony)
- Zinc, ion [water, surface water]: 1.53e-7 kg; lognormal variance with pedigree 0.65, pedigree (1,1,5,1,1)
  (same comment as for Antimony)
- Arsenic, ion [water, surface water]: 8.3e-7 kg; lognormal variance with pedigree 1.29, pedigree (1,1,5,1,1)
  (same comment as for Antimony)
- Barium [water, surface water]: 2.49e-8 kg; lognormal variance with pedigree 1.8, pedigree (1,1,5,1,1)
  (same comment as for Antimony)
- Nitrogen oxides [air, urban air close to ground]: 6.18e-5 kg; lognormal variance with pedigree 1.63, pedigree (1,1,5,1,1)
  (same comment as for Dinitrogen monoxide)
- Sulfate [water, ground-, long-term]: 0.0017 kg; lognormal variance with pedigree 0.45, pedigree (1,1,5,1,1)
  (same comment as for Manganese)
- Fluoride [water, ground-, long-term]: 1.27e-5 kg; lognormal variance with pedigree 0.87, pedigree (1,1,5,1,1)
  (same comment as for Manganese)
- Hydrogen chloride [air, urban air close to ground]: 1.26e-8 kg; lognormal variance with pedigree 0.73, pedigree (1,1,5,1,1)
  (same comment as for Iron)
- Barium [water, ground-, long-term]: 0.00016 kg; lognormal variance with pedigree 0.97, pedigree (1,1,5,1,1)
  (same comment as for Manganese)
- Vanadium, ion [water, ground-, long-term]: 4.79e-5 kg; lognormal variance with pedigree 1.6, pedigree (1,1,5,1,1)
  (same comment as for Manganese)
- Bromine [air, urban air close to ground]: 2.65e-6 kg; lognormal variance with pedigree 0.73, pedigree (1,1,5,1,1)
  (same comment as for Iron)
- Sulfate [water, surface water]: 0.00033 kg; lognormal variance with pedigree 0.37, pedigree (1,1,5,1,1)
  (same comment as for Antimony)
- Sulfur dioxide [air, urban air close to ground]: 2.89e-6 kg; lognormal variance with pedigree 0.76, pedigree (1,1,5,1,1)
  (same comment as for Iron)
- Lead [air, urban air close to ground]: 5.54e-10 kg; lognormal variance with pedigree 1.3, pedigree (1,1,5,1,1)
  (same comment as for Iron)
- Tin [air, urban air close to ground]: 3.37e-8 kg; lognormal variance with pedigree 1.2, pedigree (1,1,5,1,1)
  (same comment as for Iron)
- Beryllium [water, surface water]: 3.01e-10 kg; lognormal variance with pedigree 1.94, pedigree (1,1,5,1,1)
  (same comment as for Antimony)
- Ammonia [air, urban air close to ground]: 1.54e-6 kg; lognormal variance with pedigree 1.63, pedigree (1,1,5,1,1)
  (same comment as for Dinitrogen monoxide)
- Fluoride [water, surface water]: 1.1e-6 kg; lognormal variance with pedigree 0.91, pedigree (1,1,5,1,1)
  (same comment as for Antimony)
- Nickel [air, urban air close to ground]: 8.62e-13 kg; lognormal variance with pedigree 1.32, pedigree (1,1,5,1,1)
  (same comment as for Iron)
- Cadmium [air, urban air close to ground]: 1.29e-9 kg; lognormal variance with pedigree 1.23, pedigree (1,1,5,1,1)
  (same comment as for Iron)

## Sampling procedure
waste-specific calculation based on literature data

## Extrapolations
This dataset has been extrapolated from year 2000 to the year of the calculation (2021). The uncertainty has been adjusted accordingly.

## Review by Niels Jungbluth 2003-07-15
Passed. Calculation for standard deviation 95 of, i.e., infrastructure,
land occupation, transport services or other services can differ from
standard Pedigree approach used in this project and figures obtained by
this procedure.
