# wood wool production

Dataset: EcoSpold 2, unit process
Geography: RER
Time period: 2002-01-01 to 2021-12-31
Technology level: current
Classification: ISIC rev.4 ecoinvent: 1610:Sawmilling and planing of wood
Synonyms: packaging material; Spruce
Tags: ConvertedDataset; Swiss brush-up completed
Scenario: Business-as-Usual
System model: Allocation, cut-off by classification
Generated by: Frank Werner
Published in: Werner F. 2007
Database: ecoinvent
isCopyrightProtected: true
accessRestrictedTo: 1

## Included activities start
From reception of industrial wood at the factory gatel.

## Included activities end
This activity ends with wood wool, at plant. The dataset includes all processes of wood wool production from industrial softwood (debarked), including air drying (from u=70 - 20%), external and internal transports, sucktion, air compression and sawmill production. The dataset does not include infrastructure.

## Geography
Data from the only Swiss wood wool production plant used for central Europe

## Technology
Technology reflects a medium sized Swiss enterprise from 2000.
Wood wool is produced mainly from spruce by machines similar to planing machines. The shavings are 0.03 to 0.5 mm thick and usually 2 mm wide. The input wood has to be dry (u<20 30%) and its length usually is around 50 cm.
Reference:
Kollmann F. F. P., Kuenzi E. W. and Stamm A. J. (1975) Principles of Wood Science and Technology. Springer-Verl., Berlin, Heidelberg, New York. AND Nimz H., Schmitt U., Schwab E., Wittmann O. and Wolf F. (1997) Wood. In: Ullmann's encyclopedia of indus-trial chemistry (ed. Anonymous). 5th edition on CD-ROM Edition. Wiley & Sons, London.

## Reference product
- wood wool: 1 kg; By-product classification allocatable product; CPC 31220: Wood wool; wood flour
  Reference product. Wood wool produced at a factory in Switzerland by processes representative for Central Europe. The reference product is ready for delivery at the factory. Wood wool is mainly used as packing material and as raw material for wood wool boards.
  production volume 2.48604e8 kg; name wood_wool; = 752000000*0.33059
    Estimated. The european production volume is extrapolated from the global production volume using the nominal GDP of 2005 (source: United Nations, http://data.un.org/Glossary.aspx?q=GDP+%28current+US%24%29, accessed 20130726 and 20130312).
    Gross domestic product (GDP) at current prices is GDP at prices of the current reporting period. Also known as nominal GDP.
  property price 0.374 EUR2005
    Temporary price data. Calculated as 90% of purchasers price based on: Price for wood pulp applied (World Import/Export (USD/kg) from FaoStat (http://faostat.fao.org/site/626/default.aspx#ancor, [accessed 14th June 2010])
  property carbon content, non-fossil 0.494
    C content of dry mass is 0.494 kgC/kg dry wood (ecoinvent v2.2 report 9)
  property heating value, net 12.06 MJ
    LHV is calculated based on the Carbon content of the product. More details can be found on the respective documentation.
  property carbon content 0.494
    carbon content on a dry matter basis (reserved; not for manual entry)
  property true value 0.374
    allocation property applied in "true value" allocation // value calculated from revenue
  properties: dry mass 0.833333 kg, water in wet mass 0.166667 kg, water content 0.2, carbon content, fossil 0, wet mass 1 kg, carbon allocation 0.411667 kg

## By-products
- residual wood, dry: 0 m3; name residual_wood; CPC 39283: Non-agglomerated wood waste and scrap; By-product classification allocatable product; pedigree (1,1,1,1,1)
  Estimation. Based on personal communication to Lindner Produktion AG, Watwill (2002), Hr. Wildnagel. www.lindler.ch; Fax 071/9876159.
  production volume 23020.7 m3; = wood_wool*residual_wood
    Unknown
    Relative to main product (0.0000926 m3 / kg wood wool)
  property heating value, net 8030.06 MJ
    LHV is calculated based on the Carbon content of the product. More details can be found on the respective documentation.The property is based on a value of 12.7MJ/kg
  property price 26.9 EUR2005
    Temporary price data. Calculated as 90% of purchasers price based on: 2004 prices for World Import/Export (USD/cubicmeter) from FaoStat (http://faostat.fao.org/site/626/default.aspx#ancor, [accessed 10th June 2010]) Commodity: 'Chips and Particles' assuming this is for air-dry chips (10% water on a dry matter basis at 650 kg/m3) and no price difference for water content (i.e. assuming air-drying).
  property carbon content 0.494
    carbon content on a dry matter basis (reserved; not for manual entry)
  property true value 0.00249094; name residual_wood_true_value
    allocation property applied in "true value" allocation // value calculated from revenue
  properties: dry mass 550 kg, carbon content, non-fossil 0.494, wet mass 632.5 kg, water content 0.15, water in wet mass 82.5 kg, carbon content, fossil 0, carbon allocation 271.7 kg

## Inputs from technosphere
- pulpwood, softwood, measured as solid wood under bark: 0 m3; pedigree (1,1,1,1,1)
  (same comment as for residual wood, dry)
  properties: heating value, net 4483.78 MJ, dry mass 440 kg, wet mass 748 kg, carbon content, non-fossil 0.494, water content 0.7
  note on heating value, net: Value based on "softwood forestry, mixed species, sustainable forest management"The property is based on a value of 11.58MJ/kg
- electricity, medium voltage: 0.0588083 kWh; source Anonymous 1976; lognormal variance with pedigree 0.0671, pedigree (1,4,5,3,1)
  Estimation. Based on personal communication to Lindner Produktion AG, Watwill (2002), Hr. Wildnagel. www.lindler.ch; Fax 071/9876159, AND Tachenbuch der Holzteknologie, p. 443 (see Source). Data contains all electricity consuming processes, incl. internal transports, suction, air compression, sawmill production for average years 2000 and 2001.
  properties: UVEK_link_8 4417, UVEK_link_9 4433, UVEK_relative_amount_1 1, UVEK_link_1 1779
  note on UVEK_link_8: This link has been introduced to model transport specifically for the SAM model; to be used only in special submissions in coordination with ecoinvent and the Swiss FOEN.
  note on UVEK_relative_amount_1: to be used only in special submissions in coordination with ecoinvent and the Swiss FOEN
- sawmill: 8.42389e-10 unit; lognormal variance with pedigree 0.6461, pedigree (4,5,5,3,4)
  Proxy. Estimation by using sawmill as a proxy.
- pulpwood, softwood, measured as solid wood under bark: 0.00208055, 2.54225e-5 m3 (2 entries); lognormal variance with pedigree 0.0671, pedigree (1,4,5,3,1)
  (same comment as for residual wood, dry)

## Inputs from nature
- Carbon dioxide, non-fossil, resource correction [natural resource, in air]: -0.086136 kg; pedigree (1,1,1,1,1)
  This exchange has been added after economic allocation in order to re-balance the non-fossil carbon dioxide resource extraction.

## Sampling procedure
Personal communication

## Extrapolations
see Geography and Technology
