# uranium mine operation, open cast

Dataset: EcoSpold 2, unit process
Geography: RoW
Time period: 1980-01-01 to 2021-12-31
Technology level: current
Classification: EcoSpold01Categories: nuclear power/production
Classification: ISIC rev.4 ecoinvent: 0721:Mining of uranium and thorium ores
Tags: ConvertedDataset
Scenario: Business-as-Usual
System model: Allocation, cut-off by classification
Generated by: Roberto Dones
Published in: Dones, R. 2007
Database: ecoinvent
isCopyrightProtected: true
accessRestrictedTo: 1

## General comment
The data on radioactive emission to air and water are from old references, but the range of values is relatively small. Only particle emission (here assumed dust >10 micrometer) to air is explicitly given in the used reference; emissions from combustion are implicitly accounted for through the energy requirement modules. The energy requirements are roughly divided into two: diesel in building machines to take into account the excavation of overburden with a mass ratio to product U3O8 of 30:1; and diesel in diesel generator for electricity uses, mostly for pumping water. It is assumed that the overburden and the ore piles that are not transfered to the mill plant, are dumped back in the pit. Reclamation of the pit is not included in the module because of lack of information. However, by far the largest masses of waste originating in mining are found in the mill tailings.
[This dataset was already contained in the ecoinvent database version 2. It was not individually updated during the transfer to ecoinvent version 3. Life Cycle Impact Assessment results may still have changed, as they are affected by changes in the supply chain, i.e. in other datasets. This dataset was generated following the ecoinvent quality guidelines for version 2. It may have been subject to central changes described in the ecoinvent version 3 change report (http://www.ecoinvent.org/database/ecoinvent-version-3/reports-of-changes/), and the results of the central updates were reviewed extensively. The changes added e.g. consistent water flows and other information throughout the database. The documentation of this dataset can be found in the ecoinvent reports of version 2, which are still available via the ecoinvent website. The change report linked above covers all central changes that were made during the conversion process.]

## Included activities end
The module includes: diesel use for digging and producing electricity; transport of the diesel fuel; radioactive and non-radioactive emissions to air and water; water use (mining water, but attributed to "unspecified natural origin").

## Geography
North American data.

## Technology
Average conditions in early 1980s.

## Parameters
- fraction, process water, to air: 0.15 dimensionless; name fraction_PW_to_air; lognormal variance with pedigree 0.092025, pedigree (4,4,3,2,4)

## Reference product
- uranium ore, as U: 1 kg; CPC 13000: Uranium and thorium ores and concentrates; By-product classification allocatable product
  EcoSpold01Location=RNA
  production volume 3.44066e6 kg
    14% of global mine production is from open-pit mines (Source: http://www.world-nuclear.org/info/inf23.html)
  property price 20.96 EUR2005
    Calculated value based on data from United Nations Commodity Trade Statistics Database (comtrade.un.org). UN comtrade category: 261210 Uranium ores and concentrates. Year 2005. Using exchange rate of 1EURO = 1.209 USD. Average of price of import into 2 main markets (EU and US).
  property carbon content 0
    carbon content on a dry matter basis (reserved; not for manual entry)
  properties: water content 0, wet mass 1 kg, carbon content, fossil 0, water in wet mass 0 kg, dry mass 1 kg, carbon content, non-fossil 0, carbon allocation 0 kg

## Inputs from technosphere
- mine infrastructure, open cast, uranium: 6.17e-8 unit; lognormal variance with pedigree 0.162, pedigree (1,1,5,5,1)
  EcoSpold01Location=RNA
  own estimatoin
- diesel, burned in building machine: 16 MJ; lognormal variance with pedigree 0.692, pedigree (1,1,5,5,1)
  EcoSpold01Location=GLO
  range of data
  properties: heating value, net 1 MJ
- blasting: 0.26 kg; lognormal variance with pedigree 0.342, pedigree (1,1,5,5,1)
  EcoSpold01Location=RER
  old reference for model mine
- diesel, burned in diesel-electric generating set, 10MW: 36.5 MJ; lognormal variance with pedigree 0.692, pedigree (1,1,5,5,1)
  range of data
  EcoSpold01Location=GLO
  properties: heating value, net 1 MJ

## Inputs from nature
- Transformation, to unspecified [natural resource, land]: 0.182 m2; lognormal variance with pedigree 0.162, pedigree (1,1,5,5,1)
  own estimation, based on range of data
- Transformation, from industrial area [natural resource, land]: 0.182 m2; lognormal variance with pedigree 0.162, pedigree (1,1,5,5,1)
  own estimation, based on range of data
- Uranium, in ground [natural resource, in ground]: 1.05 kg; lognormal variance with pedigree 0.042, pedigree (1,1,5,5,1)
  own estimation
- Transformation, to mineral extraction site [natural resource, land]: 0.182 m2; lognormal variance with pedigree 0.162, pedigree (1,1,5,5,1)
  own estimation, based on range of data
- Occupation, mineral extraction site [natural resource, land]: 4 m2*year; lognormal variance with pedigree 0.252, pedigree (1,1,5,5,1)
  own estimation, based on range of data
- Transformation, from unspecified [natural resource, land]: 0.182 m2; lognormal variance with pedigree 0.162, pedigree (1,1,5,5,1)
  own estimation, based on range of data
- Water, unspecified natural origin [natural resource, in water]: 6 m3; name water_UNO_input; lognormal variance with pedigree 0.082, pedigree (1,1,5,5,1)
  range of data

## Emissions to nature
- Aluminium [water, surface water]: 0.0031 kg; lognormal variance with pedigree 0.342, pedigree (1,1,5,5,1)
  old reference for model mine
- Sulfate [water, surface water]: 48 kg; lognormal variance with pedigree 0.342, pedigree (1,1,5,5,1)
  old reference for model mine
- Manganese [water, surface water]: 0.069 kg; lognormal variance with pedigree 0.342, pedigree (1,1,5,5,1)
  old reference for model mine
- Uranium alpha [water, surface water]: 220 kBq; lognormal variance with pedigree 0.162, pedigree (1,1,5,5,1)
  old reference, range of data
- Cadmium, ion [water, surface water]: 9.3e-5 kg; lognormal variance with pedigree 0.342, pedigree (1,1,5,5,1)
  old reference for model mine
- Zinc, ion [water, surface water]: 0.0012 kg; lognormal variance with pedigree 0.342, pedigree (1,1,5,5,1)
  old reference for model mine
- Molybdenum [water, surface water]: 0.0016 kg; lognormal variance with pedigree 0.342, pedigree (1,1,5,5,1)
  old reference for model mine
- Vanadium, ion [water, surface water]: 0.0065 kg; lognormal variance with pedigree 0.342, pedigree (1,1,5,5,1)
  old reference for model mine
- Nitrate [water, surface water]: 0.0021 kg; lognormal variance with pedigree 0.342, pedigree (1,1,5,5,1)
  old reference for model mine
- Uranium alpha [air, non-urban air or from high stacks]: 0.094 kBq; lognormal variance with pedigree 0.692, pedigree (1,1,5,5,1)
  own calculation
- Water [water, unspecified]: 5.1 m3; name water_to_water_unspecified; lognormal variance with pedigree 0.0827, pedigree (2,2,5,5,1)
  Calculated value based on literature values and expert opinion. See comments in the parametres' comment field.
  property fraction, origin: salt water 0; name fraction_origin_salt_water_Ww
  property fraction, origin: fresh water 0; name fraction_origin_fresh_water_Ww
  property water in wet mass 1000 kg; name WWM
  property carbon content, fossil 0; name C_content_fossil
  property dry mass 0 kg; name DM
  property carbon content, non-fossil 0; name C_content_non_fossil
  property wet mass 1000 kg; name WM
  property fraction, origin: unspecified 1; name fraction_origin_unspecified_Ww
- Barium [water, surface water]: 0.0019 kg; lognormal variance with pedigree 0.342, pedigree (1,1,5,5,1)
  old reference for model mine
- Water [air, unspecified]: 0.9 m3; name water_to_air_unspecified; lognormal variance with pedigree 0.0827, pedigree (2,2,5,5,1)
  (same comment as for Water)
  property fraction, origin: fresh water 0; name fraction_origin_fresh_water
  property fraction, origin: unspecified 1; name fraction_origin_unspecified
  property fraction, origin: salt water 0; name fraction_origin_salt_water
- Iron, ion [water, surface water]: 0.034 kg; lognormal variance with pedigree 0.342, pedigree (1,1,5,5,1)
  old reference for model mine
- Lead [water, surface water]: 0.018 kg; lognormal variance with pedigree 0.342, pedigree (1,1,5,5,1)
  old reference for model mine
- Selenium [water, surface water]: 0.00019 kg; lognormal variance with pedigree 0.342, pedigree (1,1,5,5,1)
  old reference for model mine
- Radium-226 [water, surface water]: 5000 kBq; lognormal variance with pedigree 0.692, pedigree (1,1,5,5,1)
  old reference, range of data
- Chloride [water, surface water]: 0.86 kg; lognormal variance with pedigree 0.342, pedigree (1,1,5,5,1)
  old reference for model mine
- Thorium-230 [water, surface water]: 460 kBq; lognormal variance with pedigree 0.162, pedigree (1,1,5,5,1)
  old reference, range of data
- Radon-222 [air, non-urban air or from high stacks]: 130000 kBq; lognormal variance with pedigree 0.132, pedigree (1,1,5,5,1)
  range of data
- Ammonium, ion [water, surface water]: 0.0085 kg; lognormal variance with pedigree 0.342, pedigree (1,1,5,5,1)
  old reference for model mine
- Arsenic, ion [water, surface water]: 9.3e-5 kg; lognormal variance with pedigree 0.342, pedigree (1,1,5,5,1)
  old reference for model mine
- Suspended solids, unspecified [water, surface water]: 2.1 kg; lognormal variance with pedigree 0.342, pedigree (1,1,5,5,1)
  old reference for model mine
- Particulates, > 10 um [air, non-urban air or from high stacks]: 0.056 kg; lognormal variance with pedigree 1.372, pedigree (1,1,5,5,1)
  old reference for model mine, own assumption
- Magnesium [water, surface water]: 0.11 kg; lognormal variance with pedigree 0.342, pedigree (1,1,5,5,1)
  old reference for model mine

## Sampling procedure
Literature

## Extrapolations
none This dataset has been copied from an original dataset covering the geography RNA. The uncertainty has been adjusted accordingly.

## Review by Roberto Dones 2003-08-19
passed
for final calculation August 2003
