# treatment of used door, outer, wood-glass, collection for final disposal

Dataset: EcoSpold 2, unit process
Geography: RoW
Time period: 2005-01-01 to 2021-12-31
Technology level: current
Classification: EcoSpold01Categories: waste management/building demolition
Classification: ISIC rev.4 ecoinvent: 3821:Treatment and disposal of non-hazardous waste
Tags: ConvertedDataset; Treatment
Scenario: Business-as-Usual
System model: Allocation, cut-off by classification
Generated by: Martin Lehmann
Published in: Kellenberger D. 2007
Database: ecoinvent
isCopyrightProtected: true
accessRestrictedTo: 1

## General comment
The dataset can be applied for a standard outer door (wood-glass) disposal process in Switzerland.
[This dataset was already contained in the ecoinvent database version 2. It was not individually updated during the transfer to ecoinvent version 3. Life Cycle Impact Assessment results may still have changed, as they are affected by changes in the supply chain, i.e. in other datasets. This dataset was generated following the ecoinvent quality guidelines for version 2. It may have been subject to central changes described in the ecoinvent version 3 change report (http://www.ecoinvent.org/database/ecoinvent-version-3/reports-of-changes/), and the results of the central updates were reviewed extensively. The changes added e.g. consistent water flows and other information throughout the database. The documentation of this dataset can be found in the ecoinvent reports of version 2, which are still available via the ecoinvent website. The change report linked above covers all central changes that were made during the conversion process.]

## Included activities end
The dataset describes the disposal of a wood-glass outer door in a municipal incineration. The door frame out of steel is recycled at 100%. The rest of the materials (rest of steel parts, aluminium, rubber, plastics, mortar, paints and wood) is disposed in a municipal solid waste incineration. Glass also goes into a MSWI, but can be recovered there.

## Geography
Dataset represents standard in Europe and/or Switzerland.

## Technology
The technology in this dataset represents standard incineration technology in Europe.

## Reference product
- used door, outer, wood-glass: -1 m2; By-product classification Waste; CPC 39990: Other wastes n.e.c.
  EcoSpold01Location=CH
  production volume 3.96633 m2
    This is a placeholder value that does not reflect real-world production volumes. This dataset does not currently require a real-world production volume to work in the database framework, and no actual data were collected yet. This has no negative effect on the results of the ecoinvent database.
  property price 0 EUR2005
    Waste products are assigned a price of zero as they are assumed to require further treatment.
  property carbon content 0.216593
    carbon content on a dry matter basis (reserved; not for manual entry)
  properties: carbon content, non-fossil 0.184519, carbon content, fossil 0.032074, water content 0.0526316, dry mass 34.675 kg, water in wet mass 1.825 kg, wet mass 36.5 kg, carbon allocation 7.51038 kg

## Inputs from technosphere
- waste mineral plaster: -50 kg; lognormal variance with pedigree 0.0526, pedigree (1,3,5,5,1)
  EcoSpold01Location=CH
  production volume 198.317 kg
    Calculated from the production volume of used door, outer, wood-glass in proportion to the respective output amounts.
  properties: dry mass 1 kg, wet mass 1 kg
- waste rubber, unspecified: 0 kg; pedigree (1,1,1,1,1)
  EcoSpold01Location=CH
  production volume 0 kg
    (same comment as for waste mineral plaster)
  properties: heating value, net 27.19 MJ, wet mass 1 kg, carbon content, fossil 0.853, dry mass 1 kg
  note on heating value, net: Value taken from the general comment of the treatment dataset.
- waste emulsion paint: 0 kg; pedigree (1,1,1,1,1)
  EcoSpold01Location=CH
  production volume 0 kg
    (same comment as for waste mineral plaster)
  properties: heating value, net 8.18 MJ, carbon content, fossil 0.27, wet mass 1 kg, dry mass 1 kg
  note on carbon content, fossil: Tab A.4, ecoinvent v2.2 report 13_I. C content has been calculated after data in the tables, and then referred to 1 kg DM
- waste plastic, mixture: 0 kg; pedigree (1,1,1,1,1)
  EcoSpold01Location=CH
  production volume 0 kg
    (same comment as for waste mineral plaster)
  properties: wet mass 1 kg, heating value, net 30.79 MJ, water content 0.180638, dry mass 0.847 kg, carbon content, fossil 0.747344
  note on carbon content, fossil: C content in 1 kg DM was calculated using data in Tab A.2, ecoinvent v2.2 report 13_I
- used double glazing, U<1.1W/m2K, laminated safety glass: -0.38 m2; lognormal variance with pedigree 0.0526, pedigree (1,3,5,5,1)
  EcoSpold01Location=CH
  production volume 1.50721 m2
    (same comment as for waste mineral plaster)
  properties: wet mass 27.56 kg, carbon content, fossil 0.0175264, dry mass 27.56 kg
- scrap steel: 0 kg; pedigree (1,1,1,1,1)
  EcoSpold01Location=CH
  production volume 0 kg
    (same comment as for waste mineral plaster)
  properties: wet mass 1 kg, dry mass 1 kg
- scrap aluminium: 0 kg; pedigree (1,1,1,1,1)
  EcoSpold01Location=CH
  production volume 0 kg
    (same comment as for waste mineral plaster)
  properties: wet mass 1 kg, dry mass 1 kg
- waste wood, untreated: 0 kg; pedigree (1,1,1,1,1)
  EcoSpold01Location=CH
  production volume 0 kg
    (same comment as for waste mineral plaster)
  properties: heating value, net 13.99 MJ, water content 0.25, dry mass 0.8 kg, carbon content, non-fossil 0.48632, wet mass 1 kg
  note on carbon content, non-fossil: Tab A.4, ecoinvent v2.2 report 13_I. C content has been referred to 1 kg DM,
- waste rubber, unspecified: -0.156, -0.156 kg (2 entries); lognormal variance with pedigree 0.0526, pedigree (1,3,5,5,1)
  EcoSpold01Location=CH
  production volume 1.2375 kg
- waste emulsion paint: -0.0225697, -0.23943 kg (2 entries); lognormal variance with pedigree 0.0526, pedigree (1,3,5,5,1)
  EcoSpold01Location=CH
  production volume 1.048 kg
- waste plastic, mixture: -0.00797604, -0.000532928, -4.03045e-5, -0.000220118, -8.89254e-5, -0.000209023, -0.00679596, -0.0558367 kg (8 entries); lognormal variance with pedigree 0.0526, pedigree (1,3,5,5,1)
  EcoSpold01Location=CH
  production volume 0.284386 kg
- scrap steel: -0.115696, -0.359304 kg (2 entries); lognormal variance with pedigree 0.0526, pedigree (1,3,5,5,1)
  EcoSpold01Location=CH
  production volume 1.9 kg
- scrap aluminium: -0.58604, -1.23396 kg (2 entries); lognormal variance with pedigree 0.0526, pedigree (1,3,5,5,1)
  EcoSpold01Location=CH
  production volume 7.21873 kg
- waste wood, untreated: -0.918384, -0.114031, -0.00833696, -0.320279, -0.0483865, -0.076495, -1.42993, -12.1842 kg (8 entries); lognormal variance with pedigree 0.0526, pedigree (1,3,5,5,1)
  EcoSpold01Location=CH
  production volume 59.8916 kg

## Sampling procedure
Calculation from waste composition

## Extrapolations
see Geography This dataset has been copied from an original dataset covering the geography CH. The uncertainty has been adjusted accordingly.

## Review by Rolf Frischknecht 2007-11-07
passed
