# treatment of waste graphical paper, open dump, very wet infiltration class (1000mm)

Dataset: EcoSpold 2, unit process
Geography: GLO
Time period: 2006-01-01 to 2021-12-31
Technology level: current
Classification: ISIC rev.4 ecoinvent: 3821:Treatment and disposal of non-hazardous waste
Synonyms: municipal waste landfill
Scenario: Business-as-Usual
System model: Allocation, cut-off by classification
Share of production covered: 1 %
Generated by: Avraam Symeonidis
Database: ecoinvent
isCopyrightProtected: true
accessRestrictedTo: 1

## General comment
This dataset represents the activity of waste disposal of waste graphical paper in a open dump. Recommended use of this dataset: For paper, which goes to disposal as part of unmanaged communal waste mixture. Larger amounts of *already separated* paper could go to recycling, depending on country-specific situation. // Waste composition (wet, in ppm): upper heating value 16.61 MJ/kg; lower heating value 14.12 MJ/kg; H2O 110830; O 378670; H 53852; C 404000; S 1406.7; N 3756.6; P 112.95; B 17.19; Cl 1837.5; Br n.a.; F 19.468; I n.a.; Ag 0.047733; As 2.0485; Ba 114.24; Cd 1.6629; Co 0.7359; Cr 14.461; Cu 60.893; Hg 0.13902; Mn 40.221; Mo 4.2976; Ni 9.4431; Pb 80.374; Sb 0.70911; Se 2.5786; Sn n.a.; V n.a.; Zn 124.8; Be 0.97413; Sc n.a.; Sr 58.276; Ti 171.9; Tl 1.719; W n.a.; Si 21255; Fe 1188.4; Ca 3438.1; Al 12391; K 1327.5; Mg 4297.6; Na 918.83; . // Share of carbon in waste that is biogenic 100%. Share of metals in waste not oxidised and bulk-recyclable (exclude very small or thin parts) Iron: 0%; Alu: 0%; Copper: 0%. Overall degradability of waste during 100 years: 27%.

## Included activities start
from final waste deposition (without transports to the site)

## Included activities end
Waste-specific short-term emissions to air via landfill gas and landfill leachate. Waste-specific long-term emissions from landfill.

## Geography
Given name of landfill location is 'infiltration class 5 very wet (2018)'. Landfill site with mean annual temperature (MAT) of 8 degC, mean annual precipitation (MAP) of 1900 mm/year, and net infiltration of 1000 mm/year.
Climate adjustments result in an alpha t (temperature) for permafrost areas of 0.999. Total climate adjustments with alpha pt of 0.999.

## Technology
This is an inventory for an open, uncontrolled waste dump for municipal solid waste. Ultimate average landfill height is 7 meters. Operation phase duration is 15 years.Percentage of landfill gas directly emitted is 100w%. A Methane Correction Factor (MCF) for landfill air emissions of 0.7057 is employed.
Leachate of the landfill is not treated. Based on average waste composition and climate data the end of carbonate phase is estimated to be reached 862 years after waste deposition.

## Reference product
- waste graphical paper: -1 kg; By-product classification Waste; CPC 39990: Other wastes n.e.c.; pedigree (1,1,1,1,1)
  main reference product of this activity (supply of disposal service).
  Uncertainty: Uncertainty is not adjusted, as this is the refence product
  production volume 1 kg
    The amount of the annual production volume is a placeholder value. The contribution of this technology to the different local markets can be found in the markets themselves.
  property price 0 EUR2005
    Waste products are assigned a price of zero as they are assumed to require further treatment.
  property heating value, net 14.12 MJ
    Value taken from the general comment of the treatment dataset.
  property carbon content 0.45435
    carbon content on a dry matter basis (reserved; not for manual entry)
  properties: chlorine content 0.0020665, arsenic content 2.3039e-6, silver content 5.3682e-8, iron content 0.0013366, sulfur content 0.001582, barium content 0.00012848, thallium content 1.9333e-6, carbon content, non-fossil 0.45435, mercury content 1.5635e-7, titanium content 0.00019333, nitrogen content 0.0042248, sodium content 0.0010334, cadmium content 1.8702e-6, copper content 6.8483e-5, silicon content 0.023904, molybdenum content 4.8333e-6, beryllium content 1.0955e-6, oxygen content 0.42587, phosphorus content 0.00012703, magnesium content 0.0048333, manganese content 4.5234e-5, chromium content 1.6263e-5, nickel content 1.062e-5, calcium content 0.0038666, cobalt content 8.2762e-7, water content 0.12464, antimony content 7.9749e-7, dry mass 0.88917 kg, water in wet mass 0.11083 kg, wet mass 1 kg, heating value, gross 16.611 MJ, hydrogen content 0.060564, aluminium content 0.013935, selenium content 2.9e-6, lead content 9.0392e-5, boron content 1.9333e-5, potassium content 0.0014929, zinc content 0.00014036, fluorine content 2.1895e-5, strontium content 6.5539e-5, carbon allocation 0.403994 kg

## Inputs from nature
- Occupation, dump site [natural resource, land]: 0.0035714 m2*year; lognormal variance with pedigree 0.088256, pedigree (1,1,4,1,1)
  for landfill operation phase and spontaneous renaturation.
  Uncertainty: Uncertainty calculated from uncertainty in base parameters.

## Emissions to nature
- Cobalt [water, ground-]: 6.3788e-8 kg; lognormal variance with pedigree 0.44353, pedigree (1,1,4,1,1)
  burden from short-term leachate to groundwater in uncontrolled landfill in moist cimate.
  Uncertainty: Uncertainty calculated from unertainty of the waste composition of this waste, uncertainty in waste decomposition and short-term leaching in landfill
- Arsenic, ion [water, ground-, long-term]: 1.9479e-6 kg; lognormal variance with pedigree 0.3771, pedigree (1,1,4,1,1)
  Emissions from long-term leachate (>100a) directly from MSW landfill and indirectly via incineration of treatement sludge from leachate treatement.
  Uncertainty: Uncertainty calculated depending on waste input and uncertainty of long-term transfer coefficents in landfill.
- Chromium [air, non-urban air or from high stacks]: 1.1113e-11 kg; lognormal variance with pedigree 0.71124, pedigree (1,1,4,1,1)
  burden from direct release or incineration of landfill biogas; or windblown leachate evaporite in arid climates.
  Uncertainty: Uncertainty calculated from unertainty of the waste composition of this waste, uncertainty in waste decomposition and short-term leaching in landfill
- Cadmium, ion [water, ground-]: 7.8911e-8 kg; lognormal variance with pedigree 0.43167, pedigree (1,1,4,1,1)
  (same comment as for Cobalt)
- Silver, ion [water, ground-, long-term]: 4.7669e-8 kg; lognormal variance with pedigree 0.48845, pedigree (1,1,4,1,1)
  (same comment as for Arsenic, ion)
- Manganese [air, non-urban air or from high stacks]: 3.1057e-9 kg; lognormal variance with pedigree 0.52626, pedigree (1,1,4,1,1)
  (same comment as for Chromium)
- Barium [water, ground-]: 3.5285e-5 kg; lognormal variance with pedigree 0.25328, pedigree (1,1,4,1,1)
  (same comment as for Cobalt)
- Phosphate [water, ground-, long-term]: 2.2926e-5 kg; lognormal variance with pedigree 0.70336, pedigree (1,1,4,1,1)
  (same comment as for Arsenic, ion)
- Cadmium [air, non-urban air or from high stacks]: 5.2608e-10 kg; lognormal variance with pedigree 0.58469, pedigree (1,1,4,1,1)
  (same comment as for Chromium)
- Silver, ion [water, ground-]: 6.3035e-11 kg; lognormal variance with pedigree 0.64268, pedigree (1,1,4,1,1)
  (same comment as for Cobalt)
- Chloride [water, ground-, long-term]: 0.00057212 kg; lognormal variance with pedigree 0.1569, pedigree (1,1,4,1,1)
  (same comment as for Arsenic, ion)
- Cobalt [air, non-urban air or from high stacks]: 1.5947e-11 kg; lognormal variance with pedigree 0.69975, pedigree (1,1,4,1,1)
  (same comment as for Chromium)
- Fluoride [water, ground-]: 3.857e-7 kg; lognormal variance with pedigree 0.37423, pedigree (1,1,4,1,1)
  (same comment as for Cobalt)
- Boron [water, ground-, long-term]: 1.719e-14 kg; lognormal variance with pedigree 0.7875, pedigree (1,1,4,1,1)
  (same comment as for Arsenic, ion)
- Silver [air, non-urban air or from high stacks]: 1.801e-14 kg; lognormal variance with pedigree 0.9097, pedigree (1,1,4,1,1)
  (same comment as for Chromium)
- Arsenic, ion [water, ground-]: 9.9227e-8 kg; lognormal variance with pedigree 0.42435, pedigree (1,1,4,1,1)
  (same comment as for Cobalt)
- Nitrogen, organic bound [water, ground-, long-term]: 0.00081723 kg; lognormal variance with pedigree 0.13594, pedigree (1,1,4,1,1)
  (same comment as for Arsenic, ion)
- Barium [air, non-urban air or from high stacks]: 8.8212e-9 kg; lognormal variance with pedigree 0.49152, pedigree (1,1,4,1,1)
  (same comment as for Chromium)
- Chloride [water, ground-]: 0.0012478 kg; lognormal variance with pedigree 0.15382, pedigree (1,1,4,1,1)
  (same comment as for Cobalt)
- Nitrate [water, ground-, long-term]: 5.2584e-5 kg; lognormal variance with pedigree 0.13594, pedigree (1,1,4,1,1)
  (same comment as for Arsenic, ion)
- Arsenic [air, non-urban air or from high stacks]: 1.391e-9 kg; lognormal variance with pedigree 0.55285, pedigree (1,1,4,1,1)
  (same comment as for Chromium)
- Boron [water, ground-]: 1.719e-5 kg; lognormal variance with pedigree 0.30704, pedigree (1,1,4,1,1)
  (same comment as for Cobalt)
- Nitrite [water, ground-, long-term]: 2.7214e-5 kg; lognormal variance with pedigree 0.13594, pedigree (1,1,4,1,1)
  (same comment as for Arsenic, ion)
- Hydrogen fluoride [air, non-urban air or from high stacks]: 2.0928e-6 kg; lognormal variance with pedigree 0.33252, pedigree (1,1,4,1,1)
  (same comment as for Chromium)
- Phosphate [water, ground-]: 5.2198e-6 kg; lognormal variance with pedigree 0.32354, pedigree (1,1,4,1,1)
  (same comment as for Cobalt)
- Ammonium, ion [water, ground-, long-term]: 0.00050001 kg; lognormal variance with pedigree 0.13594, pedigree (1,1,4,1,1)
  (same comment as for Arsenic, ion)
- Hydrogen chloride [air, non-urban air or from high stacks]: 1.7987e-5 kg; lognormal variance with pedigree 0.24528, pedigree (1,1,4,1,1)
  (same comment as for Chromium)
- Nitrite [water, ground-]: 5.2538e-5 kg; lognormal variance with pedigree 0.13153, pedigree (1,1,4,1,1)
  (same comment as for Cobalt)
- Sulfate [water, ground-, long-term]: 0.0034669 kg; lognormal variance with pedigree 0.1616, pedigree (1,1,4,1,1)
  (same comment as for Arsenic, ion)
- Nitrogen oxides [air, non-urban air or from high stacks]: 1.3894e-6 kg; lognormal variance with pedigree 0.19109, pedigree (1,1,4,1,1)
  burden from direct release or incineration of landfill biogas.
  Uncertainty: Uncertainty calculated from unertainty of the waste composition of this waste, uncertainty in waste decomposition and short-term leaching in landfill
- Nitrate [water, ground-]: 0.00010151 kg; lognormal variance with pedigree 0.13153, pedigree (1,1,4,1,1)
  (same comment as for Cobalt)
- Hydrogen sulfide [water, ground-, long-term]: 9.0372e-5 kg; lognormal variance with pedigree 0.1616, pedigree (1,1,4,1,1)
  (same comment as for Arsenic, ion)
- Sulfur dioxide [air, non-urban air or from high stacks]: 4.9507e-5 kg; lognormal variance with pedigree 0.23598, pedigree (1,1,4,1,1)
  (same comment as for Nitrogen oxides)
- Nitrogen, organic bound [water, ground-]: 0.0015777 kg; lognormal variance with pedigree 0.13153, pedigree (1,1,4,1,1)
  (same comment as for Cobalt)
- DOC, Dissolved Organic Carbon [water, ground-, long-term]: 0.29505 kg; lognormal variance with pedigree 0.0147475, pedigree (1,1,4,1,1)
  (same comment as for Arsenic, ion)
- Hydrogen sulfide [water, ground-]: 1.029e-5 kg; lognormal variance with pedigree 0.19128, pedigree (1,1,4,1,1)
  (same comment as for Cobalt)
- TOC, Total Organic Carbon [water, ground-, long-term]: 0.29505 kg; lognormal variance with pedigree 0.0147475, pedigree (1,1,4,1,1)
  (same comment as for Arsenic, ion)
- Carbon dioxide, non-fossil [air, non-urban air or from high stacks]: 0.23472 kg; lognormal variance with pedigree 0.008, pedigree (1,1,4,1,1)
  (same comment as for Nitrogen oxides)
- Sulfate [water, ground-]: 0.00039476 kg; lognormal variance with pedigree 0.19128, pedigree (1,1,4,1,1)
  (same comment as for Cobalt)
- COD, Chemical Oxygen Demand [water, ground-, long-term]: 0.32271 kg; lognormal variance with pedigree 0.0147475, pedigree (1,1,4,1,1)
  (same comment as for Arsenic, ion)
- Methane, non-fossil [air, non-urban air or from high stacks]: 0.055684 kg; lognormal variance with pedigree 0.036462, pedigree (1,1,4,1,1)
  (same comment as for Nitrogen oxides)
- Ammonium, ion [water, ground-]: 0.00096528 kg; lognormal variance with pedigree 0.13153, pedigree (1,1,4,1,1)
  (same comment as for Cobalt)
- BOD5, Biological Oxygen Demand [water, ground-, long-term]: 0.076396 kg; lognormal variance with pedigree 0.0147475, pedigree (1,1,4,1,1)
  (same comment as for Arsenic, ion)
- Sodium, ion [water, ground-, long-term]: 9.1883e-13 kg; lognormal variance with pedigree 0.65562, pedigree (1,1,4,1,1)
  (same comment as for Arsenic, ion)
- COD, Chemical Oxygen Demand [water, ground-]: 0.0034708 kg; lognormal variance with pedigree 0.11212, pedigree (1,1,4,1,1)
  (same comment as for Cobalt)
- Magnesium [water, ground-, long-term]: 0.0035823 kg; lognormal variance with pedigree 0.12614, pedigree (1,1,4,1,1)
  (same comment as for Arsenic, ion)
- BOD5, Biological Oxygen Demand [water, ground-]: 0.00082165 kg; lognormal variance with pedigree 0.11212, pedigree (1,1,4,1,1)
  (same comment as for Cobalt)
- Iron, ion [water, ground-, long-term]: 0.001184 kg; lognormal variance with pedigree 0.16678, pedigree (1,1,4,1,1)
  (same comment as for Arsenic, ion)
- DOC, Dissolved Organic Carbon [water, ground-]: 0.0031733 kg; lognormal variance with pedigree 0.11212, pedigree (1,1,4,1,1)
  (same comment as for Cobalt)
- Aluminium [water, ground-, long-term]: 0.012223 kg; lognormal variance with pedigree 0.093489, pedigree (1,1,4,1,1)
  (same comment as for Arsenic, ion)
- Heat, waste [water, ground-, long-term]: 12.131 MJ; lognormal variance with pedigree 0.028385, pedigree (1,1,4,1,1)
  burden from long-term decomposition of waste (>100a).
  Uncertainty: Uncertainty calculated from unertainty of the waste composition of this waste, uncertainty in waste decomposition and short-term leaching in landfill
- Potassium, ion [water, ground-]: 0.00026174 kg; lognormal variance with pedigree 0.17962, pedigree (1,1,4,1,1)
  (same comment as for Cobalt)
- Calcium, ion [water, ground-, long-term]: 0.0033173 kg; lognormal variance with pedigree 0.13275, pedigree (1,1,4,1,1)
  (same comment as for Arsenic, ion)
- Heat, waste [soil, industrial]: 3.6003 MJ; lognormal variance with pedigree 0.029794, pedigree (1,1,4,1,1)
  burden from short-term decomposition of waste (0-100a).
  Uncertainty: Uncertainty calculated from unertainty of the waste composition of this waste, uncertainty in waste decomposition and short-term leaching in landfill
- Magnesium [water, ground-]: 0.00071518 kg; lognormal variance with pedigree 0.14528, pedigree (1,1,4,1,1)
  (same comment as for Cobalt)
- Potassium, ion [water, ground-, long-term]: 0.0010657 kg; lognormal variance with pedigree 0.16374, pedigree (1,1,4,1,1)
  (same comment as for Arsenic, ion)
- TOC, Total Organic Carbon [water, ground-]: 0.0031733 kg; lognormal variance with pedigree 0.11212, pedigree (1,1,4,1,1)
  (same comment as for Cobalt)
- Sodium, ion [water, ground-]: 0.0009186 kg; lognormal variance with pedigree 0.17516, pedigree (1,1,4,1,1)
  (same comment as for Cobalt)
- Thallium [water, ground-, long-term]: 1.6921e-6 kg; lognormal variance with pedigree 0.38277, pedigree (1,1,4,1,1)
  (same comment as for Arsenic, ion)
- Magnesium [air, non-urban air or from high stacks]: 1.788e-7 kg; lognormal variance with pedigree 0.39364, pedigree (1,1,4,1,1)
  (same comment as for Chromium)
- Aluminium [water, ground-]: 0.00016703 kg; lognormal variance with pedigree 0.17582, pedigree (1,1,4,1,1)
  (same comment as for Cobalt)
- Silicon [water, ground-, long-term]: 0.00011294 kg; lognormal variance with pedigree 1.7895, pedigree (1,1,4,1,1)
  (same comment as for Arsenic, ion)
- Sodium [air, non-urban air or from high stacks]: 2.2965e-7 kg; lognormal variance with pedigree 0.38377, pedigree (1,1,4,1,1)
  (same comment as for Chromium)
- Calcium, ion [water, ground-]: 0.00012073 kg; lognormal variance with pedigree 0.18837, pedigree (1,1,4,1,1)
  (same comment as for Cobalt)
- Titanium, ion [water, ground-, long-term]: 0.00016959 kg; lognormal variance with pedigree 0.23049, pedigree (1,1,4,1,1)
  (same comment as for Arsenic, ion)
- Calcium [air, non-urban air or from high stacks]: 3.0182e-8 kg; lognormal variance with pedigree 0.45197, pedigree (1,1,4,1,1)
  (same comment as for Chromium)
- Iron, ion [water, ground-]: 4.4022e-6 kg; lognormal variance with pedigree 0.28823, pedigree (1,1,4,1,1)
  (same comment as for Cobalt)
- Strontium [water, ground-, long-term]: 5.7362e-5 kg; lognormal variance with pedigree 0.26649, pedigree (1,1,4,1,1)
  (same comment as for Arsenic, ion)
- Aluminium [air, non-urban air or from high stacks]: 4.1758e-8 kg; lognormal variance with pedigree 0.44407, pedigree (1,1,4,1,1)
  (same comment as for Chromium)
- Silicon [water, ground-]: 0.00028652 kg; lognormal variance with pedigree 0.16025, pedigree (1,1,4,1,1)
  (same comment as for Cobalt)
- Beryllium [water, ground-, long-term]: 9.5885e-7 kg; lognormal variance with pedigree 0.40121, pedigree (1,1,4,1,1)
  (same comment as for Arsenic, ion)
- Potassium [air, non-urban air or from high stacks]: 6.5435e-8 kg; lognormal variance with pedigree 0.4255, pedigree (1,1,4,1,1)
  (same comment as for Chromium)
- Thallium [water, ground-]: 2.6952e-8 kg; lognormal variance with pedigree 0.46073, pedigree (1,1,4,1,1)
  (same comment as for Cobalt)
- Antimony [water, ground-, long-term]: 1.8221e-8 kg; lognormal variance with pedigree 1.2445, pedigree (1,1,4,1,1)
  (same comment as for Arsenic, ion)
- Titanium [air, non-urban air or from high stacks]: 5.7935e-10 kg; lognormal variance with pedigree 0.58108, pedigree (1,1,4,1,1)
  (same comment as for Chromium)
- Titanium, ion [water, ground-]: 2.3174e-6 kg; lognormal variance with pedigree 0.31283, pedigree (1,1,4,1,1)
  (same comment as for Cobalt)
- Zinc, ion [water, ground-, long-term]: 0.00012321 kg; lognormal variance with pedigree 0.24114, pedigree (1,1,4,1,1)
  (same comment as for Arsenic, ion)
- Thallium [air, non-urban air or from high stacks]: 6.738e-12 kg; lognormal variance with pedigree 0.72842, pedigree (1,1,4,1,1)
  (same comment as for Chromium)
- Zinc, ion [water, ground-]: 1.5944e-6 kg; lognormal variance with pedigree 0.32504, pedigree (1,1,4,1,1)
  (same comment as for Cobalt)
- Lead [water, ground-, long-term]: 8.0246e-5 kg; lognormal variance with pedigree 0.25578, pedigree (1,1,4,1,1)
  (same comment as for Arsenic, ion)
- Iron [air, non-urban air or from high stacks]: 1.1005e-9 kg; lognormal variance with pedigree 0.55925, pedigree (1,1,4,1,1)
  (same comment as for Chromium)
- Strontium [water, ground-]: 9.1367e-7 kg; lognormal variance with pedigree 0.34445, pedigree (1,1,4,1,1)
  (same comment as for Cobalt)
- Selenium [water, ground-, long-term]: 2.0185e-7 kg; lognormal variance with pedigree 0.77176, pedigree (1,1,4,1,1)
  (same comment as for Arsenic, ion)
- Silicon [air, non-urban air or from high stacks]: 7.1631e-8 kg; lognormal variance with pedigree 0.42849, pedigree (1,1,4,1,1)
  (same comment as for Chromium)
- Beryllium [water, ground-]: 1.5273e-8 kg; lognormal variance with pedigree 0.47917, pedigree (1,1,4,1,1)
  (same comment as for Cobalt)
- Molybdenum [water, ground-, long-term]: 4.9987e-7 kg; lognormal variance with pedigree 0.63925, pedigree (1,1,4,1,1)
  (same comment as for Arsenic, ion)
- Beryllium [air, non-urban air or from high stacks]: 3.8182e-12 kg; lognormal variance with pedigree 0.74686, pedigree (1,1,4,1,1)
  (same comment as for Chromium)
- Selenium [water, ground-]: 7.3332e-8 kg; lognormal variance with pedigree 0.43083, pedigree (1,1,4,1,1)
  (same comment as for Cobalt)
- Nickel, ion [water, ground-, long-term]: 9.295e-6 kg; lognormal variance with pedigree 0.32688, pedigree (1,1,4,1,1)
  (same comment as for Arsenic, ion)
- Strontium [air, non-urban air or from high stacks]: 2.2842e-10 kg; lognormal variance with pedigree 0.61214, pedigree (1,1,4,1,1)
  (same comment as for Chromium)
- Antimony [water, ground-]: 2.0166e-8 kg; lognormal variance with pedigree 0.47277, pedigree (1,1,4,1,1)
  (same comment as for Cobalt)
- Manganese [water, ground-, long-term]: 2.7795e-5 kg; lognormal variance with pedigree 0.27992, pedigree (1,1,4,1,1)
  (same comment as for Arsenic, ion)
- Zinc [air, non-urban air or from high stacks]: 3.5431e-10 kg; lognormal variance with pedigree 0.59731, pedigree (1,1,4,1,1)
  (same comment as for Chromium)
- Lead [water, ground-]: 1.2771e-7 kg; lognormal variance with pedigree 0.40405, pedigree (1,1,4,1,1)
  (same comment as for Cobalt)
- Mercury [water, ground-, long-term]: 1.3543e-7 kg; lognormal variance with pedigree 0.46358, pedigree (1,1,4,1,1)
  (same comment as for Arsenic, ion)
- Antimony [air, non-urban air or from high stacks]: 5.0416e-12 kg; lognormal variance with pedigree 0.73763, pedigree (1,1,4,1,1)
  (same comment as for Chromium)
- Manganese [water, ground-]: 1.2423e-5 kg; lognormal variance with pedigree 0.28802, pedigree (1,1,4,1,1)
  (same comment as for Cobalt)
- Copper, ion [water, ground-, long-term]: 6.0813e-5 kg; lognormal variance with pedigree 0.26502, pedigree (1,1,4,1,1)
  (same comment as for Arsenic, ion)
- Selenium [air, non-urban air or from high stacks]: 1.8333e-11 kg; lognormal variance with pedigree 0.6957, pedigree (1,1,4,1,1)
  (same comment as for Chromium)
- Nickel, ion [water, ground-]: 1.4805e-7 kg; lognormal variance with pedigree 0.40484, pedigree (1,1,4,1,1)
  (same comment as for Cobalt)
- Chromium VI [water, ground-, long-term]: 1.659e-8 kg; lognormal variance with pedigree 3.1771, pedigree (1,1,4,1,1)
  (same comment as for Arsenic, ion)
- Lead [air, non-urban air or from high stacks]: 4.2571e-11 kg; lognormal variance with pedigree 0.66619, pedigree (1,1,4,1,1)
  (same comment as for Chromium)
- Molybdenum [water, ground-]: 1.2222e-7 kg; lognormal variance with pedigree 0.4141, pedigree (1,1,4,1,1)
  (same comment as for Cobalt)
- Cobalt [water, ground-, long-term]: 6.7209e-7 kg; lognormal variance with pedigree 0.41041, pedigree (1,1,4,1,1)
  (same comment as for Arsenic, ion)
- Molybdenum [air, non-urban air or from high stacks]: 3.0555e-11 kg; lognormal variance with pedigree 0.67896, pedigree (1,1,4,1,1)
  (same comment as for Chromium)
- Mercury [water, ground-]: 2.5682e-9 kg; lognormal variance with pedigree 0.53685, pedigree (1,1,4,1,1)
  (same comment as for Cobalt)
- Cadmium, ion [water, ground-, long-term]: 1.5835e-6 kg; lognormal variance with pedigree 0.38389, pedigree (1,1,4,1,1)
  (same comment as for Arsenic, ion)
- Nickel [air, non-urban air or from high stacks]: 3.7013e-11 kg; lognormal variance with pedigree 0.67253, pedigree (1,1,4,1,1)
  (same comment as for Chromium)
- Chromium VI [water, ground-]: 4.4453e-8 kg; lognormal variance with pedigree 0.44007, pedigree (1,1,4,1,1)
  (same comment as for Cobalt)
- Barium [water, ground-, long-term]: 7.8948e-5 kg; lognormal variance with pedigree 0.24519, pedigree (1,1,4,1,1)
  (same comment as for Arsenic, ion)
- Copper [air, non-urban air or from high stacks]: 2.2976e-11 kg; lognormal variance with pedigree 0.68627, pedigree (1,1,4,1,1)
  (same comment as for Chromium)
- Copper, ion [water, ground-]: 8.0415e-8 kg; lognormal variance with pedigree 0.41924, pedigree (1,1,4,1,1)
  (same comment as for Cobalt)
- Fluoride [water, ground-, long-term]: 1.7094e-5 kg; lognormal variance with pedigree 0.30323, pedigree (1,1,4,1,1)
  (same comment as for Arsenic, ion)
- Mercury [air, non-urban air or from high stacks]: 1.0273e-9 kg; lognormal variance with pedigree 0.56375, pedigree (1,1,4,1,1)
  (same comment as for Chromium)

## Extrapolations
This dataset has been extrapolated from year 2012 to the year of the calculation (2021). The uncertainty has been adjusted accordingly.
