# treatment of rainwater mineral oil storage, in wastewater treatment plant, capacity 1.1E10l/year

Dataset: EcoSpold 2, unit process
Geography: CH
Time period: 1994-01-01 to 2021-12-31
Technology level: current
Classification: EcoSpold01Categories: waste management/wastewater treatment
Classification: ISIC rev.4 ecoinvent: 3700:Sewerage
Tags: Treatment; ConvertedDataset
Scenario: Business-as-Usual
System model: Allocation, cut-off by classification
Generated by: Gabor Doka (obsolete)
Published in: Doka G. 2008
Database: ecoinvent
isCopyrightProtected: true
accessRestrictedTo: 1

## General comment
Wastewater purified in a moderatly large municipal wastewater treatment plant (capacity class 2), with an average capacity size of 71100 per-captia-equivalents PCE.
Wastewater contains (in kg/m3): COD: 0.07 (GSD=136%); SO4-S: 0.011 (GSD=136%); NH4-N: 0.00028 (GSD=136%); NO3-N: 0.001 (GSD=136%); Ptot.: 0.00066 (GSD=136%); B: 0.000016 (GSD=231%); Cl: 0.34 (GSD=231%); Ba: 0.00003 (GSD=231%); Cd: 0.0000005 (GSD=231%); Cr: 0.000008 (GSD=231%); Cu: 0.000015 (GSD=231%); Mn: 0.00012 (GSD=231%); Ni: 0.000005 (GSD=231%); Pb: 0.0000025 (GSD=231%); Zn: 0.00028 (GSD=231%); Sr: 0.00021 (GSD=231%); Fe: 0.0014 (GSD=231%); Ca: 0.036 (GSD=231%); Al: 0.00035 (GSD=231%); K: 0.004 (GSD=231%); Mg: 0.0022 (GSD=231%); Na: 0.212 (GSD=231%);
[This dataset was already contained in the ecoinvent database version 2. It was not individually updated during the transfer to ecoinvent version 3. Life Cycle Impact Assessment results may still have changed, as they are affected by changes in the supply chain, i.e. in other datasets. This dataset was generated following the ecoinvent quality guidelines for version 2. It may have been subject to central changes described in the ecoinvent version 3 change report (http://www.ecoinvent.org/database/ecoinvent-version-3/reports-of-changes/), and the results of the central updates were reviewed extensively. The changes added e.g. consistent water flows and other information throughout the database. The documentation of this dataset can be found in the ecoinvent reports of version 2, which are still available via the ecoinvent website. The change report linked above covers all central changes that were made during the conversion process.]

## Included activities end
Infrastructure materials for municipal wastewater treatment plant, transports, dismantling. Land use burdens.

## Geography
Specific to the technology mix encountered in Switzerland in 2000. Well applicable to modern treatment practices in Europe, North America or Japan.

## Technology
Three stage wastewater treatment (mechanical, biological, chemical) including sludge digestion (fermentation) according to the average technology in Switzerland

## Parameters
- fraction, process water, to air: 0.1 dimensionless; name fraction_PW_to_air; lognormal variance with pedigree 0.092025, pedigree (4,4,3,2,4)
  Literature value (Statistics Canada, 2007 & Shaffer, K.H., 2008, Consumptive water use in the Great Lakes Basin, USGS) (Vionnet, S., Quantis Water Database - Technical Report, 2012).

## Reference product
- rainwater mineral oil storage: -1 m3; CPC 94110: Sewerage and sewage treatment services; By-product classification Waste
  production volume 0.0336675 m3
    This is a placeholder value that does not reflect real-world production volumes. This dataset does not currently require a real-world production volume to work in the database framework, and no actual data were collected yet. This has no negative effect on the results of the ecoinvent database. The placeholder value of this activity was scaled according to the nominal GDP of 2005 (source: United Nations, http://data.un.org/Glossary.aspx?q=GDP+%28current+US%24%29, accessed 20130726) to reflect an appropriate share of the global production volume, which is also a placeholder value.
  property price 0.0929599 EUR2005
    Waste products are assigned a price of zero as they are assumed to require further treatment.
  property carbon content, fossil 0.0457865
    COD= 0.07 kg/m3 (Tab A.19, ecoinvent v2.2 report 13_I). COD was converted to TOC, using conversion factors in Tab 4.10 (ecoinvent v2.2 report 13_IV). TOC was considered as Total Carbon.
  property carbon content 0.0457865
    carbon content on a dry matter basis (reserved; not for manual entry)
  properties: dry mass 0.661834 kg, water content 1509.95, water in wet mass 999.338 kg, wet mass 1000 kg, carbon content, non-fossil 0, carbon allocation 0.030303 kg

## Inputs from technosphere
- aluminium sulfate, powder: 0.00080902 kg; lognormal variance with pedigree 0.15, pedigree (1,1,5,1,1)
  direct wastewater treatment plant burden. Uncertainty calculated from wastewater composition and treatment model
  properties: dry mass 1 kg, wet mass 1 kg
- waste plastic, mixture: -0.0155 kg; lognormal variance with pedigree 0.04, pedigree (1,1,5,1,1)
  (same comment as for aluminium sulfate, powder)
  production volume 0.0155 kg
    Calculated from the production volume of rainwater mineral oil storage in proportion to the respective output amounts.
  properties: water content 0.180638, carbon content, fossil 0.747344, wet mass 1 kg, dry mass 0.847 kg, heating value, net 30.79 MJ
  note on carbon content, fossil: C content in 1 kg DM was calculated using data in Tab A.2, ecoinvent v2.2 report 13_I
  note on heating value, net: Value taken from the general comment of the treatment dataset.
- wastewater treatment facility, capacity 1.1E10l/year: 1.9883e-9 unit; lognormal variance with pedigree 0.04, pedigree (1,1,5,1,1)
  uncertainty heeded in exchanges of the module
  This exchange has an activity link directly to the producing activity because the product is primarily consumed in the same geographical area where it is produced.
- waste cement, hydrated: -0.0010451 kg; lognormal variance with pedigree 0.08, pedigree (1,1,5,1,1)
  burden from sludge incineration. Uncertainty calculated from wastewater composition and treatment model
  production volume 0.0010451 kg
    (same comment as for waste plastic, mixture)
  properties: wet mass 1 kg, dry mass 1 kg
- heat, district or industrial, natural gas: 6.52482e-5 MJ; lognormal variance with pedigree 0.26, pedigree (1,1,5,1,1)
  (same comment as for waste cement, hydrated)
  properties: heating value, net 1 MJ
- cement, unspecified: 0.00041806 kg; lognormal variance with pedigree 0.08, pedigree (1,1,5,1,1)
  (same comment as for waste cement, hydrated)
  properties: dry mass 1 kg, wet mass 1 kg
- chemical, inorganic: 1.2058e-7 kg; lognormal variance with pedigree 0.4, pedigree (1,1,5,1,1)
  (same comment as for waste cement, hydrated)
  properties: dry mass 1 kg, carbon content, fossil 0.003, wet mass 1 kg
  note on carbon content, fossil: This dataset is an unweighted average of 20 inorganic substances (listed in Tab 88.1, ecoinvent v2.2 report 8, part II), being part of the top100 chemicals included in this database. The C-content has also been calculated as an unweighted average of the C content of the substances composing this dataset.
- sodium hydroxide, without water, in 50% solution state: 6.9648e-7 kg; lognormal variance with pedigree 0.16, pedigree (1,1,5,1,1)
  (same comment as for waste cement, hydrated)
  properties: dry mass 1 kg, wet mass 1 kg, heating value, net 3.03 MJ
- municipal waste incineration facility: 1.1256e-11 unit; lognormal variance with pedigree 0.05, pedigree (1,1,5,1,1)
  (same comment as for waste cement, hydrated)
- hydrochloric acid, without water, in 30% solution state: 7.2347e-8 kg; lognormal variance with pedigree 0.4, pedigree (1,1,5,1,1)
  (same comment as for waste cement, hydrated)
  properties: wet mass 1 kg, dry mass 1 kg, heating value, net 3.32 MJ
- process-specific burdens, municipal waste incineration: 0.045023 kg; lognormal variance with pedigree 0.05, pedigree (1,1,5,1,1)
  burden from sludge incineration. Uncertainty calculated from wastewater composition and treatment model;activityLink introduced to establish a direct link to the corresponding regional supply of this product
- iron sulfate: 0.0029934 kg; lognormal variance with pedigree 0.15, pedigree (1,1,5,1,1)
  (same comment as for aluminium sulfate, powder)
  properties: wet mass 1 kg, dry mass 1 kg
- electricity, high voltage: 0.0064729 kWh; lognormal variance with pedigree 0.49, pedigree (1,1,5,1,1)
  (same comment as for waste cement, hydrated)
- heat, district or industrial, other than natural gas: 0.03776 MJ; lognormal variance with pedigree 0.05, pedigree (1,1,5,1,1)
  (same comment as for waste cement, hydrated)
  properties: heating value, net 1 MJ
- quicklime, milled, packed: 1.2627e-7 kg; lognormal variance with pedigree 0.16, pedigree (1,1,5,1,1)
  (same comment as for waste cement, hydrated)
  properties: dry mass 0.99 kg, wet mass 1 kg, water content 0.010101
- residual material landfill: 2.1774e-12 unit; lognormal variance with pedigree 0.07, pedigree (1,1,5,1,1)
  (same comment as for waste cement, hydrated)
- liquid manure spreading, by vacuum tanker: 0.00012095 m3; lognormal variance with pedigree 0.04, pedigree (1,1,5,1,1)
  burden from sludge spreading. Uncertainty calculated from wastewater composition and treatment model
  This exchange has an activity link directly to the producing activity because the product is primarily consumed in the same geographical area where it is produced.
- electricity, low voltage: 0.051434 kWh; lognormal variance with pedigree 0.06, pedigree (1,1,5,1,1)
  (same comment as for aluminium sulfate, powder)
- sewer grid, 1.1E10l/year, 242 km: 1.6832e-7 km; lognormal variance with pedigree 0.04, pedigree (1,1,5,1,1)
  (same comment as for wastewater treatment facility, capacity 1.1E10l/year)
- process-specific burdens, residual material landfill: 0.0010451 kg; lognormal variance with pedigree 0.07, pedigree (1,1,5,1,1)
  (same comment as for process-specific burdens, municipal waste incineration)
- process-specific burdens, slag landfill: 0.0064405 kg; lognormal variance with pedigree 0.07, pedigree (1,1,5,1,1)
  (same comment as for process-specific burdens, municipal waste incineration)
- titanium dioxide: 2.128e-8 kg; lognormal variance with pedigree 0.58, pedigree (1,1,5,1,1)
  (same comment as for waste cement, hydrated)
  properties: wet mass 1 kg, dry mass 1 kg
- slag landfill: 1.145e-11 unit; lognormal variance with pedigree 0.07, pedigree (1,1,5,1,1)
  (same comment as for waste cement, hydrated)
- chemical, organic: 4.6881e-7 kg; lognormal variance with pedigree 0.77, pedigree (1,1,5,1,1)
  (same comment as for waste cement, hydrated)
  properties: heating value, net 19.03 MJ, dry mass 1 kg, wet mass 1 kg, carbon content, fossil 0.628
  note on carbon content, fossil: This dataset is an unweighted average of 20 organic substances (listed in Tab 88.1, ecoinvent v2.2 report 8, part II), being part of the top100 chemicals included in this database. The C-content has also been calculated as an unweighted average of the C content of the substances composing this dataset.
- iron (III) chloride, without water, in 40% solution state: 0.0041056 kg; lognormal variance with pedigree 0.15, pedigree (1,1,5,1,1)
  direct wastewater treatment plant burden plus burden from sludge incineration. Uncertainty calculated from wastewater composition and treatment model
  properties: dry mass 1 kg, wet mass 1 kg
- chromium oxide, flakes: 4.3428e-10 kg; lognormal variance with pedigree 0.58, pedigree (1,1,5,1,1)
  (same comment as for waste cement, hydrated)
  properties: wet mass 1 kg, dry mass 1 kg
- ammonia, anhydrous, liquid: 7.434e-7 kg; lognormal variance with pedigree 0.26, pedigree (1,1,5,1,1)
  (same comment as for waste cement, hydrated)
  properties: wet mass 1 kg, dry mass 1 kg
- waste graphical paper: -0.0155 kg; lognormal variance with pedigree 0.04, pedigree (1,1,5,1,1)
  (same comment as for aluminium sulfate, powder)
  production volume 0.0155 kg
    (same comment as for waste plastic, mixture)
  properties: heating value, net 14.12 MJ, carbon content, non-fossil 0.454955, dry mass 0.888 kg, wet mass 1 kg, water content 0.126126

## Emissions to nature
- Nitrogen [water, surface water]: 1.1316e-5 kg; lognormal variance with pedigree 0.11, pedigree (1,1,5,1,1)
  direct wastewater treatment plant emission. Uncertainty calculated from wastewater composition and treatment model
- Chromium [air, urban air close to ground]: 1.7866e-13 kg; lognormal variance with pedigree 0.85, pedigree (1,1,5,1,1)
  direct digester gas emission plus emission from sludge incineration. Uncertainty calculated from wastewater composition and treatment model
- Aluminium [soil, agricultural]: 0.00017664 kg; lognormal variance with pedigree 0.54, pedigree (1,1,5,1,1)
  emission from sludge spreading. Uncertainty calculated from wastewater composition and treatment model
- Nitrogen oxides [air, urban air close to ground]: 7.221e-6 kg; lognormal variance with pedigree 0.12, pedigree (1,1,5,1,1)
  (same comment as for Chromium)
- Cyanide [air, urban air close to ground]: 1.3262e-8 kg; lognormal variance with pedigree 0.28, pedigree (1,1,5,1,1)
  emission from sludge incineration. Uncertainty calculated from wastewater composition and treatment model
- Copper, ion [water, surface water]: 3.8909e-6 kg; lognormal variance with pedigree 0.7, pedigree (1,1,5,1,1)
  sewer overload discharge plus direct wastewater treatment plant emission plus emission from sludge incineration. Uncertainty calculated from wastewater composition and treatment model
- Copper [soil, agricultural]: 4.2965e-6 kg; lognormal variance with pedigree 0.76, pedigree (1,1,5,1,1)
  (same comment as for Aluminium)
- TOC, Total Organic Carbon [water, ground-, long-term]: 4.76e-5 kg; lognormal variance with pedigree 0.17, pedigree (1,1,5,1,1)
  (same comment as for Cyanide)
- Chromium VI [water, surface water]: 4.1387e-6 kg; lognormal variance with pedigree 0.69, pedigree (1,1,5,1,1)
  (same comment as for Copper, ion)
- Sulfate [water, surface water]: 0.036177 kg; lognormal variance with pedigree 0.12, pedigree (1,1,5,1,1)
  (same comment as for Copper, ion)
- Magnesium [water, surface water]: 0.0019846 kg; lognormal variance with pedigree 0.72, pedigree (1,1,5,1,1)
  (same comment as for Copper, ion)
- Nickel, ion [water, ground-, long-term]: 1.13e-6 kg; lognormal variance with pedigree 0.76, pedigree (1,1,5,1,1)
  (same comment as for Cyanide)
- Manganese [soil, agricultural]: 2.2856e-5 kg; lognormal variance with pedigree 0.76, pedigree (1,1,5,1,1)
  (same comment as for Aluminium)
- Strontium [air, urban air close to ground]: 6.3426e-9 kg; lognormal variance with pedigree 0.79, pedigree (1,1,5,1,1)
  (same comment as for Chromium)
- Aluminium [air, urban air close to ground]: 4.3758e-7 kg; lognormal variance with pedigree 0.56, pedigree (1,1,5,1,1)
  (same comment as for Chromium)
- COD, Chemical Oxygen Demand [water, ground-, long-term]: 0.00012029 kg; lognormal variance with pedigree 0.17, pedigree (1,1,5,1,1)
  (same comment as for Cyanide)
- Zinc, ion [water, surface water]: 8.657e-5 kg; lognormal variance with pedigree 0.7, pedigree (1,1,5,1,1)
  (same comment as for Copper, ion)
- Copper [air, urban air close to ground]: 5.0291e-11 kg; lognormal variance with pedigree 0.82, pedigree (1,1,5,1,1)
  (same comment as for Chromium)
- TOC, Total Organic Carbon [water, surface water]: 0.0036344 kg; lognormal variance with pedigree 0.04, pedigree (1,1,5,1,1)
  (same comment as for Copper, ion)
- DOC, Dissolved Organic Carbon [water, ground-, long-term]: 4.76e-5 kg; lognormal variance with pedigree 0.17, pedigree (1,1,5,1,1)
  (same comment as for Cyanide)
- Calcium, ion [water, ground-, long-term]: 0.0018847 kg; lognormal variance with pedigree 0.76, pedigree (1,1,5,1,1)
  (same comment as for Cyanide)
- Iron [soil, agricultural]: 0.0012375 kg; lognormal variance with pedigree 0.17, pedigree (1,1,5,1,1)
  (same comment as for Aluminium)
- Zinc [air, urban air close to ground]: 1.9381e-9 kg; lognormal variance with pedigree 0.81, pedigree (1,1,5,1,1)
  (same comment as for Chromium)
- Lead [water, ground-, long-term]: 9.7227e-8 kg; lognormal variance with pedigree 6.97, pedigree (1,1,5,1,1)
  (same comment as for Cyanide)
- Magnesium [water, ground-, long-term]: 0.00012218 kg; lognormal variance with pedigree 0.76, pedigree (1,1,5,1,1)
  (same comment as for Cyanide)
- Cadmium, ion [water, surface water]: 2.5382e-7 kg; lognormal variance with pedigree 0.71, pedigree (1,1,5,1,1)
  (same comment as for Copper, ion)
- Chloride [water, surface water]: 0.34268 kg; lognormal variance with pedigree 0.71, pedigree (1,1,5,1,1)
  (same comment as for Copper, ion)
- Manganese [water, ground-, long-term]: 3.121e-5 kg; lognormal variance with pedigree 0.92, pedigree (1,1,5,1,1)
  (same comment as for Cyanide)
- Strontium [soil, agricultural]: 3.9999e-5 kg; lognormal variance with pedigree 0.76, pedigree (1,1,5,1,1)
  (same comment as for Aluminium)
- Carbon [soil, agricultural]: 0.0030741 kg; lognormal variance with pedigree 0.16, pedigree (1,1,5,1,1)
  (same comment as for Aluminium)
- Nickel, ion [water, surface water]: 3.0328e-6 kg; lognormal variance with pedigree 0.71, pedigree (1,1,5,1,1)
  (same comment as for Copper, ion)
- Lead [soil, agricultural]: 8.606e-7 kg; lognormal variance with pedigree 0.76, pedigree (1,1,5,1,1)
  (same comment as for Aluminium)
- Chromium, ion [water, surface water]: 7.7008e-9 kg; lognormal variance with pedigree 0.77, pedigree (1,1,5,1,1)
  (same comment as for Cyanide)
- Sodium, ion [water, surface water]: 0.212 kg; lognormal variance with pedigree 0.72, pedigree (1,1,5,1,1)
  (same comment as for Copper, ion)
- Potassium, ion [water, surface water]: 0.004 kg; lognormal variance with pedigree 0.72, pedigree (1,1,5,1,1)
  (same comment as for Copper, ion)
- Aluminium [water, surface water]: 2.1015e-5 kg; lognormal variance with pedigree 0.59, pedigree (1,1,5,1,1)
  (same comment as for Copper, ion)
- Boron [water, surface water]: 8.8758e-6 kg; lognormal variance with pedigree 0.63, pedigree (1,1,5,1,1)
  (same comment as for Copper, ion)
- Cadmium, ion [water, ground-, long-term]: 1.5153e-9 kg; lognormal variance with pedigree 6.95, pedigree (1,1,5,1,1)
  (same comment as for Cyanide)
- Nickel [air, urban air close to ground]: 5.2088e-14 kg; lognormal variance with pedigree 0.86, pedigree (1,1,5,1,1)
  (same comment as for Chromium)
- Calcium [air, urban air close to ground]: 3.6104e-6 kg; lognormal variance with pedigree 0.78, pedigree (1,1,5,1,1)
  (same comment as for Chromium)
- NMVOC, non-methane volatile organic compounds, unspecified origin [air, urban air close to ground]: 1.0487e-6 kg; lognormal variance with pedigree 0.31, pedigree (1,1,5,1,1)
  direct digester gas emission. Uncertainty calculated from wastewater composition and treatment model
- Chromium VI [water, ground-, long-term]: 2.5578e-7 kg; lognormal variance with pedigree 1.14, pedigree (1,1,5,1,1)
  (same comment as for Cyanide)
- Iron, ion [water, surface water]: 0.00071117 kg; lognormal variance with pedigree 0.71, pedigree (1,1,5,1,1)
  (same comment as for Copper, ion)
- Nitrate [water, ground-, long-term]: 5.2934e-7 kg; lognormal variance with pedigree 0.12, pedigree (1,1,5,1,1)
  (same comment as for Cyanide)
- Carbon monoxide, fossil [air, urban air close to ground]: 7.6552e-5 kg; lognormal variance with pedigree 0.2, pedigree (1,1,5,1,1)
  (same comment as for Cyanide)
- Lead [water, surface water]: 2.7479e-7 kg; lognormal variance with pedigree 0.65, pedigree (1,1,5,1,1)
  (same comment as for Copper, ion)
- Manganese [air, urban air close to ground]: 1.9735e-13 kg; lognormal variance with pedigree 0.88, pedigree (1,1,5,1,1)
  (same comment as for Chromium)
- Dinitrogen monoxide [air, urban air close to ground]: 3.5836e-6 kg; lognormal variance with pedigree 0.09, pedigree (1,1,5,1,1)
  direct wastewater treatment plant emission plus direct digester gas emission plus emission from sludge incineration plus emission from sludge spreading. Uncertainty calculated from wastewater composition and treatment model
- Strontium [water, ground-, long-term]: 6.3343e-5 kg; lognormal variance with pedigree 0.76, pedigree (1,1,5,1,1)
  (same comment as for Cyanide)
- Methane, fossil [air, urban air close to ground]: 0.00023089 kg; lognormal variance with pedigree 0.19, pedigree (1,1,5,1,1)
  (same comment as for Cyanide)
- Strontium [water, surface water]: 0.00010661 kg; lognormal variance with pedigree 0.71, pedigree (1,1,5,1,1)
  (same comment as for Copper, ion)
- Barium [water, ground-, long-term]: 1.5354e-5 kg; lognormal variance with pedigree 0.86, pedigree (1,1,5,1,1)
  (same comment as for Cyanide)
- Barium [water, surface water]: 1.8016e-6 kg; lognormal variance with pedigree 0.61, pedigree (1,1,5,1,1)
  (same comment as for Copper, ion)
- Nitrate [water, surface water]: 0.0042698 kg; lognormal variance with pedigree 0.11, pedigree (1,1,5,1,1)
  (same comment as for Copper, ion)
- BOD5, Biological Oxygen Demand [water, ground-, long-term]: 3.9347e-5 kg; lognormal variance with pedigree 0.17, pedigree (1,1,5,1,1)
  (same comment as for Cyanide)
- Phosphorus [air, urban air close to ground]: 2.6309e-7 kg; lognormal variance with pedigree 0.16, pedigree (1,1,5,1,1)
  (same comment as for Chromium)
- Calcium [soil, agricultural]: 0.0013658 kg; lognormal variance with pedigree 0.76, pedigree (1,1,5,1,1)
  (same comment as for Aluminium)
- DOC, Dissolved Organic Carbon [water, surface water]: 0.0033947 kg; lognormal variance with pedigree 0.12, pedigree (1,1,5,1,1)
  (same comment as for Copper, ion)
- Boron [soil, agricultural]: 3.0475e-6 kg; lognormal variance with pedigree 0.76, pedigree (1,1,5,1,1)
  (same comment as for Aluminium)
- Aluminium [water, ground-, long-term]: 0.00020729 kg; lognormal variance with pedigree 0.55, pedigree (1,1,5,1,1)
  (same comment as for Cyanide)
- Ammonia [air, urban air close to ground]: 3.6741e-6 kg; lognormal variance with pedigree 0.31, pedigree (1,1,5,1,1)
  direct digester gas emission plus emission from sludge incineration plus emission from sludge spreading. Uncertainty calculated from wastewater composition and treatment model
- Iron, ion [water, ground-, long-term]: 0.00091913 kg; lognormal variance with pedigree 1, pedigree (1,1,5,1,1)
  (same comment as for Cyanide)
- Manganese [water, surface water]: 6.0902e-5 kg; lognormal variance with pedigree 0.71, pedigree (1,1,5,1,1)
  (same comment as for Copper, ion)
- Phosphate [water, ground-, long-term]: 3.0812e-5 kg; lognormal variance with pedigree 4.31, pedigree (1,1,5,1,1)
  (same comment as for Cyanide)
- Chromium [soil, agricultural]: 1.5238e-6 kg; lognormal variance with pedigree 0.76, pedigree (1,1,5,1,1)
  (same comment as for Aluminium)
- Zinc, ion [water, ground-, long-term]: 1.8393e-6 kg; lognormal variance with pedigree 5.56, pedigree (1,1,5,1,1)
  (same comment as for Cyanide)
- Lead [air, urban air close to ground]: 5.0736e-11 kg; lognormal variance with pedigree 0.8, pedigree (1,1,5,1,1)
  (same comment as for Chromium)
- Phosphate [water, ground-]: 2.8981e-6 kg; lognormal variance with pedigree 0.19, pedigree (1,1,5,1,1)
  (same comment as for Aluminium)
- Phosphate [water, surface water]: 0.00069119 kg; lognormal variance with pedigree 0.13, pedigree (1,1,5,1,1)
  sewer overload discharge plus direct wastewater treatment plant emission plus emission from sludge incineration plus emission from sludge spreading. Uncertainty calculated from wastewater composition and treatment model
- Water [air, unspecified]: 0.1 m3; name water_to_air_unspecified; lognormal variance with pedigree 0.0807, pedigree (2,2,5,1,1)
  Calculated value based on water balance.
  property fraction, origin: unspecified 1; name fraction_origin_unspecified
  property fraction, origin: salt water 0; name fraction_origin_salt_water
  property fraction, origin: fresh water 0; name fraction_origin_fresh_water
- Nickel [soil, agricultural]: 7.6111e-7 kg; lognormal variance with pedigree 0.76, pedigree (1,1,5,1,1)
  (same comment as for Aluminium)
- Water [water, unspecified]: 0.9 m3; name water_to_water_unspecified; lognormal variance with pedigree 0.0807, pedigree (2,2,5,1,1)
  Calculated value based on water balance.
  property dry mass 0 kg; name DM
  property water in wet mass 1000 kg; name WWM
  property carbon content, non-fossil 0; name C_content_non_fossil
  property wet mass 1000 kg; name WM
  property carbon content, fossil 0; name C_content_fossil
  property fraction, origin: unspecified 0; name fraction_origin_unspecified_Ww
  property fraction, origin: salt water 0; name fraction_origin_salt_water_Ww
  property fraction, origin: fresh water 1; name fraction_origin_fresh_water_Ww
- COD, Chemical Oxygen Demand [water, surface water]: 0.013565 kg; lognormal variance with pedigree 0.12, pedigree (1,1,5,1,1)
  (same comment as for Copper, ion)
- Ammonium, ion [water, surface water]: 0.00011526 kg; lognormal variance with pedigree 0.14, pedigree (1,1,5,1,1)
  (same comment as for Nitrogen)
- Cadmium [soil, agricultural]: 9.5235e-8 kg; lognormal variance with pedigree 0.76, pedigree (1,1,5,1,1)
  (same comment as for Aluminium)
- Zinc [soil, agricultural]: 7.4816e-5 kg; lognormal variance with pedigree 0.76, pedigree (1,1,5,1,1)
  (same comment as for Aluminium)
- BOD5, Biological Oxygen Demand [water, surface water]: 0.0044548 kg; lognormal variance with pedigree 0.05, pedigree (1,1,5,1,1)
  (same comment as for Copper, ion)
- Calcium, ion [water, surface water]: 0.032477 kg; lognormal variance with pedigree 0.72, pedigree (1,1,5,1,1)
  (same comment as for Copper, ion)
- Iron [air, urban air close to ground]: 6.5509e-8 kg; lognormal variance with pedigree 0.22, pedigree (1,1,5,1,1)
  (same comment as for Chromium)
- Barium [air, urban air close to ground]: 1.7294e-8 kg; lognormal variance with pedigree 0.78, pedigree (1,1,5,1,1)
  (same comment as for Chromium)
- Magnesium [soil, agricultural]: 8.3467e-5 kg; lognormal variance with pedigree 0.76, pedigree (1,1,5,1,1)
  (same comment as for Aluminium)
- Boron [air, urban air close to ground]: 5.799e-7 kg; lognormal variance with pedigree 0.76, pedigree (1,1,5,1,1)
  (same comment as for Chromium)
- Cadmium [air, urban air close to ground]: 8.4265e-12 kg; lognormal variance with pedigree 0.79, pedigree (1,1,5,1,1)
  (same comment as for Chromium)
- Boron [water, ground-, long-term]: 3.1851e-6 kg; lognormal variance with pedigree 0.76, pedigree (1,1,5,1,1)
  (same comment as for Cyanide)
- Copper, ion [water, ground-, long-term]: 5.5071e-6 kg; lognormal variance with pedigree 0.78, pedigree (1,1,5,1,1)
  (same comment as for Cyanide)
- Carbon dioxide, fossil [air, urban air close to ground]: 0.086458 kg; lognormal variance with pedigree 0.08, pedigree (1,1,5,1,1)
  (same comment as for Cyanide)
- Barium [soil, agricultural]: 1.0906e-5 kg; lognormal variance with pedigree 0.76, pedigree (1,1,5,1,1)
  (same comment as for Aluminium)
- Magnesium [air, urban air close to ground]: 1.8225e-7 kg; lognormal variance with pedigree 0.78, pedigree (1,1,5,1,1)
  (same comment as for Chromium)

## Extrapolations
This dataset has been extrapolated from year 2000 to the year of the calculation (2021). The uncertainty has been adjusted accordingly.

## Review by Niels Jungbluth 2009-01-22
passed.
