# stone wool production, packed

Dataset: EcoSpold 2, unit process
Geography: CH
Time period: 2000-01-01 to 2021-12-31
Technology level: current
Classification: EcoSpold01Categories: insulation materials/production
Classification: ISIC rev.4 ecoinvent: 2399:Manufacture of other non-metallic mineral products n.e.c.
Synonyms: matte; mineralisch; mineral; Isolation; Dämm; mat; board; insulation; platte
Tags: ConvertedDataset
Scenario: Business-as-Usual
System model: Allocation, cut-off by classification
Share of production covered: 40 %
Generated by: Hans-Jörg Althaus
Published in: Hischier, R. 2010
Database: ecoinvent
isCopyrightProtected: true
accessRestrictedTo: 1

## General comment
With functional unit kg, this module can be used for rock wool products with different densities. For the calculation of the packaging material demand, 100 kg/m3 are assumed (volume: 2.4m3, load weight: 250 kg). Inputs and outputs are not balanced in the unit process since some are included in the unit process "rock wool, at plant".
[This dataset was already contained in the ecoinvent database version 2. It was not individually updated during the transfer to ecoinvent version 3. Life Cycle Impact Assessment results may still have changed, as they are affected by changes in the supply chain, i.e. in other datasets. This dataset was generated following the ecoinvent quality guidelines for version 2. It may have been subject to central changes described in the ecoinvent version 3 change report (http://www.ecoinvent.org/database/ecoinvent-version-3/reports-of-changes/), and the results of the central updates were reviewed extensively. The changes added e.g. consistent water flows and other information throughout the database. The documentation of this dataset can be found in the ecoinvent reports of version 2, which are still available via the ecoinvent website. The change report linked above covers all central changes that were made during the conversion process.]

## Included activities end
Includes mechanical packing and the administration of the rock wool factory.

## Geography
Data are only from one company in Switzerland (Flumroc AG). For some exchanges RER-modules have been used as proxy

## Technology
The company Flumroc AG works on a technically high level. The packing and loading process is automated.

## Reference product
- stone wool, packed: 1 kg; CPC 37990: Non-metallic mineral products n.e.c. (including mineral wool, expanded mineral materials, worked mica, article[…]; By-product classification allocatable product
  EcoSpold01Location=CH
  production volume 0.0336675 kg
    This is a placeholder value that does not reflect real-world production volumes. This dataset does not currently require a real-world production volume to work in the database framework, and no actual data were collected yet. This has no negative effect on the results of the ecoinvent database. The placeholder value of this activity was scaled according to the nominal GDP of 2005 (source: United Nations, http://data.un.org/Glossary.aspx?q=GDP+%28current+US%24%29, accessed 20130726) to reflect an appropriate share of the global production volume, which is also a placeholder value.
  property heating value, net 0 MJ
    Non combustible products are assumed to have an LHV equal to zero (0).
  property carbon content, fossil 0.015401
    The chemical composition of the glass fibres used in the rock wool production is similar to the composition of naturally cooled volcano basalt and has a composition listed in Tab.
    3.1 and 3.2 in ecoinvent v2.2 report 16, part XIV. Rock wool contains: a minimum of 96% mineral fibres,between 0.5 and 3.0 weight percent of phenolic resin depending on the specific product characteristics, and about 0.2 percent mineral oil (ecoinvent v2.2 report 16, part XIV). An average composition of 1.8% phenolic resin, 0.2% mineral oil, and 98% mineral fibres has been assumed and used to calculate C content of the rock wool
  property price 0.847964 EUR2005
    Calculated based on inputs: The price of the product has been calculated as a sum of the values of the material and energy inputs for this product. This value is therefore a rough estimation. It may underestimate the real price since there are additional expenses when producing any product. These expences can include for example labour costs, treatment of waste materials and profit for the producer. Please consider carefully whether this level of data quality is acceptable for your application.
  property carbon content 0.015401
    carbon content on a dry matter basis (reserved; not for manual entry)
  properties: dry mass 1 kg, carbon content, non-fossil 0, water content 0, water in wet mass 0 kg, wet mass 1 kg, carbon allocation 0.015401 kg

## Inputs from technosphere
- acrylic dispersion, without water, in 65% solution state: 0.005851 kg; lognormal variance with pedigree 0.250625, pedigree (1,3,5,2,5)
  EcoSpold01Location=RER
  properties: dry mass 1 kg, carbon content, fossil 0.549932, wet mass 1 kg, heating value, net 16.66 MJ
  note on carbon content, fossil: Dispersants ensure that the individual particles in the emulsion paint do not combine to form agglomerates.The poly(acrylic acids) are suitable dispersing agents (Ullmann), and have therefore been used as representative example. Their formula is (C3H4O2)n. The formulation of this specific dispersion includes 50% acrylic binder
- stone wool: 1 kg; lognormal variance with pedigree 0.0406, pedigree (1,3,5,1,1)
  From ecoinvent report No.7 (2007), part XIV, ch. 4: "In co-operation with Flumroc, the processes packing and administration are included in a separate module called "rock wool, packed, at plant".
  EcoSpold01Location=CH
  properties: wet mass 1 kg, dry mass 1 kg, carbon content, fossil 0.015401
  note on carbon content, fossil: The chemical composition of the glass fibres used in the rock wool production is similar to the composition of naturally cooled volcano basalt and has a composition listed in Tab. 3.1 and 3.2 in ecoinvent v2.2 report 16, part XIV. Rock wool contains: a minimum of 96% mineral fibres,between 0.5 and 3.0 weight percent of phenolic resin depending on the specific product characteristics, and about 0.2 percent mineral oil (ecoinvent v2.2 report 16, part XIV). An average composition of 1.8% phenolic resin, 0.2% mineral oil, and 98% mineral fibres has been assumed and used to calculate C content of the rock wool
- EUR-flat pallet: 0.0012379 unit; lognormal variance with pedigree 0.058625, pedigree (1,3,5,2,3)
  EcoSpold01Location=RER
  properties: carbon content, non-fossil 0.58833, dry mass 18.3333 kg, carbon content, fossil 0.0311351, wet mass 22 kg, water content 0.2, heating value, net 335.11 MJ
  note on carbon content, non-fossil: C content in components of the pallet (ecoinvent v2.2 report 7_part XVIII)
- packaging film, low density polyethylene: 0.0065078 kg; lognormal variance with pedigree 0.040625, pedigree (1,3,5,2,1)
  EcoSpold01Location=RER
  properties: wet mass 1 kg, carbon content, fossil 0.857143, dry mass 1 kg, heating value, net 42.47 MJ
  note on carbon content, fossil: Polyethylene is formed out of a huge amount of ethylene monomers (C2H4) (ecoinvent v2.2 report 11_II). MW=28 g/mol
- electricity, medium voltage: 0.00309 kWh; lognormal variance with pedigree 0.1101, pedigree (1,2,5,1,4)
  EcoSpold01Location=CH
- heat, district or industrial, natural gas: 0.15237 MJ; lognormal variance with pedigree 0.058625, pedigree (1,3,5,2,3)
  EcoSpold01Location=RER
  properties: heating value, net 1 MJ
- corrugated board box: 0.00098595 kg; lognormal variance with pedigree 0.058625, pedigree (1,3,5,2,3)
  EcoSpold01Location=RER
  properties: heating value, net 12.86 MJ, dry mass 0.945 kg, carbon content, fossil 0.000656085, wet mass 1 kg, carbon content, non-fossil 0.432275, water content 0.0582011
  note on carbon content, fossil: Fossil C content was calculated after fossil C contents of chemicals used in the production of board (Tab 10-15 & 10.16 ecoinvent v2.2 report 11_III, part 10)
  note on carbon content, non-fossil: Biogenic C content was calculated after biogenic C contents of chemicals used in the production of board (Tab 10.15 & 10.16, ecoinvent v2.2 report 11_III, part 10).
- industrial machine, heavy, unspecified: 2.2144e-6 kg; lognormal variance with pedigree 0.410625, pedigree (5,3,5,2,1)
  activityLink introduced to establish a direct link to the corresponding regional supply of this product
  EcoSpold01Location=RER

## Sampling procedure
environmental report

## Extrapolations
This dataset has been extrapolated from year 2007 to the year of the calculation (2021). The uncertainty has been adjusted accordingly.

## Review by Daniel Kellenberger (obsolete) 2010-02-07
passed
