# hay production, Swiss integrated production, extensive

Dataset: EcoSpold 2, unit process
Geography: CH
Time period: 2005-01-01 to 2021-12-31
Technology level: current
Classification: ISIC rev.4 ecoinvent: 0119:Growing of other non-perennial crops
Scenario: Business-as-Usual
System model: Allocation, cut-off by classification
Share of production covered: 43 %
Generated by: Thomas Nemecek
Published in: Nemecek, T. 2007
Database: ecoinvent
isCopyrightProtected: true
accessRestrictedTo: 1

## General comment
This dataset represents the production of 1 kg of hay (dry matter). The dry matter yield is 2702 kg/ha. Moisture content at storage is 12%.
[This dataset was already contained in the ecoinvent database version 2. It was not individually updated during the transfer to ecoinvent version 3. Life Cycle Impact Assessment results may still have changed, as they are affected by changes in the supply chain, i.e. in other datasets. This dataset was generated following the ecoinvent quality guidelines for version 2. It may have been subject to central changes described in the ecoinvent version 3 change report (http://www.ecoinvent.org/database/ecoinvent-version-3/reports-of-changes/), and the results of the central updates were reviewed extensively. The changes added e.g. consistent water flows and other information throughout the database. The documentation of this dataset can be found in the ecoinvent reports of version 2, which are still available via the ecoinvent website. The change report linked above covers all central changes that were made during the conversion process.]

## Included activities start
This activity describes the production of field-dried hay on a permanent natural meadow with a lifetime of 50 years and represents one year of cultivation on an established meadow. No input material are considered.

## Included activities end
The dataset includes all machine operations and corresponding machine infrastructure and sheds. Machine operations are: mowing, swathing, haying, baling, loading of bales and roughage storage for 12 months in a barn. This activity ends after storage of hay at the farm gate.

## Geography
Refers to a production in the Swiss plateau (lowlands <700m).

## Technology
Extensive production with drying in the field.

## Parameters
- fraction, irrigation water, to ground water: 0.8 dimensionless; name fraction_IW_to_ground_water; lognormal variance with pedigree 0.0886, pedigree (4,3,1,1,4)
  Literature value (Döll, 2011) cross referenced with expert opinion.
- fraction, irrigation water, to air: 0.3353 dimensionless; name fraction_IW_to_air; lognormal variance with pedigree 0.0409, pedigree (2,2,2,1,1)
  Literature value (Siebert, 2010) (Vionnet, S., Quantis Water Database - Technical Report, 2012).
- fraction, irrigation water to surface water: 0.2 dimensionless; name fraction_IW_to_surface_water; lognormal variance with pedigree 0.0886, pedigree (4,3,1,1,4)
  Literature value (Döll, 2011) cross referenced with expert opinion.

## Reference product
- hay, Swiss integrated production, extensive: 1 kg; name REF_PRODUCT; CPC 01919: Forage products, n.e.c.; By-product classification allocatable product
  production volume 7.8e7 kg
    85985 ha extensive meadows in Switzerland 2004
    Assumed to be 1/3 of fresh grass from extensive integrated production
  property price 0.0237234 EUR2005; name REF_PRODUCT_price_EUR2005
    Calculated based on inputs: The price of the product has been calculated as a sum of the values of the material and energy inputs for this product. This value is therefore a rough estimation. It may underestimate the real price since there are additional expenses when producing any product. These expences can include for example labour costs, treatment of waste materials and profit for the producer. Please consider carefully whether this level of data quality is acceptable for your application.
  property carbon content, non-fossil 0.43075; name REF_PRODUCT_C_content_non_fossil
    biogene carbon content on a dry matter basis
    Composition data obtained from Prairie Hay, in (http://beefmagazine.com/images/2009%20feed%20table.pdf). First, composition data were refered to 1 kg dry mass. Then, C-contents were calculated considering a C-content/dry mass of 46% in carbohydrates (including fibres), 53% in proteins and 75% in fats. All data from 'Evolutionary and Biochemical Aspects', A.D. Kay and T. Vrede (in Global Ecology, 2010, Elsevier B.V., S.E. Jørgensen Ed.).
  property dry mass 1 kg; name REF_PRODUCT_DM
  property energy content 18.9 MJ; name REF_PRODUCT_energy_content
    See chapter 'Product Properties' in '01_crop production - yields & inputs CH & Europe_v1.0.pdf', section 'AGRICULTURAL PRODUCTION IN SWITZERLAND' - pdf-document on the dedicated talk page of ecoinvent (www.ecoinvent.org/documentation)
  property carbon content 0.43075
    carbon content on a dry matter basis (reserved; not for manual entry)
  properties: water content 0.136364, wet mass 1.13636 kg, water in wet mass 0.136364 kg, carbon content, fossil 0, carbon allocation 0.43075 kg

## Inputs from technosphere
- operation, dried roughage store, non ventilated: 1 kg; lognormal variance with pedigree 0.0406, pedigree (2,1,5,1,1)
  See chapter 'Yields and Inputs of hay on permanent grassland' in '01_crop production - yields & inputs CH & Europe_v1.0.pdf', section 'AGRICULTURAL PRODUCTION IN SWITZERLAND' - pdf-document on the dedicated talk page of ecoinvent (www.ecoinvent.org/documentation)
  See chapter 'Yields and Inputs of hay on permanent grassland' in '01_crop production - yields & inputs CH & Europe_v1.0.pdf', section 'AGRICULTURAL PRODUCTION IN SWITZERLAND' - pdf-document on the dedicated talk page of ecoinvent (www.ecoinvent.org/documentation);activityLink introduced to establish a direct link to the corresponding regional supply of this product
- mowing, by rotary mower: 0.0003701 ha; lognormal variance with pedigree 0.0406, pedigree (2,1,5,1,1)
  See chapter 'Yields and Inputs of hay on permanent grassland' in '01_crop production - yields & inputs CH & Europe_v1.0.pdf', section 'AGRICULTURAL PRODUCTION IN SWITZERLAND' - pdf-document on the dedicated talk page of ecoinvent (www.ecoinvent.org/documentation)
  This exchange has an activity link directly to the producing activity because the product is primarily consumed in the same geographical area where it is produced.
- swath, by rotary windrower: 0.00074019 ha; lognormal variance with pedigree 0.0406, pedigree (2,1,5,1,1)
  (same comment as for mowing, by rotary mower)
- baling: 0.0014375 unit; lognormal variance with pedigree 0.0406, pedigree (2,1,5,1,1)
  (same comment as for mowing, by rotary mower)
- irrigation: 0.000134651 m3; name water_irrigation_input; source Siebert, S. 2010; lognormal variance with pedigree 0.0427, pedigree (2,2,5,1,1)
  Calculated based on literature values (Döll, 2010) and partially modelled at ETH (Pfister, S.).
  property wet mass 1000 kg; name WM
  property dry mass 0.11 kg; name DM
  property water content 9089.91; name water_content
  property carbon content, non-fossil 0; name C_content_non_fossil
  property carbon content, fossil 0; name C_content_fossil
  property water in wet mass 999.89 kg; name WWM
- haying, by rotary tedder: 0.0012953 ha; lognormal variance with pedigree 0.0406, pedigree (2,1,5,1,1)
  (same comment as for mowing, by rotary mower)
- bale loading: 0.00625 unit; lognormal variance with pedigree 0.0406, pedigree (2,1,5,1,1)
  (same comment as for mowing, by rotary mower)

## Inputs from nature
- Transformation, to pasture, man made, extensive [natural resource, land]: 0.074019 m2; lognormal variance with pedigree 0.0506, pedigree (2,1,5,1,1)
  Modelled, see chapter 'Land use' in '01_crop production_direct field emissions and natural resources_v1.0.pdf' - pdf-document on the dedicated talk page of ecoinvent (www.ecoinvent.org/documentation)
- Transformation, from pasture, man made, extensive [natural resource, land]: 0.074019 m2; lognormal variance with pedigree 0.0506, pedigree (2,1,5,1,1)
  (same comment as for Transformation, to pasture, man made, extensive)
- Energy, gross calorific value, in biomass [natural resource, biotic]: 18.9 MJ; lognormal variance with pedigree 0.0411891, pedigree (2,1,5,1,1)
- Carbon dioxide, in air [natural resource, in air]: 1.57942 kg; = 44/12 * (REF_PRODUCT_C_content_non_fossil * REF_PRODUCT * REF_PRODUCT_DM ); lognormal variance with pedigree 0.0406, pedigree (2,1,5,1,1)
  Modelled,see chapter 'CO2 binding' in '01_crop production_direct field emissions and natural resources_v1.0.pdf' - pdf-document on the dedicated talk page of ecoinvent (www.ecoinvent.org/documentation)
- Occupation, pasture, man made, extensive [natural resource, land]: 3.701 m2*year; lognormal variance with pedigree 0.0406, pedigree (2,1,5,1,1)
  (same comment as for Transformation, to pasture, man made, extensive)

## Emissions to nature
- Phosphate [water, ground-]: 6.1245e-5 kg; lognormal variance with pedigree 0.0806, pedigree (2,1,5,1,1)
  Modelled, see chapter 'Emissions of phosphorous to the water' in '01_crop production_direct field emissions and natural resources_v1.0.pdf' - pdf-document on the dedicated talk page of ecoinvent (www.ecoinvent.org/documentation)
- Dinitrogen monoxide [air, non-urban air or from high stacks]: 2.95874e-5 kg; name N2O; lognormal variance with pedigree 0.0707, pedigree (2,2,5,1,1)
  Modelled, see chapter 'Emissions of N2O to the air' in '01_crop production_direct field emissions and natural resources_v1.0.pdf' - pdf-document on the dedicated talk page of ecoinvent (www.ecoinvent.org/documentation)
- Phosphate [water, surface water]: 0.00015311 kg; lognormal variance with pedigree 0.0806, pedigree (2,1,5,1,1)
  (same comment as for Phosphate)
- Nitrogen oxides [air, non-urban air or from high stacks]: 6.21335e-6 kg; = 0.21 * N2O; lognormal variance with pedigree 0.0707, pedigree (2,2,5,1,1)
  Modelled, see chapter 'Emissions of NOx to the air' in '01_crop production_direct field emissions and natural resources_v1.0.pdf' - pdf-document on the dedicated talk page of ecoinvent (www.ecoinvent.org/documentation)
- Water [water, surface water]: 1.79005e-5 m3; name water_to_water_surface; = water_irrigation_input*(1-fraction_IW_to_air)*fraction_IW_to_surface_water; lognormal variance with pedigree 0.1286, pedigree (4,3,5,1,4)
  Calculated value. See the parameters and their comments to understand the calculation.
  property fraction, origin: fresh water 1; name fraction_origin_fresh_water_Wsw
  property fraction, origin: salt water 0; name fraction_origin_salt_water_Wsw
- Water [water, ground-]: 7.16019e-5 m3; name water_to_water_ground; = water_irrigation_input*(1-fraction_IW_to_air)*fraction_IW_to_ground_water; lognormal variance with pedigree 0.1286, pedigree (4,3,5,1,4)
  Calculated value. See the parameters and their comments to understand the calculation.
  property fraction, origin: fresh water 1; name fraction_origin_fresh_water_Wgw
  property fraction, origin: unspecified 0; name fraction_origin_unspecified_Wgw
  property fraction, origin: salt water 0; name fraction_origin_salt_water_Wgw
- Nitrate [water, ground-]: 0.0111177 kg; lognormal variance with pedigree 0.0806, pedigree (2,1,5,1,1)
  Modelled with the 'SALCA-NO3 model' described in '01_crop production_direct field emissions and natural resources_v1.0.pdf' - pdf-document on the dedicated talk page of ecoinvent (www.ecoinvent.org/documentation)
- Phosphorus [water, surface water]: 7.293e-5 kg; lognormal variance with pedigree 0.0806, pedigree (2,1,5,1,1)
  (same comment as for Phosphate)
- Water [air, unspecified]: 4.51484e-5 m3; name water_to_air_unspecified; = (water_irrigation_input*fraction_IW_to_air); lognormal variance with pedigree 0.0807, pedigree (2,2,5,1,1)
  Calculated value based on literature values and expert opinion. See comments in the parametres' comment field.
  property fraction, origin: salt water 0; name fraction_origin_salt_water
  property fraction, origin: fresh water 1; name fraction_origin_fresh_water
  property fraction, origin: unspecified 0; name fraction_origin_unspecified

## Sampling procedure
Data were compiled from statistics, fertilising recommendations, documents from extension services and expert knowledge.

## Extrapolations
This dataset has been extrapolated from year 2005 to the year of the calculation (2021). The uncertainty has been adjusted accordingly.

## Review by Hans-Jörg Althaus 2007-11-07
passed
none
