# palm date production

Dataset: EcoSpold 2, unit process
Geography: GLO
Time period: 2012-01-01 to 2021-12-31
Technology level: current
Classification: ISIC rev.4 ecoinvent: 0122:Growing of tropical and subtropical fruits
Synonyms: Phoenix Dactylifera; L.
Scenario: Business-as-Usual
System model: Allocation, cut-off by classification
Generated by: Kenza Benabderrazik
Database: ecoinvent
isCopyrightProtected: true
accessRestrictedTo: 1

## General comment
This dataset represent the production of 1 kg of palm dates (fresh matter). The yield is 8484kg/ha. The average of palm trees per hectare is 100 (thus we count 84.84 kg of palm dates per tree). The lifetime of a palm tree is estimated at 80 years, during which the first 5 years the palm tree grows but does not produce fruit. This data takes into account these 5 first years. The production of palm date are mainly manual and does not require machineries.

## Included activities start
This activity starts when planting palm trees in the field.The production of the cutting is not considered. All processes of the agricultural production are included, such as the ressources used for the fruit growth.

## Included activities end
The dataset includs all the operations for the production of the fruits during one year. It includes Soil cultivation, fertilising, harvesting, irrigating. This activity ends when the fruit is harvested and transported to a storage facility (10 km from the field).

## Geography
This dataset is an extrapolation that refers to an average production in south Tunisia - Chott Djerid - Tozeur

## Technology
Conventional production

## Time period
The datas have been collected for year 2012

## Reference product
- palm date: 1 kg; CPC 01314: Dates; By-product classification allocatable product
  production volume 6.96765e9 kg
    Correspond to the production of palm date in the world according to the FAOSTAT, in 2012. it has been supposed that 1/13th of this production is organic. This assumption has been made by extrapolation of the tunisian ratio
  property price 0.47 EUR2005
    Calculated value based on data from United Nations Commodity Trade Statistics Database (comtrade.un.org). UN comtrade category: 80410 Dates, fresh or dried. Year: 2005. Using exchange rate of 1EURO = 1.209 USD. Average of price of import into 5 main markets (EU, US, JP, IN and CN).
  property carbon content 0.251
    carbon content on a dry matter basis (reserved; not for manual entry)
  properties: carbon content, fossil 0, wet mass 1 kg, protein content 0.015, water in wet mass 0.208861 kg, dry mass 0.791139 kg, fat (total lipid) content 0.0014 kg, water content 0.264, carbohydrates content 0.549 kg, carbon content, non-fossil 0.251, carbon allocation 0.198576 kg

## Inputs from technosphere
- transport, tractor and trailer, agricultural: 0 metric ton*km; pedigree (1,1,1,1,1)
  The palm dates are collected and the tillage is made with a tractor. This engine is not used really often, and for only small distance.But as it is the only machinery used inside the field it seems important to modelise it.
- packaging, for pesticides: 0.000954 kg; lognormal variance with pedigree 0.0592, pedigree (4,3,4,5,4)
  Total amount of active substance/s of pesticides needed for the production of palm date is calculated to be circa 4.77E-04 kg. Pesticide/s used in this dataset is/are: 'glyphosate', 'pesticide, unspecified'. The total amount of active substance/s is doubled in order to account for the packaging of the dilluted product of pesticide/s that is/are applied. Therefore, 9.54E-04 kg of packaging for pesticides is justified with this exchange.
  properties: dry mass 1 kg, heating value, net 25.97 MJ, wet mass 1 kg, carbon content, fossil 0.85714, price 0.0642 EUR2005
- inorganic phosphorus fertiliser, as P2O5: 0 kg; pedigree (1,1,1,1,1)
  3 kg per tree is used each year
  properties: wet mass 1 kg, dry mass 1 kg
- glyphosate: 0.000127 kg; lognormal variance with pedigree 0.0986, pedigree (4,4,4,4,4)
  1 kg of glyphosate is spreaded per year in the entire field.
  properties: carbon content, fossil 0.214286, dry mass 1 kg, wet mass 1 kg
- irrigation: 2.64 m3; name w_irr_2; lognormal variance with pedigree 0.0206, pedigree (4,4,4,1,2)
  The water is drawn form two aquifers, the total amount is estimated to 225 m3 per tree per year.
  properties: dry mass 0.11 kg, water content 9089.91, wet mass 1000 kg
- poultry manure, fresh: 0.3536 kg; lognormal variance with pedigree 0.0986, pedigree (4,4,4,4,4)
  Manure is the main organic fertilizer used in the field. For organic production 30 kg per palm tree per year is used. It comes from the animals that belong to the farmer or it is purshased in local markets.
  properties: dry mass 0.38 kg, water content 1.63158, carbon content, non-fossil 0.33389, wet mass 1 kg
- pesticide, unspecified: 0.00035 kg; lognormal variance with pedigree 0.0586, pedigree (4,4,4,1,2)
  3 kg is used each year per heactar.
  properties: carbon content, fossil 0.486978, dry mass 1 kg, wet mass 1 kg
- packaging, for fertilisers: 0.07072 kg; lognormal variance with pedigree 0.0592, pedigree (4,3,4,5,4)
  Total amount of active substance/s of fertilisers needed for the production of 'palm date' is calculated to be circa 3.54E-02 kg. Fertiliser/s used in this dataset is/are: 'phosphate fertiliser, as P2O5'. The total amount of active substance/s is doubled in order to account for the packaging of the dilluted product of fertiliser/s that is/are applied. Therefore, 7.07E-02 kg of packaging for fertilisers is justified with this exchange.
  properties: carbon content, fossil 0.825301, heating value, net 25.01 MJ, price 0.0642 EUR2005, dry mass 1 kg, wet mass 1 kg
  note on carbon content, fossil: Considering a chemical formula (C2H4)n for polyethylene, carbon content-fossil is calculated to be 0.856286 kg of Carbon per kg of dry mass.
- transport, freight, lorry 16-32 metric ton, EURO3: 0 metric ton*km; pedigree (1,1,1,1,1)
  Once the palm dates are collected, they are then transported by a lorry to a storage unit 10 km away from the fields.
- transport, tractor and trailer, agricultural: 0.000243, 0.059757 metric ton*km (2 entries); lognormal variance with pedigree 0.1386, pedigree (4,4,4,1,2)
  (same comment as for transport, tractor and trailer, agricultural)
- inorganic phosphorus fertiliser, as P2O5: 0.00131994, 0.00013412, 0.00479007, 6.69015e-5, 9.42163e-6, 0.000259134, 9.57997e-6, 0.000154586, 8.63385e-5, 0.00031705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 kg (30 entries); lognormal variance with pedigree 0.3186, pedigree (4,4,4,1,2)
  3 kg per tree is used each year
- transport, freight, lorry 16-32 metric ton, EURO3: 0.00103663, 0.000872625, 0.00809074 metric ton*km (3 entries); lognormal variance with pedigree 0.1386, pedigree (4,4,4,1,2)
  (same comment as for transport, freight, lorry 16-32 metric ton, EURO3)

## Inputs from nature
- Transformation, from permanent crop, irrigated, intensive [natural resource, land]: 0.0157 m2; lognormal variance with pedigree 0.0266, pedigree (4,4,4,1,2)
  Values calculated from a crop of 1 ha based in tunisia with a mean yield of 8484 kg/ha every year. The lifetime of the crop is 80 years
- Transformation, to permanent crop, irrigated, intensive [natural resource, land]: 0.0157 m2; lognormal variance with pedigree 0.0266, pedigree (4,4,4,1,2)
  (same comment as for Transformation, from permanent crop, irrigated, intensive)
- Carbon dioxide, in air [natural resource, in air]: 0.7282 kg; lognormal variance with pedigree 0.0592, pedigree (4,4,4,4,4)
  The dry matter content is .79114, the C content on a dry matter basis 0.251, 0.79114*0.251=0.1986 kg C/kg dates harvested. This value has to be multiplied by the yield and converted to CO2: 0.1986*44/12=6177.3 kg CO2. This amount of CO2 is taken up from the air and converted to the product.
- Occupation, permanent crop, irrigated, intensive [natural resource, land]: 1.257 m2*year; lognormal variance with pedigree 0.0206, pedigree (4,4,4,1,2)
  The field is located in the south of tunisia - Near the desert. The crop is then irrigated regularly to fullfill the need of the palm trees. Values calculated from a crop of 1 ha based in tunisia with a mean yield of 8484 kg/ha every year. The lifetime of the crop is 80 years, knowing that dates are produced only 75 years

## Emissions to nature
- Glyphosate [soil, agricultural]: 0.000127 kg; lognormal variance with pedigree 0.0986, pedigree (4,4,4,4,4)
  We modelled 100% of the emissions to soil
- Water [water, ground-]: 2.112 m3; = w_irr_2*0.8; lognormal variance with pedigree 0.3186, pedigree (4,4,4,1,2)
  When modelling water use (irrigation) during agricultural production the default assumption is, that 80% of water used for irrigation is released to the ground (groundwater) and 20% to surface water bodies.
- Nitrogen oxides [air, low population density, long-term]: 0.001 kg; lognormal variance with pedigree 0.0986, pedigree (4,4,4,4,4)
  Emission to air Calculated regarding the ecoinvent report n°15 published in 2007
- Pesticides, unspecified [soil, agricultural]: 0.00035 kg; lognormal variance with pedigree 0.0586, pedigree (4,4,4,1,2)
  We modelled 100% of the emissions to soil
- Ammonia [air, low population density, long-term]: 0.00055 kg; lognormal variance with pedigree 0.0986, pedigree (4,4,4,4,4)
  emission to air calculated regarding the ecoinvent report n°15 published in 2007
- Water [water, surface water]: 0.528 m3; = w_irr_2*0.2; lognormal variance with pedigree 0.3186, pedigree (4,4,4,1,2)
  (same comment as for Water)
- Dinitrogen monoxide [air, low population density, long-term]: 0.0048 kg; lognormal variance with pedigree 0.098, pedigree (4,4,4,1,4)
  emission to air calculated regarding the ecoinvent report n°15 published in 2007

## Sampling procedure
Data were compiled from informations provided by farmers in the region of Tozeur, Tunisia. The datas were verified and adjusted by experts in palm date. As the production of palm date occurs in an arid regions, no emission to water are included (leaching of NO3, PO4, heavy metals , soil erosion, etc.).

## Extrapolations
This dataset has been extrapolated from year 2012 to the year of the calculation (2021). The uncertainty has been adjusted accordingly.
