# wood preservation, hot/cold dipping, creosote, outdoor use, ground contact

Dataset: EcoSpold 2, unit process
Geography: RoW
Time period: 2008-01-01 to 2021-12-31
Technology level: current
Classification: ISIC rev.4 ecoinvent: 1610:Sawmilling and planing of wood
Classification: EcoSpold01Categories: wooden materials/refinement
Scenario: Business-as-Usual
System model: Allocation, cut-off by classification
Generated by: trainee ecoinvent
Published in: Künniger T. 2000
Database: ecoinvent
isCopyrightProtected: true
accessRestrictedTo: 1

## General comment
This dataset covers the treatment of wood with creosote in a hot/cold dipping processs as a type of open tank impregnation. The hot/cold dipping process or hot-cold bath as a batch process involves placing wood in a tank of hot preservative oil followed by immersion in cold preservatives. The hot bath increases the viscosity of the wood preservative and therfore improves penetration into the wood; in addition it heats and expands the air within the dry to semi-dry wood, forcing some of the air out and generating a slightly sub-atmospheric pressure. Because of this sub-atmospheric pressure, more impregnating liquid can be absored by the wood. The wood is then immersed in the cold bath and the heated air contracts pulling preservative in with it. Alternatively, an equipment with one single heatable tank can be used, where the creosote is first heated and then left to cool down.The treated wood is held over the dipping vat, usually for 30 minutes to an hour, in order the excess of the preservative solution to drain. Drips are usually collected and recycled into the process. Then the treated wood is removed to storage. Dipping facilities may be open or encapsulated, equipped with vapour trapping and air emission control.
This hot/cold dipping process has turned out to yield better results than dipping only in heated creosote or cold creosote.
Hot/cold dipping is is frequently used in treating the butt-ends of fruit tree and vine posts or utility poles with creosote that will have ground contact. For this butt-end treatment, wooden posts are placed vertically in vessles containing creosote, where the oil is 20-30 cm above the envisaged depths of immersion in the soil. The vessels are then heated to >100 °C. Impregnation occurs during the cooling-down phase. The but-ends of utility poles are often bored to improve the penetration of the wood preservative. The dipping process for butt-end treatment lasts roughly 15 hours followed by about 4 weeks of under roof storage to ensure sufficient fixation of the wood preservative.
Wood is not included in the dataset.
According to Künniger et al. (2000) 115 kg of creosote are applied per m3 wood.
In most countries such dipping facilities need to be authorised by government authorities according to environmental law or regulation. Recent regulations usually prescribe that dipping baths should be roofed and situated upon sealed flooring with no connection to the facility sewer system. Storm rainwater should be collected and be united with the tank impregnation solution.
Air-borne emissions and emissions into surface water are caculated based on emission factors (EF) as determined in OECD (2000, part 1, p. 46ff), depending on the physical properties of the main componentes of creosote. The determination of emission factors for the PAH considered relevant by the U.S. Environmental Protection Agency (EPA) is documented in the following table:
These emission factors are intended to cover the following emission pathes according to OECD (2000, part 1):
Sources: OECD (2000): Emission scenario document for wood preservatives, part 1. OECD series on emission scenario documents, number 2, Organisation for Economic Co-operation and Development, Paris.
Künniger, T. and K. Richter (2000): Ökobilanzen von Konstruktionen im Garten- und Landschaftsbau [Environmental assessment of constructions of garden and landscape architecture]. Eidg. Materialprüfungs- und Forschungsanstalt (EMPA), Dübendorf.
Personal written communications of several producers and/or researchers (see source fields for each exchange)

## Included activities start
Service starting with the reception of the creosote at the factory gate

## Included activities end
The data set contains the treatment service of wood with creosote in a hot-cold dipping bath: it covers the necessary inputs of creosote, electricity, and heat as well as some infrastructure. The dataset does not include wood. Also eventual waste streams (e.g. saw dust in recovered creosote) or VOC emissions into air during storage are not included; VOC emissions during storage should be accounted for consistently with emissions during the use phase. The dataset does also not include 1.7 l/115 kg creosote wastewater discharged into the sewage system (Künniger et al. 2000) due to the lack of characterization of the discharged waste water.

## Geography
Data from German plants

## Technology
Average technology used in Germany for the treatment of bases of utility poles.

## Parameters
- share of collected rainwater: 0.5 dimensionless; name share_collected_rainwater
  share of the rainwater that is colleced and lead into the sewer contrary to run-off water; default value according to OECD (2000, part 1)
- efficiency of air filter: 0.75 dimensionless; name efficiency_air_filter
  According to EPA 1999 (p. 10.8-5) 'the result of one emission test on the incinerator-controlled facility indicated a VOC control efficiency of more than 99 percent', although this value refers to the conditioning and first blowback of creosote only. The EPA study does not cover plants with incinerator controlled VOC emissions over the whole process; other emissions control devices such as knock-out tanks followed by a ventury scrubber are indicated to have a VOC control efficiency of 75%. Also filitering devices containing activiated charcoal are used e.g. in Germany in combination with wood fired boilers for the heating of creosote
- scaling factor: 39.6296 dimensionless; name scaling_factor

## Reference product
- wood preservation, hot/cold dipping, creosote, outdoor use, ground contact: 1 kg; CPC 54730: Painting services; By-product classification allocatable product
  Amount was scaled to 1.
  production volume 4.48936e7 kg; name p_preservation; = 3.65E09 * 0.5 *0.32 * 0.1
    Using the GLO value of 3.65E09 kg preservative derived from Vlosky (2009), the distribution on creosote (32%), the assumption of 50% Type C and 10% hot/clod dipping, we obtain: 3.65E09 kg * 0.5 (type C) *0.32 (creosote) * 0.1 (dip) = 5.84E07
  property price 0.502071 EUR2005
    Calculated based on inputs: The price of the product has been calculated as a sum of the values of the material and energy inputs for this product. This value is therefore a rough estimation. It may underestimate the real price since there are additional expenses when producing any product. These expences can include for example labour costs, treatment of waste materials and profit for the producer. Please consider carefully whether this level of data quality is acceptable for your application.

## Inputs from technosphere
- heat, district or industrial, other than natural gas: 4.69565 MJ; = 540/115; source Künniger T. 2000; lognormal variance with pedigree 0.0446, pedigree (1,4,5,5,1)
  usually wood is used as a fuel; normalization to 1 kg of creosote
  Amount was scaled to the amount of reference product.
  properties: heating value, net 1 MJ
- wood preservative, creosote: 1 kg; source Künniger T. 2000; lognormal variance with pedigree 0.042, pedigree (1,1,5,5,1)
  Amount was scaled to the amount of reference product.
  property wet mass 1 kg; name WM
  property water in wet mass 0 kg; name WWM
  property carbon content, fossil 0.940828; name C_content_fossil
  property carbon content, non-fossil 0; name C_content_non_fossil
  property water content 0; name water_content
  property dry mass 1 kg; name DM
  properties: heating value, net 28.51 MJ
- waste mineral oil: -0.000112721 kg; name w_mineral_oil; = (m_lubricating_oil)*-1; source Hubel M. 2012; lognormal variance with pedigree 0.042, pedigree (1,1,5,5,1)
  = disposal of lubricating oil
  Amount was scaled to the amount of reference product.
  production volume 5060.47 kg; = p_preservation*w_mineral_oil
    calculated from production of reference product
  property price 0 EUR2005; name w_mineral_oil_price_EUR2005
  properties: water content 0.111111, dry mass 0.9 kg, wet mass 1 kg, carbon content, fossil 0.864444, heating value, net 34.7 MJ
  note on heating value, net: Value taken from the general comment of the treatment dataset.
- electricity, medium voltage: 0 kWh; source Künniger T. 2000; pedigree (1,1,1,1,1)
  conversion from MJ to kWh and normalization to 1 kg creosote
  Amount was scaled to the amount of reference product.
  EcoSpold01Location=UCTE
- wood preservation facility, hot/cold dipping tank: 1.28824e-7 unit; = 1/103500/75; source Hubel M. 2012; lognormal variance with pedigree 0.45, pedigree (5,5,5,5,1)
  assuming a yearly use of 103500 kg of creosote over 75 years
  Amount was scaled to the amount of reference product.
- lubricating oil: 0.000112721 kg; name m_lubricating_oil; = 35*75/3/103500/75; source Hubel M. 2012; lognormal variance with pedigree 0.0526, pedigree (4,4,5,5,1)
  hydraulic oil; assuming a replacement of 35 l every 3 years for an assumed yearly use of 103500 kg of creosote over 75 years
  Amount was scaled to the amount of reference product.
  property dry mass 1 kg; name m_lubricating_oil_DM
  properties: heating value, net 40.2 MJ, carbon content, fossil 0.75
  note on heating value, net: Literature value, Source: IPCC 2006, 2006 IPCC Guidelines for National Greenhouse Gas Inventories, Prepared by the National Greenhouse Gas Inventories Programme, Eggleston H.S., Buendia L., Miwa K., Ngara T. and Tanabe K. (eds). Published: IGES, Japan
- electricity, medium voltage: 0.000131532, 2.52223e-5, 0.000423429, 0.0061584, 0.000868029, 0.00282817 kWh (6 entries); source Künniger T. 2000; lognormal variance with pedigree 0.0446, pedigree (1,4,5,5,1)
  (same comment as for electricity, medium voltage)

## Inputs from nature
- Water, cooling, unspecified natural origin [natural resource, in water]: 1.47826e-5 m3; name m_cooling_water; = 0.0017/115; source Künniger T. 2000; lognormal variance with pedigree 0.0446, pedigree (1,4,5,5,1)
  cooling water; normalized to 1 kg creosote
  Amount was scaled to the amount of reference product.

## Emissions to nature
- Fluoranthene [water, surface water]: 0.001575 kg; = (1-share_collected_rainwater)*1.05E-01*0.03; source OECD 2000; lognormal variance with pedigree 0.3526, pedigree (3,3,5,5,3)
  leaching emissions during on-site storage, assuming a distribution of emissions as 50% run-off water and 50% as input to the sewage treatment (default as per OECD 2000). Calculated based the averaged composition of 3 different creosotes with grade WEI Type C as reported by Kohler (2002: Gehalte und Emissionen von polyzyklischen aromatischen Kohlenwasserstoffen in und aus teerölbehandelten Holzschwellen des schweizerischen Eisenbahnnetzes. Untersuchungsbericht Nr. 200'055, Empa Duebendorf) and emissions factors for pressure treatment depending on the solubility in water, as defined in OECD (2000, part 1). It should be noted that in modern wood treatment plants, rainwater of storage places is recolleced completely and lead to a sewage treatment. The inventoried value thus is conservative and might need to be adjusted for the specific LCA.
  Amount was scaled to the amount of reference product.
- Fluorene [water, surface water]: 0.0005805 kg; = (1-share_collected_rainwater)*3.87E-02*0.03; source OECD 2000; lognormal variance with pedigree 0.3526, pedigree (3,3,5,5,3)
  (same comment as for Fluoranthene)
- Acenaphthylene [water, surface water]: 1.0305e-6 kg; = (1-share_collected_rainwater)*6.87E-05*0.03; source OECD 2000; lognormal variance with pedigree 0.3526, pedigree (3,3,5,5,3)
  (same comment as for Fluoranthene)
- Chrysene [water, surface water]: 1.935e-7 kg; = (1-share_collected_rainwater)*1.29E-04*0.003; source OECD 2000; lognormal variance with pedigree 0.3526, pedigree (3,3,5,5,3)
  (same comment as for Fluoranthene)
- Benz(a)anthracene [water, surface water]: 3e-7 kg; = (1-share_collected_rainwater)*2.00E-04*0.003; source OECD 2000; lognormal variance with pedigree 0.3526, pedigree (3,3,5,5,3)
  (same comment as for Fluoranthene)
- Anthracene [water, surface water]: 7.95e-5 kg; = (1-share_collected_rainwater)*1.06E-02*0.015; source OECD 2000; lognormal variance with pedigree 0.3526, pedigree (3,3,5,5,3)
  (same comment as for Fluoranthene)
- Acenaphthene [water, surface water]: 0.0003735 kg; = (1-share_collected_rainwater)*2.49E-02*0.03; source OECD 2000; lognormal variance with pedigree 0.3526, pedigree (3,3,5,5,3)
  (same comment as for Fluoranthene)
- Phenanthrene [water, surface water]: 0.0013065 kg; = (1-share_collected_rainwater)*8.71E-02*0.03; source OECD 2000; lognormal variance with pedigree 0.3526, pedigree (3,3,5,5,3)
  (same comment as for Fluoranthene)
- Benzo(b)fluoranthene [water, surface water]: 3.555e-8 kg; = (1-share_collected_rainwater)*2.37E-05*0.003; source OECD 2000; lognormal variance with pedigree 0.3526, pedigree (3,3,5,5,3)
  (same comment as for Fluoranthene)
- Benzo(a)pyrene [air, unspecified]: 6.075e-9 kg; = (1-efficiency_air_filter)*2.43E-05*0.001; source OECD 2000; lognormal variance with pedigree 0.4026, pedigree (3,3,5,5,3)
  air emissions from the vacuum system (conditioning cycle and final cycle, the treated wood charge during its removal from treating cylinder and immediately thereafter, and the displaced air from working tank blow backs. Calculated based the averaged composition of 3 different creosotes with grade WEI Type C as reported by Kohler (2002: Gehalte und Emissionen von polyzyklischen aromatischen Kohlenwasserstoffen in und aus teerölbehandelten Holzschwellen des schweizerischen Eisenbahnnetzes. Untersuchungsbericht Nr. 200'055, Empa Duebendorf) and emissions factors for pressure treatment depending on vapor pressure as defined in OECD (2000, part 1).
  Amount was scaled to the amount of reference product.
- Benzo(a)pyrene [water, surface water]: 3.645e-8 kg; = (1-share_collected_rainwater)*2.43E-05*0.003; source OECD 2000; lognormal variance with pedigree 0.3526, pedigree (3,3,5,5,3)
  (same comment as for Fluoranthene)
- Water [air, unspecified]: 1.47826e-5 m3; = m_cooling_water; lognormal variance with pedigree 0.0425, pedigree (1,1,5,1,1)
- NMVOC, non-methane volatile organic compounds, unspecified origin [air, unspecified]: 0.040375 kg; = (1-efficiency_air_filter)*6.46E-01*0.25; source OECD 2000; lognormal variance with pedigree 0.1726, pedigree (3,3,5,5,3)
  air emissions from the vacuum system (conditioning cycle and final cycle, the treated wood charge during its removal from treating cylinder and immediately thereafter, and the displaced air from working tank blow backs. Calculated based the averaged composition of 3 different creosotes with grade WEI Type C as reported by Kohler (2002: Gehalte und Emissionen von polyzyklischen aromatischen Kohlenwasserstoffen in und aus teerölbehandelten Holzschwellen des schweizerischen Eisenbahnnetzes. Untersuchungsbericht Nr. 200'055, Empa Duebendorf) and emissions factors for pressure treatment depending on vapor pressure as defined in OECD (2000, part 1). For NMVOC, the highest emission factor has been assumed as a conservative approach.
  Amount was scaled to the amount of reference product.
  property carbon content, fossil 0.854049; name C_content_fossil_NMVOC
  property carbon content, non-fossil 0; name C_content_non_fossil_NMVOC
- VOC, volatile organic compounds, unspecified origin [water, unspecified]: 0.00969 kg; = (1-share_collected_rainwater)*6.46E-01*0.03; source OECD 2000; lognormal variance with pedigree 0.3526, pedigree (3,3,5,5,3)
  leaching emissions during on-site storage, assuming a distribution of emissions as 50% run-off water and 50% as input to the sewage treatment (default as per OECD 2000). Calculated based the averaged composition of 3 different creosotes with grade WEI Type C as reported by Kohler (2002: Gehalte und Emissionen von polyzyklischen aromatischen Kohlenwasserstoffen in und aus teerölbehandelten Holzschwellen des schweizerischen Eisenbahnnetzes. Untersuchungsbericht Nr. 200'055, Empa Duebendorf) and emissions factors for pressure treatment depending on the solubility in water, as defined in OECD (2000, part 1). It should be noted that in modern wood treatment plants, rainwater of storage places is recolleced completely and lead to a sewage treatment. The inventoried value thus is conservative and might need to be adjusted for the specific LCA. For unspecified VOC, the most conservative emission factor according to OECD (2000, part) is used.
  Amount was scaled to the amount of reference product.
- Benzo(k)fluoranthene [water, surface water]: 1.6725e-8 kg; = (1-share_collected_rainwater)*2.23E-05*0.0015; source OECD 2000; lognormal variance with pedigree 0.3526, pedigree (3,3,5,5,3)
  (same comment as for Fluoranthene)
- Benzo(ghi)perylene [water, surface water]: 5.0025e-9 kg; = (1-share_collected_rainwater)*6.67E-06*0.0015; source OECD 2000; lognormal variance with pedigree 0.3526, pedigree (3,3,5,5,3)
  (same comment as for Fluoranthene)
- Carbon dioxide, fossil [air, non-urban air or from high stacks]: 0.396881 kg; = ((6.46E-01*0.25* C_content_fossil_NMVOC)+(2.43E-05*0.001+1.06*0.001+2.00E-04*0.001+2.37E-05*0.001+1.05E-01*0.001+8.71E-02*0.02+2.49E-02*0.075+6.87E-05*0.02+6.67E-06*0.001+2.23E-05*0.001+1.29E-04*0.001+4.67E-06*0.001+3.87E-02*0.02+7.33E-06*0.001+7.76E-03*0.15+7.91E-02*0.001)*0.94083)*efficiency_air_filter/12*44; lognormal variance with pedigree 0.082, pedigree (5,1,5,5,1)
  all filtered C is assumed to finally be converted into CO2, irrespective of the filter technology being applied; for all PAK, an average value is used for the carbon content; once the values for each individual PAK are accessible, the equation can then be completed
  Amount was scaled to the amount of reference product.
- Indeno(1,2,3-cd)pyrene [water, surface water]: 5.4975e-8 kg; = (1-share_collected_rainwater)*7.33E-06*0.015; source OECD 2000; lognormal variance with pedigree 0.3526, pedigree (3,3,5,5,3)
  (same comment as for Fluoranthene)
- Naphtalene [air, unspecified]: 0.000291 kg; = (1-efficiency_air_filter)*7.76E-03*0.15; source OECD 2000; lognormal variance with pedigree 0.4026, pedigree (3,3,5,5,3)
  (same comment as for Benzo(a)pyrene)
- Acenaphthene [air, unspecified]: 0.000466875 kg; = (1-efficiency_air_filter)*2.49E-02*0.075; source OECD 2000; lognormal variance with pedigree 0.4026, pedigree (3,3,5,5,3)
  (same comment as for Benzo(a)pyrene)
- Naphtalene [water, surface water]: 0.0001164 kg; = (1-share_collected_rainwater)*7.76E-03*0.03; source OECD 2000; lognormal variance with pedigree 0.3526, pedigree (3,3,5,5,3)
  (same comment as for Fluoranthene)
- Dibenz(a,h)anthracene [water, surface water]: 3.5025e-9 kg; = (1-share_collected_rainwater)*4.67E-06*0.0015; source OECD 2000; lognormal variance with pedigree 0.3526, pedigree (3,3,5,5,3)
  (same comment as for Fluoranthene)
- Pyrene [water, surface water]: 0.0011865 kg; = (1-share_collected_rainwater)*7.91E-02*0.03; source OECD 2000; lognormal variance with pedigree 0.3526, pedigree (3,3,5,5,3)
  (same comment as for Fluoranthene)

## Sampling procedure
Plant measurements for input of energy, water, etc. Estimates based on literature for air-borne emissions and emissions into water.

## Extrapolations
Calculated as weighted average of existing local data

## Review by Emilia Moreno Ruiz 2015-10-07
amounts of exchanges corrected

## Review by Emilia Moreno Ruiz 2014-06-12
AL in heat input corrected to the most recent activity
