# glued solid timber production

Dataset: EcoSpold 2, unit process
Geography: RoW
Time period: 2012-01-01 to 2021-12-31
Technology level: current
Classification: ISIC rev.4 ecoinvent: 1621:Manufacture of veneer sheets and wood-based panels
Synonyms: Balkenschichtholz
Tags: Swiss brush-up completed
Scenario: Business-as-Usual
System model: Allocation, cut-off by classification
Generated by: Frank Werner
Database: ecoinvent
isCopyrightProtected: true
accessRestrictedTo: 1

## General comment
This dataset represents the produciton of glued solid timber, reflecting a sample of German glued solid timber beams production.
Glued solid timber beams are industrially-manufactured products for load-bearing structures. They comprise two or three coniferous wood planks or squared timbers which are glued together by their face sides parallel to grain.
The manufacturing process corresponds with that of glued laminated timber, whereby larger individual cross-sections are glued together. Thanks to their manufacturing process, glued solid timber beams are very dimensionally stable and are only susceptible to minor cracking.
Owing to their high dimensional stability and low moisture content glued solid timber beams are particularly suitable for timber-frame buildings. glued solid timber beams are manufactured from spruce, fir, pine, larch or Douglas fir. Other coniferous species are permissible but not typical.
The standard strength class is C24 or C24M
Reference:
Kollmann F. F. P., Kuenzi E. W. and Stamm A. J. (1975) Principles of Wood Science and Technology. Springer-Verl., Berlin, Heidelberg, New York. AND Nimz H., Schmitt U., Schwab E., Wittmann O. and Wolf F. (1997) Wood. In: Ullmann"s encyclopedia of indus-trial chemistry (ed. Anonymous). 5th edition on CD-ROM Edition. Wiley & Sons, London.
Rüter, S. and S. Diederichs (2012): Ökobilanz-Basisdaten für Bauprodukte aus Holz. Arbeitsbericht aus dem Institut für Holztechnologie und Holzbiologie Nr. 2012/1, Johann Heinrich von Thünen-Institut (vTI), Hamburg.
[This dataset is meant to replace the following datasets:]

## Included activities start
From the reception at the factory gate of all materials and fuels used.

## Included activities end
This activity ends with the laminated wood beams produced at the factory gate. The dataset includes the inputs to and outputs of the production processes and the available process emissions. Infrastructure is a rough estimate.

## Geography
Data for Germany used for central Europe

## Technology
Technology reflects a sample of German glued solid timber beams production.

## Parameters
- wood_fuel: 1125.6; lognormal variance with pedigree 0.0256, pedigree (1,3,1,1,1)
  input of wood fuel used in production; value calculated from Rüter et al. 2012

## Reference product
- glued solid timber: 0 m3; By-product classification allocatable product
  Reference product. Plywood produced in Germany by processes representative for gobal average. The reference product is ready for delivery at the wooden board factory.
  A large number of materials can be produced with differing properties and areas of use. Typical uses are as construction plywood for wall, floor, and ceiling panels and also as panels for concrete shuttering, and decorative covering veneers in interior furnishings (e.g. wall panels or doors).
  production volume 8e6 m3; name glued_solid_timber_pv
    Estimate. No data was available for the production volume of glued structureal timber, therefore a rough estimate was adopted from the previous dataset "three layered laminated board production, GLO, 1997-2002".
  property heating value, net 5437.31 MJ
    LHV is calculated based on the Carbon content of the product. More details can be found on the respective documentation.The property is based on a value of 12.36MJ/kg
  property price 298 EUR2005
    Temporary price data. Calculated as 90% of purchasers price based on: Price for plywood applied (from 2004 World Import/Export (USD/cubicmeter) from FaoStat http://faostat.fao.org/site/626/default.aspx#ancor, accessed 14th June 2010)
  property carbon content 0.455916
    carbon content on a dry matter basis (reserved; not for manual entry)
  property true value 298
    allocation property applied in "true value" allocation // value calculated from revenue
  properties: dry mass 400.6 kg, wet mass 440 kg, carbon content, non-fossil 0.445746, carbon content, fossil 0.01017, water content 0.0983525, water in wet mass 39.4 kg, carbon allocation 182.64 kg
- wood chips, dry, measured as dry mass: 1 kg; name m_wood_chips; By-product classification allocatable product; CPC 31230: Wood in chips or particles; pedigree (1,1,1,1,1)
  Literature value; sample from Germany
  production volume 1.5824e9 kg; = m_wood_chips*glued_solid_timber_pv
    Calculated from production volume of reference product using the relative outputs.
  property heating value, net 9.99 MJ
    LHV is calculated based on the Carbon content of the product. More details can be found on the respective documentation.
  property price 0.107 EUR2005; name m_wood_chips_price_EUR2005
    Expert judgement (Urs Luginbühl, Swiss Sawmilling industry, personal communication in June 2014). Wood chips from softwood should have a price of 0.101 EUR/kg. Woodchips from hardwood should have a price of 0.112 EUR/kg. Average of these two values is used. Cross-reference; FAOSTAT database; http://faostat.fao.org/site/626/DesktopDefault.aspx?PageID=626#ancor; Average import/export prices of EU for 'chips and particles'. Price: 48.76 Euro/m3. The density of the wood chips is 650 kg/m3. The price is recalculated accordingly.
  property carbon content 0.494
    carbon content on a dry matter basis (reserved; not for manual entry)
  property true value 21.1646; name m_wood_chips_true_value
    allocation property applied in "true value" allocation // value calculated from revenue
  properties: water content 0.4, carbon content, fossil 0, water in wet mass 0.4 kg, dry mass 1 kg, carbon content, non-fossil 0.494, wet mass 1.4 kg, carbon allocation 0.494 kg

## Inputs from technosphere
- electricity, medium voltage: 0 kWh; pedigree (1,1,1,1,1)
  Literature value; sample from Germany
- waste rubber, unspecified: -4.12358e-5 kg; name w_rubber; = (m_rubber)*-1; lognormal variance with pedigree 0.1786, pedigree (4,5,5,5,5)
  calculated from rubber input
  production volume 984000 kg; = w_rubber*glued_solid_timber_pv
    Calculated from production volume of reference product using the relative outputs.
  property price 0 EUR2005; name w_rubber_price_EUR2005
  property dry mass 1 kg; name w_rubber_DM
  properties: heating value, net 27.19 MJ, wet mass 1 kg, carbon content, fossil 0.853
  note on heating value, net: Value taken from the general comment of the treatment dataset.
- heat, district or industrial, natural gas: 0 MJ; pedigree (1,1,1,1,1)
  Fuel input, converted to heat output
  properties: heating value, net 1 MJ
- furnace, wood chips, with silo, 300kW: 6.53774e-9 unit; = 2.31E-08*wood_fuel/1.33333; lognormal variance with pedigree 0.0106, pedigree (1,1,4,5,1)
  Infrastructure factor from DS "Heat, district or industrial, other than natural gas {CH}| heat production, wood chips from industry, at furnace 5000kW | Cut-off, U", multiplied by the input of wood fuel (direct wood fuel plus production residues); correction for assumed efficiency as original value refers to heat output
- wastewater from particleboard production: -1.00491e-5 m3; name wastewater; lognormal variance with pedigree 0.0446, pedigree (1,4,5,5,1)
  Literature value; sample from Germany
  production volume 239800 m3; = wastewater*glued_solid_timber_pv
    Calculated from production volume of reference product using the relative outputs.
  property price 0 EUR2005; name wastewater_price_EUR2005
  properties: wet mass 1000 kg, dry mass 0.337476 kg, carbon content, non-fossil 0.377131, water content 2962.17
- waste wood, post-consumer: 0.00170642 kg; lognormal variance with pedigree 0.0112, pedigree (2,1,4,5,1)
  Literature value; sample from Germany
  properties: heating value, net 9.99 MJ, dry mass 1 kg, water content 0.4, wet mass 1.4 kg, carbon content, non-fossil 0.494
- tap water: 0 kg; name m_tapwater; pedigree (1,1,1,1,1)
  Literature value; sample from Germany
  properties: carbon content, fossil 0.00178991, wet mass 1 kg, water content 2962.17, dry mass 0.000337476 kg
  note on carbon content, fossil: Bicarbonate content is 2.93 mol/m3. CO2 content is 0.1 mol/m3 (ecoinvent v2.2 report 8, Tab 93.1).
- wooden board factory, organic bonded boards: 1.11638e-11 unit; lognormal variance with pedigree 0.398, pedigree (4,5,5,5,4)
  Default value from ecoinvent 2.2
- heat, district or industrial, other than natural gas: 0.00337517 MJ; lognormal variance with pedigree 0.0112, pedigree (1,3,4,5,1)
  Fuel input, converted to heat output
  properties: heating value, net 1 MJ
- synthetic rubber: 4.12358e-5 kg; name m_rubber; lognormal variance with pedigree 0.2106, pedigree (5,5,5,5,5)
  Literature value; sample from Germany
  property carbon content, fossil 0.871949; name C_content_fossil_rubber
  properties: wet mass 1 kg, heating value, net 26.42 MJ, dry mass 1 kg
  note on carbon content, fossil: EPDM (Ethylene-propene-diene terpolymer) rubber is a terpolymer of ethylene, propene, and a diene with the residual unsaturated portion of the diene in the side chain (ecoinvent v2.2 report 7-part XX & Ullmann). Chemical formula (deduced from Evidences of Solvent-Induced Miscibility in Polychloroprene-co-Ethylene-Propene Diene Terpolymer Blends, Dubey et al., Journal of Applied Polymer Science, 2009, 111:1884-1891): C20H35
- phenolic resin: 5.16285e-5 kg; lognormal variance with pedigree 0.0112, pedigree (1,3,4,5,1)
  part of glueing system (inventoried as averaged production average in Europe)
  properties: wet mass 1 kg, carbon content, fossil 0.772277, dry mass 1 kg, heating value, net 33.57 MJ
  note on carbon content, fossil: (C6H5OH)-CH2-(C6H5OH) was considered to be the basic structure in phenolic resin (ecoinvent v2.2 report 8-part 61). C13H14O2, MW=202 g/mol
- wood ash mixture, pure: -0.000188679 kg; name w_wood_ash; = (0.000666666666666667*wood_fuel/1.33333)*-1; lognormal variance with pedigree 0.0112, pedigree (1,3,4,5,1)
  Amount derived from DS "Heat, district or industrial, other than natural gas {CH}| heat production, wood chips from industry, at furnace 300kW | Cut-off, U" on heat generation from industrial residual wood per MJ, multiplied by the input of wood fuel (direct wood fuel plus production residues ) scaled to reflect wood input per generated heat
  production volume 4.50241e6 kg; = w_wood_ash*glued_solid_timber_pv
    Calculated from production volume of reference product using the relative outputs.
  property price 0 EUR2005; name w_wood_ash_price_EUR2005
  properties: carbon content, non-fossil 0.012, wet mass 1 kg, dry mass 1 kg
- polyurethane adhesive: 0.000527349 kg; lognormal variance with pedigree 0.0112, pedigree (1,3,4,5,1)
  part of glueing system (inventoried as averaged production average in Europe)
  properties: heating value, net 30.67 MJ, wet mass 1 kg, dry mass 1 kg, carbon content, fossil 0.72
- lubricating oil: 3.82185e-5 kg; name m_lubricating_oil; lognormal variance with pedigree 0.0206, pedigree (4,4,4,5,1)
  Literature value; sample from Germany
  property dry mass 1 kg; name DM_oil
  properties: heating value, net 40.2 MJ, carbon content, fossil 0.75, wet mass 1 kg
  note on heating value, net: Literature value, Source: IPCC 2006, 2006 IPCC Guidelines for National Greenhouse Gas Inventories, Prepared by the National Greenhouse Gas Inventories Programme, Eggleston H.S., Buendia L., Miwa K., Ngara T. and Tanabe K. (eds). Published: IGES, Japan
  note on carbon content, fossil: Lubricating oil is produced from diesel. C-content/dry mass of fats and oils considered 75%, from: ecoinvent v2.2 report, n 15a, pg 40
- melamine urea formaldehyde adhesive: 0.00109929 kg; lognormal variance with pedigree 0.0446, pedigree (1,4,5,5,1)
  Literature value; sample from Germany
  properties: wet mass 1 kg, carbon content, fossil 0.311708, dry mass 1 kg, heating value, net 14.65 MJ
- sawnwood, board, softwood, raw, dried (u=10%): 0.00024138 m3; lognormal variance with pedigree 0.0112, pedigree (2,1,4,5,1)
  Literature value; sample from Germany
  property dry mass 418.176 kg; name basic_wood_d
  property water content 0.967057; name water_content
  property wet mass 822.576 kg; name WM
  property water in wet mass 404.4 kg; name WWM
  properties: carbon content, non-fossil 0.494, heating value, net 5700.67 MJ
  note on heating value, net: Assumed equal to "sawnwood, softwood, dried (u=10%), planed".The property is based on a value of 13.38MJ/kg
- sawnwood, softwood, raw: 0.00014684 m3; lognormal variance with pedigree 0.0112, pedigree (2,1,4,5,1)
  Literature value; sample from Germany
  properties: wet mass 658.24 kg, carbon content, non-fossil 0.494, heating value, net 5130.57 MJ, dry mass 387.2 kg, water content 0.7
- municipal solid waste: 0 kg; name w_MSW; pedigree (1,1,1,1,1)
  Literature value; sample from Germany
  Uncertainty: a
  production volume 0 kg
    Calculated from production volume of reference product using the relative outputs.
  properties: water content 0.297017, dry mass 0.771 kg, heating value, net 11.74 MJ, wet mass 1 kg, carbon content, non-fossil 0.261655, carbon content, fossil 0.171549
  note on carbon content, non-fossil: MSW composition in tab 4.1, ecoinvent v2.2 report 13_I. C content referred to 1 kg DM
- diesel, burned in building machine: 0.0174624 MJ; lognormal variance with pedigree 0.0446, pedigree (1,4,5,5,1)
  Literature value; sample from Germany
  properties: heating value, net 1 MJ
- sawlog and veneer log, softwood, measured as solid wood under bark: 0 m3; pedigree (1,1,1,1,1)
  Literature value; sample from Germany
  properties: water content 0.7, heating value, net 4483.78 MJ, basic wood density 402.083, wet mass 776.751 kg, carbon content, non-fossil 0.494, dry mass 456.912 kg
  note on heating value, net: Value based on the dataset "softwood forestry, mixed species, sustainable forest management"The property is based on a value of 11.58MJ/kg
- waste mineral oil: -3.82185e-5 kg; name w_mineral_oil; = (m_lubricating_oil/DM_oil)*-1; lognormal variance with pedigree 0.0118, pedigree (2,3,4,5,1)
  hydraulic oil and engine oil/grease; adjusted for water content of waste oil
  production volume 912000 kg; = w_mineral_oil*glued_solid_timber_pv
    Calculated from production volume of reference product using the relative outputs.
  property price 0 EUR2005; name w_mineral_oil_price_EUR2005
  properties: carbon content, fossil 0.864444, water content 0.111111, wet mass 1 kg, dry mass 0.9 kg, heating value, net 34.7 MJ
  note on carbon content, fossil: Tab A.6, ecoinvent v2.2 report 13_I. C content has been calculated after data in the tables, and then referred to 1 kg DM
- electricity, medium voltage: 0.000413056, 7.92063e-5, 0.00132971, 0.0193394, 0.0027259, 0.0088814 kWh (6 entries); lognormal variance with pedigree 0.0446, pedigree (1,4,5,5,1)
  Literature value; sample from Germany
- heat, district or industrial, natural gas: 0.000320575, 0.0208002 MJ (2 entries); lognormal variance with pedigree 0.0112, pedigree (1,3,4,5,1)
  Fuel input, converted to heat output
- tap water: 1.0437e-7, 1.25634e-8, 2.0763e-8, 5.23562e-7, 1.36203e-8, 3.87428e-8, 5.99138e-6 kg (7 entries); lognormal variance with pedigree 0.0118, pedigree (2,3,4,5,1)
  Literature value; sample from Germany
- municipal solid waste: -1.30061e-7, -3.27721e-8, -4.68332e-8, -9.19841e-5 kg (4 entries); lognormal variance with pedigree 0.1318, pedigree (2,3,4,5,5)
  Literature value; sample from Germany
  Uncertainty: a
  production volume 2.2e6 kg
- sawlog and veneer log, softwood, measured as solid wood under bark: 6.21316e-7, 0.000129791 m3 (2 entries); lognormal variance with pedigree 0.0112, pedigree (2,1,4,5,1)
  Literature value; sample from Germany

## Inputs from nature
- Carbon dioxide, non-fossil, resource correction [natural resource, in air]: 1.53529 kg; pedigree (1,1,1,1,1)
  This exchange has been added after economic allocation in order to re-balance the non-fossil carbon dioxide resource extraction.
- Water, cooling, unspecified natural origin [natural resource, in water]: 1.00424e-5 m3; name water_cooling_UNO_input; lognormal variance with pedigree 0.0446, pedigree (1,4,5,5,1)
  Literature value; sample from Germany

## Emissions to nature
- Sodium [air, unspecified]: 4.90566e-7 kg; = 1.73333333333334E-06*wood_fuel/1.33333; lognormal variance with pedigree 0.6932, pedigree (2,3,5,5,1)
  Emission factor from DS "Heat, district or industrial, other than natural gas {CH}| heat production, wood chips from industry, at furnace 300kW | Cut-off, U" on heat generation from industrial residual wood per MJ, multiplied by the input of wood fuel (direct wood fuel plus production residues ) scaled to reflect wood input per generated heat.
- Acetone [air, unspecified]: 2.59316e-5 kg; lognormal variance with pedigree 0.2106, pedigree (2,5,5,5,4)
  Estimation: emissions from PUR adhesives
  Uncertainty: e
- Chromium VI [air, unspecified]: 1.50943e-11 kg; = 5.33333333333334E-11*wood_fuel/1.33333; lognormal variance with pedigree 0.6932, pedigree (2,3,5,5,1)
  (same comment as for Sodium)
- Toluene [air, unspecified]: 1.13208e-7 kg; = 0.0000004*wood_fuel/1.33333; lognormal variance with pedigree 0.0832, pedigree (2,3,5,5,1)
  (same comment as for Sodium)
- Formaldehyde [air, unspecified]: 1.69815e-6 kg; = 1.73333333333334E-07*wood_fuel/1.33333+0.004919; lognormal variance with pedigree 0.1632, pedigree (2,3,5,5,1)
  Emission factor from DS "Heat, district or industrial, other than natural gas {CH}| heat production, wood chips from industry, at furnace 300kW | Cut-off, U" on heat generation from industrial residual wood per MJ, multiplied by the input of wood fuel (direct wood fuel plus production residues ) scaled to reflect wood input per generated heat plus estimated emissions from wood and glue drying processes (according to Rüter & Diederichs 2012).
- Hydrocarbons, aliphatic, unsaturated [air, unspecified]: 1.16981e-6 kg; = 4.13333333333333E-06*wood_fuel/1.33333; lognormal variance with pedigree 0.0832, pedigree (2,3,5,5,1)
  (same comment as for Sodium)
- Lead [air, unspecified]: 9.43396e-9 kg; = 3.33333333333333E-08*wood_fuel/1.33333; lognormal variance with pedigree 0.6932, pedigree (2,3,5,5,1)
  (same comment as for Sodium)
- Potassium [air, unspecified]: 8.83019e-6 kg; = 0.0000312*wood_fuel/1.33333; lognormal variance with pedigree 0.0832, pedigree (2,3,5,5,1)
  (same comment as for Sodium)
- Benzene, ethyl- [air, unspecified]: 1.13208e-8 kg; = 0.00000004*wood_fuel/1.33333; lognormal variance with pedigree 0.0832, pedigree (2,3,5,5,1)
  (same comment as for Sodium)
- Chromium [air, unspecified]: 1.49434e-9 kg; = 5.28000000000001E-09*wood_fuel/1.33333; lognormal variance with pedigree 0.6932, pedigree (2,3,5,5,1)
  (same comment as for Sodium)
- PAH, polycyclic aromatic hydrocarbons [air, unspecified]: 4.18868e-9 kg; name pah; = 0.0000000148*wood_fuel/1.33333; lognormal variance with pedigree 0.3432, pedigree (2,3,5,5,1)
  (same comment as for Sodium)
- Acetaldehyde [air, unspecified]: 2.30189e-8 kg; = 8.13333333333333E-08*wood_fuel/1.33333; lognormal variance with pedigree 0.0832, pedigree (2,3,5,5,1)
  (same comment as for Sodium)
- Arsenic [air, unspecified]: 3.77359e-10 kg; = 1.33333333333333E-09*wood_fuel/1.33333; lognormal variance with pedigree 0.6932, pedigree (2,3,5,5,1)
  (same comment as for Sodium)
- Chlorine [air, unspecified]: 6.79245e-8 kg; = 0.00000024*wood_fuel/1.33333; lognormal variance with pedigree 0.6932, pedigree (2,3,5,5,1)
  (same comment as for Sodium)
- Particulates, < 2.5 um [air, unspecified]: 3.39623e-5 kg; = 0.00012*wood_fuel/1.33333; lognormal variance with pedigree 0.3432, pedigree (2,3,5,5,1)
  (same comment as for Sodium)
- Calcium [air, unspecified]: 2.20755e-6 kg; = 0.0000078*wood_fuel/1.33333; lognormal variance with pedigree 0.6932, pedigree (2,3,5,5,1)
  (same comment as for Sodium)
- Carbon dioxide, non-fossil [air, unspecified]: 0.0403774 kg; = 0.142666666666666*wood_fuel/1.33333; lognormal variance with pedigree 0.0438, pedigree (2,3,5,5,1)
  (same comment as for Sodium)
- Benzene [air, unspecified]: 3.43396e-7 kg; = 1.21333333333333E-06*wood_fuel/1.33333; lognormal variance with pedigree 0.0832, pedigree (2,3,5,5,1)
  (same comment as for Sodium)
- Mercury [air, unspecified]: 1.13208e-10 kg; name mercury; = 0.0000000004*wood_fuel/1.33333; lognormal variance with pedigree 0.6932, pedigree (2,3,5,5,1)
  (same comment as for Sodium)
- Nickel [air, unspecified]: 2.26415e-9 kg; name nickel; = 0.000000008*wood_fuel/1.33333; lognormal variance with pedigree 0.6932, pedigree (2,3,5,5,1)
  (same comment as for Sodium)
- Sulfur dioxide [air, unspecified]: 9.43396e-7 kg; = 3.33333333333334E-06*wood_fuel/1.33333; lognormal variance with pedigree 0.0438, pedigree (2,3,5,5,1)
  (same comment as for Sodium)
- Phosphorus [air, unspecified]: 1.13208e-7 kg; = 0.0000004*wood_fuel/1.33333; lognormal variance with pedigree 0.0832, pedigree (2,3,5,5,1)
  (same comment as for Sodium)
- Ammonia [air, unspecified]: 6.5283e-7 kg; = 2.30666666666667E-06*wood_fuel/1.33333; lognormal variance with pedigree 0.0832, pedigree (2,3,5,5,1)
  (same comment as for Sodium)
- Magnesium [air, unspecified]: 1.35849e-7 kg; name magnesium; = 0.00000048*wood_fuel/1.33333; lognormal variance with pedigree 0.6932, pedigree (2,3,5,5,1)
  (same comment as for Sodium)
- Bromine [air, unspecified]: 2.26415e-8 kg; = 0.00000008*wood_fuel/1.33333; lognormal variance with pedigree 0.6932, pedigree (2,3,5,5,1)
  (same comment as for Sodium)
- m-Xylene [air, unspecified]: 4.5283e-8 kg; name mxylene; = 0.00000016*wood_fuel/1.33333; lognormal variance with pedigree 0.0832, pedigree (2,3,5,5,1)
  (same comment as for Sodium)
- Hydrocarbons, aliphatic, alkanes, unspecified [air, unspecified]: 3.43396e-7 kg; = 1.21333333333333E-06*wood_fuel/1.33333; lognormal variance with pedigree 0.0832, pedigree (2,3,5,5,1)
  (same comment as for Sodium)
- Benzo(a)pyrene [air, unspecified]: 1.88679e-10 kg; = 6.66666666666667E-10*wood_fuel/1.33333; lognormal variance with pedigree 0.3432, pedigree (2,3,5,5,1)
  (same comment as for Sodium)
- Dinitrogen monoxide [air, unspecified]: 9.43396e-7 kg; = 3.33333333333334E-06*wood_fuel/1.33333; lognormal variance with pedigree 0.0832, pedigree (2,3,5,5,1)
  (same comment as for Sodium)
- Methane, non-fossil [air, unspecified]: 1.69811e-6 kg; = 0.000006*wood_fuel/1.33333; lognormal variance with pedigree 0.0832, pedigree (2,3,5,5,1)
  (same comment as for Sodium)
- Fluorine [air, unspecified]: 1.88679e-8 kg; = 6.66666666666667E-08*wood_fuel/1.33333; lognormal variance with pedigree 0.0832, pedigree (2,3,5,5,1)
  (same comment as for Sodium)
- Manganese [air, unspecified]: 6.4151e-8 kg; name manganese; = 2.26666666666667E-07*wood_fuel/1.33333; lognormal variance with pedigree 0.6932, pedigree (2,3,5,5,1)
  (same comment as for Sodium)
- Particulates, > 2.5 um, and < 10um [air, unspecified]: 3.39623e-5 kg; = 0.00012*wood_fuel/1.33333; lognormal variance with pedigree 0.1632, pedigree (2,3,5,5,1)
  (same comment as for Sodium)
- Benzene, hexachloro- [air, unspecified]: 2.71698e-15 kg; = 9.60000000000001E-15*wood_fuel/1.33333; lognormal variance with pedigree 0.0832, pedigree (2,3,5,5,1)
  (same comment as for Sodium)
- Nitrogen oxides [air, unspecified]: 6.79245e-5 kg; = 0.00024*wood_fuel/1.33333; lognormal variance with pedigree 0.0832, pedigree (2,3,5,5,1)
  (same comment as for Sodium)
- Cadmium [air, unspecified]: 2.64151e-10 kg; = 9.33333333333334E-10*wood_fuel/1.33333; lognormal variance with pedigree 0.6932, pedigree (2,3,5,5,1)
  (same comment as for Sodium)
- Carbon monoxide, non-fossil [air, unspecified]: 0.000188679 kg; = 0.000666666666666667*wood_fuel/1.33333; lognormal variance with pedigree 0.6932, pedigree (2,3,5,5,1)
  (same comment as for Sodium)
- Phenol, pentachloro- [air, unspecified]: 3.0566e-12 kg; = 0.0000000000108*wood_fuel/1.33333; lognormal variance with pedigree 0.0832, pedigree (2,3,5,5,1)
  (same comment as for Sodium)
- NMVOC, non-methane volatile organic compounds, unspecified origin [air, unspecified]: 2.64151e-6 kg; name nmvoc; = 9.33333333333334E-06*wood_fuel/1.33333; lognormal variance with pedigree 0.0832, pedigree (2,3,5,5,1)
  (same comment as for Sodium)
- Zinc [air, unspecified]: 1.13208e-7 kg; = 0.0000004*wood_fuel/1.33333; lognormal variance with pedigree 0.6932, pedigree (2,3,5,5,1)
  (same comment as for Sodium)
- Water [air, unspecified]: 2.70303e-5 m3; = 0.00006*wood_fuel/1.33333+m_tapwater/1000+water_cooling_UNO_input; lognormal variance with pedigree 0.132, pedigree (4,4,5,5,4)
  Water emissions from the combustion of the wood (emission per MJ, scaled to wood input and extrapolated from wood input to heat generated) plus tap water input plus input of cooling water
- Dioxins, measured as 2,3,7,8-tetrachlorodibenzo-p-dioxin [air, unspecified]: 1.16981e-14 kg; = 4.13333333333333E-14*wood_fuel/1.33333; lognormal variance with pedigree 0.3432, pedigree (2,3,5,5,1)
  (same comment as for Sodium)
- Copper [air, unspecified]: 8.30189e-9 kg; = 2.93333333333334E-08*wood_fuel/1.33333; lognormal variance with pedigree 0.6932, pedigree (2,3,5,5,1)
  (same comment as for Sodium)

## Sampling procedure
Literature; emissions profile per MJ wood input from PSI (2014)

## Extrapolations
See Geography and Technology
