# treatment of waste paper, unsorted, sorting

Dataset: EcoSpold 2, unit process
Geography: RoW
Time period: 1993-01-01 to 2021-12-31
Technology level: current
Classification: EcoSpold01Categories: paper & cardboard/pulps
Classification: ISIC rev.4 ecoinvent: 3830:Materials recovery
Tags: ConvertedDataset
Scenario: Business-as-Usual
System model: Allocation, cut-off by classification
Generated by: Roland Hischier
Published in: Hischier R. 2007
Database: ecoinvent
isCopyrightProtected: true
accessRestrictedTo: 1

## General comment
Personal communication with the European Paper & Pulp Industry, together with information from literature, is used in order to establish the dataset. All waste is assumed to be incinerated. The dataset represents the input material for DIP process, as delivered to the factory gate.
[This dataset was already contained in the ecoinvent database version 2. It was not individually updated during the transfer to ecoinvent version 3. Life Cycle Impact Assessment results may still have changed, as they are affected by changes in the supply chain, i.e. in other datasets. This dataset was generated following the ecoinvent quality guidelines for version 2. It may have been subject to central changes described in the ecoinvent version 3 change report (http://www.ecoinvent.org/database/ecoinvent-version-3/reports-of-changes/), and the results of the central updates were reviewed extensively. The changes added e.g. consistent water flows and other information throughout the database. The documentation of this dataset can be found in the ecoinvent reports of version 2, which are still available via the ecoinvent website. The change report linked above covers all central changes that were made during the conversion process.]

## Included activities end
This module includes the efforts for sorting collected paper (energy, materials), the treatment of the waste fractions extracted plus the subsequent transport to a paper production site.

## Geography
Data from the European Paper & Pulp industry, used as European average

## Technology
typical technology used in Europe arround 2005

## Reference product
- waste paper, unsorted: 0 kg; By-product classification Recyclable; CPC 39240: Waste and scrap of paper or paperboard
  EcoSpold01Location=RER
  Personal communication of industry
  production volume 0 kg; name RP_PV_1; = 58E+09*0.5/0.717/0.330592352*0.5
    Estimated values. In EU 59E+09 kg of paper and carton are recycled. In EU 71.7% paper is recycled. The GLO production volume is scaled from the EU volume using nominal GDP of 2005 (source: United Nations, http://data.un.org/Glossary.aspx?q=GDP+%28current+US%24%29, accessed 20130726 and 20130312).Gross domestic product (GDP) at current prices is GDP at prices of the current reporting period. Also known as nominal GDP.
    EU recycling rate is the highest in the world, a values of 50% recycling is assumed globally.
    Source: European Recovered Paper Council (2012) European Declaration on Paper Recycling 2011-2015. retrieved from http://reffibre.eu/publications/cepi-2012-paper-recycling-monitoring-report.pdf, accessed 6th May 2016. The production volume for Switzerland was subtracted.
    Peter Siegenthaler (2013) Used paper is big business. Retrieved from: http://www.swissinfo.ch/eng/used-paper-is-big-business/37276480, accessed 6th May 2016
  property price 0.093 EUR2005
    Temporary price data. Calculated as 90% of purchasers price based on: Assumed to be 10% less than for sorted waste paper
  property carbon content 0.448889
    carbon content on a dry matter basis (reserved; not for manual entry)
  properties: carbon content, non-fossil 0.448889, heating value, net 14.11 MJ, wet mass 1 kg, water content 0.111111, water in wet mass 0.1 kg, dry mass 0.9 kg, carbon content, fossil 0, carbon allocation 0.404 kg
- waste paper, sorted: 1 kg; name BP_amount_6; By-product classification Recyclable; CPC 39240: Waste and scrap of paper or paperboard
  EcoSpold01Location=RER
  production volume 3.92965e10 kg; = BP_amount_6* RP_PV_1/ABS( RP_amount_1)
  properties: heating value, net 14.11 MJ, carbon content, non-fossil 0.448889, dry mass 0.9 kg, carbon content, fossil 0, water in wet mass 0.1 kg, wet mass 1 kg, water content 0.111111, price 0.104 EUR2005, carbon content 0.448889, carbon allocation 0.404 kg

## By-products
- waste paper, sorted: 0 kg; By-product classification Recyclable; CPC 39240: Waste and scrap of paper or paperboard
  EcoSpold01Location=RER
  production volume 0 kg; = BP_amount_6* RP_PV_1/ABS( RP_amount_1)
    Dummy value to be replaced by measured, estimated or calculated value
  property carbon content, non-fossil 0.448889
    The collected waste paper has a biogenic C content of 40.4% (average C-content of waste paper according to Doka 2004)
  property price 0.104 EUR2005
    Temporary price data. Calculated as 90% of purchasers price based on: 2005 import prices (total trades (USD) divided by total weight (kg) in biggest economies of the world: EU27, USA, Brasil, China, India, Japan and Russia) from UN Commodity Trade Statistics Database (http://data.un.org/Explorer.aspxDatabase [Accessed 2011.06.20]). Commodity: Waste, scrap of paper, board, nes (including unsorted)
  property carbon content 0.448889
    carbon content on a dry matter basis (reserved; not for manual entry)
  properties: heating value, net 14.11 MJ, dry mass 0.9 kg, carbon content, fossil 0, water in wet mass 0.1 kg, wet mass 1 kg, water content 0.111111, carbon allocation 0.404 kg

## Inputs from technosphere
- electricity, medium voltage: 0 kWh; pedigree (1,1,1,1,1)
  EcoSpold01Location=UCTE
  Personal communication of industry
  Uncertainty: personal communication of industry
- waste textile, soiled: -0.00075 kg; name BP_amount_1; lognormal variance with pedigree 0.0706, pedigree (4,3,5,5,1)
  Personal communication of industry
  EcoSpold01Location=CH
  Uncertainty: personal communication of industry
  production volume 2.94779e7 kg; = BP_amount_1* RP_PV_1/ABS( RP_amount_1)
    Calculated from the production volume of waste paper, unsorted in proportion to the respective output amounts.
  property price 0 EUR2005; name BP_amount_1_price_EUR2005
  properties: water content 0.333333, wet mass 1 kg, carbon content, non-fossil 0.570519, dry mass 0.75 kg, heating value, net 14.45 MJ
  note on carbon content, non-fossil: C content of 1 kg DM was calculated after data in Tab A.4, ecoinvent v2.2 report 13_I,
  note on heating value, net: Value taken from the general comment of the treatment dataset.
- heat, central or small-scale, other than natural gas: 0.01457 MJ; lognormal variance with pedigree 0.066, pedigree (3,4,5,5,1)
  EcoSpold01Location=CH
  Based on data from 1 Swiss plant
  Uncertainty: based on data from 1 Swiss plant
  properties: heating value, net 1 MJ
- steel, unalloyed: 0.0012 kg; lognormal variance with pedigree 0.066, pedigree (3,4,5,5,1)
  EcoSpold01Location=RER
  Based on data from 1 Swiss plant
  Uncertainty: based on data from 1 Swiss plant
  properties: carbon content, fossil 0.0025, wet mass 1 kg, dry mass 1 kg
  note on carbon content, fossil: Unalloyed steels or carbon steels are those in which the level of an individual element in no case reaches or exceeds the limiting concentration given in Tab. 3.1 ecoinvent v2.2 report 10_partII. Assumed to have a C content of 0.25%
- waste paper sorting facility: 6.06e-10 unit; lognormal variance with pedigree 0.448, pedigree (4,5,5,5,5)
  Own assumption
  EcoSpold01Location=RER
  Uncertainty: own assumption
- waste paperboard: 0 kg; name BP_amount_2; pedigree (1,1,1,1,1)
  EcoSpold01Location=CH
  Personal communication of industry
  Uncertainty: personal communication of industry
  production volume 0 kg
    (same comment as for waste textile, soiled)
  property price 0 EUR2005; name BP_amount_2_price_EUR2005
  properties: water content 0.243781, carbon content, non-fossil 0.483259, wet mass 1 kg, dry mass 0.804 kg, heating value, net 15.92 MJ
  note on carbon content, non-fossil: C content was calculated for 1 kg DM, using data in Tab A.3, ecoinvent v2.2 report 13_I.
- waste wood, untreated: 0 kg; name BP_amount_7; pedigree (1,1,1,1,1)
  (same comment as for waste textile, soiled)
  production volume 0 kg
    (same comment as for waste textile, soiled)
  property price 0 EUR2005; name BP_amount_7_price_EUR2005
  properties: carbon content, non-fossil 0.48632, heating value, net 13.99 MJ, wet mass 1 kg, dry mass 0.8 kg, water content 0.25
  note on carbon content, non-fossil: Tab A.4, ecoinvent v2.2 report 13_I. C content has been referred to 1 kg DM,
- waste plastic, mixture: 0 kg; name BP_amount_3; pedigree (1,1,1,1,1)
  (same comment as for waste paperboard)
  production volume 0 kg
    (same comment as for waste textile, soiled)
  property price 0 EUR2005; name BP_amount_3_price_EUR2005
  properties: heating value, net 30.79 MJ, wet mass 1 kg, water content 0.180638, dry mass 0.847 kg, carbon content, fossil 0.747344
  note on carbon content, fossil: C content in 1 kg DM was calculated using data in Tab A.2, ecoinvent v2.2 report 13_I
- sheet rolling, steel: 0.0012 kg; lognormal variance with pedigree 0.066, pedigree (3,4,5,5,1)
  (same comment as for steel, unalloyed)
- waste graphical paper: 0 kg; name BP_amount_4; pedigree (1,1,1,1,1)
  (same comment as for waste textile, soiled)
  production volume 0 kg
    (same comment as for waste textile, soiled)
  property price 0 EUR2005; name BP_amount_4_price_EUR2005
  properties: carbon content, non-fossil 0.454955, water content 0.126126, wet mass 1 kg, dry mass 0.888 kg, heating value, net 14.12 MJ
- lubricating oil: 1.2e-5 kg; lognormal variance with pedigree 0.066, pedigree (3,4,5,5,1)
  Based on data from 1 Swiss plant
  EcoSpold01Location=RER
  Uncertainty: based on data from 1 Swiss plant
  properties: dry mass 1 kg, wet mass 1 kg, carbon content, fossil 0.75, heating value, net 40.2 MJ
  note on carbon content, fossil: Lubricating oil is produced from diesel. C-content/dry mass of fats and oils considered 75%, from: ecoinvent v2.2 report, n 15a, pg 40
  note on heating value, net: Literature value, Source: IPCC 2006, 2006 IPCC Guidelines for National Greenhouse Gas Inventories, Prepared by the National Greenhouse Gas Inventories Programme, Eggleston H.S., Buendia L., Miwa K., Ngara T. and Tanabe K. (eds). Published: IGES, Japan
- scrap steel: -0.00075 kg; name BP_amount_5; lognormal variance with pedigree 0.0706, pedigree (4,3,5,5,1)
  (same comment as for waste textile, soiled)
  production volume 2.94779e7 kg; = BP_amount_5* RP_PV_1/ABS( RP_amount_1)
    (same comment as for waste textile, soiled)
  property price 0 EUR2005; name BP_amount_5_price_EUR2005
  properties: dry mass 1 kg, wet mass 1 kg
- waste paper, unsorted: 1.025 kg
  EcoSpold01Location=RER
  Personal communication of industry
  production volume 4.02864e10 kg
  properties: carbon content, non-fossil 0.448889, price 0.093 EUR2005, heating value, net 14.11 MJ, wet mass 1 kg, water content 0.111111, dry mass 0.9 kg
- electricity, medium voltage: 0.000117228, 2.24793e-5, 0.000377381, 0.00548867, 0.000773631, 0.00252061 kWh (6 entries); lognormal variance with pedigree 0.0706, pedigree (4,3,5,5,1)
  (same comment as for electricity, medium voltage)
- waste paperboard: -0.000220072, -3.3606e-5, -2.93854e-6, -0.000121433, -1.18407e-5, -2.19183e-5, -0.00408819 kg (7 entries); lognormal variance with pedigree 0.0706, pedigree (4,3,5,5,1)
  (same comment as for waste paperboard)
  production volume 1.76867e8 kg
- waste wood, untreated: -5.03866e-5, -6.25625e-6, -4.57403e-7, -1.75719e-5, -2.6547e-6, -4.19685e-6, -0.000668476 kg (7 entries); lognormal variance with pedigree 0.0706, pedigree (4,3,5,5,1)
  (same comment as for waste textile, soiled)
  production volume 2.94779e7 kg
- waste plastic, mixture: -0.00118281, -7.90311e-5, -5.97699e-6, -3.26427e-5, -1.31873e-5, -3.09973e-5, -0.00828035 kg (7 entries); lognormal variance with pedigree 0.0706, pedigree (4,3,5,5,1)
  (same comment as for waste paperboard)
  production volume 3.78299e8 kg
- waste graphical paper: -0.000421804, -6.44115e-5, -5.6322e-6, -0.000232746, -2.26946e-5, -4.20101e-5, -0.0078357 kg (7 entries); lognormal variance with pedigree 0.0706, pedigree (4,3,5,5,1)
  (same comment as for waste textile, soiled)
  production volume 3.38995e8 kg

## Sampling procedure
literature

## Extrapolations
see geography This dataset has been copied from an original dataset covering the geography Europe without Switzerland. The uncertainty has been adjusted accordingly.

## Review by Emilia Moreno Ruiz 2015-11-04
PV adjusted to 4

## Review by Jürgen Sutter 2007-09-13
passed.
