# ventilation system production, decentralized, 6 x 120 m3/h, steel ducts, with earth tube heat exchanger

Dataset: EcoSpold 2, unit process
Geography: CH
Time period: 2003-01-01 to 2021-12-31
Technology level: current
Classification: EcoSpold01Categories: ventilation/ventilation systems
Classification: ISIC rev.4 ecoinvent: 4322:Plumbing, heat and air-conditioning installation
Tags: ConvertedDataset
Scenario: Business-as-Usual
System model: Allocation, cut-off by classification
Generated by: Alex Primas
Published in: Hässig, W. 2007
Database: ecoinvent
isCopyrightProtected: true
accessRestrictedTo: 1

## General comment
Ventilation system for a multi family house. The house considered in the investigation includes 6 flats with 130 m2 floor area each and a ventilation rate of 120 m3/h. The influence of a smaller concrete demand due to embedment of ventilation tubes in the concrete of the floor (-8.05 kg concrete per m2 floor area) is not included.
[This dataset was already contained in the ecoinvent database version 2. It was not individually updated during the transfer to ecoinvent version 3. Life Cycle Impact Assessment results may still have changed, as they are affected by changes in the supply chain, i.e. in other datasets. This dataset was generated following the ecoinvent quality guidelines for version 2. It may have been subject to central changes described in the ecoinvent version 3 change report (http://www.ecoinvent.org/database/ecoinvent-version-3/reports-of-changes/), and the results of the central updates were reviewed extensively. The changes added e.g. consistent water flows and other information throughout the database. The documentation of this dataset can be found in the ecoinvent reports of version 2, which are still available via the ecoinvent website. The change report linked above covers all central changes that were made during the conversion process.]

## Included activities end
Materials used for the ventilation system. Transport of the components to the construction site. Disposal of the components included. Influence of ventilation ducts on building construction not included. No materials for renwal of components included. Operation of system not included.

## Geography
Data representative for a building in Zurich, Switzerland

## Technology
Decentral ventilation system including 4 parallel polyethylene ground heat exchanger tubes (200 mm diameter). Air distribution to the 6 decentral ventilation units with a galvanised steel tube (400 mm diameter). Distribution of fresh- and exhaust-air within the flat with galvanised steel ducts (100x50 mm). Exhaust air from the 6 decentral ventilation units with a galvanised steel tube (400 mm diameter) to the exhaust on the roof.

## Time period
Amount of material investigated in 2003

## Reference product
- ventilation system, decentralized, 6 x 120 m3/h, steel ducts, with earth tube heat exchanger: 1 unit; name vent_sys_RP; CPC 44815: Fans and ventilating or recycling hoods of the domestic type; By-product classification allocatable product
  EcoSpold01Location=CH
  production volume 0.033668 unit; name vent_sys_RP_PV; = 4*0.008417
    This is a placeholder value that does not reflect real-world production volumes. This dataset does not currently require a real-world production volume to work in the database framework, and no actual data were collected yet. This has no negative effect on the results of the ecoinvent database. The placeholder value of this activity was scaled according to the nominal GDP of 2005 (source: United Nations, http://data.un.org/Glossary.aspx?q=GDP+%28current+US%24%29, accessed 20130726) to reflect an appropriate share of the global production volume, which is also a placeholder value.
  property price 5534.35 EUR2005
    Calculated based on inputs: The price of the product has been calculated as a sum of the values of the material and energy inputs for this product. This value is therefore a rough estimation. It may underestimate the real price since there are additional expenses when producing any product. These expences can include for example labour costs, treatment of waste materials and profit for the producer. Please consider carefully whether this level of data quality is acceptable for your application.

## Inputs from technosphere
- used blower and heat exchange unit decentralized, 180-250 m3/h: -6 unit; name byP_10; lognormal variance with pedigree 0.0426, pedigree (2,4,5,1,1)
  EcoSpold01Location=CH
  Questionnaire, Data related to building considered
  Uncertainty: Questionnaire, Data related to building considered
  production volume 0.202008 unit; = byP_10/ vent_sys_RP* vent_sys_RP_PV
    Calculated from the production volume of ventilation system, decentralized, 6 x 120 m3/h, steel ducts, with earth tube heat exchanger in proportion to the respective output amounts.
  property price 0 EUR2005; name byP_10_price_EUR2005
  properties: wet mass 43.1 kg, dry mass 43.1 kg, carbon content, fossil 0.225044, carbon content, non-fossil 6.48865e-7
- used exhaust air valve in-wall housing, plastic/steel: -18 unit; name byP_8; lognormal variance with pedigree 0.0426, pedigree (2,4,5,1,1)
  (same comment as for used blower and heat exchange unit decentralized, 180-250 m3/h)
  production volume 0.606024 unit; = byP_8/ vent_sys_RP* vent_sys_RP_PV
    (same comment as for used blower and heat exchange unit decentralized, 180-250 m3/h)
  property price 0 EUR2005; name byP_8_price_EUR2005
  properties: wet mass 0.5 kg, dry mass 0.5 kg, carbon content, fossil 0.0797702
- used exhaust air roof hood steel, DN 400: -1 unit; name byP_1; lognormal variance with pedigree 0.0426, pedigree (2,4,5,1,1)
  (same comment as for used blower and heat exchange unit decentralized, 180-250 m3/h)
  production volume 0.033668 unit; = byP_1/ vent_sys_RP* vent_sys_RP_PV
    (same comment as for used blower and heat exchange unit decentralized, 180-250 m3/h)
  property price 0 EUR2005; name byP_1_price_EUR2005
  properties: carbon content, fossil 0.00377059, dry mass 17 kg, wet mass 17 kg
- spiral-seam duct, steel, DN 125: 12 m; lognormal variance with pedigree 0.0426, pedigree (2,4,5,1,1)
  EcoSpold01Location=RER
  Questionnaire, Data related to building considered
  Uncertainty: Questionnaire, Data related to building considered
  properties: dry mass 1.9 kg, wet mass 1.9 kg, carbon content, fossil 0.00377105
  note on carbon content, fossil: Tube made of galvanised steel, 2.6 m electric welded seam per m tube.
- used outside air intake stainless steel, DN 370: -1 unit; name byP_14; lognormal variance with pedigree 0.0426, pedigree (2,4,5,1,1)
  (same comment as for used blower and heat exchange unit decentralized, 180-250 m3/h)
  production volume 0.033668 unit; = byP_14/ vent_sys_RP* vent_sys_RP_PV
    (same comment as for used blower and heat exchange unit decentralized, 180-250 m3/h)
  property price 0 EUR2005; name byP_14_price_EUR2005
  properties: wet mass 32 kg, dry mass 32 kg, carbon content, fossil 0.0520342
- ventilation duct, connection piece, steel, 100x50 mm: 150 unit; lognormal variance with pedigree 0.0426, pedigree (2,4,5,1,1)
  Questionnaire, Data related to building considered
  EcoSpold01Location=RER
  Uncertainty: Questionnaire, Data related to building considered
  properties: dry mass 0.2 kg, carbon content, fossil 0.0037725, wet mass 0.2 kg
- polyethylene pipe, DN 200, SDR 41: 120 m; lognormal variance with pedigree 0.0426, pedigree (2,4,5,1,1)
  (same comment as for spiral-seam duct, steel, DN 125)
  properties: carbon content, fossil 0.857143, dry mass 3 kg, heating value, net 127.41 MJ, wet mass 3 kg
- ventilation duct, steel, 100x50 mm: 600 m; lognormal variance with pedigree 0.0426, pedigree (2,4,5,1,1)
  (same comment as for ventilation duct, connection piece, steel, 100x50 mm)
  properties: dry mass 1.5 kg, wet mass 1.5 kg, carbon content, fossil 0.00376667
  note on carbon content, fossil: Rectangular duct made of galvanised steel, 1 m electric welded seam per m duct.
- used insulation spiral-seam duct rockwool, DN 400: -40 m; name byP_16; lognormal variance with pedigree 0.0426, pedigree (2,4,5,1,1)
  (same comment as for used blower and heat exchange unit decentralized, 180-250 m3/h)
  production volume 1.34672 m; = byP_16/ vent_sys_RP* vent_sys_RP_PV
    (same comment as for used blower and heat exchange unit decentralized, 180-250 m3/h)
  property price 0 EUR2005; name byP_16_price_EUR2005
  properties: dry mass 3.3 kg, wet mass 3.3 kg, carbon content, fossil 0.00924113
- waste polyethylene/polypropylene product: -360 kg; name byP_9; lognormal variance with pedigree 0.0426, pedigree (2,4,5,1,1)
  (same comment as for used blower and heat exchange unit decentralized, 180-250 m3/h)
  production volume 12.1205 kg; = byP_9/ vent_sys_RP* vent_sys_RP_PV
    (same comment as for used blower and heat exchange unit decentralized, 180-250 m3/h)
  property price 0 EUR2005; name byP_9_price_EUR2005
  properties: wet mass 1 kg, water content 0.180638, carbon content, fossil 0.748045, heating value, net 42.47 MJ, dry mass 0.847 kg
  note on carbon content, fossil: Mixed various plastics was used to estimate the C content of this waste (Tab A.2, ecoinvent v2.2 report 13_I)
- room-connecting overflow element, steel, approx. 40 m3/h: 18 unit; lognormal variance with pedigree 0.0426, pedigree (2,4,5,1,1)
  (same comment as for ventilation duct, connection piece, steel, 100x50 mm)
  properties: wet mass 1.1 kg, dry mass 1.1 kg, carbon content, fossil 0.211386
- insulation spiral-seam duct, rockwool, DN 400, 30 mm: 40 m; lognormal variance with pedigree 0.0426, pedigree (2,4,5,1,1)
  (same comment as for spiral-seam duct, steel, DN 125)
  properties: wet mass 3.3 kg, dry mass 3.3 kg, carbon content, fossil 0.00924113
  note on carbon content, fossil: C content calculated as the addition of the C contents in the final product components (Insulation made of rock wool with 0.2 mm aluminium foil cover. Protected with a net made of galvanised steel wire)
- exhaust air roof hood, steel, DN 400: 1 unit; lognormal variance with pedigree 0.04, pedigree (1,1,5,1,1)
  EcoSpold01Location=CH
  2,4,1,1,1,nA; Questionnaire, Data related to building considered
  properties: dry mass 17 kg, carbon content, fossil 0.00377059, wet mass 17 kg
- air filter, in exhaust air valve: 18 unit; lognormal variance with pedigree 0.0426, pedigree (2,4,5,1,1)
  (same comment as for ventilation duct, connection piece, steel, 100x50 mm)
  properties: carbon content, fossil 0.65625, wet mass 0.04 kg, dry mass 0.04 kg
  note on carbon content, fossil: C content was calculated as an addition of C content in the product components (Mat filter made of polyester fleece). Then, it was referred to 1 kg DM
- used ventilation control and wiring decentralized unit: -6 unit; name byP_5; lognormal variance with pedigree 0.0426, pedigree (2,4,5,1,1)
  Questionnaire, Data related to building considered
  EcoSpold01Location=CH
  Uncertainty: Questionnaire, Data related to building considered
  production volume 0.202008 unit; = byP_5/ vent_sys_RP* vent_sys_RP_PV
    (same comment as for used blower and heat exchange unit decentralized, 180-250 m3/h)
  property price 0 EUR2005; name byP_5_price_EUR2005
  properties: carbon content, fossil 0.275687, dry mass 2.18 kg, wet mass 2.18 kg, carbon content, non-fossil 3.69963e-5
- blower and heat exchange unit, decentralized, 180-250 m3/h: 6 unit; lognormal variance with pedigree 0.0426, pedigree (2,4,5,1,1)
  (same comment as for ventilation duct, connection piece, steel, 100x50 mm)
  properties: carbon content, non-fossil 6.48865e-7, wet mass 43.1 kg, dry mass 43.1 kg, carbon content, fossil 0.225044
  note on carbon content, non-fossil: C content was calculated as an addition of C content in the product components
- supply air inlet, steel/SS, DN 75: 30 unit; lognormal variance with pedigree 0.0426, pedigree (2,4,5,1,1)
  (same comment as for ventilation duct, connection piece, steel, 100x50 mm)
  properties: carbon content, fossil 0.00337682, dry mass 2.2 kg, wet mass 2.2 kg
- ventilation duct, elbow 90°, steel, 100x50 mm: 228 unit; lognormal variance with pedigree 0.0426, pedigree (2,4,5,1,1)
  (same comment as for spiral-seam duct, steel, DN 125)
  properties: carbon content, fossil 0.00376852, wet mass 0.27 kg, dry mass 0.27 kg
- used air distribution terminal panel steel, 120 m3/h: -12 unit; name byP_11; lognormal variance with pedigree 0.0426, pedigree (2,4,5,1,1)
  (same comment as for used ventilation control and wiring decentralized unit)
  production volume 0.404016 unit; = byP_11/ vent_sys_RP* vent_sys_RP_PV
    (same comment as for used blower and heat exchange unit decentralized, 180-250 m3/h)
  property price 0 EUR2005; name byP_11_price_EUR2005
  properties: wet mass 9.5 kg, dry mass 9.5 kg, carbon content, fossil 0.0166978
- used flexible duct aluminium/PET, DN of 125: -20 m; name byP_4; lognormal variance with pedigree 0.0426, pedigree (2,4,5,1,1)
  (same comment as for used blower and heat exchange unit decentralized, 180-250 m3/h)
  production volume 0.67336 m; = byP_4/ vent_sys_RP* vent_sys_RP_PV
    (same comment as for used blower and heat exchange unit decentralized, 180-250 m3/h)
  property price 0 EUR2005; name byP_4_price_EUR2005
  properties: carbon content, fossil 0.436512, wet mass 0.205 kg, dry mass 0.205 kg
- spiral-seam duct, steel, DN 400: 40 m; lognormal variance with pedigree 0.0426, pedigree (2,4,5,1,1)
  (same comment as for spiral-seam duct, steel, DN 125)
  properties: carbon content, fossil 0.00376667, wet mass 6 kg, dry mass 6 kg
  note on carbon content, fossil: Tube made of galvanised steel, 3.2 m electric welded seam per m tube.
- used silencer steel, DN 125: -24 unit; name byP_12; lognormal variance with pedigree 0.0426, pedigree (2,4,5,1,1)
  (same comment as for used ventilation control and wiring decentralized unit)
  production volume 0.808032 unit; = byP_12/ vent_sys_RP* vent_sys_RP_PV
    (same comment as for used blower and heat exchange unit decentralized, 180-250 m3/h)
  property price 0 EUR2005; name byP_12_price_EUR2005
  properties: dry mass 8.3 kg, carbon content, fossil 0.00483456, wet mass 8.3 kg
- air filter, decentralized unit, 180-250 m3/h: 12 unit; lognormal variance with pedigree 0.0426, pedigree (2,4,5,1,1)
  (same comment as for spiral-seam duct, steel, DN 125)
  properties: carbon content, non-fossil 0.154835, dry mass 0.22 kg, wet mass 0.22 kg, carbon content, fossil 0.367027
  note on carbon content, non-fossil: C content was calculated as an addition of C content in the product components (Bag filter made of polyester fleece, frame cardboard). Then, it was referred to 1 kg DM
- used room-connecting overflow element steel, approx. 40 m3/h: -18 unit; name byP_7; lognormal variance with pedigree 0.0426, pedigree (2,4,5,1,1)
  (same comment as for used blower and heat exchange unit decentralized, 180-250 m3/h)
  production volume 0.606024 unit; = byP_7/ vent_sys_RP* vent_sys_RP_PV
    (same comment as for used blower and heat exchange unit decentralized, 180-250 m3/h)
  property price 0 EUR2005; name byP_7_price_EUR2005
  properties: wet mass 1.1 kg, dry mass 1.1 kg, carbon content, fossil 0.211386
- excavation, hydraulic digger: 137 m3; lognormal variance with pedigree 0.06, pedigree (4,4,5,1,1)
  Assumption, Data related to building considered
  EcoSpold01Location=RER
  Uncertainty: Assumption, Data related to building considered
- exhaust air valve, in-wall housing, plastic/steel, DN 125: 18 unit; lognormal variance with pedigree 0.0426, pedigree (2,4,5,1,1)
  (same comment as for used blower and heat exchange unit decentralized, 180-250 m3/h)
  properties: dry mass 0.5 kg, carbon content, fossil 0.0797702, wet mass 0.5 kg
  note on carbon content, fossil: Exhaust air outlet mounted in room ceiling. Including housing for duct connection. component made of polyvinylchloride and zinc coated steel.
- flexible duct, aluminium/PET, DN of 125: 20 m; lognormal variance with pedigree 0.0426, pedigree (2,4,5,1,1)
  (same comment as for spiral-seam duct, steel, DN 125)
  properties: wet mass 0.205 kg, dry mass 0.205 kg, carbon content, fossil 0.436512
  note on carbon content, fossil: C content was calculated as an addition of C content in the product components (Flexible tube made of PET, laminated with aluminium foil and strengthened with galvanised steel spiral wire)
- outside air intake, stainless steel, DN 370: 1 unit; lognormal variance with pedigree 0.0426, pedigree (2,4,5,1,1)
  (same comment as for spiral-seam duct, steel, DN 125)
  properties: dry mass 32 kg, carbon content, fossil 0.0520342, wet mass 32 kg
- used sealing tape aluminium/PE, 50 mm wide: -700 m; name byP_15; lognormal variance with pedigree 0.0426, pedigree (2,4,5,1,1)
  (same comment as for used ventilation control and wiring decentralized unit)
  production volume 23.5676 m; = byP_15/ vent_sys_RP* vent_sys_RP_PV
    (same comment as for used blower and heat exchange unit decentralized, 180-250 m3/h)
  property price 0 EUR2005; name byP_15_price_EUR2005
  properties: carbon content, fossil 0.707644, wet mass 0.057 kg, dry mass 0.057 kg
- waste bulk iron, excluding reinforcement: -1320 kg; name byP_2; lognormal variance with pedigree 0.0426, pedigree (2,4,5,1,1)
  (same comment as for used ventilation control and wiring decentralized unit)
  production volume 44.4418 kg; = byP_2/ vent_sys_RP* vent_sys_RP_PV
    (same comment as for used blower and heat exchange unit decentralized, 180-250 m3/h)
  property price 0 EUR2005; name byP_2_price_EUR2005
  properties: wet mass 1 kg, dry mass 1 kg
- sealing tape, aluminium/PE, 50 mm wide: 700 m; lognormal variance with pedigree 0.0426, pedigree (2,4,5,1,1)
  (same comment as for spiral-seam duct, steel, DN 125)
  properties: wet mass 0.057 kg, dry mass 0.057 kg, carbon content, fossil 0.707644
  note on carbon content, fossil: C content calculated as the addition of the C contents in the final product components (Tape made of Polyethylene, laminated with aluminium foil and acrylic glue as adherent layer)
- used air filter decentralized unit, 180-250 m3/h: -12 unit; name byP_3; lognormal variance with pedigree 0.0426, pedigree (2,4,5,1,1)
  (same comment as for used blower and heat exchange unit decentralized, 180-250 m3/h)
  production volume 0.404016 unit; = byP_3/ vent_sys_RP* vent_sys_RP_PV
    (same comment as for used blower and heat exchange unit decentralized, 180-250 m3/h)
  property price 0 EUR2005; name byP_3_price_EUR2005
  properties: carbon content, fossil 0.367027, dry mass 0.22 kg, carbon content, non-fossil 0.154835, wet mass 0.22 kg
- air distribution terminal panel, steel, 120 m3/h: 12 unit; lognormal variance with pedigree 0.0426, pedigree (2,4,5,1,1)
  (same comment as for used blower and heat exchange unit decentralized, 180-250 m3/h)
  properties: dry mass 9.5 kg, wet mass 9.5 kg, carbon content, fossil 0.0166978
  note on carbon content, fossil: C content was calculated as an addition of C content in the product component, and then referred to 1 kg DM
- ventilation control and wiring, decentralized unit: 6 unit; lognormal variance with pedigree 0.0426, pedigree (2,4,5,1,1)
  (same comment as for ventilation duct, connection piece, steel, 100x50 mm)
  properties: dry mass 2.18 kg, wet mass 2.18 kg, carbon content, fossil 0.275687, carbon content, non-fossil 3.69963e-5
  note on carbon content, fossil: C content was calculated as an addition of C content in the product components, then it was referred to 1 kg DM
- silencer, steel, DN 125: 24 unit; lognormal variance with pedigree 0.0426, pedigree (2,4,5,1,1)
  (same comment as for used blower and heat exchange unit decentralized, 180-250 m3/h)
  properties: carbon content, fossil 0.00483456, wet mass 8.3 kg, dry mass 8.3 kg
- used air filter in exhaust air valve: -18 unit; name byP_6; lognormal variance with pedigree 0.0426, pedigree (2,4,5,1,1)
  (same comment as for used blower and heat exchange unit decentralized, 180-250 m3/h)
  production volume 0.606024 unit; = byP_6/ vent_sys_RP* vent_sys_RP_PV
    (same comment as for used blower and heat exchange unit decentralized, 180-250 m3/h)
  property price 0 EUR2005; name byP_6_price_EUR2005
  properties: wet mass 0.04 kg, carbon content, fossil 0.65625, dry mass 0.04 kg

## Sampling procedure
Questionnaire and assumptions. Data valid for example building used.

## Extrapolations
This dataset has been extrapolated from year 2003 to the year of the calculation (2021). The uncertainty has been adjusted accordingly.

## Review by Rolf Frischknecht 2007-08-16
passed
none
