# hydroquinone production

Dataset: EcoSpold 2, unit process
Geography: RER
Time period: 2010-01-01 to 2021-12-31
Technology level: current
Classification: ISIC rev.4 ecoinvent: 2011:Manufacture of basic chemicals
Synonyms: C6H6O2
Scenario: Business-as-Usual
System model: Allocation, cut-off by classification
Share of production covered: 100 %
Generated by: Jürgen Sutter
Database: ecoinvent
isCopyrightProtected: true
accessRestrictedTo: 1

## General comment
The process “hydroquinone, at plant, RER” is modelled for the production of hydroquinone from phenol in Europe. Raw materials are modelled with a stoechiometric calculation. Emissions are estimated. Energy consumptions, infrastructure and transports are calculated with standard values.
Hydroquinone (C6H6O2; CAS 123-31-9, 1,4-benzenediol, 1,4-dihydroxybenzene, p-dihydroxy benzene, hydroquinol, quinol) is a colourless crystalline solid when pure. Three processes are used for the industrial production of hydroquinone: hydroperoxidation of p-diisopropylbenzene, hydroxylation of phenol and oxidation of aniline. Although other processes are known, they are not industrially important.

Hydroperoxidation of p-Diisopropylbenzene
p-Diisopropylbenzene (p-DIPB) is produced by Friedel–Crafts alkylation of benzene with propene ( Acylation and Alkylation). Purified p-DIPB (13) is subsequently converted to the dihydroperoxide (DHP) by air oxidation under slightly alkaline conditions at 80 – 90 °C. The DHP (14) is separated from the reaction mixture either by extraction or by crystallization, and is then cleaved to hydroquinone (1) and acetone by an acid-catalyzed Hock rearrangement; the DHP solution is treated with sulfuric acid catalyst (0.2 – 1.0 %) at 60 – 80 °C. The hydroquinone is crystallized and isolated. The overall yield of (1) (based on p-DIPB) is ca. 80 %.

Hydroxylation of Phenol
The catalyzed hydroxylation of phenol at ca. 80 °C with 70 % aqueous hydrogen peroxide produces a mixture of hydroquinone and catechol. The catalyst may be a strong mineral acid, iron(II), or a cobalt(II) salt. Depending on catalyst selection, the ratio of catechol to hydroquinone can be varied from 3 : 1 to 0.1 : 1; in practice, the ratio is typically 1.5 : 1, i.e., catechol is the major product. The reaction proceeds by an ionic mechanism in which hydrogen peroxide is polarized by the strong acid catalyst and phenol is subsequently hydroxylated the resulting isomers are separated by a series of extractions and solvent-stripping operations.
The ratio of the products hydroquinone and catechol may be influenced by the presence of superacids or shape-selective zeolites. Thus, use of a vanadium–modified Nafion perfluorosulfonate polymer for the oxidation of phenol gave a hydroquinone–catechol ratio of 12.5 : 1. The use of a shape–selective zeolite in the hydroxylation of phenol has yielded hydroquinone with 99 % selectivity.

Oxidation of Aniline
Oxidation of aniline is the oldest process used for the production of hydroquinone. Aniline is oxidized with manganese dioxide (15 – 20 % excess) in aqueous sulfuric acid at 0 – 5 °C to produce p-benzoquinone. This intermediate is removed from the reaction mixture by steam stripping and collected. A byproduct, manganese sulfate, may be retrieved from the depleted reaction mixture and sold for agricultural applications.
Hydroquinone is obtained from the intermediate p-benzoquinone by reduction with iron at 55 – 65 °C or by catalytic hydrogenation. The product (usually technical grade) is crystallized, isolated from the typically aqueous stream by centrifugation, and dried in a vacuum dryer. The overall yield of hydroquinone from aniline is ca. 85 %.
Aniline oxidation is a batchwise process and, therefore, relatively labor intensive. The use of ground manganese ore and finely divided iron leads to extremely abrasive processing conditions; a great deal of maintenance is usually required. Disposal of the inorganic coproducts (amounting to ca. 85 % of the total weight of products) is of environmental concern.

Other Processes
Carboxylate esters of aromatic diols can be prepared by Baeyer–Villiger oxidation of a 4-hydroxy-substituted aromatic ketone with 97 % conversion and 97 % efficience. Microbiological oxidation of either benzene or phenol produces hydroquinone with very high selectivity. Copper-catalyzed air oxidation of phenol provides p-benzoquinone in greater than 90 % selectivity. Benzene has been oxidized to hydroquinone in the presence of copper(I) chloride or titanium. Oxidation of benzene in aqueous solution with ozone gives p-benzoquinone and hydroquinone.
Other preparative methods include the reaction of p-isopropenylphenol with 30 % aqueous hydrogen peroxide under acidic conditions; p-isopropenylphenol may be obtained from bisphenol A by alkaline cracking. Hydroquinone can also be produced by the carbonylation of acetylene; catalytic hydrogenation of nitrobenzene in acidic solution; acid hydrolysis of nitrobenzene or p-nitrosophenol; and electrochemical oxidation of benzene or phenol in dilute sulfuric acid, followed by reduction.
Hydroquinone and its derivatives are used in photographic applications, the rubber industry, monomer inhibitors, dyes and pigments, antioxidants, agricultural chemicals, and other diverse and special applications.
The largest demand for hydroquinone is as a photographic developer, principally for black-and-white film, lithography, photochemical machining, microfilm, and X-ray film. Many derivatives of hydroquinone are used in photographic applications, e.g., the sulfate salt of p-N-methylaminophenol and potassium 2,5-dihydroxybenzenesulfonate.
The second largest consumer of hydroquinone is the rubber industry, which requires hydroquinone for the production of antioxidants and antiozonants. Hydroquinone derivatives used in this area include N,N′-diaryl-p-phenylenediamines, dialkylated hydroquinones, N-alkyl-p-aminophenols, dialkyl-p-phenylenediamines, and aralkyl-p-phenylenediamines.
Hydroquinone, hydroquinone monomethyl ether, and p-benzoquinone are used extensively in the vinyl monomer industry to inhibit free-radical polymerization during both processing and storage. Hydroquinone, p-benzoquinone, 2-methylhydroquinone, 2-tert-butylhydroquinone, and 2,5-di-tert-butylhydroquinone are used as stabilizers for unsaturated polyester resins. Food-grade antioxidants include 2-tert-butylhydroquinone and 2-tert-butyl-4-methoxyphenol.
Hydroquinone and several derivatives are used in topical formulations as skin bleaching and depigmenting agents.
Several new applications for hydroquinone and its derivatives are emerging. The oxygen-scavenging properties of hydroquinone are being exploited for use in boiler water treatment. Hydroquinone and certain C-alkylated or Carylated derivatives are useful monomers for the preparation of a variety of polymers, including liquid crystal polyesters for high-performance plastics, composites, and fibers. In addition to high tensile and impact strengths, these materials exhibit good weatherability, solvent resistance, flame retardance, transparency to microwave radiation, and retention of strength at elevated temperature.
Frischknecht R., Jungbluth N., Althaus H.-J., Doka G., Dones R., Heck T., Hellweg S., Hischier R., Nemecek T., Rebitzer G. and Spielmann M. (2007) Overview and Methodology. Final report ecoinvent v2.0 No. 1. Swiss Centre for Life Cycle Inventories, Dübendorf, CH, retrieved from: www.ecoinvent.org.

Gendorf (2000) Umwelterklärung 2000, Werk Gendorf. Werk Gendorf, Burgkirchen as pdf-File under: http://www.gendorf.de/pdf/umwelterklaerung2000.pdf

Phillip M. Hudnall: Hydroquinone. Published online: 2000. In: Ullmann's Encyclopedia of Industrial Chemistry, Seventh Edition, 2004 Electronic Release (ed. Fiedler E., Grossmann G., Kerse-bohm D., Weiss G. and Witte C.). 7 th Electronic Release Edition. Wiley InterS-cience, New York, Online-Version under: DOI: 10.1002/14356007.a13_499

## Included activities end
production of hydroquinone including materials, energy uses, infrastructure, and emissions

## Geography
The inventory is modelled for Europe.

## Technology
hydroxylation of phenol

## Time period
Time of publications

## Parameters
- fraction, cooling water, once-through system, to air: 0.004 dimensionless; name fraction_CW_OT_to_air; lognormal variance with pedigree 0.0413, pedigree (2,3,1,3,1)
  Calculated based on literature value (Scown, C.D., 2011, Water Footprint of U.S. Transportation Fuels and supplying information of the article) (Vionnet, S., Quantis Water Database - Technical Report, 2012).
- fraction, cooling water, cooling pond system, to air: 0.032 dimensionless; name fraction_CW_CP_to_air; lognormal variance with pedigree 0.0413, pedigree (2,3,1,3,1)
  (same comment as for fraction, cooling water, once-through system, to air)
- fraction, cooling water, recirculating system, to air: 0.771 dimensionless; name fraction_CW_R_to_air; lognormal variance with pedigree 0.0413, pedigree (2,3,1,3,1)
  (same comment as for fraction, cooling water, once-through system, to air)
- fraction, cooling water, to air: 0.3875 dimensionless; name fraction_CW_to_air; = (0.5*fraction_CW_OT_to_air)+(0.5*fraction_CW_R_to_air); lognormal variance with pedigree 0.092025, pedigree (4,4,3,2,4)
  Calculated value based on literature value (see comments of the other parametres present in this dataset) and expert opinion. In the case when no industry/literature data are available about the type of cooling or directly fraction, cooling water, to air specific for the process a default assumption is applied. It is assumed that the once-through cooling system is used in 50% of all cases and recirculating system is used in another 50% of all cases.

## Reference product
- hydroquinone: 1 kg; CPC 34139: Other alcohols, phenols, phenol-alcohols, and their halogenated, sulphonated, nitrated or nitrosated derivativ[…]; By-product classification allocatable product; CAS 123-31-9
  EcoSpold01Location=RER
  production volume 1.5e7 kg
    Ullmanns 2004
  property price 11.39 EUR2005
    Calculated value based on data from United Nations Commodity Trade Statistics Database (comtrade.un.org). UN comtrade category: 290722 Hydroquinone (quinol), salts. Year 2005. Using exchange rate of 1EURO = 1.209 USD. Average of price of import into 5 main markets (EU, US, JP, IN and CN).
  property carbon content, fossil 0.654476
    Calculated based on molecular structure. See tab "chemicals".
  property heating value, net 26.43 MJ
    LHV is calculated based on the elemental composition of the substance. Based on the CAS number of the substance (000123-31-9 ), which is found manually, the chemical formula of the substance is found to be: C6H6O2, (PubChem 2020).
    Reference: Kim, S., Chen, J., Cheng, T., Gindulyte, A., He, J., He, S., Li, Q., Shoemaker, B. A., Thiessen, P. A., Yu, B., Zaslavsky, L., Zhang, J., & Bolton, E. E. (2019). PubChem 2019 update: improved access to chemical data. Nucleic acids research, 47(D1), D1102–D1109. https://doi.org/10.1093/nar/gky1033
  property carbon content 0.654476
    carbon content on a dry matter basis (reserved; not for manual entry)
  properties: carbon content, non-fossil 0, dry mass 1 kg, water in wet mass 0 kg, water content 0, wet mass 1 kg, carbon allocation 0.654476 kg

## Inputs from technosphere
- heat, from steam, in chemical industry: 2 MJ; lognormal variance with pedigree 0.1786, pedigree (4,5,5,5,5)
  There was no information available on the amount of energy used for the hydroquinone production process. In order not to neglect the process energy demand those values were approximated with data from an large chemical plant site in Germany producing 2.05 Mt a-1 (intermediates included) of different chemicals (Gendorf (2000)). The values for the energy consumption per kg of product of this plant (3.2 MJ kg-1) were used as approximation for the energy consumption of the hydroquinone production. This total energy demand contains a split of 50% natural gas, 38% electricity and 12% steam from external energy sources. For this inventory all energy used for heat or steam was assumed to be natural gas. For this inventory an amount of 2 MJ natural gas and 0.333 kW electricity per kg product was used.
  EcoSpold01Location=RER
  Uncertainty: Estimation
  properties: heating value, net 1 MJ
- hydrogen peroxide, without water, in 50% solution state: 0.32536 kg; lognormal variance with pedigree 0.0335, pedigree (4,5,4,1,1)
  EcoSpold01Location=RER
  As there was no data available for the production of hydroquinone, the values for the consumption of the raw materials are calculated with an assumed yield of 95 % (Frischknecht et al. 2007).
  Uncertainty: Stoechiometric calculation
  properties: dry mass 1 kg, wet mass 1 kg, heating value, net 7.13 MJ
- electricity, medium voltage: 0.333 kWh; lognormal variance with pedigree 0.1786, pedigree (4,5,5,5,5)
  EcoSpold01Location=UCTE
  There was no information available on the amount of energy used for the hydroquinone production process. In order not to neglect the process energy demand those values were approximated with data from an large chemical plant site in Germany producing 2.05 Mt a-1 (intermediates included) of different chemicals (Gendorf (2000)). The values for the energy consumption per kg of product of this plant (3.2 MJ kg-1) were used as approximation for the energy consumption of the hydroquinone production. This total energy demand contains a split of 50% natural gas, 38% electricity and 12% steam from external energy sources. For this inventory all energy used for heat or steam was assumed to be natural gas. For this inventory an amount of 2 MJ natural gas and 0.333 kW electricity per kg product was used.
  Uncertainty: Estimation
- chemical factory, organics: 4e-10 unit; lognormal variance with pedigree 0.3184, pedigree (4,5,5,5,5)
  EcoSpold01Location=RER
  No information was readily available about infrastructure and land-use of hydroquinone production plants. Therefore, in this study, the infrastructure is estimated based on the module "chemical plant, organics". This module assumes a built area of about 4.2 ha, an average output of 50'000 t/a, and plant life of fifty years. For this study, the estimated value is 4.00 E-10 units per kg of produced chemical.
  Uncertainty: Estimation
- phenol: 0.86318 kg; lognormal variance with pedigree 0.0335, pedigree (4,5,4,1,1)
  As there was no data available for the production of hydroquinone, the values for the consumption of the raw materials are calculated with an assumed yield of 95 % (Frischknecht et al. 2007).
  EcoSpold01Location=RER
  Uncertainty: Stoechiometric calculation
  properties: heating value, net 30.93 MJ, carbon content, fossil 0.765957, wet mass 1 kg, dry mass 1 kg

## Inputs from nature
- Water, cooling, unspecified natural origin [natural resource, in water]: 0.024 m3; name water_cooling_UNO_input; lognormal variance with pedigree 0.0335, pedigree (4,5,4,1,1)
  There was no information available on the amount of cooling water used within the plant. In order not to neglect the process cooling water demand this value was approximated with data from an large chemical plant site in Germany producing 2.05 Mt a-1 (intermediates included) of different chemicals (Gendorf 2000). In this plant in total an average 24 kg water per kg of product were used for. This value was used in this inventory as approximation for the cooling water consumption of the hydroquinone production.
  There was no information available on the amount of cooling water used within the plant. In order not to neglect the process cooling water demand this value was approximated with data from an large chemical plant site in Germany producing 2.05 Mt a-1 (intermediates included) of different chemicals (Gendorf 2000). In this plant in total an average 24 kg water per kg of product were used for. This value was used in this inventory as approximation for the cooling water consumption of the hydroquinone production.
  Uncertainty: Estimation

## Emissions to nature
- DOC, Dissolved Organic Carbon [water, surface water]: 0.00052877 kg; lognormal variance with pedigree 0.1786, pedigree (4,5,5,5,5)
  The values for COD, BOD, TOC and DOC used in this inventory are calculated from the amount of phenol in the treated waste water assuming a carbon conversion of 96% for COD. For the calculation of the values for BOD and DOC the worst case scenario BOD = COD and TOC = DOC was used.
  Uncertainty: Estimation
- Phenol [air, urban air close to ground]: 0.0017264 kg; lognormal variance with pedigree 0.1786, pedigree (4,5,5,5,5)
  There was no data available on process emissions to air for the hydroquinone production. As approximation the air emissions occurring from the purge vent, the distillation vent and fugitive emission sources were estimated to 0.2 % of the input of phenol.
  Uncertainty: Estimation
- Carbon dioxide, fossil [air, urban air close to ground]: 0.017455 kg; lognormal variance with pedigree 0.1786, pedigree (4,5,5,5,5)
  The carbon contained in the removed phenol is accounted as CO2 emissions to air.
  Uncertainty: Estimation
- BOD5, Biological Oxygen Demand [water, surface water]: 0.0015777 kg; lognormal variance with pedigree 0.1786, pedigree (4,5,5,5,5)
  (same comment as for DOC, Dissolved Organic Carbon)
- Water [water, unspecified]: 0.0147 m3; name water_to_water_unspecified; = water_cooling_UNO_input*(1-fraction_CW_to_air); lognormal variance with pedigree 0.130025, pedigree (4,4,5,2,4)
  Calculated value based on literature values and expert opinion. See comments in the parametres' comment field.
  property fraction, origin: fresh water 0; name fraction_origin_fresh_water_Ww
  property fraction, origin: unspecified 1; name fraction_origin_unspecified_Ww
  property fraction, origin: salt water 0; name fraction_origin_salt_water_Ww
- TOC, Total Organic Carbon [water, surface water]: 0.00052877 kg; lognormal variance with pedigree 0.1786, pedigree (4,5,5,5,5)
  (same comment as for DOC, Dissolved Organic Carbon)
- COD, Chemical Oxygen Demand [water, surface water]: 0.0015777 kg; lognormal variance with pedigree 0.1786, pedigree (4,5,5,5,5)
  (same comment as for DOC, Dissolved Organic Carbon)
- Water [air, unspecified]: 0.0093 m3; name water_to_air_unspecified; = water_cooling_UNO_input*fraction_CW_to_air; lognormal variance with pedigree 0.130025, pedigree (4,4,5,2,4)
  (same comment as for Water)
  property fraction, origin: fresh water 0; name fraction_origin_fresh_water
  property fraction, origin: unspecified 1; name fraction_origin_unspecified
  property fraction, origin: salt water 0; name fraction_origin_salt_water
- Phenol [water, surface water]: 0.00069054 kg; lognormal variance with pedigree 0.3184, pedigree (4,5,5,5,5)
  The remaining amount of unreacted phenol (4.8 % of the input) is assumed to leave the production process with the wastewater. Further it is assumed that this wastewater is treated in a internal wastewater plant. The removal efficiency for phenol is assumed with 90%. The carbon contained in the removed phenol is accounted as CO2 emissions to air.
  Uncertainty: Estimation

## Sampling procedure
Literature data

## Extrapolations
This dataset has been extrapolated from year 2010 to the year of the calculation (2021). The uncertainty has been adjusted accordingly.

## Review by Roland Hischier 2011-04-12
automatic validation in Excel
none
