# bronze scrap, post-consumer to generic market for bronze

Dataset: EcoSpold 2, unit process
Geography: GLO
Time period: 2018-01-01 to 2021-12-31
Technology level: current
Classification: ISIC rev.4 ecoinvent: 3830:Materials recovery
Scenario: Business-as-Usual
System model: Allocation, cut-off by classification
Generated by: Lucia Valsasina
Database: ecoinvent
isCopyrightProtected: true
accessRestrictedTo: 1

## General comment
This activity is linking secondary bronze to the market for primary bronze. This activity is a placeholder. The production volume is set to zero as the activity does not take part into the linking of attributional system models, but it is needed for the consequential system model.

## Included activities start
The activity starts with the recepetion of post-consumer material

## Included activities end
The activity ends with the virgin material ready for transport

## Reference product
- bronze scrap, post-consumer: 0 kg; CPC 3936: Waste and scrap of other metals; By-product classification Recyclable
  production volume 0 kg; name RP_PV_1
    The activity has zero production volume. This activity only represents the linking of secondary material to the market for primary material.
  property price 0 EUR2005; name RP_amount_1_price_EUR2005
    Assumed without economic value
  property carbon content 0
    carbon content on a dry matter basis (reserved; not for manual entry)
  properties: water in wet mass 0 kg, dry mass 1 kg, wet mass 1 kg, carbon content, non-fossil 0, water content 0, carbon content, fossil 0, carbon allocation 0 kg
- bronze: 1 kg; name BP_amount_1; By-product classification allocatable product; CPC 4: Metal products, machinery and equipment; CAS 158113-12-3
  property price 3.94628 EUR2005; name BP_amount_1_price_EUR2005
  properties: water in wet mass 0 kg, carbon content, fossil 0, dry mass 1 kg, water content 0, carbon content, non-fossil 0, wet mass 1 kg, carbon content 0, carbon allocation 0 kg

## By-products
- bronze: 0 kg; By-product classification allocatable product; CPC 4: Metal products, machinery and equipment; CAS 158113-12-3
  production volume 0 kg; = RP_PV_1 * (BP_amount_1 / RP_amount_1)
    Calculated from production volume of reference product using the relative outputs.
  property carbon content 0
    carbon content on a dry matter basis (reserved; not for manual entry)
  properties: water in wet mass 0 kg, carbon content, fossil 0, dry mass 1 kg, water content 0, carbon content, non-fossil 0, wet mass 1 kg, carbon allocation 0 kg

## Inputs from technosphere
- bronze scrap, post-consumer: 1 kg
  properties: dry mass 1 kg, wet mass 1 kg

## Extrapolations
This dataset has been extrapolated from year 2018 to the year of the calculation (2021). The uncertainty has been adjusted accordingly.
