# land use change, annual crop

Dataset: EcoSpold 2, unit process
Geography: AU
Time period: 2010-01-01 to 2021-12-31
Technology level: current
Classification: ISIC rev.4 ecoinvent: 0161:Support activities for crop production
Tags: WFLDB
Scenario: Business-as-Usual
System model: Allocation, cut-off by classification
Generated by: Vincent Rossi
Database: ecoinvent
isCopyrightProtected: true
accessRestrictedTo: 1

## General comment
This dataset represents the impacts associated to 1 ha of land use change (LUC), split between change from annual cropland, perennial cropland, primary forest, secondary forest and grassland. This dataset is specific to the country and to annual cropland.
The dataset further includes the (management practice specific) occupation impacts, i.e. the loss of soil organic carbon (SOC), methane (CH4), nitrous oxide (N2O) and, when relevant, peat oxidation.

## Included activities start
The activity starts with the consolidation of the country specific land use changes: land transformation from primary forest, secondary forest, existing annual cropland and existing perennial cropland, to annual cropland.

## Included activities end
Included processes: land use changes (in kg NPP0), C and N emissions due to soil occupation (i.e. SOC change and emissions from peat oxidation by drainage.
This activity ends with the addition of land occupation-related inputs and emissions (C in soil or biomass, CO2 from air, gross energy, CO2 to air, CH4 to air and N2O to air)

## Parameters
- LUC_crop_specific: 1 dimensionless
  This parameter allows to switch between a 'crop specific' and a 'country specific' approach when calculating the LUC of a crop. By default, the chosen approach is 'crop specific', so the value of the parameter is 1. If you want to apply a 'country specific' approach, turn the parameter to 0.

## Reference product
- land use change, annual crop: 1 ha; By-product classification allocatable product; CPC 7: Financial and related services; real estate services; and rental and leasing services
  Yield = 1.0 kg/haActivities related land use change of annual crops, including clear-cutting (of grassland, primary forest and secondary forest), land already in use and emissions due to soil occupation
  production volume 1.12576e6 ha
    This production volume is estimated based in FAO statistic and following the concept of Total Biomass Appropriation (TBA), developped by Krausmann et al., 2008. The ha of land devoted to annual crops per country (excluding paddy rice cultivation) is multiplied by the share of TBA of the country, in order to weight the relative land use change of the country, in a Global context. The shares of TBA are calculated in relation to the total sum of TBA of the World.
    Additional source:
    Nemecek T., Bengoa X., Lansche J., Mouron P., Riedener E., Rossi V. & Humbert S. (2015) Methodological Guidelines for the Life Cycle Inventory of Agricultural Products. Version 3.0, July 2015. World Food LCA Database (WFLDB). Quantis and Agroscope, Lausanne and Zurich, Switzerland.
  properties: price 0 EUR2005

## Inputs from technosphere
- land tenure, arable land, measured as carbon net primary productivity, annual crop: 227.501 kg; lognormal variance with pedigree 0.046648, pedigree (2,2,5,2,1)
  Land tenure, arable land, measured as carbon net primary productivity
  properties: dry mass 1 kg, wet mass 1 kg, carbon content, non-fossil 1
  note on carbon content, non-fossil: The flow is expressed in kg carbon Potential Net Primary Production (NPP0)

## Inputs from nature
- Carbon, organic, in soil or biomass stock [natural resource, in ground]: 614.546 kg; lognormal variance with pedigree 0.046648, pedigree (2,2,5,2,1)
  SOC change, including peat degradation
- Energy, gross calorific value, in biomass [natural resource, biotic]: 0.4 MJ; lognormal variance with pedigree 0.046648, pedigree (2,2,5,2,1)
  Peat degradation, considering 8.77 MJ/kg (50% moisture wet basis) and 50% C in dry peat, 34.9 MJ/kg C in peat.

## Emissions to nature
- Carbon dioxide, from soil or biomass stock [air, non-urban air or from high stacks]: 2253.3 kg; lognormal variance with pedigree 0.046648, pedigree (2,2,5,2,1)
  Emissions from SOC change in mineral soils and peat oxidation due to drainage.
- Methane, non-fossil [air, non-urban air or from high stacks]: 0.000132 kg; lognormal variance with pedigree 0.046648, pedigree (2,2,5,2,1)
  Emissions from peat oxidation due to drainage.
- Dinitrogen monoxide [air, non-urban air or from high stacks]: 0.64407 kg; lognormal variance with pedigree 0.046648, pedigree (2,2,5,2,1)
  Emissions from SOC change in mineral soils and peat oxidation due to drainage.

## Sampling procedure
Data are based on 2nd edition of the Quantis-modified tool developed by Blonk Consultants 'WFLDB-adapted-Blonk 2014 direct-land-use-change-assessment-tool_2015-05-18a.xlsx'.
The amount of this process to take into account as input to the crop inventory is dependent on the portion of LUC allocated to the specific crop in the country considered. This allocation is also calculated using the 2nd edition of the Quantis-modified tool developed by Blonk Consultants, based on FAO data.
For further information see WFLDB Methodological Guidelines for the Life Cycle Inventory of Agricultural Products version 3.0, available at: (Report section: https://v30.ecoquery.ecoinvent.org/File/Reports).

## Extrapolations
This dataset has been extrapolated from year 2015 to the year of the calculation (2021). The uncertainty has been adjusted accordingly.
