# treatment of residue from shredder fraction from manual dismantling, municipal incineration with fly ash extraction

Dataset: EcoSpold 2, unit process
Geography: CH
Time period: 2006-01-01 to 2021-12-31
Technology level: current
Classification: ISIC rev.4 ecoinvent: 3821:Treatment and disposal of non-hazardous waste
Synonyms: municipal waste incineration; Kehrichtverbrennung; Siedlungsabfallverbrennung
Scenario: Business-as-Usual
System model: Allocation, cut-off by classification
Share of production covered: 100 %
Generated by: Gabor Doka
Published in: Doka G. 2015
Database: ecoinvent
isCopyrightProtected: true
accessRestrictedTo: 1

## General comment
This dataset represents the activity of waste disposal of residue from shredder fraction from manual dismantling in a municipal solid waste incinerator (MSWI) // Recommended use of this dataset: Only for incineration of shredder residues generated in the recycling (manual dismantling) of electronic waste // Inventoried waste contains 1.6% rubber; 39.3% Plastics from electronic consumer goods; 39.3% Plastics from electronic industrial goods; 2.96% MSWI iron scrap; 5.92% Alu in MSW; 7.02% Glass; 3.54% wiring copper; 0.34% Pb in ASR inert; 0.0393% silver; . // Waste composition (wet, in ppm): upper heating value 28.98 MJ/kg; lower heating value 27.77 MJ/kg; H2O 8610.5; O 77960; H 59861; C 653730; S 356.87; N 10451; P 416.59; B n.a.; Cl 5632.3; Br 4321.9; F 196.45; I n.a.; Ag 393.23; As 5.8936; Ba 139.09; Cd 118.66; Co 23.164; Cr 98.091; Cu 38276; Hg 0.66795; Mn 76.478; Mo 2.3574; Ni 424.78; Pb 3530.6; Sb 3774.3; Se 1.5398; Sn 179.36; V 7.991; Zn 610.71; Be 0.36663; Sc n.a.; Sr 64.894; Ti 3518.1; Tl 0.2933; W n.a.; Si 28447; Fe 25379; Ca 7555.7; Al 61109; K 91.94; Mg n.a.; Na 4634.1; // Share of carbon in waste that is biogenic 0%. // Share of metals in waste not oxidised and bulk-recyclable (exclude very small or thin parts) Iron: 95.11%; Alu: 96.42%; Copper: 92.39%. // Recovery of metal scrap from bottom ash to recycling: 13.98g iron scrap, 18.165g aluminium scrap, 10.883g copper scrap. From this waste, the FLUWA process in the technology mix recovers 0.000735kg (DM) of a hydroxide sludge to be recycled in zinc furnaces. // Ultimately one kg of this waste produces 0.2361 kg of bottom ash (can include some washed ash) and 0.009587 kg of residues, which are landfilled (technology mix). Additional solidification of residues with 0.003835 kg of cement.Net energy production: 3.53MJ/kg electric energy and 6.9MJ/kg thermal energy. //

## Included activities start
waste incineration from waste reception gate and delivery into waste bunker at incinerator plant site (without transports to the incinerator)

## Included activities end
Waste-specific short-term emissions to water from leachate. Long-term emissions from landfill to ground water.

## Geography
Specific to the technology mix encountered in Switzerland in 2012.

## Technology
average Swiss MSWI plants in 2010 (grate incinerators) with electrostatic precipitator for fly ash (ESP), wet flue gas scrubber and 25% SNCR , 42.77% SCR-high dust , 32.68% SCR-low dust -DeNOx facilities and 0% without Denox (weighted according to mass of burnt waste, representing Swiss average). Efficiency of iron scrap separation from slag : 58%. Efficiency of non-ferrous scrap separation from slag : 31%. The technology mix for this dataset includes a filter ash treatment (FLUWA) of a share of 46.22%. Gross electric efficiency technology mix 15.84% and Gross thermal efficiency technology mix 28.51%

## Time period
Waste composition as given in literature reference, theoretical data or other source. Transfer coefficients for modern MSWI.

## Reference product
- residue from shredder fraction from manual dismantling: -1 kg; name RP_amount_1; By-product classification Waste; CPC 39: Wastes or scraps
  Main reference product of this activity (supply of disposal service).
  production volume 8.434e6 kg; name RP_PV_1
    based on corresponding global production volume of MSW fraction in conventional MSWI (wo fly ash extraction) and scaled down to annual Swiss incinerated MSW mass of 3.02 mio. tonnes.
  property price 0 EUR2005; name RP_amount_1_price_EUR2005
    Waste products are assigned a price of zero as they are assumed to require further treatment.
  property carbon content 0.65941
    carbon content on a dry matter basis (reserved; not for manual entry)
  properties: carbon content, fossil 0.65941, tin content 0.00018091, potassium content 9.2738e-5, calcium content 0.0076213, iron content 0.0256, sodium content 0.0046744, beryllium content 3.6981e-7, water content 0.0086852, water in wet mass 0.0086105 kg, wet mass 1 kg, dry mass 0.99139 kg, heating value, net 0 MJ, nitrogen content 0.010542, hydrogen content 0.060381, phosphorus content 0.00042021, sulfur content 0.00035997, silver content 0.00039664, cadmium content 0.00011969, barium content 0.0001403, fluorine content 0.00019816, arsenic content 5.9448e-6, bromine content 0.0043595, oxygen content 0.078637, cobalt content 2.3365e-5, chromium content 9.8943e-5, chlorine content 0.0056812, antimony content 0.0038071, copper content 0.038609, mercury content 6.7375e-7, selenium content 1.5532e-6, nickel content 0.00042847, lead content 0.0035613, manganese content 7.7142e-5, thallium content 2.9585e-7, silicon content 0.028694, zinc content 0.00061602, vanadium content 8.0604e-6, titanium content 0.0035486, molybdenum content 2.3779e-6, strontium content 6.5457e-5, aluminium content 0.06164, carbon allocation 0.653732 kg

## By-products
All rows: pedigree (1,1,1,1,1)
- electricity, for reuse in municipal waste incineration only: 0 kWh; name E_el_prod_MSWI; CPC 17100: Electrical energy; By-product classification allocatable product
  Net electricity generated from this waste and used in internal MSWI plant energy redistribution.
  Uncertainty: uncertainty is calculated from uncertainties in waste composition and uncertainties in energy efficiency and the uncertainty in internal energy demand
  production volume 8.2729e6 kWh
    calculated in proportion to reference product waste input to incinerator
  property exergy 3.6 MJ; name E_el_prod_MSWI_exergy
    This exergy property is based on the exergy content of the product.
  property true value relation 3.6; name E_el_prod_MSWI_true_value_relation
    property to calculate "true value" from
  property price 0.1 EUR2005; name E_el_prod_MSWI_price_EUR2005
    Estimated to be the same price as in case of electricity, medium voltage.
- heat, for reuse in municipal waste incineration only: 0 MJ; name E_th_prod_MSWI; By-product classification allocatable product; CPC 17300: Steam and hot water
  Net useful heat generated from this waste and used in internal MSWI plant energy redistribution.
  Uncertainty: uncertainty is calculated from uncertainties in waste composition and uncertainties in energy efficiency and the uncertainty in internal energy demand
  production volume 5.8228e7 MJ
    calculated in proportion to reference product waste input to incinerator
  property true value relation 0.1842; name E_th_prod_MSWI_true_value_relation
    property to calculate "true value" from
  property price 0.0106 EUR2005; name E_th_prod_MSWI_price_EUR2005
    Average European district heat price from Ecoheatcool and Euroheat 2005-2006, Ecoheat Work package 1: The European heat market. Final report. 10.6 EUR/GJ i s the price of district heat. http://www.solarthermalworld.org/files/Ecoheatcool%20WP1%20Web.pdf?download
  property exergy 0.1842 MJ; name E_th_prod_MSWI_exergy
    This exergy property is based on the exergy content of the product.
- iron scrap, sorted, pressed: 0 kg; CPC 39310: Slag, dross, scalings and other waste from the manufacture of iron or steel; By-product classification Recyclable
  Iron scrap recovered from this waste.
  Uncertainty: uncertainty calculated from uncertainty in waste composition, uncertainty of share of recyclable metal, uncertainty of transfer coefficient to bottom ash, uncertainty of the efficiency of scrap removal in MSWI plant.
  production volume 0 kg
    calculated in proportion to reference product waste input to incinerator
  property price 0.175 EUR2005
    Temporary price data. Calculated as 90% of purchasers price based on: 2005 import and export prices (total trades (USD) divided by total weight (kg) in biggest economies of the world: EU27, USA, Brasil, China, India, Japan and Russia) from UN Commodity Trade Statistics Database (http://data.un.org/Explorer.aspxDatabase [Accessed 2011.06.20]). Commodity: Waste or scrap, of cast iron
  property carbon content 0
    carbon content on a dry matter basis (reserved; not for manual entry)
  properties: carbon content, fossil 0, dry mass 1 kg, carbon content, non-fossil 0, wet mass 1 kg, water in wet mass 0 kg, water content 0, carbon allocation 0 kg
- aluminium scrap, post-consumer, prepared for melting: 0 kg; By-product classification Recyclable; CPC 39363: Waste and scrap of aluminium
  Aluminium scrap recovered from this waste.
  Uncertainty: uncertainty calculated from uncertainty in waste composition, uncertainty of share of recyclable metal, uncertainty of transfer coefficient to bottom ash, uncertainty of the efficiency of scrap removal in MSWI plant.
  production volume 0 kg
    calculated in proportion to reference product waste input to incinerator
  property price 0.806 EUR2005
    Temporary price data. Calculated as 90% of purchasers price based on: 2005 import and export prices (total trades (USD) divided by total weight (kg) in biggest economies of the world: EU27, USA, Brasil, China, India, Japan and Russia) from UN Commodity Trade Statistics Database (http://data.un.org/Explorer.aspxDatabase [Accessed 2011.06.17]). Commodity: Waste or scrap, aluminium
  property carbon content 0
    carbon content on a dry matter basis (reserved; not for manual entry)
  properties: wet mass 1 kg, water in wet mass 0 kg, carbon content, non-fossil 0, carbon content, fossil 0, water content 0, dry mass 1 kg, carbon allocation 0 kg
- copper scrap, sorted, pressed: 0 kg; CPC 39361: Waste and scrap of copper; By-product classification Recyclable
  Copper scrap recovered from this waste.
  Uncertainty: uncertainty calculated from uncertainty in waste composition, uncertainty of share of recyclable metal, uncertainty of transfer coefficient to bottom ash, uncertainty of the efficiency of scrap removal in MSWI plant.
  production volume 0 kg
    calculated in proportion to reference product waste input to incinerator
  property price 2.84 EUR2005
    Temporary price data. Calculated as 90% of purchasers price based on: Source: USGS Mineral Yearbook 2007, Table 1 in <http://minerals.usgs.gov/minerals/pubs/commodity/recycle/myb1-2007-recyc.pdf>
  property carbon content 0
    carbon content on a dry matter basis (reserved; not for manual entry)
  properties: dry mass 1 kg, carbon content, non-fossil 0, wet mass 1 kg, carbon content, fossil 0, water content 0, water in wet mass 0 kg, carbon allocation 0 kg
- metalliferous hydroxide sludge: 0 kg; By-product classification Recyclable; CPC 1429: Other non-ferrous metal ores and concentrates (other than uranium or thorium ores and concentrates)
  Metalliferous hydroxide sludge from filter ash leaching (FLUWA).
  Uncertainty: uncertainty is calculated from uncertainties in waste composition and transfer coefficients to filter ash in incinerator and the uncertainty of the transfer coefficients of the FLUWA process.
  production volume 0 kg
    calculated in proportion to reference product waste input to incinerator
  property price 0.0042 EUR2005
    World market value of manure, deflated with barley world market price and consumer price index, based on [http://www.gov.pe.ca/photos/original/af_NM_manconv.pdf].
  property heating value, net 0 MJ
    Non combustible products are assumed to have an LHV equal to zero (0).
  property carbon content 0.046248
    carbon content on a dry matter basis (reserved; not for manual entry)
  properties: water content 3, sodium content 0.0012247, aluminium content 0.00017675, wet mass 1 kg, water in wet mass 0.75 kg, carbon content, fossil 0.046248, oxygen content 0.32321, sulfur content 0.027969, cobalt content 0.00077723, fluorine content 0.003898, barium content 5.3244e-5, arsenic content 7.4267e-5, chromium content 0.00026895, mercury content 1.6554e-6, copper content 0.0014184, cadmium content 0.054867, bromine content 0.1161, nickel content 0.00049844, phosphorus content 0.01049, antimony content 0.055615, chlorine content 0.17415, lead content 0.0028447, vanadium content 4.5659e-6, selenium content 2.2243e-5, tin content 0.00019145, manganese content 7.5369e-6, molybdenum content 0.00019651, beryllium content 7.4519e-6, strontium content 1.0066e-6, thallium content 4.0315e-6, zinc content 0.14459, iron content 0.0001861, titanium content 0.00039242, calcium content 0.033552, dry mass 0.25 kg, silicon content 0.00016789, potassium content 0.00079545, carbon allocation 0.011562 kg

## Inputs from technosphere
- quicklime, milled, packed: 0.0030066 kg; lognormal variance with pedigree 0.40055, pedigree (1,1,4,1,1)
  Auxilliary inputs for the flue gas treatment stage of the incinerator plant.
  Uncertainty: uncertainty calculated from uncertainty in average CaO input, of transfer coefficients in the incinerator, and the uncertainty of the waste composition of this waste
  properties: dry mass 0.99 kg, water content 0.010101, wet mass 1 kg
- water, decarbonised: 1.6251 kg; lognormal variance with pedigree 0.27887, pedigree (1,1,4,1,1)
  Incinerator process water used in flue gas scrubber stage.
  Uncertainty: uncertainty calculated from uncertainty in average water input, and the uncertainty of the waste composition of this waste
  properties: wet mass 1 kg
- hydrochloric acid, without water, in 30% solution state: 0.00029151 kg; lognormal variance with pedigree 0.079122, pedigree (1,1,4,1,1)
  Auxilliary inputs for the wastewater treatment stage of the incinerator plant.
  Uncertainty: uncertainty calculated from uncertainty in average HCl input, of transfer coefficients in the incinerator, and the uncertainty of the waste composition of this waste
  properties: wet mass 1 kg, heating value, net 3.32 MJ, dry mass 1 kg
- heat, district or industrial, natural gas: 0.34943 MJ; lognormal variance with pedigree 0.69011, pedigree (1,1,4,1,1)
  Input to DeNOx stage, to heat up flue gas in low-dust SCR.
  Uncertainty: uncertainty calculated from uncertainty in average DeNOx input, uncertainty in the share of thermal NOx, uncertainty of nitrogen content in average municipal waste and the uncertainty in nitrogen content in *this* waste.
  properties: heating value, net 1 MJ
- iron (III) chloride, without water, in 40% solution state: 5.8645e-5 kg; lognormal variance with pedigree 0.27887, pedigree (1,1,4,1,1)
  Auxilliary inputs for the wastewater treatment stage of the incinerator plant.
  Uncertainty: uncertainty calculated from uncertainty in average FeCl3 input, of transfer coefficients in the incinerator, and the uncertainty of the waste composition of this waste
  properties: dry mass 1 kg, wet mass 1 kg
- hydrogen peroxide, without water, in 50% solution state: 0.00065024 kg; lognormal variance with pedigree 0.095982, pedigree (1,1,4,1,1)
  Auxilliary oxidising agent for filter ash treatment (FLUWA).
  Uncertainty: uncertainty calculated from uncertainty in of transfer coefficients in the incinerator, and the uncertainty of the waste composition of this waste
  properties: wet mass 1 kg, heating value, net 7.13 MJ, dry mass 1 kg
- chromium oxide, flakes: 2.3892e-6 kg; lognormal variance with pedigree 1.0466, pedigree (1,1,4,1,1)
  Input to DeNOx stage. Active component in SCR catalyst (vanadium pentoxide, V2O5), here approximated with the available chromium trioxide.
  Uncertainty: uncertainty calculated from uncertainty in average DeNOx input, uncertainty in the share of thermal NOx, uncertainty of nitrogen content in average municipal waste and the uncertainty in nitrogen content in *this* waste.
  properties: wet mass 1 kg, dry mass 1 kg
- chemical, inorganic: 0.00013708 kg; lognormal variance with pedigree 0.22999, pedigree (1,1,4,1,1)
  Auxilliary inputs for the wastewater treatment stage of the incinerator plant. Proxy for Polyelectrolyte.
  Uncertainty: uncertainty calculated from uncertainty in average Polyelectrolyte input, of transfer coefficients in the incinerator, and the uncertainty of the waste composition of this waste
  properties: dry mass 1 kg, wet mass 1 kg, carbon content, fossil 0.003
- cationic resin: 3.3853e-6 kg; lognormal variance with pedigree 1.6283, pedigree (1,1,4,1,1)
  Auxilliary input for mercury removal in filter ash treatment (FLUWA).
  Uncertainty: uncertainty calculated from uncertainty in of transfer coefficients in the incinerator, and the uncertainty of the waste composition of this waste
  properties: carbon content, fossil 0.521606, water content 1, wet mass 1 kg, dry mass 0.5 kg, heating value, net 6.68 MJ
- cement, unspecified: 0.0038346 kg; lognormal variance with pedigree 0.072256, pedigree (1,1,4,1,1)
  Cement required for solidification of landfilled residual material.
  Uncertainty: Uncertainty calculated from uncertainty of the waste composition of this waste, of transfer coefficients in the incinerator and of the solidification recipe.
  properties: wet mass 1 kg, dry mass 1 kg
- waste cement, hydrated: -0.0095866 kg; lognormal variance with pedigree 0.072256, pedigree (1,1,4,1,1)
  Hydrated cement output for solidification of landfilled residual material.
  Uncertainty: Uncertainty calculated from uncertainty of the waste composition of this waste and transfer coefficients in the incinerator and of the solidification recipe.
  production volume 80853 kg
    calculated in proportion to reference product waste input to incinerator
  properties: dry mass 1 kg, wet mass 1 kg
- ammonia, anhydrous, liquid: 0.0018686 kg; lognormal variance with pedigree 0.69011, pedigree (1,1,4,1,1)
  Input to DeNOx stage (100% NH3).
  Uncertainty: uncertainty calculated from uncertainty in average DeNOx input, uncertainty in the share of thermal NOx, uncertainty of nitrogen content in average municipal waste and the uncertainty in nitrogen content in *this* waste.
  properties: wet mass 1 kg, dry mass 1 kg
- process-specific burdens, slag landfill: 0.23611 kg; lognormal variance with pedigree 0.034602, pedigree (1,1,4,1,1)
  Mass-specific expenditures required for landfilling of bottom ash.;activityLink introduced to establish a direct link to the corresponding regional supply of this product
  Uncertainty: uncertainty is calculated from uncertainties in waste composition and transfer coefficients in incinerator
- process-specific burdens, residual material landfill: 0.019113 kg; lognormal variance with pedigree 0.063172, pedigree (1,1,4,1,1)
  Mass-specific expenditures required for landfilling of incineration residues.;activityLink introduced to establish a direct link to the corresponding regional supply of this product
  Uncertainty: uncertainty is calculated from uncertainties in waste composition and transfer coefficients in incinerator
- chemical, organic: 2.2707e-5 kg; lognormal variance with pedigree 0.77085, pedigree (1,1,4,1,1)
  Auxilliary inputs for the wastewater treatment stage of the incinerator plant. Proxy for (pure) Trisodium-trimercapto-s-triazine (CAS 17766-26-6), used as 15% diluted solution, aka TMT15.
  Uncertainty: uncertainty calculated from uncertainty in average TMT15 input, of transfer coefficients in the incinerator, and the uncertainty of the waste composition of this waste
  properties: heating value, net 19.03 MJ, dry mass 1 kg, carbon content, fossil 0.628, wet mass 1 kg
- residual material landfill: 3.9819e-11 unit; lognormal variance with pedigree 0.063172, pedigree (1,1,4,1,1)
  Landfill infrastructure required for landfilling of incineration residues.
  Uncertainty: uncertainty is calculated from uncertainties in waste composition and transfer coefficients in incinerator
- transport, freight, lorry, unspecified: 0.010033 metric ton*km; lognormal variance with pedigree 0.031674, pedigree (1,1,4,1,1)
  Transport services to transport incineration residues to landfills and filter ash to external treatments (FLUWA).
  Uncertainty: uncertainty calculated from uncertainty of the waste composition of this waste, uncertainty of transfer coefficients and the uncertainty in generic transportation distances
- municipal waste incineration facility: 2.5e-10 unit
  Demands per kilogram waste.
- spent activated carbon with mercury: -3.5635e-6 kg; name BP_amount_1; lognormal variance with pedigree 1.6283, pedigree (1,1,4,1,1)
  Spent ion exchanger charged with mercury, from FLUWA filter ash treatment, approximated here with Spent activated carbon with mercury, deposited undergound in a polyethylene Big Bag.
  Uncertainty: uncertainty calculated from uncertainty in of transfer coefficients in the incinerator, and the uncertainty of the waste composition of this waste.
  production volume 30.0546 kg; = ABS(RP_PV_1 * (BP_amount_1 / RP_amount_1))
    Calculated from production volume of reference product using the relative outputs.
  property price 0 EUR2005; name BP_amount_1_price_EUR2005
  properties: heating value, net 18.18 MJ, dry mass 1 kg, wet mass 1 kg, carbon content, fossil 0.6
- slag landfill: 4.1976e-10 unit; lognormal variance with pedigree 0.034602, pedigree (1,1,4,1,1)
  Landfill infrastructure required for landfilling of bottom ash.
  Uncertainty: uncertainty is calculated from uncertainties in waste composition and transfer coefficients in incinerator
- titanium dioxide: 0.00011707 kg; lognormal variance with pedigree 1.0466, pedigree (1,1,4,1,1)
  Input to DeNOx stage (TiO2 catalyst carrier)
  Uncertainty: uncertainty calculated from uncertainty in average DeNOx input, uncertainty in the share of thermal NOx, uncertainty of nitrogen content in average municipal waste and the uncertainty in nitrogen content in *this* waste.
  properties: wet mass 1 kg, dry mass 1 kg
- sodium hydroxide, without water, in 50% solution state: 0.00094514 kg; lognormal variance with pedigree 0.19761, pedigree (1,1,4,1,1)
  Auxilliary inputs for the flue gas treatment stage of the incinerator plant, and partially in the filter ash treatment (FLUWA).
  Uncertainty: uncertainty calculated from uncertainty in average NaOH input, of transfer coefficients in the incinerator, and the uncertainty of the waste composition of this waste
  properties: dry mass 1 kg, wet mass 1 kg, heating value, net 3.03 MJ
- iron scrap, sorted, pressed: -0.01398 kg; lognormal variance with pedigree 0.27704, pedigree (1,1,4,1,1)
  (same comment as for iron scrap, sorted, pressed)
  production volume 117910 kg
  properties: dry mass 1 kg, price 0.175 EUR2005, wet mass 1 kg
- aluminium scrap, post-consumer, prepared for melting: -0.018165 kg; lognormal variance with pedigree 0.18471, pedigree (1,1,4,1,1)
  (same comment as for aluminium scrap, post-consumer, prepared for melting)
  production volume 153200 kg
  properties: wet mass 1 kg, dry mass 1 kg, price 0.806 EUR2005
- copper scrap, sorted, pressed: -0.010883 kg; lognormal variance with pedigree 0.23279, pedigree (1,1,4,1,1)
  (same comment as for copper scrap, sorted, pressed)
  production volume 91786 kg
  properties: dry mass 1 kg, price 2.84 EUR2005, wet mass 1 kg
- metalliferous hydroxide sludge: -0.0029407 kg; lognormal variance with pedigree 0.070447, pedigree (1,1,4,1,1)
  (same comment as for metalliferous hydroxide sludge)
  production volume 24802 kg
  properties: water content 3, wet mass 1 kg, carbon content, fossil 0.046248, oxygen content 0.32321, sulfur content 0.027969, cadmium content 0.054867, bromine content 0.1161, antimony content 0.055615, chlorine content 0.17415, zinc content 0.14459, calcium content 0.033552, dry mass 0.25 kg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

## Inputs from nature
- Oxygen [natural resource, in air]: 2.2443 kg; lognormal variance with pedigree 0.020211, pedigree (1,1,4,1,1)
  Oxygen from ambient air needed to combust and oxidise this waste. Net demand, i.e. without O2 leaving the plant in flue gas uncombusted.
  Uncertainty: uncertainty is calculated from uncertainties in waste composition and transfer coefficients to flue gas and soild residues in incinerator

## Emissions to nature
- Mercury [air, urban air close to ground]: 1.8939e-8 kg; lognormal variance with pedigree 1.6346, pedigree (1,1,4,1,1)
  Emission to air from waste composition and transfer coefficients.
  Uncertainty: uncertainty is calculated from uncertainties in waste composition and transfer coefficients in incinerator
- Antimony [water, ground-, long-term]: 0.0015299 kg; lognormal variance with pedigree 0.43518, pedigree (1,1,4,1,1)
  Long-term emissions from landfilling of incineration residues.
  Uncertainty: uncertainty is calculated from uncertainties in waste composition and transfer coefficients in incinerator and landfills.
- Lead [water, surface water]: 7.0221e-8 kg; lognormal variance with pedigree 1.5965, pedigree (1,1,4,1,1)
  Emissions to water from waste composition and transfer coefficients in incinerator and landfills.
  Uncertainty: uncertainty is calculated from uncertainties in waste composition and transfer coefficients in incinerator and landfills
- Manganese [air, urban air close to ground]: 1.0355e-9 kg; lognormal variance with pedigree 1.0534, pedigree (1,1,4,1,1)
  (same comment as for Mercury)
- Selenium [water, ground-, long-term]: 1.1817e-6 kg; lognormal variance with pedigree 0.98783, pedigree (1,1,4,1,1)
  (same comment as for Antimony)
- Antimony [water, surface water]: 0.00074054 kg; lognormal variance with pedigree 0.46492, pedigree (1,1,4,1,1)
  (same comment as for Lead)
- Molybdenum [air, urban air close to ground]: 3.1019e-9 kg; lognormal variance with pedigree 1.484, pedigree (1,1,4,1,1)
  (same comment as for Mercury)
- Tin, ion [water, ground-, long-term]: 0.00012559 kg; lognormal variance with pedigree 0.96838, pedigree (1,1,4,1,1)
  (same comment as for Antimony)
- Selenium [water, surface water]: 3.068e-7 kg; lognormal variance with pedigree 1.0792, pedigree (1,1,4,1,1)
  (same comment as for Lead)
- Nickel [air, urban air close to ground]: 4.9456e-7 kg; lognormal variance with pedigree 0.79635, pedigree (1,1,4,1,1)
  (same comment as for Mercury)
- Vanadium, ion [water, ground-, long-term]: 1.0796e-6 kg; lognormal variance with pedigree 2.3478, pedigree (1,1,4,1,1)
  (same comment as for Antimony)
- Tin, ion [water, surface water]: 1.4451e-7 kg; lognormal variance with pedigree 0.80886, pedigree (1,1,4,1,1)
  (same comment as for Lead)
- Lead [air, urban air close to ground]: 9.5444e-9 kg; lognormal variance with pedigree 0.56554, pedigree (1,1,4,1,1)
  (same comment as for Mercury)
- Zinc, ion [water, ground-, long-term]: 0.00027862 kg; lognormal variance with pedigree 1.5217, pedigree (1,1,4,1,1)
  (same comment as for Antimony)
- Vanadium, ion [water, surface water]: 4.5517e-9 kg; lognormal variance with pedigree 1.7225, pedigree (1,1,4,1,1)
  (same comment as for Lead)
- Antimony [air, urban air close to ground]: 3.0185e-9 kg; lognormal variance with pedigree 0.56554, pedigree (1,1,4,1,1)
  (same comment as for Mercury)
- Beryllium [water, ground-, long-term]: 3.4407e-7 kg; lognormal variance with pedigree 1.6642, pedigree (1,1,4,1,1)
  (same comment as for Antimony)
- Zinc, ion [water, surface water]: 3.7059e-8 kg; lognormal variance with pedigree 0.66737, pedigree (1,1,4,1,1)
  (same comment as for Lead)
- Selenium [air, urban air close to ground]: 1.837e-8 kg; lognormal variance with pedigree 1.5272, pedigree (1,1,4,1,1)
  (same comment as for Mercury)
- Strontium [water, ground-, long-term]: 6.4824e-5 kg; lognormal variance with pedigree 1.0273, pedigree (1,1,4,1,1)
  (same comment as for Antimony)
- Beryllium [water, surface water]: 2.2817e-10 kg; lognormal variance with pedigree 2.3055, pedigree (1,1,4,1,1)
  (same comment as for Lead)
- Tin [air, urban air close to ground]: 1.042e-10 kg; lognormal variance with pedigree 0.96512, pedigree (1,1,4,1,1)
  (same comment as for Mercury)
- Titanium, ion [water, ground-, long-term]: 0.0010528 kg; lognormal variance with pedigree 0.74932, pedigree (1,1,4,1,1)
  (same comment as for Antimony)
- Strontium [water, surface water]: 4.2425e-8 kg; lognormal variance with pedigree 1.6962, pedigree (1,1,4,1,1)
  (same comment as for Lead)
- Vanadium [air, urban air close to ground]: 1.25e-8 kg; lognormal variance with pedigree 1.3245, pedigree (1,1,4,1,1)
  (same comment as for Mercury)
- Thallium [water, ground-, long-term]: 2.2511e-7 kg; lognormal variance with pedigree 1.4616, pedigree (1,1,4,1,1)
  (same comment as for Antimony)
- Titanium, ion [water, surface water]: 7.1621e-7 kg; lognormal variance with pedigree 0.40428, pedigree (1,1,4,1,1)
  (same comment as for Lead)
- Zinc [air, urban air close to ground]: 4.04e-7 kg; lognormal variance with pedigree 0.75258, pedigree (1,1,4,1,1)
  (same comment as for Mercury)
- Silicon [water, ground-, long-term]: 0.00075332 kg; lognormal variance with pedigree 5.6993, pedigree (1,1,4,1,1)
  (same comment as for Antimony)
- Thallium [water, surface water]: 2.0878e-10 kg; lognormal variance with pedigree 1.7498, pedigree (1,1,4,1,1)
  (same comment as for Lead)
- Strontium [air, urban air close to ground]: 6.4894e-9 kg; lognormal variance with pedigree 1.0608, pedigree (1,1,4,1,1)
  (same comment as for Mercury)
- Iron, ion [water, ground-, long-term]: 0.0059198 kg; lognormal variance with pedigree 0.38099, pedigree (1,1,4,1,1)
  (same comment as for Antimony)
- Silicon [water, surface water]: 2.3223e-6 kg; lognormal variance with pedigree 0.69545, pedigree (1,1,4,1,1)
  (same comment as for Lead)
- Titanium [air, urban air close to ground]: 2.9188e-6 kg; lognormal variance with pedigree 0.52329, pedigree (1,1,4,1,1)
  (same comment as for Mercury)
- Calcium, ion [water, ground-, long-term]: 0.0072984 kg; lognormal variance with pedigree 0.38426, pedigree (1,1,4,1,1)
  (same comment as for Antimony)
- Iron, ion [water, surface water]: 1.0944e-7 kg; lognormal variance with pedigree 1.4272, pedigree (1,1,4,1,1)
  (same comment as for Lead)
- Thallium [air, urban air close to ground]: 2.933e-10 kg; lognormal variance with pedigree 1.755, pedigree (1,1,4,1,1)
  (same comment as for Mercury)
- Aluminium [water, ground-, long-term]: 0.03502 kg; lognormal variance with pedigree 0.18481, pedigree (1,1,4,1,1)
  (same comment as for Antimony)
- Calcium, ion [water, surface water]: 6.6476e-5 kg; lognormal variance with pedigree 0.38536, pedigree (1,1,4,1,1)
  (same comment as for Lead)
- Silicon [air, urban air close to ground]: 3.6289e-9 kg; lognormal variance with pedigree 0.34698, pedigree (1,1,4,1,1)
  (same comment as for Mercury)
- Potassium, ion [water, ground-, long-term]: 6.597e-5 kg; lognormal variance with pedigree 0.66574, pedigree (1,1,4,1,1)
  (same comment as for Antimony)
- Aluminium [water, surface water]: 7.2076e-7 kg; lognormal variance with pedigree 1.1364, pedigree (1,1,4,1,1)
  (same comment as for Lead)
- Iron [air, urban air close to ground]: 2.2223e-9 kg; lognormal variance with pedigree 0.36004, pedigree (1,1,4,1,1)
  (same comment as for Mercury)
- Sodium, ion [water, ground-, long-term]: 0.0040441 kg; lognormal variance with pedigree 0.46693, pedigree (1,1,4,1,1)
  (same comment as for Antimony)
- Potassium, ion [water, surface water]: 2.4931e-5 kg; lognormal variance with pedigree 0.39337, pedigree (1,1,4,1,1)
  (same comment as for Lead)
- Calcium [air, urban air close to ground]: 1.9245e-5 kg; lognormal variance with pedigree 0.42674, pedigree (1,1,4,1,1)
  (same comment as for Mercury)
- NMVOC, non-methane volatile organic compounds, unspecified origin [air, urban air close to ground]: 8.7213e-7 kg; lognormal variance with pedigree 0.085235, pedigree (1,1,4,1,1)
  Incomplete combustion product emitted to air.
  Uncertainty: uncertainty calculated from uncertainty in average operation emissions, and the uncertainty of the flue gas volume from this waste.
- Sodium, ion [water, surface water]: 0.00058823 kg; lognormal variance with pedigree 0.5352, pedigree (1,1,4,1,1)
  (same comment as for Lead)
- Aluminium [air, urban air close to ground]: 1.5354e-9 kg; lognormal variance with pedigree 0.28334, pedigree (1,1,4,1,1)
  (same comment as for Mercury)
- Particulates, < 2.5 um [air, urban air close to ground]: 2.288e-6 kg; lognormal variance with pedigree 0.39798, pedigree (1,1,4,1,1)
  (same comment as for NMVOC, non-methane volatile organic compounds, unspecified origin)
- COD, Chemical Oxygen Demand [water, ground-, long-term]: 0.0048444 kg; lognormal variance with pedigree 0.022601, pedigree (1,1,4,1,1)
  (same comment as for Antimony)
- Potassium [air, urban air close to ground]: 4.5423e-7 kg; lognormal variance with pedigree 0.99455, pedigree (1,1,4,1,1)
  (same comment as for Mercury)
- Particulates, > 2.5 um, and < 10um [air, urban air close to ground]: 1.1497e-8 kg; lognormal variance with pedigree 0.18588, pedigree (1,1,4,1,1)
  (same comment as for NMVOC, non-methane volatile organic compounds, unspecified origin)
- Chromium, ion [water, surface water]: 5.3559e-9 kg; lognormal variance with pedigree 0.62448, pedigree (1,1,4,1,1)
  (same comment as for Lead)
- Sodium [air, urban air close to ground]: 9e-7 kg; lognormal variance with pedigree 0.50235, pedigree (1,1,4,1,1)
  (same comment as for Mercury)
- Dioxins, measured as 2,3,7,8-tetrachlorodibenzo-p-dioxin [air, urban air close to ground]: 3.8324e-14 kg; lognormal variance with pedigree 0.39798, pedigree (1,1,4,1,1)
  (same comment as for NMVOC, non-methane volatile organic compounds, unspecified origin)
- BOD5, Biological Oxygen Demand [water, ground-, long-term]: 0.0015846 kg; lognormal variance with pedigree 0.022601, pedigree (1,1,4,1,1)
  (same comment as for Antimony)
- BOD5, Biological Oxygen Demand [water, surface water]: 0.00048634 kg; lognormal variance with pedigree 0.028681, pedigree (1,1,4,1,1)
  (same comment as for Lead)
- Benzene [air, urban air close to ground]: 1.9164e-8 kg; lognormal variance with pedigree 0.085235, pedigree (1,1,4,1,1)
  (same comment as for NMVOC, non-methane volatile organic compounds, unspecified origin)
- TOC, Total Organic Carbon [water, ground-, long-term]: 0.0019169 kg; lognormal variance with pedigree 0.022601, pedigree (1,1,4,1,1)
  (same comment as for Antimony)
- DOC, Dissolved Organic Carbon [water, surface water]: 0.00021677 kg; lognormal variance with pedigree 0.028362, pedigree (1,1,4,1,1)
  (same comment as for Lead)
- Toluene [air, urban air close to ground]: 3.8327e-8 kg; lognormal variance with pedigree 0.085235, pedigree (1,1,4,1,1)
  (same comment as for NMVOC, non-methane volatile organic compounds, unspecified origin)
- DOC, Dissolved Organic Carbon [water, ground-, long-term]: 0.0019169 kg; lognormal variance with pedigree 0.022601, pedigree (1,1,4,1,1)
  (same comment as for Antimony)
- COD, Chemical Oxygen Demand [water, surface water]: 0.00049698 kg; lognormal variance with pedigree 0.028367, pedigree (1,1,4,1,1)
  (same comment as for Lead)
- Benzene, pentachloro- [air, urban air close to ground]: 1.0125e-10 kg; lognormal variance with pedigree 0.085235, pedigree (1,1,4,1,1)
  (same comment as for NMVOC, non-methane volatile organic compounds, unspecified origin)
- Carbon monoxide, fossil [air, urban air close to ground]: 3.2576e-5 kg; lognormal variance with pedigree 0.78222, pedigree (1,1,4,1,1)
  (same comment as for NMVOC, non-methane volatile organic compounds, unspecified origin)
- Sulfate [water, ground-, long-term]: 0.0008608 kg; lognormal variance with pedigree 0.60839, pedigree (1,1,4,1,1)
  (same comment as for Antimony)
- TOC, Total Organic Carbon [water, surface water]: 0.00021677 kg; lognormal variance with pedigree 0.028362, pedigree (1,1,4,1,1)
  (same comment as for Lead)
- Benzene, hexachloro- [air, urban air close to ground]: 4.007e-11 kg; lognormal variance with pedigree 0.085235, pedigree (1,1,4,1,1)
  (same comment as for NMVOC, non-methane volatile organic compounds, unspecified origin)
- Carbon dioxide, fossil [air, urban air close to ground]: 2.3825 kg; lognormal variance with pedigree 0.0134912, pedigree (1,1,4,1,1)
  (same comment as for Mercury)
- Nitrate [water, ground-, long-term]: 0.00037485 kg; lognormal variance with pedigree 0.37947, pedigree (1,1,4,1,1)
  (same comment as for Antimony)
- Sulfate [water, surface water]: 0.00014279 kg; lognormal variance with pedigree 0.42871, pedigree (1,1,4,1,1)
  (same comment as for Lead)
- Phenol, pentachloro- [air, urban air close to ground]: 8.3454e-12 kg; lognormal variance with pedigree 0.085235, pedigree (1,1,4,1,1)
  (same comment as for NMVOC, non-methane volatile organic compounds, unspecified origin)
- Methane, fossil [air, urban air close to ground]: 2.8745e-7 kg; lognormal variance with pedigree 0.085235, pedigree (1,1,4,1,1)
  (same comment as for NMVOC, non-methane volatile organic compounds, unspecified origin)
- Phosphate [water, ground-, long-term]: 3.6294e-5 kg; lognormal variance with pedigree 5.1735, pedigree (1,1,4,1,1)
  (same comment as for Antimony)
- Nitrate [water, surface water]: 0.00013427 kg; lognormal variance with pedigree 0.25082, pedigree (1,1,4,1,1)
  (same comment as for Lead)
- Heat, waste [air, urban air close to ground]: 21.39 MJ; lognormal variance with pedigree 0.027909, pedigree (1,1,4,1,1)
  Waste heat generated from heating value of this waste plus any electricity required to process it.
  Uncertainty: uncertainty is calculated from uncertainties in waste composition and uncertainties in energy efficiency and the uncertainty in internal energy demand
- Sulfur dioxide [air, urban air close to ground]: 3.5559e-6 kg; lognormal variance with pedigree 0.81324, pedigree (1,1,4,1,1)
  (same comment as for Mercury)
- Chloride [water, ground-, long-term]: 0.00071276 kg; lognormal variance with pedigree 0.39609, pedigree (1,1,4,1,1)
  (same comment as for Antimony)
- Phosphate [water, surface water]: 5.8662e-7 kg; lognormal variance with pedigree 0.37954, pedigree (1,1,4,1,1)
  (same comment as for Lead)
- Benzo(a)pyrene [air, urban air close to ground]: 4.2645e-13 kg; lognormal variance with pedigree 0.39798, pedigree (1,1,4,1,1)
  (same comment as for NMVOC, non-methane volatile organic compounds, unspecified origin)
- Nitrogen oxides [air, urban air close to ground]: 0.00069572 kg; lognormal variance with pedigree 0.74524, pedigree (1,1,4,1,1)
  Sum of fuel-Nox and thermal-NOx emitted to air after DeNOx stage.
  Uncertainty: uncertainty calculated from uncertainty in average N-emissions and uncertainty in the share of thermal NOx and the uncertainty in nitrogen content in *this* waste.
- Bromine [water, ground-, long-term]: 0.00022405 kg; lognormal variance with pedigree 0.48681, pedigree (1,1,4,1,1)
  (same comment as for Antimony)
- Chloride [water, surface water]: 0.0047885 kg; lognormal variance with pedigree 0.15569, pedigree (1,1,4,1,1)
  (same comment as for Lead)
- Heat, waste [water, surface water]: 4.9209 MJ; lognormal variance with pedigree 0.027909, pedigree (1,1,4,1,1)
  (same comment as for Heat, waste)
- Ammonia [air, urban air close to ground]: 2.197e-6 kg; lognormal variance with pedigree 0.74524, pedigree (1,1,4,1,1)
  Nitrogen species emitted to air after DeNOx stage.
  Uncertainty: uncertainty calculated from uncertainty in average N-emissions and uncertainty in the share of thermal NOx and the uncertainty in nitrogen content in *this* waste.
- Fluoride [water, ground-, long-term]: 0.00013107 kg; lognormal variance with pedigree 0.53182, pedigree (1,1,4,1,1)
  (same comment as for Antimony)
- Bromine [water, surface water]: 0.0040104 kg; lognormal variance with pedigree 0.12419, pedigree (1,1,4,1,1)
  (same comment as for Lead)
- Water [air, urban air close to ground]: 0.00152543 m3; lognormal variance with pedigree 0.84425, pedigree (1,1,4,1,1)
  Water vapour from waste humidity, hydrogen oxidation and part of the process water.
  Uncertainty: Uncertainty calculated from uncertainty in waste composition, process water input and the uncertainty of fraction to air.
- Dinitrogen monoxide [air, urban air close to ground]: 0.00015588 kg; lognormal variance with pedigree 1.1442, pedigree (1,1,4,1,1)
  (same comment as for Ammonia)
- Silver, ion [water, ground-, long-term]: 0.00039321 kg; lognormal variance with pedigree 0.78824, pedigree (1,1,4,1,1)
  (same comment as for Antimony)
- Fluoride [water, surface water]: 5.7176e-5 kg; lognormal variance with pedigree 0.55953, pedigree (1,1,4,1,1)
  (same comment as for Lead)
- Water [water, surface water]: 0.00054226 m3; lognormal variance with pedigree 1.1889, pedigree (1,1,4,1,1)
  Process water released to surface water.
  Uncertainty: uncertainty calculated from uncertainty in process water input and the uncertainty of fraction to surface water.
- Cyanide [air, urban air close to ground]: 3.3489e-5 kg; lognormal variance with pedigree 1.1442, pedigree (1,1,4,1,1)
  (same comment as for Ammonia)
- Arsenic, ion [water, ground-, long-term]: 3.593e-6 kg; lognormal variance with pedigree 1.3463, pedigree (1,1,4,1,1)
  (same comment as for Antimony)
- Silver, ion [water, surface water]: 1.3652e-8 kg; lognormal variance with pedigree 1.8839, pedigree (1,1,4,1,1)
  (same comment as for Lead)
- Phosphorus [air, urban air close to ground]: 3.9929e-7 kg; lognormal variance with pedigree 0.80366, pedigree (1,1,4,1,1)
  (same comment as for Mercury)
- Barium [water, ground-, long-term]: 0.00010161 kg; lognormal variance with pedigree 1.2757, pedigree (1,1,4,1,1)
  (same comment as for Antimony)
- Arsenic, ion [water, surface water]: 2.2357e-6 kg; lognormal variance with pedigree 1.2341, pedigree (1,1,4,1,1)
  (same comment as for Lead)
- Hydrogen chloride [air, urban air close to ground]: 3.0305e-6 kg; lognormal variance with pedigree 0.4689, pedigree (1,1,4,1,1)
  (same comment as for Mercury)
- Cadmium, ion [water, ground-, long-term]: 1.9248e-5 kg; lognormal variance with pedigree 4.9317, pedigree (1,1,4,1,1)
  (same comment as for Antimony)
- Barium [water, surface water]: 5.9015e-8 kg; lognormal variance with pedigree 0.74092, pedigree (1,1,4,1,1)
  (same comment as for Lead)
- Bromine [air, urban air close to ground]: 2.1588e-6 kg; lognormal variance with pedigree 0.50235, pedigree (1,1,4,1,1)
  (same comment as for Mercury)
- Cobalt [water, ground-, long-term]: 2.0265e-5 kg; lognormal variance with pedigree 1.1251, pedigree (1,1,4,1,1)
  (same comment as for Antimony)
- Cadmium, ion [water, surface water]: 2.118e-8 kg; lognormal variance with pedigree 0.95268, pedigree (1,1,4,1,1)
  (same comment as for Lead)
- Arsenic [air, urban air close to ground]: 4.6166e-8 kg; lognormal variance with pedigree 1.3536, pedigree (1,1,4,1,1)
  (same comment as for Mercury)
- Chromium VI [water, ground-, long-term]: 2.5543e-6 kg; lognormal variance with pedigree 3.3383, pedigree (1,1,4,1,1)
  (same comment as for Antimony)
- Cobalt [water, surface water]: 3.8169e-9 kg; lognormal variance with pedigree 1.6827, pedigree (1,1,4,1,1)
  (same comment as for Lead)
- Hydrogen fluoride [air, urban air close to ground]: 1.3254e-6 kg; lognormal variance with pedigree 0.89131, pedigree (1,1,4,1,1)
  (same comment as for Mercury)
- Copper, ion [water, ground-, long-term]: 0.027247 kg; lognormal variance with pedigree 0.22301, pedigree (1,1,4,1,1)
  (same comment as for Antimony)
- Chromium VI [water, surface water]: 6.2979e-7 kg; lognormal variance with pedigree 1.0513, pedigree (1,1,4,1,1)
  (same comment as for Lead)
- Barium [air, urban air close to ground]: 5.4593e-7 kg; lognormal variance with pedigree 0.9357, pedigree (1,1,4,1,1)
  (same comment as for Mercury)
- Mercury [water, ground-, long-term]: 1.4027e-7 kg; lognormal variance with pedigree 1.6581, pedigree (1,1,4,1,1)
  (same comment as for Antimony)
- Copper, ion [water, surface water]: 1.0811e-6 kg; lognormal variance with pedigree 1.1985, pedigree (1,1,4,1,1)
  (same comment as for Lead)
- Cadmium [air, urban air close to ground]: 6.0346e-8 kg; lognormal variance with pedigree 0.97248, pedigree (1,1,4,1,1)
  (same comment as for Mercury)
- Manganese [water, ground-, long-term]: 7.5356e-5 kg; lognormal variance with pedigree 1.00457, pedigree (1,1,4,1,1)
  (same comment as for Antimony)
- Mercury [water, surface water]: 3.5542e-9 kg; lognormal variance with pedigree 1.7977, pedigree (1,1,4,1,1)
  (same comment as for Lead)
- Cobalt [air, urban air close to ground]: 4.2127e-8 kg; lognormal variance with pedigree 1.1783, pedigree (1,1,4,1,1)
  (same comment as for Mercury)
- Molybdenum [water, ground-, long-term]: 1.8176e-6 kg; lognormal variance with pedigree 1.465, pedigree (1,1,4,1,1)
  (same comment as for Antimony)
- Manganese [water, surface water]: 4.3076e-9 kg; lognormal variance with pedigree 1.9387, pedigree (1,1,4,1,1)
  (same comment as for Lead)
- Chromium [air, urban air close to ground]: 3.6024e-8 kg; lognormal variance with pedigree 1.00191, pedigree (1,1,4,1,1)
  (same comment as for Mercury)
- Nickel, ion [water, ground-, long-term]: 0.00041559 kg; lognormal variance with pedigree 0.76628, pedigree (1,1,4,1,1)
  (same comment as for Antimony)
- Molybdenum [water, surface water]: 3.9226e-7 kg; lognormal variance with pedigree 0.93994, pedigree (1,1,4,1,1)
  (same comment as for Lead)
- Copper [air, urban air close to ground]: 2.2989e-7 kg; lognormal variance with pedigree 0.27715, pedigree (1,1,4,1,1)
  (same comment as for Mercury)
- Lead [water, ground-, long-term]: 0.0034963 kg; lognormal variance with pedigree 0.5047, pedigree (1,1,4,1,1)
  (same comment as for Antimony)
- Nickel, ion [water, surface water]: 2.7951e-7 kg; lognormal variance with pedigree 1.4065, pedigree (1,1,4,1,1)
  (same comment as for Lead)

## Extrapolations
This dataset has been extrapolated from year 2012 to the year of the calculation (2021). The uncertainty has been adjusted accordingly.
