# treatment of used lorry with refrigeration machine, 16 metric ton

Dataset: EcoSpold 2, unit process
Geography: GLO
Time period: 2010-01-01 to 2021-12-31
Technology level: current
Classification: EcoSpold01Categories: transport systems/road
Classification: ISIC rev.4 ecoinvent: 3830:Materials recovery
Scenario: Business-as-Usual
System model: Allocation, cut-off by classification
Generated by: Tereza Levova
Database: ecoinvent
isCopyrightProtected: true
accessRestrictedTo: 1

## General comment
This dataset represents the treatment of used lorry with refrigeration machine, 16 metric tones.

## Included activities start
The activity starts when the used lorry enters the waste treatment facility. The data on energy needed during dismantling are unknown.

## Included activities end
The activity ends by different waste materials being ready for further treatment.

## Technology
The inventory is created by looking at the material composition of the lorry.

## Reference product
- used lorry with refrigeration machine, 16 metric ton: -1 unit; name RP_amount_1; CPC 39990: Other wastes n.e.c.; By-product classification Waste
  production volume 72000 unit; name RP_PV_1; = 7200+64800
    Calculated value. It is estimated, that the same amount of lorries, with refrigeration unit is treated as is produced every year.
  property price 0 EUR2005; name RP_amount_1_price_EUR2005
    Waste products are assigned a price of zero as they are assumed to require further treatment.
  property carbon content, fossil 0.11389
    Literature value. The weight is the same as in case of used lorry, 16 metric tons.
  property carbon content, non-fossil 0.0012201
    Literature value. The weight is the same as in case of used lorry, 16 metric tons.
  property carbon content 0.11511
    carbon content on a dry matter basis (reserved; not for manual entry)
  properties: water content 0, water in wet mass 0 kg, wet mass 6800 kg, dry mass 6800 kg, carbon allocation 782.749 kg

## By-products
- iron scrap, unsorted: 0 kg; CPC 39310: Slag, dross, scalings and other waste from the manufacture of iron or steel; By-product classification Recyclable
  Calculated value based on knowledge of material composition of the lorry with refrigeration machine, 16 metric tons.
  production volume 0 kg; = ABS(RP_PV_1 * (BP_amount_6 / RP_amount_1))
    Calculated from production volume of reference product using the relative outputs.
  property price 0.149 EUR2005
    Temporary price data. Calculated as 90% of purchasers price based on: estimated at 85% of sorted scrap
  property carbon content 0
    carbon content on a dry matter basis (reserved; not for manual entry)
  properties: carbon content, fossil 0, water in wet mass 0 kg, wet mass 1 kg, dry mass 1 kg, water content 0, carbon content, non-fossil 0, carbon allocation 0 kg

## Inputs from technosphere
- scrap aluminium: 0 kg; name BP_amount_10
  (same comment as for iron scrap, unsorted)
  production volume 0 kg
    Calculated from production volume of reference product using the relative outputs.
  property price 0 EUR2005; name BP_amount_10_price_EUR2005
  properties: wet mass 1 kg, dry mass 1 kg
- waste polypropylene: 0 kg; name BP_amount_11
  (same comment as for iron scrap, unsorted)
  production volume 0 kg
    Calculated from production volume of reference product using the relative outputs.
  property price 0 EUR2005; name BP_amount_11_price_EUR2005
  properties: water content 0.189061, carbon content, fossil 0.825208, dry mass 0.841 kg, heating value, net 32.78 MJ, wet mass 1 kg
  note on heating value, net: Value assumed for all polypropylene products. Source: Phyllis2, database for (treated) biomass, algae, feedstocks for biogas production and biochar, https://phyllis.nl/Biomass/View/1186, ECN.TNO
- waste polyurethane foam: 0 kg; name BP_amount_12
  (same comment as for iron scrap, unsorted)
  production volume 0 kg
    Calculated from production volume of reference product using the relative outputs.
  property price 0 EUR2005; name BP_amount_12_price_EUR2005
  properties: carbon content, fossil 0.641283, water content 0.00200401, wet mass 1 kg, dry mass 0.998 kg, heating value, net 30.67 MJ
- waste emulsion paint: 0 kg; name BP_amount_1
  (same comment as for iron scrap, unsorted)
  production volume 0 kg
    Calculated from production volume of reference product using the relative outputs.
  property price 0 EUR2005; name BP_amount_1_price_EUR2005
  properties: carbon content, fossil 0.27, wet mass 1 kg, dry mass 1 kg, heating value, net 8.18 MJ
  note on carbon content, fossil: Tab A.4, ecoinvent v2.2 report 13_I. C content has been calculated after data in the tables, and then referred to 1 kg DM
- waste electric and electronic equipment: -30 kg; name BP_amount_2
  (same comment as for iron scrap, unsorted)
  production volume 2.16e6 kg; = ABS(RP_PV_1 * (BP_amount_2 / RP_amount_1))
    Calculated from production volume of reference product using the relative outputs.
  property price 0 EUR2005; name BP_amount_2_price_EUR2005
  properties: carbon content, non-fossil 0.000485011, dry mass 1 kg, carbon content, fossil 0.0877555, wet mass 1 kg
- waste rubber, unspecified: 0 kg; name BP_amount_3
  (same comment as for iron scrap, unsorted)
  production volume 0 kg
    Calculated from production volume of reference product using the relative outputs.
  property price 0 EUR2005; name BP_amount_3_price_EUR2005
  properties: dry mass 1 kg, wet mass 1 kg, carbon content, fossil 0.853, heating value, net 27.19 MJ
  note on heating value, net: Value taken from the general comment of the treatment dataset.
- waste plastic, mixture: 0 kg; name BP_amount_4
  (same comment as for iron scrap, unsorted)
  production volume 0 kg
    Calculated from production volume of reference product using the relative outputs.
  property price 0 EUR2005; name BP_amount_4_price_EUR2005
  properties: wet mass 1 kg, carbon content, fossil 0.747344, heating value, net 30.79 MJ, water content 0.180638, dry mass 0.847 kg
- waste polyethylene: 0 kg; name BP_amount_5
  (same comment as for iron scrap, unsorted)
  production volume 0 kg
    Calculated from production volume of reference product using the relative outputs.
  property price 0 EUR2005; name BP_amount_5_price_EUR2005
  properties: heating value, net 42.47 MJ, dry mass 0.996 kg, wet mass 1 kg, water content 0.00401606, carbon content, fossil 0.825301
  note on carbon content, fossil: C content in 1 kg DM was calculated using data in Tab A.1, ecoinvent v2.2 report 13_I
- waste glass: 0 kg; name BP_amount_7
  (same comment as for iron scrap, unsorted)
  production volume 0 kg
    Calculated from production volume of reference product using the relative outputs.
  property price 0 EUR2005; name BP_amount_7_price_EUR2005
  properties: heating value, net 0.05 MJ, wet mass 1 kg, dry mass 1 kg
  note on heating value, net: Value extracted from "treatment of waste glass, open dump, very wet infiltration class (1000mm)"
- scrap steel: 0 kg; name BP_amount_8
  (same comment as for iron scrap, unsorted)
  production volume 0 kg
    Calculated from production volume of reference product using the relative outputs.
  property price 0 EUR2005; name BP_amount_8_price_EUR2005
  properties: wet mass 1 kg, dry mass 1 kg
- scrap copper: 0 kg; name BP_amount_9
  (same comment as for iron scrap, unsorted)
  production volume 0 kg
    Calculated from production volume of reference product using the relative outputs.
  property price 0 EUR2005; name BP_amount_9_price_EUR2005
  properties: wet mass 1 kg, dry mass 1 kg
- iron scrap, unsorted: -3080 kg
  (same comment as for iron scrap, unsorted)
  production volume 2.2176e8 kg
  properties: price 0.149 EUR2005, wet mass 1 kg, dry mass 1 kg
- scrap aluminium: -68.1997, -3.19977, -143.601 kg (3 entries)
  (same comment as for iron scrap, unsorted)
  production volume 1.548e7 kg
- waste polypropylene: -9.86423, -0.760474, -0.314103, -0.29827, -11.3816, -0.126894, -0.0575134, -79.6775 kg (8 entries)
  (same comment as for iron scrap, unsorted)
  production volume 7.3786e6 kg
- waste polyurethane foam: -0.152816, -194.823 kg (2 entries)
  (same comment as for iron scrap, unsorted)
  production volume 1.40383e7 kg
- waste emulsion paint: -3.44567, -0.00108149, -36.5533 kg (3 entries)
  (same comment as for iron scrap, unsorted)
  production volume 2.88e6 kg
- waste rubber, unspecified: -183.645, -7.7094, -183.645 kg (3 entries)
  (same comment as for iron scrap, unsorted)
  production volume 2.7e7 kg
- waste plastic, mixture: -0.962547, -0.0742067, -0.03065, -0.0291051, -1.11061, -0.0123823, -0.00561213, -7.77489 kg (8 entries)
  (same comment as for iron scrap, unsorted)
  production volume 720000 kg
- waste polyethylene: -22.1386, -1.70675, -0.704951, -0.669416, -25.544, -0.284792, -0.129079, -178.822 kg (8 entries)
  (same comment as for iron scrap, unsorted)
  production volume 1.656e7 kg
- waste glass: -6.85032, -0.332387, -0.0310113, -0.138764, -3.60633, -0.0470923, -0.00754075, -33.9866 kg (8 entries)
  (same comment as for iron scrap, unsorted)
  production volume 3.24e6 kg
- scrap steel: -554.292, -0.702269, -1721.41 kg (3 entries)
  (same comment as for iron scrap, unsorted)
  production volume 1.63901e8 kg
- scrap copper: -19.0325, -0.892962, -40.0746 kg (3 entries)
  (same comment as for iron scrap, unsorted)
  production volume 4.32e6 kg

## Extrapolations
This dataset has been extrapolated from year 2014 to the year of the calculation (2021). The uncertainty has been adjusted accordingly.

## Review by Gabor Doka 2014-12-19
passed
