# treatment of used toner module, laser printer, black/white, recycling

Dataset: EcoSpold 2, unit process
Geography: RoW
Time period: 2002-01-01 to 2021-12-31
Technology level: current
Classification: EcoSpold01Categories: electronics/module
Classification: ISIC rev.4 ecoinvent: 2817:Manufacture of office machinery and equipment (except computers and periphe
Synonyms: OEM cartridge; toner cartridge
Scenario: Business-as-Usual
System model: Allocation, cut-off by classification
Generated by: Tereza Levova
Published in: Hischier R. 2007
Database: ecoinvent
isCopyrightProtected: false
accessRestrictedTo: 1

## General comment
This dataset relates to the mass of black toner actually printed on paper. It assumes two use cycles, i.e. one as a OEM cartridge and a subsequent as remanufactured virgin core. It is to be used to reflect black toner use in both monochrome (b/w) and colour (black pigment) laser printer systems for cartridges with a capacity of 5000 sheets and a weight of env. 1 kg including toner.
[This dataset is meant to replace the following datasets:
- treatment of used toner cartridge, black/white, remanufacturing for laser printer, including 50% new toner modules, GLO, 2002 - 2005]

## Included activities start
From reception of the toner at the disposal

## Included activities end
Includes the initial OEM cartridge, the remanufacturing and disposal of spare parts and spare toner and the final disposal of the cartridge. No emissions due to printing contained.

## Geography
European Electricity mix and material processing data for supplier outside Europe.

## Technology
Replacement of spare parts, assembly of semifinished components. After fulfilling the first use cycle toner cartridges are returned to remanufacturing sites, where they are refilled and refurbished. Some of the empty cartridges (“empties” or “core”) are sorted out and disposed. While this can be perceived as average failure rate, the cartridge’s life cycle also can be thought of as a number of subsequent refurbishment cycles. Cartridges are remanufactured by specialised companies. They reuse the cores of original equip-ment manufacturers (OEMs) and refurbish it with replacement parts from different suppliers and refill it with toner.
The first step in any remanufacturing process is obtaining the empty cartridge (“core”). At least 70 percent of first remanufacturing cycle cores is abandoned. Next, the remanufacturer must disassemble the cartridge. Disassembling a HP 96A is a multistep process that requires the removal of sensitive components such as the OPC drum. After completing the desired degree of disassembly, components can be checked to determine their suitability for reuse. The com-ponent performance in a second (and additional) cycle is again impaired and the failure rate rises. Not all of the toner powder is fixed on the paper, the rest is collected returned to remanufacturing together with the cartridge where it is prepared, sieved and reused.

## Reference product
- used toner module, laser printer, black/white: 0 kg; CPC 39990: Other wastes n.e.c.; By-product classification Recyclable
  After fulfilling the first use cycle toner cartridges are returned to remanufacturing sites, where they are refilled and refurbished. Some of the empty cartridges ("empties" or "core") are sorted out and disposed. While this can be perceived as average failure rate, the cartridge’s life cycle also can be thought of as a number of subsequent refurbishment cycles
  production volume 0 kg; name used_toner_RP_PV; = 6.6236E+08*0.3
    6.6236E+08kg of used toner module is the calculated production volume during "operation, printer, laser, black/white, per kg printed paper". It is assumed that 30% of this amount goes actually for refurbishment.
  properties: price 0 EUR2005
- toner module, laser printer, black/white: 1 unit; name BP_amount_2; By-product classification allocatable product; CPC 44922: Parts for the goods of subclasses 44914, 44917 and 45150; pedigree (1,1,1,1,1)
  Calculated value based on literature. The weight of one toner module, laser printer, black/white is assumed to be 0.88 kg (based on ecoinvent v2 report no. 18 II., pg. 200). Further it is assumed that the toner module is recycled (re-manufactured) twice.
  production volume 8.95113e7 unit; = ABS(used_toner_RP_PV * (BP_amount_2 / used_toner_RP))
  properties: water content 0, carbon content, fossil 0.510352, dry mass 1.14 kg, water in wet mass 0 kg, price 121 EUR2005, carbon content, non-fossil 0, wet mass 1.14 kg, carbon content 0.510352, carbon allocation 0.581801 kg

## By-products
- toner module, laser printer, black/white: 0 unit; By-product classification allocatable product; CPC 44922: Parts for the goods of subclasses 44914, 44917 and 45150; pedigree (1,1,1,1,1)
  (same comment as for toner module, laser printer, black/white)
  production volume 0 unit; = ABS(used_toner_RP_PV * (BP_amount_2 / used_toner_RP))
    Calculated from production volume of reference product using the relative outputs.
  property carbon content, fossil 0.510352
    C content was calculated as the addition of C content in the components
  property price 121 EUR2005
    Temporary price data. Calculated as 90% of purchasers price based on: Calculated for 5000 pages printed at 0.045 USD/page (source for ink-per-page-price is a study by QualityLogic: http://www.qualitylogic.com/tuneup/uploads/docfiles/QualityLogic-Cost-of-Ink-Per-Page-Analysis-United-States-Januar-2008.pdf)
  property carbon content, non-fossil 0
    C content was calculated as the addition of C content in the components
  property carbon content 0.510352
    carbon content on a dry matter basis (reserved; not for manual entry)
  properties: water content 0, dry mass 1.14 kg, water in wet mass 0 kg, wet mass 1.14 kg, carbon allocation 0.581801 kg
- waste paperboard, unsorted: 0 kg; By-product classification Recyclable; CPC 39240: Waste and scrap of paper or paperboard; pedigree (1,1,1,1,1)
  Estimation based on own assumptions.
  EcoSpold01Location=CH
  production volume 0 kg; = BP_amount_5/ABS( used_toner_RP)* used_toner_RP_PV
    Calculated from the production volume of used toner cartridge, black/white in proportion to the respective output amounts.
  property price 0.03924 EUR2005; name BP_amount_5_price_EUR2005
    Temporary price data. Calculated as 90% of purchasers price based on: Assumed to be 10% less than for sorted waste paperboard
  property carbon content, non-fossil 0.483259
    C content was calculated for 1 kg DM, using data in Tab A.3, ecoinvent v2.2 report 13_I.
  property carbon content 0.483259
    carbon content on a dry matter basis (reserved; not for manual entry)
  properties: dry mass 0.804 kg, water in wet mass 0.196 kg, water content 0.243781, wet mass 1 kg, carbon content, fossil 0, heating value, net 15.92 MJ, carbon allocation 0.38854 kg

## Inputs from technosphere
- polyethylene, low density, granulate: 0.108165 kg; lognormal variance with pedigree 0.044, pedigree (1,4,5,5,1)
  Estimation based on literature.
  EcoSpold01Location=RER
  properties: wet mass 1 kg, dry mass 1 kg, carbon content, fossil 0.857143, heating value, net 42.47 MJ
  note on carbon content, fossil: Polyethylene is formed out of a huge amount of ethylene monomers (C2H4) (ecoinvent v2.2 report 11_II). MW=28 g/mol
- polypropylene, granulate: 0.0255353 kg; lognormal variance with pedigree 0.0626, pedigree (2,4,5,5,3)
  Estimation based on literature.
  EcoSpold01Location=RER
  properties: heating value, net 32.78 MJ, wet mass 1 kg, dry mass 1 kg, carbon content, fossil 0.857143
  note on heating value, net: Value extracted from "treatment of waste polypropylene, open burning"
  note on carbon content, fossil: Polypropylene is formed by the polymerisation of propylene, C3H6 (ecoinvent v2.2 report 11_II)
- extrusion, plastic film: 0.093985 kg; lognormal variance with pedigree 0.044, pedigree (1,4,5,5,1)
  EcoSpold01Location=RER
  Estimation based on own assumptions.
- steel, low-alloyed: 0.17591 kg; lognormal variance with pedigree 0.0626, pedigree (2,4,5,5,3)
  Estimation based on literature.
  EcoSpold01Location=RER
  properties: wet mass 1 kg, dry mass 1 kg, carbon content, fossil 0.005
  note on carbon content, fossil: Low alloyed steel composition given in Tab. 3.2 ecoinvent v2.2 report 10_partII. Steel assumed to have a C content of 0.5%
- aluminium, wrought alloy: 0.229816 kg; lognormal variance with pedigree 0.0626, pedigree (2,4,5,5,3)
  EcoSpold01Location=RER
  Estimation based on literature.
  properties: wet mass 1 kg, dry mass 1 kg
- waste polyethylene: 0 kg; name BP_amount_4; pedigree (1,1,1,1,1)
  EcoSpold01Location=CH
  Estimation based on own assumptions.
  production volume 0 kg
    (same comment as for waste paperboard, unsorted)
  property price 0 EUR2005; name BP_amount_4_price_EUR2005
  properties: water content 0.00401606, dry mass 0.996 kg, heating value, net 42.47 MJ, wet mass 1 kg, carbon content, fossil 0.825301
  note on heating value, net: Value taken from the general comment of the treatment dataset.
  note on carbon content, fossil: C content in 1 kg DM was calculated using data in Tab A.1, ecoinvent v2.2 report 13_I
- section bar extrusion, aluminium: 0.229816 kg; lognormal variance with pedigree 0.07, pedigree (4,4,5,5,3)
  EcoSpold01Location=RER
  Estimation based on own assumptions.
- waste polystyrene: 0 kg; name BP_amount_1; pedigree (1,1,1,1,1)
  Estimation based on own assumptions.
  EcoSpold01Location=CH
  production volume 0 kg
    (same comment as for waste paperboard, unsorted)
  property price 0 EUR2005; name BP_amount_1_price_EUR2005
  properties: heating value, net 38.67 MJ, wet mass 1 kg, water content 0.00200401, dry mass 0.998 kg, carbon content, fossil 0.922579
- toner, black, powder: 0.456457 kg; lognormal variance with pedigree 0.052, pedigree (1,1,5,5,1)
  EcoSpold01Location=GLO
  Estimation based on literature. LogNormal distribution [0.4, 0.5, 0.6] extends over 33%
  properties: wet mass 1 kg, heating value, net 20.38 MJ, carbon content, fossil 0.672563, dry mass 1 kg
  note on carbon content, fossil: black toner powder with the composition 5% Carbon Black, 18% Magnetite, 70% Binder Resin, the rest being organic and inorganic additives (dataset)
- acrylonitrile-butadiene-styrene copolymer: 0.209953 kg; lognormal variance with pedigree 0.0626, pedigree (2,4,5,5,3)
  Estimation based on literature.
  EcoSpold01Location=RER
  properties: heating value, net 35.58 MJ, carbon content, fossil 0.853081, wet mass 1 kg, dry mass 1 kg
  note on carbon content, fossil: ABS is the abbreviation originating from its monomers acrylonitrile, butadiene and styrene. It was assumed that every monomer was present in the same proportion, so the basic ABS monomer was considered (C8H8·C4H6·C3H3N), and the MW=104+54+53=211 g/mol
- sheet rolling, steel: 0.17591 kg; lognormal variance with pedigree 0.0626, pedigree (2,4,5,5,3)
  EcoSpold01Location=RER
  Estimation based on own assumptions.
- building, hall: 1.82745e-5 m2; lognormal variance with pedigree 0.132, pedigree (4,4,5,5,4)
  EcoSpold01Location=CH
  Estimation based on own assumptions and internet.
- corrugated board box: 0 kg; pedigree (1,1,1,1,1)
  Literature Value.
  EcoSpold01Location=RER
  properties: dry mass 0.945 kg, water content 0.0582011, wet mass 1 kg, carbon content, non-fossil 0.433862, heating value, net 12.86 MJ, carbon content, fossil 0.000486772
  note on carbon content, non-fossil: Biogenic C content was calculated after biogenic C contents of chemicals used in the production of board (Tab 10.15 & 10.16, ecoinvent v2.2 report 11_III, part 10).
  note on carbon content, fossil: Fossil C content was calculated after fossil C contents of chemicals used in the production of board (Tab 10-15 & 10.16 ecoinvent v2.2 report 11_III, part 10)
- injection moulding: 0.249679 kg; lognormal variance with pedigree 0.07, pedigree (4,4,5,5,3)
  EcoSpold01Location=RER
  Estimation based on own assumptions.
- electricity, medium voltage: 0 kWh; pedigree (1,1,1,1,1)
  Estimation based on own assumptions.
  EcoSpold01Location=UCTE
- waste plastic, industrial electronics: -0.249679 kg; name BP_amount_3; lognormal variance with pedigree 0.062, pedigree (4,4,5,5,1)
  Estimation based on own assumptions.
  EcoSpold01Location=CH
  production volume 2.23491e7 kg; = BP_amount_3/ABS( used_toner_RP)* used_toner_RP_PV
    (same comment as for waste paperboard, unsorted)
  property price 0 EUR2005; name BP_amount_3_price_EUR2005
  properties: water content 0.180638, wet mass 1 kg, carbon content, fossil 0.81386, dry mass 0.847 kg, heating value, net 34.78 MJ
  note on carbon content, fossil: C content in 1 kg DM was calculated using data in Tab A.2, ecoinvent v2.2 report 13_I
- used toner module, laser printer, black/white: 1.65414 kg
  (same comment as for used toner module, laser printer, black/white)
  production volume 1.48064e8 kg
- waste paperboard, unsorted: -1.51877 kg; lognormal variance with pedigree 0.062, pedigree (4,4,5,5,1)
  Estimation based on own assumptions.
  EcoSpold01Location=CH
  production volume 1.35947e8 kg
  properties: dry mass 0.804 kg, water content 0.243781, wet mass 1 kg, carbon content, non-fossil 0.483259, heating value, net 15.92 MJ
  note on carbon content, non-fossil: C content was calculated for 1 kg DM, using data in Tab A.3, ecoinvent v2.2 report 13_I.
- waste polyethylene: -0.0230996, -0.00154342, -0.000116727, -0.00063749, -0.000257539, -0.000605356, -0.16171 kg (7 entries); lognormal variance with pedigree 0.062, pedigree (4,4,5,5,1)
  EcoSpold01Location=CH
  Estimation based on own assumptions.
  production volume 1.68254e7 kg
- waste polystyrene: -0.0988975, -0.00660795, -0.000499748, -0.00272932, -0.00110261, -0.00259174, -0.692337 kg (7 entries); lognormal variance with pedigree 0.062, pedigree (4,4,5,5,1)
  Estimation based on own assumptions.
  EcoSpold01Location=CH
  production volume 7.20357e7 kg
- corrugated board box: 0.00883481, 0.750549 kg (2 entries); lognormal variance with pedigree 0.044, pedigree (1,4,5,5,1)
  Literature Value.
  EcoSpold01Location=RER
- electricity, medium voltage: 0.187917, 0.0360344, 0.604943, 8.79836, 1.24013, 4.04054 kWh (6 entries); lognormal variance with pedigree 0.38, pedigree (4,4,5,5,3)
  Estimation based on own assumptions.
  EcoSpold01Location=UCTE

## Sampling procedure
Literature

## Extrapolations
see Geography and Technology This dataset has been copied from an original dataset covering the geography RER. The uncertainty has been adjusted accordingly.
