# maintenance, train, passenger, regional

Dataset: EcoSpold 2, unit process
Geography: RoW
Time period: 1993-01-01 to 2021-12-31
Technology level: current
Classification: EcoSpold01Categories: transport systems/train
Classification: ISIC rev.4 ecoinvent: 3315:Repair of transport equipment, except motor vehicles
Tags: ConvertedDataset
Scenario: Business-as-Usual
System model: Allocation, cut-off by classification
Generated by: Michael Spielmann (obsolete)
Published in: Spielmann M. 2004
Database: ecoinvent
isCopyrightProtected: true
accessRestrictedTo: 1

## General comment
The life span of the train is assumed to be 40 years resulting in a life time performance of 6’000’000 vkm. Total weight of the train is about 171t.
[This dataset was already contained in the ecoinvent database version 2. It was not individually updated during the transfer to ecoinvent version 3. Life Cycle Impact Assessment results may still have changed, as they are affected by changes in the supply chain, i.e. in other datasets. This dataset was generated following the ecoinvent quality guidelines for version 2. It may have been subject to central changes described in the ecoinvent version 3 change report (http://www.ecoinvent.org/database/ecoinvent-version-3/reports-of-changes/), and the results of the central updates were reviewed extensively. The changes added e.g. consistent water flows and other information throughout the database. The documentation of this dataset can be found in the ecoinvent reports of version 2, which are still available via the ecoinvent website. The change report linked above covers all central changes that were made during the conversion process.]

## Included activities end
This inventory includes expenditures for one major revision as well as a regular substitution of break shoes (40 kg break shoes/car). Also, the disposal of wood, glass and plastics is addressed. Land use and material expenditures due to buildings of service garages are not included.

## Geography
Data represents a train maintenance in Switzerland.

## Parameters
- fraction, tap water, to air: 0.15 dimensionless; name fraction_TW_to_air; lognormal variance with pedigree 0.092025, pedigree (4,4,3,2,4)
- fraction, process water, to air: 0.15 dimensionless; name fraction_PW_to_air; lognormal variance with pedigree 0.092025, pedigree (4,4,3,2,4)

## Reference product
- maintenance, train, passenger, regional: 1 unit; CPC 87149: Maintenance and repair services of other transport equipment; By-product classification allocatable product
  EcoSpold01Location=CH
  production volume 3.96633 unit
    This is a placeholder value that does not reflect real-world production volumes. This dataset does not currently require a real-world production volume to work in the database framework, and no actual data were collected yet. This has no negative effect on the results of the ecoinvent database.
  property price 29037.3 EUR2005
    Calculated based on inputs: The price of the product has been calculated as a sum of the values of the material and energy inputs for this product. This value is therefore a rough estimation. It may underestimate the real price since there are additional expenses when producing any product. These expences can include for example labour costs, treatment of waste materials and profit for the producer. Please consider carefully whether this level of data quality is acceptable for your application.

## Inputs from technosphere
- waste wood, untreated: 0 kg; pedigree (1,1,1,1,1)
  EcoSpold01Location=CH
  Own assumptions based on the new input
  Uncertainty: own assumptions based on the new input
  production volume 0 kg
    Calculated from the production volume of maintenance, train, passenger, regional in proportion to the respective output amounts.
  properties: carbon content, non-fossil 0.48632, dry mass 0.8 kg, wet mass 1 kg, water content 0.25, heating value, net 13.99 MJ
  note on carbon content, non-fossil: Tab A.4, ecoinvent v2.2 report 13_I. C content has been referred to 1 kg DM,
  note on heating value, net: Value taken from the general comment of the treatment dataset.
- lubricating oil: 125 kg; lognormal variance with pedigree 0.0606, pedigree (4,3,5,5,1)
  Literature studies; estimate based on ICE maintenance figures (assuming 25% of the ICE expenditures).
  EcoSpold01Location=RER
  Uncertainty: literature studies; estimate based on ICE maintenance figures (assuming 25% of the ICE expenditures).
  properties: carbon content, fossil 0.75, wet mass 1 kg, dry mass 1 kg, heating value, net 40.2 MJ
  note on carbon content, fossil: Lubricating oil is produced from diesel. C-content/dry mass of fats and oils considered 75%, from: ecoinvent v2.2 report, n 15a, pg 40
  note on heating value, net: Literature value, Source: IPCC 2006, 2006 IPCC Guidelines for National Greenhouse Gas Inventories, Prepared by the National Greenhouse Gas Inventories Programme, Eggleston H.S., Buendia L., Miwa K., Ngara T. and Tanabe K. (eds). Published: IGES, Japan
- flat glass, uncoated: 660 kg; lognormal variance with pedigree 0.0607, pedigree (2,2,5,5,3)
  EcoSpold01Location=RER
  Literature studies
  Uncertainty: literature studies
  properties: dry mass 1 kg, wet mass 1 kg
- glued laminated timber, average glue mix: 0 m3; pedigree (1,1,1,1,1)
  EcoSpold01Location=RER
  Literature studies
  Uncertainty: literature studies
  properties: water content 0.0979228, dry mass 404.4 kg, heating value, net 5537.41 MJ, wet mass 444 kg, carbon content, fossil 0.01791, carbon content, non-fossil 0.441932, price 298 EUR2005
- heat, district or industrial, natural gas: 0 MJ; pedigree (1,1,1,1,1)
  EcoSpold01Location=RER
  Literature studies; rough estimate (basic uncertainty =2)
  Uncertainty: literature studies; rough estimate (basic uncertainty =2)
  properties: heating value, net 1 MJ
- pitch: 0 kg; pedigree (1,1,1,1,1)
  EcoSpold01Location=CH
  Literature studies
  Uncertainty: literature studies
  properties: carbon content, fossil 0.83, dry mass 1 kg, wet mass 1 kg, heating value, net 28 MJ
- paper, woodfree, uncoated: 20700 kg; lognormal variance with pedigree 0.0606, pedigree (4,3,5,5,1)
  (same comment as for lubricating oil)
  properties: water content 0.0582011, carbon content, non-fossil 0.281215, dry mass 0.945 kg, carbon content, fossil 0.0251406, wet mass 1 kg, heating value, net 14.11 MJ
  note on carbon content, non-fossil: Biogenic C content was calculated after biogenic C contents of chemicals used in the production of the paper (in Tab 8.54 & 8.55 ecoinvent v2.2 report 11_III, part 8). The cellulose content in 1 kg of paper (on a wet mas basis) was estimated as (1-chemical content), C content of cellulose was considered 0.44 kgC/kg dry mass (ecoinvent v2.2 report, n 15a, pg 40)
  note on carbon content, fossil: Fossil C content was calculated after fossil C contents of chemicals used in the production of the paper (in Tab 8.54 & 8.55 ecoinvent v2.2 report 11_III, part 8).
- aluminium, cast alloy: 106.24 kg; lognormal variance with pedigree 0.0607, pedigree (2,2,5,5,3)
  Literature studies
  EcoSpold01Location=RER
  Uncertainty: literature studies
  properties: dry mass 1 kg, wet mass 1 kg
- waste glass: 0 kg; pedigree (1,1,1,1,1)
  (same comment as for waste wood, untreated)
  production volume 0 kg
    (same comment as for waste wood, untreated)
  properties: heating value, net 0.05 MJ, dry mass 1 kg, wet mass 1 kg
  note on heating value, net: Value extracted from "treatment of waste glass, open dump, very wet infiltration class (1000mm)"
- solvent, organic: 125 kg; lognormal variance with pedigree 0.0607, pedigree (2,2,5,5,3)
  EcoSpold01Location=GLO
  Literature studies; estimate based on ICE maintenance figures (assuming 25% of the ICE expenditures).
  Uncertainty: literature studies; estimate based on ICE maintenance figures (assuming 25% of the ICE expenditures).
  properties: heating value, net 19.11 MJ, wet mass 1 kg, dry mass 1 kg, carbon content, fossil 0.63072
  note on carbon content, fossil: Mixture of 15 of the most often used solvents (list in ecoinvent v2.2 report 11-III, pg 293). C content was calculated as an unweighted average of C content of the different solvents
- waste emulsion paint: 0 kg; pedigree (1,1,1,1,1)
  EcoSpold01Location=CH
  Literature studies
  Uncertainty: literature studies
  production volume 0 kg
    (same comment as for waste wood, untreated)
  properties: wet mass 1 kg, dry mass 1 kg, carbon content, fossil 0.27, heating value, net 8.18 MJ
  note on carbon content, fossil: Tab A.4, ecoinvent v2.2 report 13_I. C content has been calculated after data in the tables, and then referred to 1 kg DM
- polyethylene, high density, granulate: 1970 kg; lognormal variance with pedigree 0.0607, pedigree (2,2,5,5,3)
  EcoSpold01Location=RER
  Literature studies
  Uncertainty: literature studies
  properties: wet mass 1 kg, heating value, net 42.47 MJ, dry mass 1 kg, carbon content, fossil 0.857143
  note on carbon content, fossil: Polyethylene is formed out of a huge amount of ethylene monomers (C2H4) (ecoinvent v2.2 report 11_II). MW=28 g/mol
- electricity, medium voltage: 0 kWh; pedigree (1,1,1,1,1)
  EcoSpold01Location=CH
  Literature studies; rough estimate (basic uncertainty =2)
  Uncertainty: literature studies; rough estimate (basic uncertainty =2)
- lead: 203 kg; lognormal variance with pedigree 0.0607, pedigree (2,2,5,5,3)
  EcoSpold01Location=RER
  Literature studies
  Uncertainty: literature studies
  properties: dry mass 1 kg, wet mass 1 kg
- wastewater, average: 0 m3; pedigree (1,1,1,1,1)
  EcoSpold01Location=CH
  Literature studies; estimate based on ICE maintenance figures (assuming 25% of the ICE expenditures).
  Uncertainty: literature studies; estimate based on ICE maintenance figures (assuming 25% of the ICE expenditures).
  production volume 0 m3
    (same comment as for waste wood, untreated)
  properties: water content 2882.2, carbon content, non-fossil 0.194039, dry mass 0.346837 kg, wet mass 1000 kg
  note on carbon content, non-fossil: 0.0673 kg TOC/m3 (Tab A.17, ecoinvent v2.2 report 13_I). TOC was considered as Total Carbon.
- heat, district or industrial, other than natural gas: 0 MJ; pedigree (1,1,1,1,1)
  (same comment as for electricity, medium voltage)
  properties: heating value, net 1 MJ
- stone wool, packed: 81.2 kg; lognormal variance with pedigree 0.0607, pedigree (2,2,5,5,3)
  Literature studies
  EcoSpold01Location=CH
  Uncertainty: literature studies
  properties: carbon content, fossil 0.015401, dry mass 1 kg, wet mass 1 kg
  note on carbon content, fossil: The chemical composition of the glass fibres used in the rock wool production is similar to the composition of naturally cooled volcano basalt and has a composition listed in Tab. 3.1 and 3.2 in ecoinvent v2.2 report 16, part XIV. Rock wool contains: a minimum of 96% mineral fibres,between 0.5 and 3.0 weight percent of phenolic resin depending on the specific product characteristics, and about 0.2 percent mineral oil (ecoinvent v2.2 report 16, part XIV). An average composition of 1.8% phenolic resin, 0.2% mineral oil, and 98% mineral fibres has been assumed and used to calculate C content of the rock wool
- alkyd paint, white, without solvent, in 60% solution state: 155 kg; lognormal variance with pedigree 0.0607, pedigree (2,2,5,5,3)
  EcoSpold01Location=RER
  Literature studies
  Uncertainty: literature studies
  properties: wet mass 1 kg, carbon content, non-fossil 0.199629, dry mass 1 kg, heating value, net 10.3 MJ, carbon content, fossil 0.140367
  note on carbon content, non-fossil: C content was calculated as an addition of C content in the raw materials.
- synthetic rubber: 1020 kg; lognormal variance with pedigree 0.0607, pedigree (2,2,5,5,3)
  Literature studies
  EcoSpold01Location=RER
  Uncertainty: literature studies
  properties: wet mass 1 kg, dry mass 1 kg, heating value, net 26.42 MJ, carbon content, fossil 0.871949
  note on carbon content, fossil: EPDM (Ethylene-propene-diene terpolymer) rubber is a terpolymer of ethylene, propene, and a diene with the residual unsaturated portion of the diene in the side chain (ecoinvent v2.2 report 7-part XX & Ullmann). Chemical formula (deduced from Evidences of Solvent-Induced Miscibility in Polychloroprene-co-Ethylene-Propene Diene Terpolymer Blends, Dubey et al., Journal of Applied Polymer Science, 2009, 111:1884–1891): C20H35
- tap water: 0 kg; name tap_water_input; pedigree (1,1,1,1,1)
  Literature value from Maibach (1999).
  EcoSpold01Location=CH
  Uncertainty: literature studies; estimate based on ICE maintenance figures (assuming 25% of the ICE expenditures).
  properties: water content 2962.17, carbon content, fossil 0.00178991, dry mass 0.000337476 kg, wet mass 1 kg
  note on carbon content, fossil: Bicarbonate content is 2.93 mol/m3. CO2 content is 0.1 mol/m3 (ecoinvent v2.2 report 8, Tab 93.1).
- aluminium, wrought alloy: 225.76 kg; lognormal variance with pedigree 0.0607, pedigree (2,2,5,5,3)
  EcoSpold01Location=RER
  Literature studies
  Uncertainty: literature studies
  properties: dry mass 1 kg, wet mass 1 kg
- waste plastic, mixture: 0 kg; pedigree (1,1,1,1,1)
  (same comment as for waste wood, untreated)
  production volume 0 kg
    (same comment as for waste wood, untreated)
  properties: water content 0.180638, carbon content, fossil 0.747344, wet mass 1 kg, dry mass 0.847 kg, heating value, net 30.79 MJ
  note on carbon content, fossil: C content in 1 kg DM was calculated using data in Tab A.2, ecoinvent v2.2 report 13_I
- reinforcing steel: 5000 kg; lognormal variance with pedigree 0.0607, pedigree (2,2,5,5,3)
  Literature studies
  EcoSpold01Location=RER
  Uncertainty: literature studies
  properties: carbon content, fossil 0.004, dry mass 1 kg, wet mass 1 kg
- waste wood, untreated: -38.4383, -4.7727, -0.348938, -13.4051, -2.02518, -3.20164, -59.8489, -509.959 kg (8 entries); lognormal variance with pedigree 0.0607, pedigree (2,2,5,5,3)
  (same comment as for waste wood, untreated)
  production volume 1896 kg
- glued laminated timber, average glue mix: 0.27876, 0.60524 m3 (2 entries); lognormal variance with pedigree 0.0607, pedigree (2,2,5,5,3)
  EcoSpold01Location=RER
  Literature studies
  Uncertainty: literature studies
- heat, district or industrial, natural gas: 1084.08, 25976.6, 70339.3 MJ (3 entries); lognormal variance with pedigree 0.1807, pedigree (2,2,5,5,3)
  (same comment as for heat, district or industrial, natural gas)
- pitch: 17.1918, 0.979793, 56.9697, 44.3452, 1.98774, 2.83768, 250.688 kg (7 entries); lognormal variance with pedigree 0.0607, pedigree (2,2,5,5,3)
  EcoSpold01Location=CH
  Literature studies
  Uncertainty: literature studies
- waste glass: -52.973, -4.88241, -0.110765, -0.455522, -0.691735, -2.03829, -99.6229, -499.225 kg (8 entries); lognormal variance with pedigree 0.0607, pedigree (2,2,5,5,3)
  (same comment as for waste wood, untreated)
  production volume 1980 kg
- waste emulsion paint: -1.1974, -12.7026 kg (2 entries); lognormal variance with pedigree 0.0607, pedigree (2,2,5,5,3)
  EcoSpold01Location=CH
  Literature studies
  Uncertainty: literature studies
  production volume 41.7 kg
- electricity, medium voltage: 141.385, 27.1116, 622.524, 2061.07, 455.147, 6619.7, 933.05, 3040.02 kWh (8 entries); lognormal variance with pedigree 0.1807, pedigree (2,2,5,5,3)
  (same comment as for electricity, medium voltage)
- wastewater, average: -36.8668, -77.1332 m3 (2 entries); lognormal variance with pedigree 0.0606, pedigree (4,3,5,5,1)
  (same comment as for wastewater, average)
  production volume 342 m3
- heat, district or industrial, other than natural gas: 38.5373, 2327.07, 95034.4 MJ (3 entries); lognormal variance with pedigree 0.1807, pedigree (2,2,5,5,3)
  (same comment as for electricity, medium voltage)
- tap water: 1065.23, 128.225, 211.914, 45566.8, 5343.62, 139.013, 395.42, 61149.8 kg (8 entries); lognormal variance with pedigree 0.0606, pedigree (4,3,5,5,1)
  (same comment as for tap water)
- waste plastic, mixture: -219.146, -14.6425, -1.10739, -6.04789, -2.44328, -5.74303, -186.723, -1534.15 kg (8 entries); lognormal variance with pedigree 0.0607, pedigree (2,2,5,5,3)
  (same comment as for waste wood, untreated)
  production volume 5910 kg

## Emissions to nature
- NMVOC, non-methane volatile organic compounds, unspecified origin [air, non-urban air or from high stacks]: 78.3 kg; lognormal variance with pedigree 0.1806, pedigree (4,3,5,5,1)
  Derived from the used paint and solvent, assuming all solvent is emitted to air.
  Uncertainty: Derived from the used paint and solvent, assuming all solvent is emitted to air.
- Water [air, unspecified]: 17.1 m3; name water_to_air_unspecified; lognormal variance with pedigree 0.0827, pedigree (2,2,5,5,1)
  Calculated value based on literature values and expert opinion. See comments in the parametres' comment field.
  property fraction, origin: salt water 0; name fraction_origin_salt_water
  property fraction, origin: unspecified 0; name fraction_origin_unspecified
  property fraction, origin: fresh water 1; name fraction_origin_fresh_water

## Sampling procedure
The data of the material composition and energy consumption is based on literature studies.

## Extrapolations
none This dataset has been copied from an original dataset covering the geography CH. The uncertainty has been adjusted accordingly.

## Review by Niels Jungbluth 2004-04-01
Passed.
