# ultraviolet lamp production, for water desinfection

Dataset: EcoSpold 2, unit process
Geography: GLO
Time period: 2013-01-01 to 2021-12-31
Technology level: current
Classification: ISIC rev.4 ecoinvent: 2740:Manufacture of electric lighting equipment
Classification: EcoSpold01Categories: water supply/production
Synonyms: UV lamp
Scenario: Business-as-Usual
System model: Allocation, cut-off by classification
Generated by: Marylène Dussault
Database: ecoinvent
isCopyrightProtected: true
accessRestrictedTo: 1

## General comment
This datasets represents production of 1 ultraviolet lamp for water treatment. Material inputs have been measured from real lamp autopsy. This dataset is a proxy and only includes materials. Energy requirements, wastes and other materials needed for the lamp fabrication have been excluded due to lack of data.

## Included activities start
From raw and semi-fabricated materials used in ultraviolet lamp production.

## Included activities end
This dataset ends with production of one ultraviolet lamp. It includes material inputs only. It excludes forming of materials, energy inputs for production and assembly, water consumption, wastes and emissions to environment that could occur during fabrication of the lamp.

## Time period
Arbitrary time period chosen for the proxy.

## Reference product
- ultraviolet lamp: 1 unit; By-product classification allocatable product; CPC 439: Other general-purpose machinery and parts thereof
  production volume 4 unit
    This is a placeholder value that does not reflect real-world production volumes. This dataset does not currently require a real-world production volume to work in the database framework, and no actual data were collected yet. This has no negative effect on the results of the ecoinvent database.
  property price 0.592595 EUR2005
    Calculated based on inputs: The price of the product has been calculated as a sum of the values of the material and energy inputs for this product. This value is therefore a rough estimation. It may underestimate the real price since there are additional expenses when producing any product. These expences can include for example labour costs, treatment of waste materials and profit for the producer. Please consider carefully whether this level of data quality is acceptable for your application.
  property carbon content 0
    carbon content on a dry matter basis (reserved; not for manual entry)
  properties: water in wet mass 0 kg, dry mass 0.3824 kg, carbon content, non-fossil 0, water content 0, carbon content, fossil 0, wet mass 0.3824 kg, carbon allocation 0 kg

## Inputs from technosphere
- polyethylene, high density, granulate: 0.00188 kg; lognormal variance with pedigree 0.0178, pedigree (4,3,4,1,2)
  Measured value: from real lamp autopsy.
  properties: heating value, net 42.47 MJ, carbon content, fossil 0.857143, dry mass 1 kg, wet mass 1 kg
  note on carbon content, fossil: Polyethylene is formed out of a huge amount of ethylene monomers (C2H4) (ecoinvent v2.2 report 11_II). MW=28 g/mol
- silica sand: 0.1697 kg; source Borchers, Heidi 2008; lognormal variance with pedigree 0.0572, pedigree (4,3,4,1,4)
  Calculated value. Measured quartz sleve containing small metal pieces and mercury. Literature based mercury content was substrated from measured weight. Silica sand is assumed to be equivalent to quartz.
  Borchers, H., Fuller, A., & Malley, J. P. (2008). Assessing the Risk of Mercury in Drinking Water after UV Lamp Breaks. NE-WTTAC, report, 8p.
  properties: water content 0.010101, dry mass 0.99 kg, wet mass 1 kg
- polypropylene, granulate: 0.0461 kg; lognormal variance with pedigree 0.0178, pedigree (4,3,4,1,2)
  Measured value: from real lamp autopsy.
  properties: wet mass 1 kg, carbon content, fossil 0.857143, dry mass 1 kg, heating value, net 32.78 MJ
  note on heating value, net: Value extracted from "treatment of waste polypropylene, open burning"
- steel, unalloyed: 0.00439 kg; lognormal variance with pedigree 0.0572, pedigree (4,3,4,1,4)
  Measured value: from real lamp autopsy.
  properties: carbon content, fossil 0.0025, wet mass 1 kg, dry mass 1 kg
- aluminium, primary, ingot: 0 kg; pedigree (1,1,1,1,1)
  Measured value: from real lamp autopsy.
  properties: wet mass 1 kg, dry mass 1 kg
- sanitary ceramics: 0.12683 kg; lognormal variance with pedigree 0.0572, pedigree (4,3,4,1,4)
  Measured value: from real lamp autopsy. Sanitary ceramics is assumed to be equivalent to ceramic.
  properties: wet mass 1 kg, dry mass 1 kg
- mercury: 0.0004 kg; source Borchers, Heidi 2008; lognormal variance with pedigree 0.0492, pedigree (1,3,4,1,4)
  Measured value: from real lamp autopsy.
  properties: dry mass 1 kg, wet mass 1 kg
- aluminium, primary, ingot: 0.0257185, 0.00271158, 0.00466988 kg (3 entries); lognormal variance with pedigree 0.0178, pedigree (4,3,4,1,2)
  Measured value: from real lamp autopsy.

## Sampling procedure
Weight measurements of parts from one ultraviolet lamp autopsy.

## Extrapolations
This dataset has been extrapolated from year 2013 to the year of the calculation (2021). The uncertainty has been adjusted accordingly.
