# particleboard production, uncoated, average glue mix

Dataset: EcoSpold 2, unit process
Geography: RER
Time period: 2012-01-01 to 2021-12-31
Technology level: current
Classification: ISIC rev.4 ecoinvent: 1621:Manufacture of veneer sheets and wood-based panels
Synonyms: particleboard; Chipboard
Tags: Swiss brush-up completed
Scenario: Business-as-Usual
System model: Allocation, cut-off by classification
Generated by: Frank Werner
Database: ecoinvent
isCopyrightProtected: true
accessRestrictedTo: 1

## General comment
This dataset represents particle board production as the weighted average of particle boards produced by the members of the European Panel Federation (EPF)
Particleboard (PB) is manufactured from the dry wood-panel production process under pressure and heat from particles of wood (flakes, chips, shavings, sawdust and similar) and/or other lignocellulosic material in particle form (flax shives, hemp shives, bagasse fragments and similar) with the addition of an adhesive.
Particleboard, or particle board (or chipboard in the UK and Commonwealth Nations such as Austra-lia, New Zealand and others), is an engineered wood product manufactured from wood chips, saw-mill shavings, or saw dust, and a synthetic resin or other suitable binder, which is pressed and ex-truded. Particleboard is a composite material according to the standard EN 312. The density of stan-dard particleboard can vary between 650 – 750 kg/m3, whereas densities for low density particle-board can be as low as 250 kg/m3 and range up to 1300 kg/m3 for high density particleboard. Typical thickness is in a range of 3 to > 40 mm.
The inventoried particle board has the following composition:

## Included activities start
From the reception at the factory gate of all materials and fuels used.

## Included activities end
Activity ends with the uncoated particle board at the factory gate.

## Geography
Representation of the production of the member companies of the European Panel Federation (EPF).

## Technology
Particleboard is manufactured by mixing wood particles or flakes together with a resin and forming the mix into a sheet. The raw material to be used for the particles is fed into a disc chipper with between four and sixteen radially arranged blades. The particles are first dried, after which any oversized or undersized particles are screened out. Resin, in liquid form, is then sprayed through nozzles onto the particles. There are several types of resins that are commonly used. Amino-formaldehyde based resins are the best performing when considering cost and ease of use. Urea melamine resins are used to offer water resistance with increased melamine offering enhanced resistance. Phenol formaldehyde is typically used where the panel is used in external applications due to the increased water resistance offered by phenolic resins and also the colour of the resin resulting in a darker panel. Melamine urea phenolic formaldehyde resins exist as a compromise. To enhance the panel properties even further the use of resorcinol resins typically mixed with phenolic resins are used, but this is usually used with plywood for marine applications and a rare occasion in panel production.

## Parameters
- input wood fuel: 1663.94 MJ; name wood_fuel; = 87.3*19.06
  input of wood fuel used in production, i.e. wood fuel from forestry, internal wood residues, post-consumer wood used for energy purposes, etc; expressed in MJ of absolutely dry mass (lower heating value at humidity u=0%)

## Reference product
- particleboard, uncoated: 0 m3; CPC 31431: Particle board; By-product classification allocatable product
  production volume 3.75e7 m3; name p_board
    FaoStat 2011
  property dry mass 599.3 kg; name DM
  property water content 0.0629067; = WiWM/DM
  property water in wet mass 37.7 kg; name WiWM
  property price 217 EUR2005
    Export prices for the World+ according to: http://faostat.fao.org/site/626/DesktopDefault.aspx?PageID=626#ancor downloaded 28 April 2009; calculated as export value divided by export volume.
  property wet mass 637 kg; = WiWM+DM
  property heating value, net 8749.71 MJ
    LHV is calculated based on the Carbon content of the product. More details can be found on the respective documentation.The property is based on a value of 13.74MJ/kg
  property carbon content 0.486935
    carbon content on a dry matter basis (reserved; not for manual entry)
  property true value 217
    allocation property applied in "true value" allocation // value calculated from revenue
  properties: carbon content, fossil 0.0453387, carbon content, non-fossil 0.441596, carbon allocation 291.82 kg
- bark chips, wet, measured as dry mass: 1 kg; name w_bark; CPC 31230: Wood in chips or particles; By-product classification allocatable product; pedigree (1,1,1,1,1)
  bark from debarking of logs, not used energetically
  production volume 9.375e6 kg; = w_bark*p_board
    Calculated from production volume of reference product using the relative outputs.
  property price 0.034 EUR2005
    Expert judgement (Urs Luginbühl, Swiss Sawmilling industry, personal communication in June 2014). Cross-reference; FAOSTAT database; http://faostat.fao.org/site/626/DesktopDefault.aspx?PageID=626#ancor; Average import/export prices of EU for 'chips and particles'. Price: 48.76 Euro/m3. The density of the wood chips is 650 kg/m3. The price is calculated to be 0.075 EUR/kg.
  property heating value, net 4.81 MJ
    LHV is calculated based on the Carbon content of the product. More details can be found on the respective documentation.
  property carbon content 0.494
    carbon content on a dry matter basis (reserved; not for manual entry)
  property true value 0.0085; name w_bark_true_value
    allocation property applied in "true value" allocation // value calculated from revenue
  properties: water in wet mass 1.4 kg, dry mass 1 kg, water content 1.4, carbon content, non-fossil 0.494, carbon content, fossil 0, wet mass 2.4 kg, carbon allocation 0.494 kg

## By-products
- residual wood, dry: 0 m3; name w_chips; CPC 39283: Non-agglomerated wood waste and scrap; By-product classification allocatable product; pedigree (1,1,1,1,1)
  Emission factor from DS on heat generation from industrial residual wood mulitplied by the input of wood fuel (direct wood fuel plus production residues)
  production volume 2.37956e6 m3
    Calculated from production volume of reference product using the relative outputs.
  property price 26.9 EUR2005
    Temporary price data. Calculated as 90% of purchasers price based on: 2004 prices for World Import/Export (USD/cubicmeter) from FaoStat (http://faostat.fao.org/site/626/default.aspx#ancor, [accessed 10th June 2010]) Commodity: 'Chips and Particles' assuming this is for air-dry chips (10% water on a dry matter basis at 650 kg/m3) and no price difference for water content (i.e. assuming air-drying).
  property heating value, net 8030.06 MJ
    LHV is calculated based on the Carbon content of the product. More details can be found on the respective documentation.The property is based on a value of 12.7MJ/kg
  property carbon content 0.494
    carbon content on a dry matter basis (reserved; not for manual entry)
  property true value 1.70694; name w_chips_true_value
    allocation property applied in "true value" allocation // value calculated from revenue
  properties: wet mass 632.5 kg, water content 0.15, dry mass 550 kg, carbon content, fossil 0, water in wet mass 82.5 kg, carbon content, non-fossil 0.494, carbon allocation 271.7 kg

## Inputs from technosphere
- wastewater from particleboard production: -1.10372e-5 m3; name w_WW; lognormal variance with pedigree 0.0342, pedigree (2,3,4,1,1)
  production volume 2.6625e6 m3; = w_WW*p_board
    Calculated from production volume of reference product using the relative outputs.
  properties: water content 2962.17, wet mass 1000 kg, UVEK_relative_amount_1 -1, carbon content, non-fossil 0.377131, dry mass 0.337476 kg, UVEK_link_1 4578
  note on UVEK_relative_amount_1: to be used only in special submissions in coordination with ecoinvent and the Swiss FOEN
- wood chips, wet, measured as dry mass: 0 kg; pedigree (1,1,1,1,1)
  Input from wood chips from forestry plus sawmills
  property heating value, gross 0 MJ; name wood_chips_Gross_Heat_Value
  properties: water content 1.1, wet mass 2.1 kg, carbon content, non-fossil 0.494, dry mass 1 kg, heating value, net 10.84 MJ
  note on heating value, net: Value based on the dataset 'softwood forestry, mixed species, sustainable forest management'
- diesel, burned in building machine: 0.00444596 MJ; lognormal variance with pedigree 0.0336, pedigree (1,3,4,1,1)
  for internal transport
  properties: UVEK_link_1 732, UVEK_relative_amount_1 1, heating value, net 1 MJ
- wood ash mixture, pure: 0 kg; name w_wood_ash; pedigree (1,1,1,1,1)
  Emission factor from DS on heat generation from industrial residual wood mulitplied by the input of wood fuel (direct wood fuel plus production residues), scaled to convert wood input to resulting heat.
  production volume 0 kg
    Calculated from production volume of reference product using the relative outputs.
  properties: wet mass 1 kg, UVEK_link_3 1129, UVEK_relative_amount_3 -1, carbon content, non-fossil 0.012, dry mass 1 kg, UVEK_link_1 1128, UVEK_link_2 1127
- wood chips, dry, measured as dry mass: 0.0311855 kg; = 3.09+2.52+31.6+163.4; lognormal variance with pedigree 0.0336, pedigree (1,3,4,1,1)
  input of different types of wood chips from sawmills
  properties: water content 0.4, carbon content, non-fossil 0.494, wet mass 1.4 kg, dry mass 1 kg, heating value, net 9.99 MJ
  note on carbon content, non-fossil: C content of dry mass is 0.494 kgC/kg dry wood (ecoinvent v2.2 report 9).
- chemical, organic: 6.03438e-5 kg; lognormal variance with pedigree 0.0336, pedigree (1,3,4,1,1)
  input of unspecified additives, dyes, flame redardants, etc.
  properties: wet mass 1 kg, carbon content, fossil 0.628, heating value, net 19.03 MJ, dry mass 1 kg, UVEK_relative_amount_1 1, UVEK_link_1 432
  note on carbon content, fossil: This dataset is an unweighted average of 20 organic substances (listed in Tab 88.1, ecoinvent v2.2 report 8, part II), being part of the top100 chemicals included in this database. The C-content has also been calculated as an unweighted average of the C content of the substances composing this dataset.
- hazardous waste, for incineration: 0 kg; name w_HW; pedigree (1,1,1,1,1)
  Output of minor quantities of waste resins, oily filters and rags
  production volume 0 kg
    Calculated from production volume of reference product using the relative outputs.
  properties: heating value, net 17 MJ, water content 0.333333, dry mass 0.75 kg, wet mass 1 kg, carbon content, fossil 0.554667, UVEK_link_1 965, UVEK_relative_amount_1 -1
  note on heating value, net: Value taken from the general comment of the treatment dataset.
  note on carbon content, fossil: Tab A.6, ecoinvent v2.2 report 13_I. C content has been calculated after data in the tables, and then referred to 1 kg DM
- wood chips, from post-consumer wood, measured as dry mass: 0.028308 kg; lognormal variance with pedigree 0.0336, pedigree (1,3,4,1,1)
  properties: carbon content, non-fossil 0.494, heating value, net 9.99 MJ, wet mass 1.4 kg, water content 0.4, dry mass 1 kg
- aluminium sulfate, powder: 0.000243129 kg; = 0.284+1.28; lognormal variance with pedigree 0.0336, pedigree (1,3,4,1,1)
  aluminium sulfate plus input of unspecified hardeners
  properties: UVEK_relative_amount_1 1, UVEK_link_8 4417, UVEK_link_1 158, dry mass 1 kg, UVEK_link_9 4433, UVEK_relative_amount_8 4.85934, wet mass 1 kg, UVEK_relative_amount_9 2.02366
  note on UVEK_link_8: This link has been introduced to model transport specifically for the SAM model; to be used only in special submissions in coordination with ecoinvent and the Swiss FOEN.
  note on UVEK_relative_amount_8: Scaling factor = amount of transport in corresponding KBOB dataset (excluding the input of wood, assumed to be 95%)/amount of this input from technosphere. Source for transport distance: Life Cycle Inventories of Wood as Fuel and Construction Material/2007/Werner F. To be used only in special submissions in coordination with ecoinvent and the Swiss FOEN
- urea formaldehyde resin: 0.0069643 kg; lognormal variance with pedigree 0.0336, pedigree (1,3,4,1,1)
  part of glueing system (inventoried as averaged production average in Europe)
  properties: UVEK_link_1 4736, UVEK_relative_amount_1 1, carbon content, fossil 0.408958, dry mass 1 kg, wet mass 1 kg, heating value, net 12.39 MJ
- wooden board factory, organic bonded boards: 5.92202e-12 unit; = 1/(525000*50); lognormal variance with pedigree 0.5586, pedigree (1,3,4,1,1)
  estimated based on an assumed yearly production volume o 525,000 m3/year and a life time of infrastructure of 50 years
- biowaste: -0.00074773 kg; name w_biowaste; lognormal variance with pedigree 0.0342, pedigree (2,3,4,1,1)
  sludges from chip washing etc.
  production volume 1.80375e8 kg; = w_biowaste*p_board
    Calculated from production volume of reference product using the relative outputs.
  properties: water content 1.5, wet mass 1 kg, heating value, net 4.29 MJ, UVEK_link_1 813, dry mass 0.4 kg, carbon content, non-fossil 0.1624, UVEK_relative_amount_1 -1
- urea: 6.5008e-5 kg; = (0.418/(12+4+2*14+16)*(2*14))*2.14379903903132; lognormal variance with pedigree 0.0336, pedigree (1,3,4,1,1)
  The exchange has been updated from 'urea, as N' into 'urea' and therefore its amount has been scaled (multiplied) from 0.1951 kg by 2.1438 kg of 'urea' per kg of 'urea, as N'. Original comment of the exchange is: input of urea, converted to input of N via molar relationship
  properties: UVEK_link_1 4737, wet mass 1 kg, UVEK_relative_amount_1 1, dry mass 1 kg, carbon content, fossil 0.2
- electricity, medium voltage: 0.00210173 kWh; = 104*0.13; lognormal variance with pedigree 0.033, pedigree (1,1,4,1,1)
  electricity input from grid times share of total production in specific country
  properties: UVEK_relative_amount_1 1, UVEK_link_1 1742
- slab and siding, softwood, wet, measured as dry mass: 0 kg; pedigree (1,1,1,1,1)
  input of industrial residual wood
  properties: heating value, net 7.79 MJ, dry mass 1 kg, carbon content, non-fossil 0.494, water content 0.7, wet mass 1.7 kg
- electricity, medium voltage: 0.000792189 kWh; = 104*0.049; lognormal variance with pedigree 0.033, pedigree (1,1,4,1,1)
  electricity input from grid times share of total production in specific country
  properties: UVEK_relative_amount_1 1, UVEK_link_1 1744
- tap water: 0.0273442 kg; lognormal variance with pedigree 0.0336, pedigree (1,3,4,1,1)
  properties: water content 2962.17, carbon content, fossil 0.00178991, wet mass 1 kg, UVEK_relative_amount_1 1, dry mass 0.000337476 kg, UVEK_link_1 4285
  note on carbon content, fossil: Bicarbonate content is 2.93 mol/m3. CO2 content is 0.1 mol/m3 (ecoinvent v2.2 report 8, Tab 93.1).
- electricity, medium voltage: 0.00299092 kWh; = 104*0.185; lognormal variance with pedigree 0.033, pedigree (1,1,4,1,1)
  electricity input from grid times share of total production in specific country
  properties: UVEK_link_1 1715, UVEK_relative_amount_1 1
- sawdust, wet, measured as dry mass: 0 kg; pedigree (1,1,1,1,1)
  input of sawdust
  properties: wet mass 1.7 kg, dry mass 1 kg, carbon content, non-fossil 0.494, water content 0.7, heating value, net 7.79 MJ
- electricity, medium voltage: 0.000679019 kWh; = 104*0.042; lognormal variance with pedigree 0.033, pedigree (1,1,4,1,1)
  electricity input from grid times share of total production in specific country
  properties: UVEK_link_1 1718, UVEK_relative_amount_1 1
- pulpwood, softwood, measured as solid wood under bark: 0 m3; pedigree (1,1,1,1,1)
  input in kg divided by the basic wood density of 378 kg/m3
  properties: wet mass 748 kg, dry mass 440 kg, water content 0.7, carbon content, non-fossil 0.494, basic wood density 400, heating value, net 4483.78 MJ
  note on heating value, net: Value based on "softwood forestry, mixed species, sustainable forest management"The property is based on a value of 11.58MJ/kg
- electricity, medium voltage: 0.0011317 kWh; = 104*0.070; lognormal variance with pedigree 0.033, pedigree (1,1,4,1,1)
  electricity input from grid times share of total production in specific country
  properties: UVEK_link_1 1721, UVEK_relative_amount_1 1
- pulpwood, hardwood, measured as solid wood under bark: 0 m3; pedigree (1,1,1,1,1)
  input in kg divided by the basic wood density of 572 kg/m3
  properties: basic wood density 550, dry mass 681.818 kg, carbon content, non-fossil 0.494, water content 0.8, wet mass 1227.27 kg, heating value, net 6071.3 MJ
  note on heating value, net: Value based on "hardwood forestry, mixed species, sustainable forest management"The property is based on a value of 11.58MJ/kg
- electricity, medium voltage: 0.0012772 kWh; = 104*0.079; lognormal variance with pedigree 0.033, pedigree (1,1,4,1,1)
  electricity input from grid times share of total production in specific country
  properties: UVEK_relative_amount_1 1, UVEK_link_1 1730
- paraffin: 0.000469468 kg; lognormal variance with pedigree 0.0336, pedigree (1,3,4,1,1)
  hydrophobing agent
  properties: dry mass 1 kg, UVEK_relative_amount_1 1, wet mass 1 kg, carbon content, fossil 0.847059, UVEK_link_1 3381, heating value, net 41.5 MJ
  note on heating value, net: Indicative value. Reference: Fuels - Higher and Lower Calorific Values, available at: https://www.engineeringtoolbox.com/fuels-higher-calorific-values-d_169.html
- electricity, medium voltage: 0.00189155 kWh; = 104*0.117; lognormal variance with pedigree 0.033, pedigree (1,1,4,1,1)
  electricity input from grid times share of total production in specific country
  properties: UVEK_link_1 1720, UVEK_relative_amount_1 1
- phenolic resin: 0.000188098 kg; lognormal variance with pedigree 0.0336, pedigree (1,3,4,1,1)
  part of glueing system (inventoried as averaged production average in Europe)
  properties: heating value, net 33.57 MJ, wet mass 1 kg, UVEK_relative_amount_1 1, dry mass 1 kg, carbon content, fossil 0.772277, UVEK_link_1 3435
- electricity, medium voltage: 0.000776022 kWh; = 104*0.048; lognormal variance with pedigree 0.033, pedigree (1,1,4,1,1)
  electricity input from grid times share of total production in specific country
  properties: UVEK_relative_amount_1 1, UVEK_link_1 1706
- melamine formaldehyde resin: 0.00153277 kg; lognormal variance with pedigree 0.0336, pedigree (1,3,4,1,1)
  part of glueing system (inventoried as averaged production average in Europe)
  properties: heating value, net 9.44 MJ, carbon content, fossil 0.311708, dry mass 1 kg, UVEK_relative_amount_1 1, wet mass 1 kg, UVEK_link_1 2931
- electricity, medium voltage: 0.000970028 kWh; = 104*0.060; lognormal variance with pedigree 0.033, pedigree (1,1,4,1,1)
  electricity input from grid times share of total production in specific country
  properties: UVEK_link_1 1703, UVEK_relative_amount_1 1
- methylene diphenyl diisocyanate: 0.000500559 kg; lognormal variance with pedigree 0.0336, pedigree (1,3,4,1,1)
  part of glueing system (inventoried as averaged production average in Europe)
  properties: UVEK_link_1 2983, dry mass 1 kg, heating value, net 26.66 MJ, wet mass 1 kg, UVEK_relative_amount_1 1, carbon content, fossil 0.72
- electricity, medium voltage: 0.000582017 kWh; = 104*0.036; lognormal variance with pedigree 0.033, pedigree (1,1,4,1,1)
  electricity input from grid times share of total production in specific country
  properties: UVEK_link_1 1714, UVEK_relative_amount_1 1
- lubricating oil: 3.90343e-5 kg; = 0.0481+0.203; lognormal variance with pedigree 0.0336, pedigree (1,3,4,1,1)
  input of lubricating oils plus mineral oils, incl. thermooil
  properties: UVEK_relative_amount_1 1, carbon content, fossil 0.75, wet mass 1 kg, dry mass 1 kg, heating value, net 40.2 MJ, UVEK_link_1 2866
  note on carbon content, fossil: Lubricating oil is produced from diesel. C-content/dry mass of fats and oils considered 75%, from: ecoinvent v2.2 report, n 15a, pg 40
  note on heating value, net: Literature value, Source: IPCC 2006, 2006 IPCC Guidelines for National Greenhouse Gas Inventories, Prepared by the National Greenhouse Gas Inventories Programme, Eggleston H.S., Buendia L., Miwa K., Ngara T. and Tanabe K. (eds). Published: IGES, Japan
- heat, district or industrial, natural gas: 0.0308982 MJ; = (172+36.7)/1.05; lognormal variance with pedigree 0.0336, pedigree (1,3,4,1,1)
  Input of natural gas plus liquified petrolium gas, converted to heat output
  properties: heating value, net 1 MJ, UVEK_relative_amount_1 1, UVEK_link_1 2576
- dust collector, electrostatic precipitator, for industrial use: 3.42151e-10 unit; = 1.3889E-09*wood_fuel/1.05; lognormal variance with pedigree 0.558, pedigree (1,1,4,1,1)
  Infrastructure factor from DS 'Heat, district or industrial, other than natural gas {CH}| heat production, wood chips from industry, at furnace 5000kW | Cut-off, U', multiplied by the input of wood fuel (direct wood fuel plus production residues); correction for assumed efficiency as original value refers to heat output
  properties: UVEK_relative_amount_1 1, UVEK_link_1 999999
- heat, district or industrial, other than natural gas: 0.00349399 MJ; = 23.6/1.05; lognormal variance with pedigree 0.0336, pedigree (1,3,4,1,1)
  Fuel input, converted to heat output
  properties: UVEK_relative_amount_1 1, UVEK_link_1 2556, heating value, net 1 MJ
- electricity, medium voltage: 0.00295858 kWh; = 104*0.183; lognormal variance with pedigree 0.033, pedigree (1,1,4,1,1)
  electricity input from grid times share of total production not covered via specific country mixes; it covers the electricity input in countries where < 3% of the total production are produced.
  properties: UVEK_link_1 1779, UVEK_relative_amount_1 1
- heat, district or industrial, other than natural gas: 0.00387893 MJ; = 26.2/1.05; lognormal variance with pedigree 0.0336, pedigree (1,3,4,1,1)
  Fuel input, converted to heat output
  properties: UVEK_link_1 2547, heating value, net 1 MJ, UVEK_relative_amount_1 1
- furnace, wood chips, with silo, 5000kW: 3.42149e-10 unit; = 1.38888888888889E-09*wood_fuel/1.05; lognormal variance with pedigree 0.558, pedigree (1,1,4,1,1)
  (same comment as for dust collector, electrostatic precipitator, for industrial use)
  properties: UVEK_link_1 999999, UVEK_relative_amount_1 1
- wood chips, wet, measured as dry mass: 0.00308496, 0.000117371 kg (2 entries); lognormal variance with pedigree 0.0336, pedigree (1,3,4,1,1)
  Input from wood chips from forestry plus sawmills
- wood ash mixture, pure: -0.000160923, -3.30802e-6 kg (2 entries); lognormal variance with pedigree 0.0342, pedigree (2,3,4,1,1)
  (same comment as for wood ash mixture, pure)
  production volume 3.96176e7 kg
- hazardous waste, for incineration: -1.2686e-5, -3.31605e-7 kg (2 entries); lognormal variance with pedigree 0.0342, pedigree (2,3,4,1,1)
  Output of minor quantities of waste resins, oily filters and rags
  production volume 3.14025e6 kg
- slab and siding, softwood, wet, measured as dry mass: 0.0192159, 0.000246814 kg (2 entries); lognormal variance with pedigree 0.0336, pedigree (1,3,4,1,1)
  input of industrial residual wood
- sawdust, wet, measured as dry mass: 0.00373454, 4.29686e-5 kg (2 entries); lognormal variance with pedigree 0.0336, pedigree (1,3,4,1,1)
  input of sawdust
- pulpwood, softwood, measured as solid wood under bark: 3.99787e-5, 4.88504e-7 m3 (2 entries); lognormal variance with pedigree 0.0336, pedigree (1,3,4,1,1)
  input in kg divided by the basic wood density of 378 kg/m3
- pulpwood, hardwood, measured as solid wood under bark: 3.64906e-7, 1.01379e-8 m3 (2 entries); lognormal variance with pedigree 0.0336, pedigree (1,3,4,1,1)
  input in kg divided by the basic wood density of 572 kg/m3

## Inputs from nature
- Water, cooling, unspecified natural origin [natural resource, in water]: 9.62255e-6 m3; lognormal variance with pedigree 0.0336, pedigree (1,3,4,1,1)
- Water, well, in ground [natural resource, in water]: 3.06243e-7 m3; lognormal variance with pedigree 0.0336, pedigree (1,3,4,1,1)

## Emissions to nature
- Manganese [air, unspecified]: 5.58387e-8 kg; name manganese; = 2.26666666666667E-07*wood_fuel/1.05; lognormal variance with pedigree 0.2412, pedigree (2,3,5,1,1)
  Emission factor from DS 'Heat, district or industrial, other than natural gas {CH}| heat production, wood chips from industry, at furnace 5000kW | Cut-off, U' on heat generation from industrial residual wood per MJ, multiplied by the input of wood fuel (direct wood fuel plus production residues ) scaled to reflect wood input per generated heat.
- Benzo(a)pyrene [air, unspecified]: 1.64231e-10 kg; = 6.66666666666667E-10*wood_fuel/1.05; lognormal variance with pedigree 0.5912, pedigree (2,3,5,1,1)
  (same comment as for Manganese)
- Methane, non-fossil [air, unspecified]: 4.92694e-7 kg; = 0.000002*wood_fuel/1.05; lognormal variance with pedigree 0.2412, pedigree (2,3,5,1,1)
  (same comment as for Manganese)
- Bromine [air, unspecified]: 1.97078e-8 kg; = 0.00000008*wood_fuel/1.05; lognormal variance with pedigree 0.8412, pedigree (2,3,5,1,1)
  (same comment as for Manganese)
- Zinc [air, unspecified]: 9.85388e-8 kg; = 0.0000004*wood_fuel/1.05; lognormal variance with pedigree 0.8412, pedigree (2,3,5,1,1)
  (same comment as for Manganese)
- Magnesium [air, unspecified]: 1.18247e-7 kg; name magnesium; = 0.00000048*wood_fuel/1.05; lognormal variance with pedigree 0.2412, pedigree (2,3,5,1,1)
  (same comment as for Manganese)
- Benzene, hexachloro- [air, unspecified]: 2.36493e-15 kg; = 9.60000000000001E-15*wood_fuel/1.05; lognormal variance with pedigree 0.2412, pedigree (2,3,5,1,1)
  (same comment as for Manganese)
- Toluene [air, unspecified]: 9.85388e-8 kg; = 0.0000004*wood_fuel/1.05; lognormal variance with pedigree 0.3912, pedigree (2,3,5,1,1)
  (same comment as for Manganese)
- Lead [air, unspecified]: 8.21157e-9 kg; = 3.33333333333333E-08*wood_fuel/1.05; lognormal variance with pedigree 0.8412, pedigree (2,3,5,1,1)
  (same comment as for Manganese)
- Benzene [air, unspecified]: 2.98901e-7 kg; = 1.21333333333333E-06*wood_fuel/1.05; lognormal variance with pedigree 0.2412, pedigree (2,3,5,1,1)
  (same comment as for Manganese)
- Phosphorus [air, unspecified]: 9.85388e-8 kg; = 0.0000004*wood_fuel/1.05; lognormal variance with pedigree 0.2412, pedigree (2,3,5,1,1)
  (same comment as for Manganese)
- Fluorine [air, unspecified]: 1.64231e-8 kg; = 6.66666666666667E-08*wood_fuel/1.05; lognormal variance with pedigree 0.2412, pedigree (2,3,5,1,1)
  (same comment as for Manganese)
- Benzene, ethyl- [air, unspecified]: 9.85388e-9 kg; = 0.00000004*wood_fuel/1.05; lognormal variance with pedigree 0.2412, pedigree (2,3,5,1,1)
  (same comment as for Manganese)
- Sodium [air, unspecified]: 4.27002e-7 kg; = 1.73333333333334E-06*wood_fuel/1.05; lognormal variance with pedigree 0.2412, pedigree (2,3,5,1,1)
  (same comment as for Manganese)
- Formaldehyde [air, unspecified]: 1.43444e-5 kg; = 1.73333333333334E-07*wood_fuel/1.05+0.092; lognormal variance with pedigree 0.2412, pedigree (2,3,5,1,1)
  Emission factor from DS 'Heat, district or industrial, other than natural gas {CH}| heat production, wood chips from industry, at furnace 5000kW | Cut-off, U' on heat generation from industrial residual wood per MJ, multiplied by the input of wood fuel (direct wood fuel plus production residues ) scaled to reflect wood input per generated heat plus estimated emissions from wood and glue drying processes (as in ecoinvent 2.2).
- Ammonia [air, unspecified]: 5.6824e-7 kg; = 2.30666666666667E-06*wood_fuel/1.05; lognormal variance with pedigree 0.2412, pedigree (2,3,5,1,1)
  (same comment as for Manganese)
- Sulfur dioxide [air, unspecified]: 8.21157e-7 kg; = 3.33333333333334E-06*wood_fuel/1.05; lognormal variance with pedigree 0.0662, pedigree (2,3,5,1,1)
  (same comment as for Manganese)
- Hydrocarbons, aliphatic, alkanes, unspecified [air, unspecified]: 2.98901e-7 kg; = 1.21333333333333E-06*wood_fuel/1.05; lognormal variance with pedigree 0.2412, pedigree (2,3,5,1,1)
  (same comment as for Manganese)
- Acetaldehyde [air, urban air close to ground]: 7.25794e-8 kg; = 8.13333333333333E-08*wood_fuel/1.05+0.000338; lognormal variance with pedigree 0.2412, pedigree (2,3,5,1,1)
  Emission factor from DS on heat generation from industrial residual wood mulitplied by the input of wood fuel (direct wood fuel plus production residues ) plus estimated emissions from wood and glue drying processes (based on Albrecht et al. 2009).
- Potassium [air, unspecified]: 7.68603e-6 kg; = 0.0000312*wood_fuel/1.05; lognormal variance with pedigree 0.2412, pedigree (2,3,5,1,1)
  (same comment as for Manganese)
- Hydrocarbons, aliphatic, unsaturated [air, unspecified]: 1.01823e-6 kg; = 4.13333333333333E-06*wood_fuel/1.05; lognormal variance with pedigree 0.2412, pedigree (2,3,5,1,1)
  (same comment as for Manganese)
- Arsenic [air, unspecified]: 3.28463e-10 kg; = 1.33333333333333E-09*wood_fuel/1.05; lognormal variance with pedigree 0.2412, pedigree (2,3,5,1,1)
  (same comment as for Manganese)
- Particulates, > 10 um [air, unspecified]: 1.21409e-5 kg; lognormal variance with pedigree 0.2106, pedigree (3,3,4,1,1)
  dust emissions
- Dinitrogen monoxide [air, unspecified]: 7.55464e-7 kg; = 3.06666666666667E-06*wood_fuel/1.05; lognormal variance with pedigree 0.2412, pedigree (2,3,5,1,1)
  (same comment as for Manganese)
- Phenol, pentachloro- [air, unspecified]: 2.66055e-12 kg; = 0.0000000000108*wood_fuel/1.05; lognormal variance with pedigree 0.3912, pedigree (2,3,5,1,1)
  (same comment as for Manganese)
- Copper [air, unspecified]: 7.22618e-9 kg; = 2.93333333333334E-08*wood_fuel/1.05; lognormal variance with pedigree 0.2412, pedigree (2,3,5,1,1)
  (same comment as for Manganese)
- Particulates, < 2.5 um [air, unspecified]: 8.21157e-6 kg; = 0.0000333333333333333*wood_fuel/1.05; lognormal variance with pedigree 0.5912, pedigree (2,3,5,1,1)
  (same comment as for Manganese)
- Dioxins, measured as 2,3,7,8-tetrachlorodibenzo-p-dioxin [air, unspecified]: 1.01823e-14 kg; = 4.13333333333333E-14*wood_fuel/1.05; lognormal variance with pedigree 0.5912, pedigree (2,3,5,1,1)
  (same comment as for Manganese)
- NMVOC, non-methane volatile organic compounds, unspecified origin [air, unspecified]: 6.31695e-5 kg; name nmvoc; = 4.66666666666666E-06*wood_fuel/1.05 + (0.509-0.092-0.0177-0.000338); lognormal variance with pedigree 0.2412, pedigree (2,3,5,1,1)
  Emission factor from DS 'Heat, district or industrial, other than natural gas {CH}| heat production, wood chips from industry, at furnace 5000kW | Cut-off, U' on heat generation from industrial residual wood per MJ, multiplied by the input of wood fuel (direct wood fuel plus production residues ) scaled to reflect wood input per generated heat plus estimated emissions from wood and glue drying processes (based on Albrecht et al. 2009), minus VOC emissions that are inventoried specifically.
- Chromium [air, unspecified]: 1.30071e-9 kg; = 5.28000000000001E-09*wood_fuel/1.05; lognormal variance with pedigree 0.8412, pedigree (2,3,5,1,1)
  (same comment as for Manganese)
- PAH, polycyclic aromatic hydrocarbons [air, unspecified]: 3.64594e-9 kg; name pah; = 0.0000000148*wood_fuel/1.05; lognormal variance with pedigree 0.5912, pedigree (2,3,5,1,1)
  (same comment as for Manganese)
- Chlorine [air, unspecified]: 5.91233e-8 kg; = 0.00000024*wood_fuel/1.05; lognormal variance with pedigree 0.2412, pedigree (2,3,5,1,1)
  (same comment as for Manganese)
- Methanol [air, non-urban air or from high stacks]: 2.75152e-6 kg; lognormal variance with pedigree 0.3926, pedigree (3,3,5,1,1)
  Estimated emissions from wood and glue drying processes
- Chromium VI [air, unspecified]: 1.31385e-11 kg; = 5.33333333333334E-11*wood_fuel/1.05; lognormal variance with pedigree 0.8412, pedigree (2,3,5,1,1)
  (same comment as for Manganese)
- Nickel [air, unspecified]: 1.97078e-9 kg; name nickel; = 0.000000008*wood_fuel/1.05; lognormal variance with pedigree 0.8412, pedigree (2,3,5,1,1)
  (same comment as for Manganese)
- Carbon monoxide, non-fossil [air, unspecified]: 6.56925e-5 kg; = 0.000266666666666667*wood_fuel/1.05; lognormal variance with pedigree 0.2412, pedigree (2,3,5,1,1)
  (same comment as for Manganese)
- m-Xylene [air, unspecified]: 3.94155e-8 kg; name mxylene; = 0.00000016*wood_fuel/1.05; lognormal variance with pedigree 0.3912, pedigree (2,3,5,1,1)
  (same comment as for Manganese)
- Carbon dioxide, non-fossil [air, unspecified]: 0.0351455 kg; = 0.142666666666666*wood_fuel/1.05; lognormal variance with pedigree 0.0662, pedigree (2,3,5,1,1)
  (same comment as for Manganese)
- Nitrogen oxides [air, unspecified]: 7.39041e-5 kg; = 0.0003*wood_fuel/1.05; lognormal variance with pedigree 0.2412, pedigree (2,3,5,1,1)
  (same comment as for Manganese)
- Cadmium [air, unspecified]: 2.29924e-10 kg; = 9.33333333333334E-10*wood_fuel/1.05; lognormal variance with pedigree 0.8412, pedigree (2,3,5,1,1)
  (same comment as for Manganese)
- Mercury [air, unspecified]: 9.85388e-11 kg; name mercury; = 0.0000000004*wood_fuel/1.05; lognormal variance with pedigree 0.8412, pedigree (2,3,5,1,1)
  (same comment as for Manganese)
- Calcium [air, unspecified]: 1.92151e-6 kg; = 0.0000078*wood_fuel/1.05; lognormal variance with pedigree 0.2412, pedigree (2,3,5,1,1)
  (same comment as for Manganese)

## Sampling procedure
Survey among member companies of the European Panel Federation; emissions profile per MJ wood input from PSI (2014)
