# blower and heat exchange unit production, GE 250 RH

Dataset: EcoSpold 2, unit process
Geography: RoW
Time period: 2003-01-01 to 2021-12-31
Technology level: current
Classification: EcoSpold01Categories: ventilation/production of components
Classification: ISIC rev.4 ecoinvent: 2819:Manufacture of other general-purpose machinery
Tags: ConvertedDataset
Scenario: Business-as-Usual
System model: Allocation, cut-off by classification
Generated by: Alex Primas
Published in: Hässig, W. 2007
Database: ecoinvent
isCopyrightProtected: true
accessRestrictedTo: 1

## General comment
Production of a typical component used for a decentral ventilation system in a multi family house. The house considered in the investigation includes 6 flats with 130 m2 floor area each and a ventilation rate of 120 m3/h.
[This dataset was already contained in the ecoinvent database version 2. It was not individually updated during the transfer to ecoinvent version 3. Life Cycle Impact Assessment results may still have changed, as they are affected by changes in the supply chain, i.e. in other datasets. This dataset was generated following the ecoinvent quality guidelines for version 2. It may have been subject to central changes described in the ecoinvent version 3 change report (http://www.ecoinvent.org/database/ecoinvent-version-3/reports-of-changes/), and the results of the central updates were reviewed extensively. The changes added e.g. consistent water flows and other information throughout the database. The documentation of this dataset can be found in the ecoinvent reports of version 2, which are still available via the ecoinvent website. The change report linked above covers all central changes that were made during the conversion process.]

## Included activities end
Materials used for the production. Estimation of electricity use for the different production steps. Energy use for heating of the production building. Transport of raw materials to the plant. Estimation for the Infrastructure of the Production site included.

## Geography
Data for production in Switzerland used.

## Technology
Ventilation unit for decentral ventilation systems with 120 m3/h average air flow. Housing made of galvanised steel and stainless steel insulated with rock wool. Heat recovery element made of aluminium. Total weight of component 65 kg

## Time period
Materials investigated in 2003

## Reference product
- blower and heat exchange unit, GE 250 RH: 1 unit; By-product classification allocatable product; CPC 43911: Producer gas or water gas generators; acetylene gas generators and similar water process gas generators; disti[…]
  EcoSpold01Location=CH
  production volume 3.96633 unit
    This is a placeholder value that does not reflect real-world production volumes. This dataset does not currently require a real-world production volume to work in the database framework, and no actual data were collected yet. This has no negative effect on the results of the ecoinvent database.
  property carbon content, fossil 0.00715748
    C content was calculated as an addition of C content in the product components
  property carbon content, non-fossil 6.57954e-7
    C content was calculated as an addition of C content in the product components
  property price 117.983 EUR2005
    Calculated based on inputs: The price of the product has been calculated as a sum of the values of the material and energy inputs for this product. This value is therefore a rough estimation. It may underestimate the real price since there are additional expenses when producing any product. These expences can include for example labour costs, treatment of waste materials and profit for the producer. Please consider carefully whether this level of data quality is acceptable for your application.
  property carbon content 0.00715813
    carbon content on a dry matter basis (reserved; not for manual entry)
  properties: dry mass 65 kg, water in wet mass 0 kg, wet mass 65 kg, water content 0, carbon allocation 0.465279 kg

## Inputs from technosphere
- waste rubber, unspecified: 0 kg; pedigree (1,1,1,1,1)
  Estimations on precentage material disposed
  EcoSpold01Location=CH
  Uncertainty: Estimations on precentage material disposed
  production volume 0 kg
    Calculated from the production volume of blower and heat exchange unit, GE 250 RH in proportion to the respective output amounts.
  properties: wet mass 1 kg, dry mass 1 kg, carbon content, fossil 0.853, heating value, net 27.19 MJ
  note on heating value, net: Value taken from the general comment of the treatment dataset.
- heat, district or industrial, natural gas: 0 MJ; pedigree (1,1,1,1,1)
  Data estimated from related companies
  EcoSpold01Location=RER
  Uncertainty: Data estimated from related companies
  properties: heating value, net 1 MJ
- sheet rolling, steel: 38.2 kg; lognormal variance with pedigree 0.056, pedigree (3,4,5,5,1)
  EcoSpold01Location=RER
  Questionnaire, estimations
  Uncertainty: Questionnaire, estimations
- electronics, for control units: 0.35 kg; lognormal variance with pedigree 0.074, pedigree (3,4,5,5,3)
  EcoSpold01Location=RER
  Questionnaire, approximation for technology
  Uncertainty: Questionnaire, approximation for technology
  properties: carbon content, fossil 0.337146, dry mass 1 kg, wet mass 1 kg, carbon content, non-fossil 0.00013442
  note on carbon content, fossil: The control unit has a composition of 46% steel (housing), 32% plastics, 14% printed wiring boards and 8% cables (various types).;
- ventilation components factory: 2.6e-7 unit; lognormal variance with pedigree 0.396, pedigree (4,5,5,5,3)
  EcoSpold01Location=RER
  Calculated with data of a similar company
  Uncertainty: Calculated with data of a similar company
- electricity, medium voltage: 0 kWh; pedigree (1,1,1,1,1)
  Data estimated from related processes
  EcoSpold01Location=CH
  Uncertainty: Data estimated from related processes
- aluminium, wrought alloy: 22.9 kg; lognormal variance with pedigree 0.0546, pedigree (2,4,5,5,1)
  EcoSpold01Location=RER
  Questionnaire
  Uncertainty: Questionnaire
  properties: wet mass 1 kg, dry mass 1 kg
- synthetic rubber: 0.21 kg; lognormal variance with pedigree 0.0546, pedigree (2,4,5,5,1)
  EcoSpold01Location=RER
  Questionnaire
  Uncertainty: Questionnaire
  properties: dry mass 1 kg, wet mass 1 kg, carbon content, fossil 0.871949, heating value, net 26.42 MJ
  note on carbon content, fossil: EPDM (Ethylene-propene-diene terpolymer) rubber is a terpolymer of ethylene, propene, and a diene with the residual unsaturated portion of the diene in the side chain (ecoinvent v2.2 report 7-part XX & Ullmann). Chemical formula (deduced from Evidences of Solvent-Induced Miscibility in Polychloroprene-co-Ethylene-Propene Diene Terpolymer Blends, Dubey et al., Journal of Applied Polymer Science, 2009, 111:1884–1891): C20H35
- zinc coat, coils: 8.8 m2; lognormal variance with pedigree 0.056, pedigree (3,4,5,5,1)
  EcoSpold01Location=RER
  Questionnaire, estimations
  Uncertainty: Questionnaire, estimations
- sheet rolling, chromium steel: 4.07 kg; lognormal variance with pedigree 0.056, pedigree (3,4,5,5,1)
  Questionnaire, estimations
  EcoSpold01Location=RER
  Uncertainty: Questionnaire, estimations
- wire drawing, copper: 0.715 kg; lognormal variance with pedigree 0.056, pedigree (3,4,5,5,1)
  Questionnaire, estimations
  EcoSpold01Location=RER
  Uncertainty: Questionnaire, estimations
- inert waste, for final disposal: -0.46 kg; lognormal variance with pedigree 0.072, pedigree (4,4,5,5,1)
  (same comment as for waste rubber, unspecified)
  production volume 1.38 kg
    (same comment as for waste rubber, unspecified)
  properties: dry mass 0.995 kg, water content 0.00502513, wet mass 1 kg
- steel, chromium steel 18/8, hot rolled: 4.07 kg; lognormal variance with pedigree 0.0546, pedigree (2,4,5,5,1)
  Questionnaire
  EcoSpold01Location=RER
  Uncertainty: Questionnaire
  properties: carbon content, fossil 0.0008, dry mass 1 kg, wet mass 1 kg
  note on carbon content, fossil: Stainless steel model is the grade 304 steel (18/8 stainless, 18% chromium 8% nickel; max. 0.08% C)
- sheet rolling, aluminium: 22.9 kg; lognormal variance with pedigree 0.056, pedigree (3,4,5,5,1)
  EcoSpold01Location=RER
  Questionnaire, estimations
  Uncertainty: Questionnaire, estimations
- powder coat, steel: 3 m2; lognormal variance with pedigree 0.056, pedigree (3,4,5,5,1)
  Questionnaire, estimations
  EcoSpold01Location=RER
  Uncertainty: Questionnaire, estimations
- heat, district or industrial, other than natural gas: 0 MJ; pedigree (1,1,1,1,1)
  EcoSpold01Location=RER
  4,5,1,2,1,5; Data estimated from related companies
  properties: heating value, net 1 MJ
- steel, low-alloyed: 13.6 kg; lognormal variance with pedigree 0.0546, pedigree (2,4,5,5,1)
  EcoSpold01Location=RER
  Questionnaire
  Uncertainty: Questionnaire
  properties: carbon content, fossil 0.005, wet mass 1 kg, dry mass 1 kg
  note on carbon content, fossil: Low alloyed steel composition given in Tab. 3.2 ecoinvent v2.2 report 10_partII. Steel assumed to have a C content of 0.5%
- stone wool, packed: 5.06 kg; lognormal variance with pedigree 0.0546, pedigree (2,4,5,5,1)
  EcoSpold01Location=CH
  Questionnaire
  Uncertainty: Questionnaire
  properties: carbon content, fossil 0.015401, dry mass 1 kg, wet mass 1 kg
  note on carbon content, fossil: The chemical composition of the glass fibres used in the rock wool production is similar to the composition of naturally cooled volcano basalt and has a composition listed in Tab. 3.1 and 3.2 in ecoinvent v2.2 report 16, part XIV. Rock wool contains: a minimum of 96% mineral fibres,between 0.5 and 3.0 weight percent of phenolic resin depending on the specific product characteristics, and about 0.2 percent mineral oil (ecoinvent v2.2 report 16, part XIV). An average composition of 1.8% phenolic resin, 0.2% mineral oil, and 98% mineral fibres has been assumed and used to calculate C content of the rock wool
- steel, unalloyed: 24.6 kg; lognormal variance with pedigree 0.0546, pedigree (2,4,5,5,1)
  EcoSpold01Location=RER
  Questionnaire
  Uncertainty: Questionnaire
  properties: wet mass 1 kg, carbon content, fossil 0.0025, dry mass 1 kg
  note on carbon content, fossil: Unalloyed steels or carbon steels are those in which the level of an individual element in no case reaches or exceeds the limiting concentration given in Tab. 3.1 ecoinvent v2.2 report 10_partII. Assumed to have a C content of 0.25%
- injection moulding: 0.21 kg; lognormal variance with pedigree 0.0546, pedigree (2,4,5,5,1)
  EcoSpold01Location=RER
  Questionnaire
  Uncertainty: Questionnaire
- copper, cathode: 0.715 kg; lognormal variance with pedigree 0.056, pedigree (3,4,5,5,1)
  EcoSpold01Location=RER
  Questionnaire, estimations
  Uncertainty: Questionnaire, estimations
  properties: dry mass 1 kg, wet mass 1 kg
- waste rubber, unspecified: -0.005, -0.005 kg (2 entries); lognormal variance with pedigree 0.072, pedigree (4,4,5,5,1)
  (same comment as for waste rubber, unspecified)
  production volume 0.03 kg
- heat, district or industrial, natural gas: 1.43802, 34.4577, 93.3043 MJ (3 entries); lognormal variance with pedigree 0.078, pedigree (4,5,5,5,1)
  (same comment as for heat, district or industrial, natural gas)
- electricity, medium voltage: 0.377366, 0.0723625, 1.66156, 5.50112, 1.21482, 17.6684, 2.49037, 8.114 kWh (8 entries); lognormal variance with pedigree 0.11, pedigree (3,5,5,5,3)
  (same comment as for electricity, medium voltage)
- heat, district or industrial, other than natural gas: 0.0511193, 3.08683, 126.062 MJ (3 entries); lognormal variance with pedigree 0.072, pedigree (1,1,5,5,1)
  EcoSpold01Location=RER
  4,5,1,2,1,5; Data estimated from related companies

## Sampling procedure
Technical information of producer. Data of one common product used.

## Extrapolations
none This dataset has been copied from an original dataset covering the geography CH. The uncertainty has been adjusted accordingly.

## Review by Rolf Frischknecht 2007-08-16
passed
none
