# glued laminated timber production, average glue mix

Dataset: EcoSpold 2, unit process
Geography: RoW
Time period: 2012-01-01 to 2021-12-31
Technology level: current
Classification: ISIC rev.4 ecoinvent: 1621:Manufacture of veneer sheets and wood-based panels
Synonyms: Brettschichtholz (Standardträger)
Tags: Swiss brush-up completed
Scenario: Business-as-Usual
System model: Allocation, cut-off by classification
Generated by: Frank Werner
Database: ecoinvent
isCopyrightProtected: true
accessRestrictedTo: 1

## General comment
This dataset represents the global production of glued laminated timber (glulam), it is a copy of the corresponding dataset for Europe without Switzerland. The data are based on glued laminated timber production sites in Germany.
Glued laminated timber, also called glulam, is a type of structural engineered wood product comprising a number of layers of dimenstional sawn timber bonded together with durable, moisture-resistant structural adhesives.
By laminating a number of smaller pieces of sawn timber, a single large, strong, structural member is manufactured from smaller pieces. These structural members are used as vertical columns or horizontal beams (standard forms), as well as curved, arched shapes (special forms). Glulam is readily produced in curved shapes and is available in a range of species and appearance characteristics to meet varied end-use requirements. Connections are usually made with bolts or plain steel dowels and steel plates.
Glulam is distinct from Cross Laminated Timber (CLT), for which layers of sawn timber are glued in perpendicular orientation to adjacent layers.
Reference:
Rüter, S. and S. Diederichs (2012): Ökobilanz-Basisdaten für Bauprodukte aus Holz. Arbeitsbericht aus dem Institut für Holztechnologie und Holzbiologie Nr. 2012/1, Johann Heinrich von Thünen-Institut (vTI), Hamburg.
[This dataset is meant to replace the following datasets:
- glued laminated timber production, for indoor use, GLO, 1986 - 2011
- glued laminated timber production, for outdoor use, GLO, 1986 - 2002]

## Included activities start
From the reception at the factory gate of all materials and fuels used.

## Included activities end
This activity ends with the stpecial forms of glued laminated timber produced at the factory gate. The dataset includes the inputs to and outputs of the production processes and the available process emissions. Infrastructure is a rough estimate.

## Geography
Data for Germany extrapolated for global production.

## Technology
Technology reflects a sample of German glulam production.

## Parameters
- wood_fuel: 1306.4; lognormal variance with pedigree 0.0256, pedigree (1,3,1,1,1)
  input of wood fuel used in production; value calculated from Rüter et al. 2012

## Reference product
- glued laminated timber, average glue mix: 0 m3; By-product classification allocatable product
  Reference product. Plywood produced in Germany by processes representative for global average. The reference product is ready for delivery at the wooden board factory.
  A large number of materials can be produced with differing properties and areas of use. Typical uses are as construction plywood for wall, floor, and ceiling panels and also as panels for concrete shuttering, and decorative covering veneers in interior furnishings (e.g. wall panels or doors).
  production volume 7.95571e6 m3; name glulam_pv; = (3700000000/300)-2*350000
    Global market size of total glued laminated timber (all glue types) is estimated at 3.7billion USD in 2019 (https://www.imarcgroup.com/glue-laminated-timber-market). The global production volume was calculated using an average market price of roughly 300USD/m3. Since for Switzerland, more detailed information on glued laminated timber production was available, Swiss glued laminated timber production is split into 2 datasets (glued laminated timber, MUF-glue and glued laminated timber, PUR glue) each with an annual production volume of 350000 Kg. This PV was subtracted from the global annual PV since glued laminated timber, MUF-glue and glued laminated timber, PUR-glue have separate markets.
  property heating value, net 5537.41 MJ
    LHV is calculated based on the Carbon content of the product. More details can be found on the respective documentation.The property is based on a value of 12.47MJ/kg
  property price 298 EUR2005
    Temporary price data. Calculated as 90% of purchasers price based on: Price for plywood applied (from 2004 World Import/Export (USD/cubicmeter) from FaoStat http://faostat.fao.org/site/626/default.aspx#ancor, accessed 14th June 2010)
  property carbon content 0.459842
    carbon content on a dry matter basis (reserved; not for manual entry)
  property true value 298
    allocation property applied in "true value" allocation // value calculated from revenue
  properties: dry mass 404.4 kg, water content 0.0979228, carbon content, fossil 0.01791, water in wet mass 39.6 kg, carbon content, non-fossil 0.441932, wet mass 444 kg, carbon allocation 185.96 kg
- wood chips, dry, measured as dry mass: 1 kg; name m_wood_chips; By-product classification allocatable product; CPC 31230: Wood in chips or particles; pedigree (1,1,1,1,1)
  Literature value; sample from Germany
  production volume 9.35874e8 kg; = m_wood_chips*glulam_pv
    Calculated from production volume of reference product using the relative outputs.
  property price 0.107 EUR2005; name m_wood_chips_price_EUR2005
    Expert judgement (Urs Luginbühl, Swiss Sawmilling industry, personal communication in June 2014). Wood chips from softwood should have a price of 0.101 EUR/kg. Woodchips from hardwood should have a price of 0.112 EUR/kg. Average of these two values is used. Cross-reference; FAOSTAT database; http://faostat.fao.org/site/626/DesktopDefault.aspx?PageID=626#ancor; Average import/export prices of EU for 'chips and particles'. Price: 48.76 Euro/m3. The density of the wood chips is 650 kg/m3. The price is recalculated accordingly.
  property heating value, net 9.99 MJ
    LHV is calculated based on the Carbon content of the product. More details can be found on the respective documentation.
  property carbon content 0.494
    carbon content on a dry matter basis (reserved; not for manual entry)
  property true value 12.5725; name m_wood_chips_true_value
    allocation property applied in "true value" allocation // value calculated from revenue
  properties: water content 0.4, wet mass 1.4 kg, carbon content, fossil 0, water in wet mass 0.4 kg, carbon content, non-fossil 0.494, dry mass 1 kg, carbon allocation 0.494 kg

## Inputs from technosphere
- residual wood, dry: 2.14453e-6 m3; = 3.42352941176471/550; lognormal variance with pedigree 0.0112, pedigree (2,1,4,5,1)
  Literature value; sample from Germany. Amount in kg/dry mass
  properties: wet mass 632.5 kg, water content 0.15, heating value, net 8030.06 MJ, carbon content, non-fossil 0.494, dry mass 550 kg
- heat, district or industrial, natural gas: 0 MJ; pedigree (1,1,1,1,1)
  Fuel input, converted to heat output
  properties: heating value, net 1 MJ
- electricity, medium voltage: 0 kWh; pedigree (1,1,1,1,1)
  Literature value; sample from Germany
- heat, district or industrial, other than natural gas: 0.0407651 MJ; lognormal variance with pedigree 0.0112, pedigree (1,3,4,5,1)
  Fuel input, converted to heat output
  properties: heating value, net 1 MJ
- sawnwood, softwood, raw: 0.000227042 m3; lognormal variance with pedigree 0.0112, pedigree (2,1,4,5,1)
  Literature value; sample from Germany
  properties: wet mass 658.24 kg, heating value, net 5130.57 MJ, dry mass 387.2 kg, carbon content, non-fossil 0.494, water content 0.7
- polyurethane adhesive: 0.000143322 kg; lognormal variance with pedigree 0.0112, pedigree (1,3,4,5,1)
  part of glueing system (inventoried as averaged production average in Europe)
  properties: heating value, net 30.67 MJ, wet mass 1 kg, carbon content, fossil 0.72, dry mass 1 kg
- synthetic rubber: 4.61664e-5 kg; name m_rubber; lognormal variance with pedigree 0.2106, pedigree (5,5,5,5,5)
  Literature value; sample from Germany
  property carbon content, fossil 0.871949; name C_content_fossil_rubber
  properties: heating value, net 26.42 MJ, wet mass 1 kg, dry mass 1 kg
  note on carbon content, fossil: EPDM (Ethylene-propene-diene terpolymer) rubber is a terpolymer of ethylene, propene, and a diene with the residual unsaturated portion of the diene in the side chain (ecoinvent v2.2 report 7-part XX & Ullmann). Chemical formula (deduced from Evidences of Solvent-Induced Miscibility in Polychloroprene-co-Ethylene-Propene Diene Terpolymer Blends, Dubey et al., Journal of Applied Polymer Science, 2009, 111:1884-1891): C20H35
- waste rubber, unspecified: 0 kg; name w_rubber; pedigree (1,1,1,1,1)
  calculated from rubber input
  production volume 0 kg
    Calculated from production volume of reference product using the relative outputs.
  property price 0 EUR2005; name w_rubber_price_EUR2005
  property dry mass 1 kg; name w_rubber_DM
  properties: wet mass 1 kg, heating value, net 27.19 MJ, carbon content, fossil 0.853
  note on heating value, net: Value taken from the general comment of the treatment dataset.
- sawnwood, board, softwood, raw, dried (u=10%): 0 m3; pedigree (1,1,1,1,1)
  Literature value; sample from Germany
  property water content 0.00118132; name water_content
  property wet mass 418.67 kg; name WM
  property dry mass 418.176 kg; name basic_wood_d
  property water in wet mass 0.494 kg; name WWM
  properties: carbon content, non-fossil 0.494, heating value, net 5700.67 MJ
  note on heating value, net: Assumed equal to "sawnwood, softwood, dried (u=10%), planed".The property is based on a value of 13.38MJ/kg
- waste wood, post-consumer: 0.000442961 kg; lognormal variance with pedigree 0.0112, pedigree (2,1,4,5,1)
  Literature value; sample from Germany
  properties: wet mass 1.4 kg, water content 0.4, carbon content, non-fossil 0.494, dry mass 1 kg, heating value, net 9.99 MJ
- wastewater from particleboard production: -1.19171e-5 m3; name wastewater; lognormal variance with pedigree 0.0446, pedigree (1,4,5,5,1)
  Literature value; sample from Germany
  production volume 275505 m3; = wastewater*glulam_pv
    Calculated from production volume of reference product using the relative outputs.
  property price 0 EUR2005; name wastewater_price_EUR2005
  properties: water content 2962.17, dry mass 0.337476 kg, carbon content, non-fossil 0.377131, wet mass 1000 kg
- waste mineral oil: 0 kg; name w_mineral_oil; pedigree (1,1,1,1,1)
  hydraulic oil and engine oil/grease; adjusted for water content of waste oil
  production volume 0 kg
    Calculated from production volume of reference product using the relative outputs.
  property price 0 EUR2005; name w_mineral_oil_price_EUR2005
  properties: water content 0.111111, wet mass 1 kg, heating value, net 34.7 MJ, carbon content, fossil 0.864444, dry mass 0.9 kg
  note on carbon content, fossil: Tab A.6, ecoinvent v2.2 report 13_I. C content has been calculated after data in the tables, and then referred to 1 kg DM
- wood ash mixture, pure: -0.000225044 kg; name w_wood_ash; = (0.000666666666666667*wood_fuel/1.33333)*-1; lognormal variance with pedigree 0.0112, pedigree (1,3,4,5,1)
  Amount derived from DS "Heat, district or industrial, other than natural gas {CH}| heat production, wood chips from industry, at furnace 300kW | Cut-off, U" on heat generation from industrial residual wood per MJ, multiplied by the input of wood fuel (direct wood fuel plus production residues ) scaled to reflect wood input per generated heat
  production volume 5.19864e6 kg; = w_wood_ash*glulam_pv
    Calculated from production volume of reference product using the relative outputs.
  property price 0 EUR2005; name w_wood_ash_price_EUR2005
  properties: carbon content, non-fossil 0.012, wet mass 1 kg, dry mass 1 kg
- diesel, burned in building machine: 0.016294 MJ; lognormal variance with pedigree 0.0446, pedigree (1,4,5,5,1)
  Literature value; sample from Germany
  properties: heating value, net 1 MJ
- sawlog and veneer log, softwood, measured as solid wood under bark: 0 m3; pedigree (1,1,1,1,1)
  Literature value; sample from Germany
  properties: carbon content, non-fossil 0.494, dry wood density 440 kg/m3, apparent wood density 619.52 kg/m3, wet mass 776.751 kg, dry mass 456.912 kg, water content 0.7, heating value, net 4483.78 MJ, basic wood density 402.083
  note on heating value, net: Value based on the dataset "softwood forestry, mixed species, sustainable forest management"The property is based on a value of 11.58MJ/kg
- wooden board factory, organic bonded boards: 1.14727e-11 unit; lognormal variance with pedigree 0.398, pedigree (4,5,5,5,4)
  Default value from ecoinvent 2.2
- furnace, wood chips, with silo, 300kW: 7.79779e-9 unit; = 2.31E-08*wood_fuel/1.33333; lognormal variance with pedigree 0.0106, pedigree (1,1,4,5,1)
  Infrastructure factor from DS "Heat, district or industrial, other than natural gas {CH}| heat production, wood chips from industry, at furnace 5000kW | Cut-off, U", multiplied by the input of wood fuel (direct wood fuel plus production residues); correction for assumed efficiency as original value refers to heat output
- phenolic resin: 0.000111971 kg; lognormal variance with pedigree 0.0112, pedigree (1,3,4,5,1)
  part of glueing system (inventoried as averaged production average in Europe)
  properties: carbon content, fossil 0.772277, heating value, net 33.57 MJ, wet mass 1 kg, dry mass 1 kg
  note on carbon content, fossil: (C6H5OH)-CH2-(C6H5OH) was considered to be the basic structure in phenolic resin (ecoinvent v2.2 report 8-part 61). C13H14O2, MW=202 g/mol
- tap water: 0 kg; name m_tapwater; pedigree (1,1,1,1,1)
  Literature value; sample from Germany
  properties: dry mass 0.000337476 kg, carbon content, fossil 0.00178991, water content 2962.17, wet mass 1 kg
  note on carbon content, fossil: Bicarbonate content is 2.93 mol/m3. CO2 content is 0.1 mol/m3 (ecoinvent v2.2 report 8, Tab 93.1).
- municipal solid waste: 0 kg; name w_MSW; pedigree (1,1,1,1,1)
  Literature value; sample from Germany
  Uncertainty: a
  production volume 0 kg
    Calculated from production volume of reference product using the relative outputs.
  properties: carbon content, fossil 0.171549, wet mass 1 kg, heating value, net 11.74 MJ, carbon content, non-fossil 0.261655, dry mass 0.771 kg, water content 0.297017
  note on carbon content, fossil: MSW composition in tab 4.1, ecoinvent v2.2 report 13_I. C content referred to 1 kg DM
- melamine urea formaldehyde adhesive: 0.00300495 kg; lognormal variance with pedigree 0.0446, pedigree (1,4,5,5,1)
  Literature value; sample from Germany
  properties: dry mass 1 kg, carbon content, fossil 0.311708, wet mass 1 kg, heating value, net 14.65 MJ
- lubricating oil: 3.51416e-5 kg; name m_lubricating_oil; lognormal variance with pedigree 0.0206, pedigree (4,4,4,5,1)
  Literature value; sample from Germany
  property dry mass 1 kg; name DM_oil
  properties: wet mass 1 kg, carbon content, fossil 0.75, heating value, net 40.2 MJ
  note on carbon content, fossil: Lubricating oil is produced from diesel. C-content/dry mass of fats and oils considered 75%, from: ecoinvent v2.2 report, n 15a, pg 40
  note on heating value, net: Literature value, Source: IPCC 2006, 2006 IPCC Guidelines for National Greenhouse Gas Inventories, Prepared by the National Greenhouse Gas Inventories Programme, Eggleston H.S., Buendia L., Miwa K., Ngara T. and Tanabe K. (eds). Published: IGES, Japan
- heat, district or industrial, natural gas: 6.91833e-7, 0.00223872 MJ (2 entries); lognormal variance with pedigree 0.0112, pedigree (1,3,4,5,1)
  Fuel input, converted to heat output
- electricity, medium voltage: 0.000389152, 7.46227e-5, 0.000608304, 0.00125276, 0.0182203, 0.00256815, 0.00741821 kWh (7 entries); lognormal variance with pedigree 0.0446, pedigree (1,4,5,5,1)
  Literature value; sample from Germany
- waste rubber, unspecified: -1.85997e-6, -4.43064e-5 kg (2 entries); lognormal variance with pedigree 0.1786, pedigree (4,5,5,5,5)
  calculated from rubber input
  production volume 1.06729e6 kg
  properties: wet mass 1 kg, heating value, net 27.19 MJ, carbon content, fossil 0.853, dry mass 1 kg
- sawnwood, board, softwood, raw, dried (u=10%): 1.21508e-5, 0.000138751 m3 (2 entries); lognormal variance with pedigree 0.0112, pedigree (2,1,4,5,1)
  Literature value; sample from Germany
  properties: water content 0.00118132, wet mass 418.67 kg, dry mass 418.176 kg, carbon content, non-fossil 0.494, heating value, net 5700.67 MJ
- waste mineral oil: -3.29145e-7, -3.48124e-5 kg (2 entries); lognormal variance with pedigree 0.0118, pedigree (2,3,4,5,1)
  hydraulic oil and engine oil/grease; adjusted for water content of waste oil
  production volume 812418 kg
- sawlog and veneer log, softwood, measured as solid wood under bark: 6.90166e-8, 0.000105356 m3 (2 entries); lognormal variance with pedigree 0.0112, pedigree (2,1,4,5,1)
  Literature value; sample from Germany
- tap water: 1.28771e-7, 1.15201e-8, 2.56173e-8, 6.45966e-7, 1.68047e-8, 4.78005e-8, 7.39212e-6 kg (7 entries); lognormal variance with pedigree 0.0118, pedigree (2,3,4,5,1)
  Literature value; sample from Germany
- municipal solid waste: -3.43395e-8, -4.90732e-8, -9.63836e-5 kg (3 entries); lognormal variance with pedigree 0.1318, pedigree (2,3,4,5,5)
  Literature value; sample from Germany
  Uncertainty: a
  production volume 2.23017e6 kg

## Inputs from nature
- Carbon dioxide, non-fossil, resource correction [natural resource, in air]: 1.58177 kg; pedigree (1,1,1,1,1)
  This exchange has been added after economic allocation in order to re-balance the non-fossil carbon dioxide resource extraction.
- Water, cooling, unspecified natural origin [natural resource, in water]: 1.19092e-5 m3; name water_cooling_UNO_input; lognormal variance with pedigree 0.0446, pedigree (1,4,5,5,1)
  Literature value; sample from Germany

## Emissions to nature
- Magnesium [air, unspecified]: 1.62032e-7 kg; name magnesium; = 0.00000048*wood_fuel/1.33333; lognormal variance with pedigree 0.6932, pedigree (2,3,5,5,1)
  Emission factor from DS "Heat, district or industrial, other than natural gas {CH}| heat production, wood chips from industry, at furnace 300kW | Cut-off, U" on heat generation from industrial residual wood per MJ, multiplied by the input of wood fuel (direct wood fuel plus production residues ) scaled to reflect wood input per generated heat.
- Chromium VI [air, unspecified]: 1.80035e-11 kg; = 5.33333333333334E-11*wood_fuel/1.33333; lognormal variance with pedigree 0.6932, pedigree (2,3,5,5,1)
  (same comment as for Magnesium)
- Particulates, > 2.5 um, and < 10um [air, unspecified]: 4.0508e-5 kg; = 0.00012*wood_fuel/1.33333; lognormal variance with pedigree 0.1632, pedigree (2,3,5,5,1)
  (same comment as for Magnesium)
- Nickel [air, unspecified]: 2.70053e-9 kg; name nickel; = 0.000000008*wood_fuel/1.33333; lognormal variance with pedigree 0.6932, pedigree (2,3,5,5,1)
  (same comment as for Magnesium)
- Dinitrogen monoxide [air, unspecified]: 1.12522e-6 kg; = 3.33333333333334E-06*wood_fuel/1.33333; lognormal variance with pedigree 0.0832, pedigree (2,3,5,5,1)
  (same comment as for Magnesium)
- m-Xylene [air, unspecified]: 5.40106e-8 kg; name mxylene; = 0.00000016*wood_fuel/1.33333; lognormal variance with pedigree 0.0832, pedigree (2,3,5,5,1)
  (same comment as for Magnesium)
- Hydrocarbons, aliphatic, alkanes, unspecified [air, unspecified]: 4.09581e-7 kg; = 1.21333333333333E-06*wood_fuel/1.33333; lognormal variance with pedigree 0.0832, pedigree (2,3,5,5,1)
  (same comment as for Magnesium)
- Carbon dioxide, non-fossil [air, unspecified]: 0.0481595 kg; = 0.142666666666666*wood_fuel/1.33333; lognormal variance with pedigree 0.0438, pedigree (2,3,5,5,1)
  (same comment as for Magnesium)
- Manganese [air, unspecified]: 7.65151e-8 kg; name manganese; = 2.26666666666667E-07*wood_fuel/1.33333; lognormal variance with pedigree 0.6932, pedigree (2,3,5,5,1)
  (same comment as for Magnesium)
- Benzene, ethyl- [air, unspecified]: 1.35027e-8 kg; = 0.00000004*wood_fuel/1.33333; lognormal variance with pedigree 0.0832, pedigree (2,3,5,5,1)
  (same comment as for Magnesium)
- Sodium [air, unspecified]: 5.85115e-7 kg; = 1.73333333333334E-06*wood_fuel/1.33333; lognormal variance with pedigree 0.6932, pedigree (2,3,5,5,1)
  (same comment as for Magnesium)
- Calcium [air, unspecified]: 2.63302e-6 kg; = 0.0000078*wood_fuel/1.33333; lognormal variance with pedigree 0.6932, pedigree (2,3,5,5,1)
  (same comment as for Magnesium)
- Chromium [air, unspecified]: 1.78235e-9 kg; = 5.28000000000001E-09*wood_fuel/1.33333; lognormal variance with pedigree 0.6932, pedigree (2,3,5,5,1)
  (same comment as for Magnesium)
- Dioxins, measured as 2,3,7,8-tetrachlorodibenzo-p-dioxin [air, unspecified]: 1.39527e-14 kg; = 4.13333333333333E-14*wood_fuel/1.33333; lognormal variance with pedigree 0.3432, pedigree (2,3,5,5,1)
  (same comment as for Magnesium)
- Benzo(a)pyrene [air, unspecified]: 2.25044e-10 kg; = 6.66666666666667E-10*wood_fuel/1.33333; lognormal variance with pedigree 0.3432, pedigree (2,3,5,5,1)
  (same comment as for Magnesium)
- Toluene [air, unspecified]: 1.35027e-7 kg; = 0.0000004*wood_fuel/1.33333; lognormal variance with pedigree 0.0832, pedigree (2,3,5,5,1)
  (same comment as for Magnesium)
- Carbon monoxide, non-fossil [air, unspecified]: 0.000225044 kg; = 0.000666666666666667*wood_fuel/1.33333; lognormal variance with pedigree 0.6932, pedigree (2,3,5,5,1)
  (same comment as for Magnesium)
- Particulates, < 2.5 um [air, unspecified]: 4.0508e-5 kg; = 0.00012*wood_fuel/1.33333; lognormal variance with pedigree 0.3432, pedigree (2,3,5,5,1)
  (same comment as for Magnesium)
- PAH, polycyclic aromatic hydrocarbons [air, unspecified]: 4.99598e-9 kg; name pah; = 0.0000000148*wood_fuel/1.33333; lognormal variance with pedigree 0.3432, pedigree (2,3,5,5,1)
  (same comment as for Magnesium)
- Ammonia [air, unspecified]: 7.78653e-7 kg; = 2.30666666666667E-06*wood_fuel/1.33333; lognormal variance with pedigree 0.0832, pedigree (2,3,5,5,1)
  (same comment as for Magnesium)
- Formaldehyde [air, unspecified]: 4.56593e-6 kg; = 1.73333333333334E-07*wood_fuel/1.33333+0.013083; lognormal variance with pedigree 0.1632, pedigree (2,3,5,5,1)
  Emission factor from DS "Heat, district or industrial, other than natural gas {CH}| heat production, wood chips from industry, at furnace 300kW | Cut-off, U" on heat generation from industrial residual wood per MJ, multiplied by the input of wood fuel (direct wood fuel plus production residues ) scaled to reflect wood input per generated heat plus estimated emissions from wood and glue drying processes (according to Rüter & Diederichs 2012).
- Chlorine [air, unspecified]: 8.1016e-8 kg; = 0.00000024*wood_fuel/1.33333; lognormal variance with pedigree 0.6932, pedigree (2,3,5,5,1)
  (same comment as for Magnesium)
- Nitrogen oxides [air, unspecified]: 8.1016e-5 kg; = 0.00024*wood_fuel/1.33333; lognormal variance with pedigree 0.0832, pedigree (2,3,5,5,1)
  (same comment as for Magnesium)
- Copper [air, unspecified]: 9.90195e-9 kg; = 2.93333333333334E-08*wood_fuel/1.33333; lognormal variance with pedigree 0.6932, pedigree (2,3,5,5,1)
  (same comment as for Magnesium)
- Phenol, pentachloro- [air, unspecified]: 3.64572e-12 kg; = 0.0000000000108*wood_fuel/1.33333; lognormal variance with pedigree 0.0832, pedigree (2,3,5,5,1)
  (same comment as for Magnesium)
- Benzene [air, unspecified]: 4.09581e-7 kg; = 1.21333333333333E-06*wood_fuel/1.33333; lognormal variance with pedigree 0.0832, pedigree (2,3,5,5,1)
  (same comment as for Magnesium)
- Hydrocarbons, aliphatic, unsaturated [air, unspecified]: 1.39527e-6 kg; = 4.13333333333333E-06*wood_fuel/1.33333; lognormal variance with pedigree 0.0832, pedigree (2,3,5,5,1)
  (same comment as for Magnesium)
- Cadmium [air, unspecified]: 3.15062e-10 kg; = 9.33333333333334E-10*wood_fuel/1.33333; lognormal variance with pedigree 0.6932, pedigree (2,3,5,5,1)
  (same comment as for Magnesium)
- Acetaldehyde [air, unspecified]: 2.74554e-8 kg; = 8.13333333333333E-08*wood_fuel/1.33333; lognormal variance with pedigree 0.0832, pedigree (2,3,5,5,1)
  (same comment as for Magnesium)
- Bromine [air, unspecified]: 2.70053e-8 kg; = 0.00000008*wood_fuel/1.33333; lognormal variance with pedigree 0.6932, pedigree (2,3,5,5,1)
  (same comment as for Magnesium)
- Zinc [air, unspecified]: 1.35027e-7 kg; = 0.0000004*wood_fuel/1.33333; lognormal variance with pedigree 0.6932, pedigree (2,3,5,5,1)
  (same comment as for Magnesium)
- Methane, non-fossil [air, unspecified]: 2.0254e-6 kg; = 0.000006*wood_fuel/1.33333; lognormal variance with pedigree 0.0832, pedigree (2,3,5,5,1)
  (same comment as for Magnesium)
- NMVOC, non-methane volatile organic compounds, unspecified origin [air, unspecified]: 3.15062e-6 kg; name nmvoc; = 9.33333333333334E-06*wood_fuel/1.33333; lognormal variance with pedigree 0.0832, pedigree (2,3,5,5,1)
  (same comment as for Magnesium)
- Phosphorus [air, unspecified]: 1.35027e-7 kg; = 0.0000004*wood_fuel/1.33333; lognormal variance with pedigree 0.0832, pedigree (2,3,5,5,1)
  (same comment as for Magnesium)
- Benzene, hexachloro- [air, unspecified]: 3.24064e-15 kg; = 9.60000000000001E-15*wood_fuel/1.33333; lognormal variance with pedigree 0.0832, pedigree (2,3,5,5,1)
  (same comment as for Magnesium)
- Sulfur dioxide [air, unspecified]: 1.12522e-6 kg; = 3.33333333333334E-06*wood_fuel/1.33333; lognormal variance with pedigree 0.0438, pedigree (2,3,5,5,1)
  (same comment as for Magnesium)
- Lead [air, unspecified]: 1.12522e-8 kg; = 3.33333333333333E-08*wood_fuel/1.33333; lognormal variance with pedigree 0.6932, pedigree (2,3,5,5,1)
  (same comment as for Magnesium)
- Water [air, unspecified]: 3.21715e-5 m3; = 0.00006*wood_fuel/1.33333+m_tapwater/1000+water_cooling_UNO_input; lognormal variance with pedigree 0.132, pedigree (4,4,5,5,4)
  Water emissions from the combustion of the wood (emission per MJ, scaled to wood input and extrapolated from wood input to heat generated) plus tap water input plus input of cooling water
- Mercury [air, unspecified]: 1.35027e-10 kg; name mercury; = 0.0000000004*wood_fuel/1.33333; lognormal variance with pedigree 0.6932, pedigree (2,3,5,5,1)
  (same comment as for Magnesium)
- Potassium [air, unspecified]: 1.05321e-5 kg; = 0.0000312*wood_fuel/1.33333; lognormal variance with pedigree 0.0832, pedigree (2,3,5,5,1)
  (same comment as for Magnesium)
- Arsenic [air, unspecified]: 4.50089e-10 kg; = 1.33333333333333E-09*wood_fuel/1.33333; lognormal variance with pedigree 0.6932, pedigree (2,3,5,5,1)
  (same comment as for Magnesium)
- Fluorine [air, unspecified]: 2.25044e-8 kg; = 6.66666666666667E-08*wood_fuel/1.33333; lognormal variance with pedigree 0.0832, pedigree (2,3,5,5,1)
  (same comment as for Magnesium)
- Acetone [air, unspecified]: 7.14889e-6 kg; lognormal variance with pedigree 0.2106, pedigree (2,5,5,5,4)
  Estimation: emissions from PUR adhesives
  Uncertainty: e

## Sampling procedure
Literature; emissions profile per MJ wood input from PSI (2014)

## Extrapolations
See Geography and Technology
