# diesel, burned in diesel-electric generating set, 18.5kW

Dataset: EcoSpold 2, unit process
Geography: GLO
Time period: 2010-01-01 to 2021-12-31
Technology level: current
Classification: EcoSpold01Categories: oil/fuels
Classification: ISIC rev.4 ecoinvent: 3510:Electric power generation, transmission and distribution
Scenario: Business-as-Usual
System model: Allocation, cut-off by classification
Generated by: Tereza Levova
Database: ecoinvent
isCopyrightProtected: true
accessRestrictedTo: 1

## General comment
This dataset represent the operation of diesel-electric generating set, 18.5kW. It was build primarily to serve as an energy supply set for a refrigerated container (reefer), but can be used for other purposes, where energy should be supplied from a set with similar power. The output of the dataset should be considered as MJ thermal. For the reefers a generator efficiency of 35.1% is assumed
Majority of the values related to the emissions are taken and scaled from the diesel, burned in diesel-electric generating set, 10MW/GLO dataset.

## Included activities start
This activity starts with diesel consumption.

## Included activities end
Diesel consumption, emissions and infrastructure for the use of diesel in electric generating sets.

## Parameters
- diesel consumption in disel, burned in d-e genset, 10MW: 0.0234 kg; name diesel_consumption_10MW
  Value coppied from another dataset. The diesel, burned in diesel-electric generating set, 10MW used as a proxy for this dataset needs 0.0234kg of diesel to produce 1MJ of energy.

## Reference product
- diesel, burned in diesel-electric generating set, 18.5kW: 1 MJ; name diesel_burned_RP; CPC 17100: Electrical energy; By-product classification allocatable product
  Represents thermal energy.
  production volume 4.7304e9 MJ; name diesel_burned_RP_PV; = ((1.6*1000000*0.0625)/2)*(9.4608E+05/10)
    Estimated value.
    There are 50000 diesel-electric generating sets produced yearly. The lifetime capacity of such set is 9.4608E+05 MJ. Assuming lifetime of 10 years the yearly production of one set is 9.4608E+04MJ.
    Production volume of the diesel-electric generating sets;
    1.6 million TEU (Twenty-foot Equivalent unit) is newly added to the total capacity of shipping containers in the world (World Shipping Council, http://www.worldshipping.org/about-the-industry/containers/global-container-fleet, accessed 20141014).
    Out of that 6.25% are reefers (refrigerated containers).
    One 40-food, high-cube container has a capacity of 2 TEU.
  property price 0.020598 EUR2005; name diesel_burned_RP_price_EUR2005
    Calculated based on inputs: The price of the product has been calculated as a sum of the values of the material and energy inputs for this product. This value is therefore a rough estimation. It may underestimate the real price since there are additional expenses when producing any product. These expences can include for example labour costs, treatment of waste materials and profit for the producer. Please consider carefully whether this level of data quality is acceptable for your application.

## Inputs from technosphere
- waste mineral oil: 0 kg; name BP_amount_1
  production volume 0 kg
    Calculated from production volume of reference product using the relative outputs.
  property price 0 EUR2005; name BP_amount_1_price_EUR2005
  properties: water content 0.111111, carbon content, fossil 0.864444, wet mass 1 kg, dry mass 0.9 kg, heating value, net 34.7 MJ
  note on carbon content, fossil: Tab A.6, ecoinvent v2.2 report 13_I. C content has been calculated after data in the tables, and then referred to 1 kg DM
  note on heating value, net: Value taken from the general comment of the treatment dataset.
- diesel-electric generating set, 18.5kW: 1.17444e-6 unit; = 1/( genset_lifetime_capacity* genset_utilization_rate); lognormal variance with pedigree 0.0432, pedigree (3,3,5,1,1)
  Calculated value.
  property weight 817 kg; name weight_RP
  property utilization rate 0.9; name genset_utilization_rate
  property lifetime capacity [MJ] 946080 MJ; name genset_lifetime_capacity; = 3*24*3.6*365*genset_RP_lifetime
  property lifetime 10 year; name genset_RP_lifetime
  note on weight: Literature value. The weight of Carrier RG15 Genset (http://www.carrier.com/container-refrigeration/en/worldwide/products/generator-sets/RG15-Tier-4/, accessed 20141218).
  note on utilization rate: The utilization rate represents a fraction of a lifetime of infrastructure, when the infrastructure is actually being used. Estimated.
  note on lifetime capacity [MJ]: Estimated. It is estimated, that the genset is on average supplying 3kW of electricity which makes 72kWh/day.
  note on lifetime: Estimated to be the same as the lifetime of a reefer (refrigerated container).
- lubricating oil: 0 kg; name oil_in; pedigree (1,1,1,1,1)
  Estimated.
  Calculated from the diesel, burned in diesel-electric generating set, GLO dataset. In this dataset the amount of diesel needed is 0.0234kg in order to produce 1MJ. In this datasets the amount of diesel needed is 0.0667kg. All the emissions are scaled accordingly.
  properties: dry mass 1 kg, carbon content, fossil 0.75, wet mass 1 kg, heating value, net 40.2 MJ
  note on carbon content, fossil: Lubricating oil is produced from diesel. C-content/dry mass of fats and oils considered 75%, from: ecoinvent v2.2 report, n 15a, pg 40
  note on heating value, net: Literature value, Source: IPCC 2006, 2006 IPCC Guidelines for National Greenhouse Gas Inventories, Prepared by the National Greenhouse Gas Inventories Programme, Eggleston H.S., Buendia L., Miwa K., Ngara T. and Tanabe K. (eds). Published: IGES, Japan
- diesel: 0.0234 kg; name diesel_in; = diesel_consumption_10MW; source Wild, Y. 2005; lognormal variance with pedigree 0.0432, pedigree (3,3,5,1,1)
  Estimated Value. Based on the diesel consumption in the dataset "diesel, burned in diesel-eletric generating set 10MW". Assumes an energy content of 42.735 MJ/kg diesel.
  properties: heating value, net 42.8 MJ, carbon content, fossil 0.865, dry mass 1 kg, wet mass 1 kg
  note on carbon content, fossil: C-content of diesel is 86.5% (ecoinvent v2.2 report 6_IV, Tab 3.14)
- waste mineral oil: -1.83909e-5, -4.55286e-7, -4.81538e-5 kg (3 entries)
  production volume 316937 kg
- lubricating oil: 1.1658e-5, 5.5342e-5 kg (2 entries); lognormal variance with pedigree 0.0432, pedigree (3,3,5,1,1)
  (same comment as for lubricating oil)

## Emissions to nature
- NMVOC, non-methane volatile organic compounds, unspecified origin [air, non-urban air or from high stacks]: 9.24e-5 kg; = 9.24E-05*(diesel_in/diesel_consumption_10MW); lognormal variance with pedigree 0.0432, pedigree (3,3,5,1,1)
  (same comment as for lubricating oil)
- Chromium [air, non-urban air or from high stacks]: 1.17e-9 kg; = 1.17E-09*(diesel_in/diesel_consumption_10MW); lognormal variance with pedigree 0.0432, pedigree (3,3,5,1,1)
  (same comment as for lubricating oil)
- Carbon dioxide, fossil [air, non-urban air or from high stacks]: 0.073 kg; = 0.073*(diesel_in/diesel_consumption_10MW); lognormal variance with pedigree 0.0432, pedigree (3,3,5,1,1)
  (same comment as for lubricating oil)
- Zinc [air, non-urban air or from high stacks]: 2.34e-8 kg; = 2.34E-08*(diesel_in/diesel_consumption_10MW); lognormal variance with pedigree 0.0432, pedigree (3,3,5,1,1)
  (same comment as for lubricating oil)
- Sulfur dioxide [air, non-urban air or from high stacks]: 6.01e-5 kg; = 6.01E-05*(diesel_in/diesel_consumption_10MW); lognormal variance with pedigree 0.0432, pedigree (3,3,5,1,1)
  (same comment as for lubricating oil)
- Selenium [air, non-urban air or from high stacks]: 2.34e-10 kg; = 2.34E-10*(diesel_in/diesel_consumption_10MW); lognormal variance with pedigree 0.0432, pedigree (3,3,5,1,1)
  (same comment as for lubricating oil)
- Benzene [air, non-urban air or from high stacks]: 2e-8 kg; = 2.00E-08*(diesel_in/diesel_consumption_10MW); lognormal variance with pedigree 0.0432, pedigree (3,3,5,1,1)
  (same comment as for lubricating oil)
- Chromium VI [air, non-urban air or from high stacks]: 2.34e-12 kg; = 2.34E-12*(diesel_in/diesel_consumption_10MW); lognormal variance with pedigree 0.0432, pedigree (3,3,5,1,1)
  (same comment as for lubricating oil)
- Copper [air, non-urban air or from high stacks]: 3.97e-8 kg; = 3.97E-08*(diesel_in/diesel_consumption_10MW); lognormal variance with pedigree 0.0432, pedigree (3,3,5,1,1)
  (same comment as for lubricating oil)
- Particulates, < 2.5 um [air, non-urban air or from high stacks]: 0.00017 kg; = 0.00017*(diesel_in/diesel_consumption_10MW); lognormal variance with pedigree 0.3026, pedigree (2,1,3,1,1)
  (same comment as for lubricating oil)
- Nitrogen oxides [air, non-urban air or from high stacks]: 0.00138 kg; = 0.00138*(diesel_in/diesel_consumption_10MW); lognormal variance with pedigree 0.0432, pedigree (3,3,5,1,1)
  (same comment as for lubricating oil)
- Methane, fossil [air, non-urban air or from high stacks]: 1.67e-7 kg; = 1.67E-07*(diesel_in/diesel_consumption_10MW); lognormal variance with pedigree 0.0432, pedigree (3,3,5,1,1)
  (same comment as for lubricating oil)
- Cadmium [air, non-urban air or from high stacks]: 2.34e-10 kg; = 2.34E-10*(diesel_in/diesel_consumption_10MW); lognormal variance with pedigree 0.0432, pedigree (3,3,5,1,1)
  (same comment as for lubricating oil)
- Nickel [air, non-urban air or from high stacks]: 1.64e-9 kg; = 1.64E-09*(diesel_in/diesel_consumption_10MW); lognormal variance with pedigree 0.0432, pedigree (3,3,5,1,1)
  (same comment as for lubricating oil)
- Dinitrogen monoxide [air, non-urban air or from high stacks]: 6e-6 kg; = 6.00E-06*(diesel_in/diesel_consumption_10MW); lognormal variance with pedigree 0.0432, pedigree (3,3,5,1,1)
  (same comment as for lubricating oil)
- Carbon monoxide, fossil [air, non-urban air or from high stacks]: 0.00068 kg; = 0.00068*(diesel_in/diesel_consumption_10MW); lognormal variance with pedigree 0.0432, pedigree (3,3,5,1,1)
  (same comment as for lubricating oil)
- Benzo(a)pyrene [air, non-urban air or from high stacks]: 1e-10 kg; = 1.00E-10*(diesel_in/diesel_consumption_10MW); lognormal variance with pedigree 0.0432, pedigree (3,3,5,1,1)
  (same comment as for lubricating oil)
- Mercury [air, non-urban air or from high stacks]: 4.67e-10 kg; = 4.67E-10*(diesel_in/diesel_consumption_10MW); lognormal variance with pedigree 0.0432, pedigree (3,3,5,1,1)
  (same comment as for lubricating oil)

## Extrapolations
This dataset has been extrapolated from year 2014 to the year of the calculation (2021). The uncertainty has been adjusted accordingly.
