# treatment of waste polyethylene terephthalate, open dump, very wet infiltration class (1000mm)

Dataset: EcoSpold 2, unit process
Geography: GLO
Time period: 2006-01-01 to 2021-12-31
Technology level: current
Classification: ISIC rev.4 ecoinvent: 3821:Treatment and disposal of non-hazardous waste
Synonyms: municipal waste landfill
Scenario: Business-as-Usual
System model: Allocation, cut-off by classification
Share of production covered: 1 %
Generated by: Avraam Symeonidis
Database: ecoinvent
isCopyrightProtected: true
accessRestrictedTo: 1

## General comment
This dataset represents the activity of waste disposal of waste polyethylene terephtalate in a open dump. Recommended use of this dataset: For PET, which goes to disposal as part of unmanaged communal waste mixture. Larger amounts of clean, *already separated* PET could go to recycling, depending on country-specific situation. // Waste composition (wet, in ppm): upper heating value 23.13 MJ/kg; lower heating value 22.95 MJ/kg; H2O 2000; O 368750; H 63380; C 553640; S 147.87; N 6456.8; P n.a.; B n.a.; Cl 788.62; Br 69.004; F 11.829; I n.a.; Ag n.a.; As 1.873; Ba 49.289; Cd 3.2531; Co 31.052; Cr 5.4218; Cu 11.829; Hg 0.08872; Mn 17.744; Mo n.a.; Ni 3.9431; Pb 5.5203; Sb 159.2; Se 2.0701; Sn 0.98577; V 1281.5; Zn 68.676; Be 0.49289; Sc n.a.; Sr 87.241; Ti 985.77; Tl 0.39431; W n.a.; Si n.a.; Fe 98.577; Ca 295.73; Al 197.15; K n.a.; Mg n.a.; Na 1444.7; . // Share of carbon in waste that is biogenic 0%. Share of metals in waste not oxidised and bulk-recyclable (exclude very small or thin parts) Iron: 0%; Alu: 0%; Copper: 0%. Overall degradability of waste during 100 years: 1%.

## Included activities start
from final waste deposition (without transports to the site)

## Included activities end
Waste-specific short-term emissions to air via landfill gas and landfill leachate. Waste-specific long-term emissions from landfill.

## Geography
Given name of landfill location is 'infiltration class 5 very wet (2018)'. Landfill site with mean annual temperature (MAT) of 8 degC, mean annual precipitation (MAP) of 1900 mm/year, and net infiltration of 1000 mm/year.
Climate adjustments result in an alpha t (temperature) for permafrost areas of 0.999. Total climate adjustments with alpha pt of 0.999.

## Technology
This is an inventory for an open, uncontrolled waste dump for municipal solid waste. Ultimate average landfill height is 7 meters. Operation phase duration is 15 years.Percentage of landfill gas directly emitted is 100w%. A Methane Correction Factor (MCF) for landfill air emissions of 0.7057 is employed.
Leachate of the landfill is not treated. Based on average waste composition and climate data the end of carbonate phase is estimated to be reached 862 years after waste deposition.

## Reference product
- waste polyethylene terephthalate: -1 kg; CPC 39270: Waste, parings and scrap of plastics; By-product classification Waste; CAS 25038-59-9; pedigree (1,1,1,1,1)
  main reference product of this activity (supply of disposal service).
  Uncertainty: Uncertainty is not adjusted, as this is the refence product
  production volume 1 kg
    The amount of the annual production volume is a placeholder value. The contribution of this technology to the different local markets can be found in the markets themselves.
  property heating value, net 22.95 MJ
    Value taken from the general comment of the treatment dataset.
  property price 0 EUR2005
    Waste products are assigned a price of zero as they are assumed to require further treatment.
  property carbon content 0.55475
    carbon content on a dry matter basis (reserved; not for manual entry)
  properties: carbon content, fossil 0.55475, manganese content 1.7779e-5, iron content 9.8775e-5, fluorine content 1.1853e-5, cadmium content 3.2596e-6, hydrogen content 0.063507, arsenic content 1.8767e-6, sulfur content 0.00014816, oxygen content 0.36949, nitrogen content 0.0064698, chlorine content 0.0007902, heating value, gross 23.126 MJ, bromine content 6.9142e-5, copper content 1.1853e-5, chromium content 5.4326e-6, barium content 4.9387e-5, cobalt content 3.1114e-5, mercury content 8.8897e-8, sodium content 0.0014475, thallium content 3.951e-7, calcium content 0.00029632, water in wet mass 0.002 kg, beryllium content 4.9387e-7, wet mass 1 kg, tin content 9.8775e-7, dry mass 0.998 kg, strontium content 8.7416e-5, lead content 5.5314e-6, aluminium content 0.00019755, nickel content 3.951e-6, vanadium content 0.0012841, antimony content 0.00015952, water content 0.002004, zinc content 6.8813e-5, titanium content 0.00098775, selenium content 2.0743e-6, carbon allocation 0.55364 kg

## Inputs from nature
- Occupation, dump site [natural resource, land]: 0.0035714 m2*year; lognormal variance with pedigree 0.088256, pedigree (1,1,4,1,1)
  for landfill operation phase and spontaneous renaturation.
  Uncertainty: Uncertainty calculated from uncertainty in base parameters.

## Emissions to nature
- Nickel [air, non-urban air or from high stacks]: 5.7242e-13 kg; lognormal variance with pedigree 0.80717, pedigree (1,1,4,1,1)
  burden from direct release or incineration of landfill biogas; or windblown leachate evaporite in arid climates.
  Uncertainty: Uncertainty calculated from unertainty of the waste composition of this waste, uncertainty in waste decomposition and short-term leaching in landfill
- Vanadium, ion [water, ground-]: 1.3498e-6 kg; lognormal variance with pedigree 0.32586, pedigree (1,1,4,1,1)
  burden from short-term leachate to groundwater in uncontrolled landfill in moist cimate.
  Uncertainty: Uncertainty calculated from unertainty of the waste composition of this waste, uncertainty in waste decomposition and short-term leaching in landfill
- Arsenic, ion [water, ground-, long-term]: 1.8696e-6 kg; lognormal variance with pedigree 0.37997, pedigree (1,1,4,1,1)
  Emissions from long-term leachate (>100a) directly from MSW landfill and indirectly via incineration of treatement sludge from leachate treatement.
  Uncertainty: Uncertainty calculated depending on waste input and uncertainty of long-term transfer coefficents in landfill.
- Lead [air, non-urban air or from high stacks]: 1.0829e-13 kg; lognormal variance with pedigree 0.85848, pedigree (1,1,4,1,1)
  (same comment as for Nickel)
- Nickel, ion [water, ground-]: 2.2897e-9 kg; lognormal variance with pedigree 0.53653, pedigree (1,1,4,1,1)
  (same comment as for Vanadium, ion)
- Barium [water, ground-, long-term]: 4.8725e-5 kg; lognormal variance with pedigree 0.27206, pedigree (1,1,4,1,1)
  (same comment as for Arsenic, ion)
- Manganese [air, non-urban air or from high stacks]: 5.0745e-11 kg; lognormal variance with pedigree 0.66193, pedigree (1,1,4,1,1)
  (same comment as for Nickel)
- Manganese [water, ground-]: 2.0298e-7 kg; lognormal variance with pedigree 0.39314, pedigree (1,1,4,1,1)
  (same comment as for Vanadium, ion)
- Bromine [water, ground-, long-term]: 6.7244e-5 kg; lognormal variance with pedigree 0.26087, pedigree (1,1,4,1,1)
  (same comment as for Arsenic, ion)
- Copper [air, non-urban air or from high stacks]: 1.6531e-13 kg; lognormal variance with pedigree 0.84375, pedigree (1,1,4,1,1)
  (same comment as for Nickel)
- Lead [water, ground-]: 3.2488e-10 kg; lognormal variance with pedigree 0.60101, pedigree (1,1,4,1,1)
  (same comment as for Vanadium, ion)
- Nitrate [water, ground-, long-term]: 0.00026997 kg; lognormal variance with pedigree 0.11313, pedigree (1,1,4,1,1)
  (same comment as for Arsenic, ion)
- Chromium [air, non-urban air or from high stacks]: 1.5432e-13 kg; lognormal variance with pedigree 0.8476, pedigree (1,1,4,1,1)
  (same comment as for Nickel)
- Mercury [water, ground-]: 6.0701e-11 kg; lognormal variance with pedigree 0.66401, pedigree (1,1,4,1,1)
  (same comment as for Vanadium, ion)
- Chloride [water, ground-, long-term]: 0.0007685 kg; lognormal variance with pedigree 0.18018, pedigree (1,1,4,1,1)
  (same comment as for Arsenic, ion)
- Mercury [air, non-urban air or from high stacks]: 2.4281e-11 kg; lognormal variance with pedigree 0.69407, pedigree (1,1,4,1,1)
  (same comment as for Nickel)
- Copper, ion [water, ground-]: 5.7858e-10 kg; lognormal variance with pedigree 0.58199, pedigree (1,1,4,1,1)
  (same comment as for Vanadium, ion)
- Nitrogen, organic bound [water, ground-, long-term]: 0.0041957 kg; lognormal variance with pedigree 0.11313, pedigree (1,1,4,1,1)
  (same comment as for Arsenic, ion)
- Cobalt [air, non-urban air or from high stacks]: 2.4922e-11 kg; lognormal variance with pedigree 0.68449, pedigree (1,1,4,1,1)
  (same comment as for Nickel)
- Chromium VI [water, ground-]: 6.1727e-10 kg; lognormal variance with pedigree 0.57975, pedigree (1,1,4,1,1)
  (same comment as for Vanadium, ion)
- Ammonium, ion [water, ground-, long-term]: 0.002567 kg; lognormal variance with pedigree 0.11313, pedigree (1,1,4,1,1)
  (same comment as for Arsenic, ion)
- Cadmium [air, non-urban air or from high stacks]: 3.8115e-11 kg; lognormal variance with pedigree 0.67168, pedigree (1,1,4,1,1)
  (same comment as for Nickel)
- Barium [water, ground-]: 5.6383e-7 kg; lognormal variance with pedigree 0.3592, pedigree (1,1,4,1,1)
  (same comment as for Vanadium, ion)
- Nitrite [water, ground-, long-term]: 0.00013972 kg; lognormal variance with pedigree 0.11313, pedigree (1,1,4,1,1)
  (same comment as for Arsenic, ion)
- Barium [air, non-urban air or from high stacks]: 1.4096e-10 kg; lognormal variance with pedigree 0.62799, pedigree (1,1,4,1,1)
  (same comment as for Nickel)
- Cadmium, ion [water, ground-]: 5.7173e-9 kg; lognormal variance with pedigree 0.50697, pedigree (1,1,4,1,1)
  (same comment as for Vanadium, ion)
- TOC, Total Organic Carbon [water, ground-, long-term]: 0.54811 kg; lognormal variance with pedigree 0.010586, pedigree (1,1,4,1,1)
  (same comment as for Arsenic, ion)
- Arsenic [air, non-urban air or from high stacks]: 4.7104e-11 kg; lognormal variance with pedigree 0.66453, pedigree (1,1,4,1,1)
  (same comment as for Nickel)
- Cobalt [water, ground-]: 9.9689e-8 kg; lognormal variance with pedigree 0.41335, pedigree (1,1,4,1,1)
  (same comment as for Vanadium, ion)
- Hydrogen sulfide [water, ground-, long-term]: 1.0724e-5 kg; lognormal variance with pedigree 0.2355, pedigree (1,1,4,1,1)
  (same comment as for Arsenic, ion)
- Hydrogen fluoride [air, non-urban air or from high stacks]: 4.7097e-8 kg; lognormal variance with pedigree 0.44022, pedigree (1,1,4,1,1)
  (same comment as for Nickel)
- Arsenic, ion [water, ground-]: 3.3601e-9 kg; lognormal variance with pedigree 0.52435, pedigree (1,1,4,1,1)
  (same comment as for Vanadium, ion)
- Sulfate [water, ground-, long-term]: 0.00041138 kg; lognormal variance with pedigree 0.2355, pedigree (1,1,4,1,1)
  (same comment as for Arsenic, ion)
- Nitrogen oxides [air, non-urban air or from high stacks]: 8.8451e-8 kg; lognormal variance with pedigree 0.27206, pedigree (1,1,4,1,1)
  burden from direct release or incineration of landfill biogas.
  Uncertainty: Uncertainty calculated from unertainty of the waste composition of this waste, uncertainty in waste decomposition and short-term leaching in landfill
- Bromine [water, ground-]: 1.7356e-6 kg; lognormal variance with pedigree 0.32551, pedigree (1,1,4,1,1)
  (same comment as for Vanadium, ion)
- DOC, Dissolved Organic Carbon [water, ground-, long-term]: 0.54811 kg; lognormal variance with pedigree 0.010586, pedigree (1,1,4,1,1)
  (same comment as for Arsenic, ion)
- Hydrogen chloride [air, non-urban air or from high stacks]: 2.8591e-7 kg; lognormal variance with pedigree 0.37744, pedigree (1,1,4,1,1)
  (same comment as for Nickel)
- Fluoride [water, ground-]: 8.68e-9 kg; lognormal variance with pedigree 0.4927, pedigree (1,1,4,1,1)
  (same comment as for Vanadium, ion)
- BOD5, Biological Oxygen Demand [water, ground-, long-term]: 0.14192 kg; lognormal variance with pedigree 0.010586, pedigree (1,1,4,1,1)
  (same comment as for Arsenic, ion)
- Sulfur dioxide [air, non-urban air or from high stacks]: 1.9274e-7 kg; lognormal variance with pedigree 0.41264, pedigree (1,1,4,1,1)
  (same comment as for Nitrogen oxides)
- Nitrate [water, ground-]: 6.4624e-6 kg; lognormal variance with pedigree 0.17983, pedigree (1,1,4,1,1)
  (same comment as for Vanadium, ion)
- COD, Chemical Oxygen Demand [water, ground-, long-term]: 0.59949 kg; lognormal variance with pedigree 0.010586, pedigree (1,1,4,1,1)
  (same comment as for Arsenic, ion)
- Bromine [air, non-urban air or from high stacks]: 2.4331e-8 kg; lognormal variance with pedigree 0.45813, pedigree (1,1,4,1,1)
  (same comment as for Nickel)
- Chloride [water, ground-]: 1.9836e-5 kg; lognormal variance with pedigree 0.24482, pedigree (1,1,4,1,1)
  (same comment as for Vanadium, ion)
- Carbon dioxide, fossil [air, non-urban air or from high stacks]: 0.011913 kg; lognormal variance with pedigree 0.10351, pedigree (1,1,4,1,1)
  (same comment as for Nitrogen oxides)
- Nitrite [water, ground-]: 3.3445e-6 kg; lognormal variance with pedigree 0.17983, pedigree (1,1,4,1,1)
  (same comment as for Vanadium, ion)
- Methane, fossil [air, non-urban air or from high stacks]: 0.0028263 kg; lognormal variance with pedigree 0.11364, pedigree (1,1,4,1,1)
  (same comment as for Nitrogen oxides)
- Ammonium, ion [water, ground-]: 6.1449e-5 kg; lognormal variance with pedigree 0.17983, pedigree (1,1,4,1,1)
  (same comment as for Vanadium, ion)
- Nitrogen, organic bound [water, ground-]: 0.00010043 kg; lognormal variance with pedigree 0.17983, pedigree (1,1,4,1,1)
  (same comment as for Vanadium, ion)
- Calcium, ion [water, ground-, long-term]: 0.00029535 kg; lognormal variance with pedigree 0.21249, pedigree (1,1,4,1,1)
  (same comment as for Arsenic, ion)
- Hydrogen sulfide [water, ground-]: 4.0062e-8 kg; lognormal variance with pedigree 0.35681, pedigree (1,1,4,1,1)
  (same comment as for Vanadium, ion)
- Sodium, ion [water, ground-, long-term]: 0.0013849 kg; lognormal variance with pedigree 0.16049, pedigree (1,1,4,1,1)
  (same comment as for Arsenic, ion)
- DOC, Dissolved Organic Carbon [water, ground-]: 0.00016106 kg; lognormal variance with pedigree 0.21419, pedigree (1,1,4,1,1)
  (same comment as for Vanadium, ion)
- Aluminium [water, ground-, long-term]: 0.00019706 kg; lognormal variance with pedigree 0.22594, pedigree (1,1,4,1,1)
  (same comment as for Arsenic, ion)
- Sulfate [water, ground-]: 1.5369e-6 kg; lognormal variance with pedigree 0.35681, pedigree (1,1,4,1,1)
  (same comment as for Vanadium, ion)
- Thallium [water, ground-, long-term]: 3.9408e-7 kg; lognormal variance with pedigree 0.43034, pedigree (1,1,4,1,1)
  (same comment as for Arsenic, ion)
- TOC, Total Organic Carbon [water, ground-]: 0.00016106 kg; lognormal variance with pedigree 0.21419, pedigree (1,1,4,1,1)
  (same comment as for Vanadium, ion)
- Iron, ion [water, ground-, long-term]: 9.8564e-5 kg; lognormal variance with pedigree 0.24898, pedigree (1,1,4,1,1)
  (same comment as for Arsenic, ion)
- BOD5, Biological Oxygen Demand [water, ground-]: 4.1704e-5 kg; lognormal variance with pedigree 0.21419, pedigree (1,1,4,1,1)
  (same comment as for Vanadium, ion)
- Titanium, ion [water, ground-, long-term]: 0.00098528 kg; lognormal variance with pedigree 0.17287, pedigree (1,1,4,1,1)
  (same comment as for Arsenic, ion)
- Sodium [air, non-urban air or from high stacks]: 1.4928e-8 kg; lognormal variance with pedigree 0.47434, pedigree (1,1,4,1,1)
  (same comment as for Nickel)
- Zinc, ion [water, ground-, long-term]: 6.8643e-5 kg; lognormal variance with pedigree 0.26101, pedigree (1,1,4,1,1)
  (same comment as for Arsenic, ion)
- COD, Chemical Oxygen Demand [water, ground-]: 0.00017616 kg; lognormal variance with pedigree 0.21419, pedigree (1,1,4,1,1)
  (same comment as for Vanadium, ion)
- Beryllium [water, ground-, long-term]: 4.926e-7 kg; lognormal variance with pedigree 0.42318, pedigree (1,1,4,1,1)
  (same comment as for Arsenic, ion)
- Heat, waste [soil, industrial]: 0.18635 MJ; lognormal variance with pedigree 0.06453, pedigree (1,1,4,1,1)
  burden from short-term decomposition of waste (0-100a).
  Uncertainty: Uncertainty calculated from unertainty of the waste composition of this waste, uncertainty in waste decomposition and short-term leaching in landfill
- Strontium [water, ground-, long-term]: 8.719e-5 kg; lognormal variance with pedigree 0.25305, pedigree (1,1,4,1,1)
  (same comment as for Arsenic, ion)
- Heat, waste [water, ground-, long-term]: 22.895 MJ; lognormal variance with pedigree 0.020651, pedigree (1,1,4,1,1)
  burden from long-term decomposition of waste (>100a).
  Uncertainty: Uncertainty calculated from unertainty of the waste composition of this waste, uncertainty in waste decomposition and short-term leaching in landfill
- Vanadium, ion [water, ground-, long-term]: 0.00010703 kg; lognormal variance with pedigree 0.54951, pedigree (1,1,4,1,1)
  (same comment as for Arsenic, ion)
- Calcium [air, non-urban air or from high stacks]: 9.6153e-11 kg; lognormal variance with pedigree 0.63848, pedigree (1,1,4,1,1)
  (same comment as for Nickel)
- Sodium, ion [water, ground-]: 5.9713e-5 kg; lognormal variance with pedigree 0.21182, pedigree (1,1,4,1,1)
  (same comment as for Vanadium, ion)
- Selenium [water, ground-, long-term]: 1.6662e-7 kg; lognormal variance with pedigree 0.77343, pedigree (1,1,4,1,1)
  (same comment as for Arsenic, ion)
- Aluminium [air, non-urban air or from high stacks]: 2.4609e-11 kg; lognormal variance with pedigree 0.68225, pedigree (1,1,4,1,1)
  (same comment as for Nickel)
- Iron, ion [water, ground-]: 1.3524e-8 kg; lognormal variance with pedigree 0.47741, pedigree (1,1,4,1,1)
  (same comment as for Vanadium, ion)
- Tin, ion [water, ground-, long-term]: 9.8572e-7 kg; lognormal variance with pedigree 0.40082, pedigree (1,1,4,1,1)
  (same comment as for Arsenic, ion)
- Thallium [air, non-urban air or from high stacks]: 5.7242e-14 kg; lognormal variance with pedigree 0.88189, pedigree (1,1,4,1,1)
  (same comment as for Nickel)
- Aluminium [water, ground-]: 9.8436e-8 kg; lognormal variance with pedigree 0.41179, pedigree (1,1,4,1,1)
  (same comment as for Vanadium, ion)
- Manganese [water, ground-, long-term]: 1.7541e-5 kg; lognormal variance with pedigree 0.306, pedigree (1,1,4,1,1)
  (same comment as for Arsenic, ion)
- Iron [air, non-urban air or from high stacks]: 3.381e-12 kg; lognormal variance with pedigree 0.74565, pedigree (1,1,4,1,1)
  (same comment as for Nickel)
- Calcium, ion [water, ground-]: 3.8461e-7 kg; lognormal variance with pedigree 0.3672, pedigree (1,1,4,1,1)
  (same comment as for Vanadium, ion)
- Antimony [water, ground-, long-term]: 4.2063e-6 kg; lognormal variance with pedigree 1.0581, pedigree (1,1,4,1,1)
  (same comment as for Arsenic, ion)
- Titanium [air, non-urban air or from high stacks]: 1.2304e-10 kg; lognormal variance with pedigree 0.62918, pedigree (1,1,4,1,1)
  (same comment as for Nickel)
- Thallium [water, ground-]: 2.2897e-10 kg; lognormal variance with pedigree 0.61125, pedigree (1,1,4,1,1)
  (same comment as for Vanadium, ion)
- Nickel, ion [water, ground-, long-term]: 3.9408e-6 kg; lognormal variance with pedigree 0.35562, pedigree (1,1,4,1,1)
  (same comment as for Arsenic, ion)
- Strontium [air, non-urban air or from high stacks]: 1.2665e-11 kg; lognormal variance with pedigree 0.7046, pedigree (1,1,4,1,1)
  (same comment as for Nickel)
- Titanium, ion [water, ground-]: 4.9218e-7 kg; lognormal variance with pedigree 0.35873, pedigree (1,1,4,1,1)
  (same comment as for Vanadium, ion)
- Lead [water, ground-, long-term]: 5.52e-6 kg; lognormal variance with pedigree 0.34457, pedigree (1,1,4,1,1)
  (same comment as for Arsenic, ion)
- Vanadium [air, non-urban air or from high stacks]: 3.3745e-10 kg; lognormal variance with pedigree 0.59703, pedigree (1,1,4,1,1)
  (same comment as for Nickel)
- Strontium [water, ground-]: 5.0659e-8 kg; lognormal variance with pedigree 0.43396, pedigree (1,1,4,1,1)
  (same comment as for Vanadium, ion)
- Mercury [water, ground-, long-term]: 8.8635e-8 kg; lognormal variance with pedigree 0.48845, pedigree (1,1,4,1,1)
  (same comment as for Arsenic, ion)
- Zinc [air, non-urban air or from high stacks]: 7.2211e-12 kg; lognormal variance with pedigree 0.72272, pedigree (1,1,4,1,1)
  (same comment as for Nickel)
- Beryllium [water, ground-]: 2.8621e-10 kg; lognormal variance with pedigree 0.60409, pedigree (1,1,4,1,1)
  (same comment as for Vanadium, ion)
- Copper, ion [water, ground-, long-term]: 1.1829e-5 kg; lognormal variance with pedigree 0.31942, pedigree (1,1,4,1,1)
  (same comment as for Arsenic, ion)
- Beryllium [air, non-urban air or from high stacks]: 7.1553e-14 kg; lognormal variance with pedigree 0.87473, pedigree (1,1,4,1,1)
  (same comment as for Nickel)
- Zinc, ion [water, ground-]: 3.2495e-8 kg; lognormal variance with pedigree 0.44863, pedigree (1,1,4,1,1)
  (same comment as for Vanadium, ion)
- Cadmium, ion [water, ground-, long-term]: 3.2473e-6 kg; lognormal variance with pedigree 0.36193, pedigree (1,1,4,1,1)
  (same comment as for Arsenic, ion)
- Selenium [air, non-urban air or from high stacks]: 5.4511e-13 kg; lognormal variance with pedigree 0.8094, pedigree (1,1,4,1,1)
  (same comment as for Nickel)
- Antimony [water, ground-]: 1.6769e-7 kg; lognormal variance with pedigree 0.39457, pedigree (1,1,4,1,1)
  (same comment as for Vanadium, ion)
- Cobalt [water, ground-, long-term]: 3.0952e-5 kg; lognormal variance with pedigree 0.28742, pedigree (1,1,4,1,1)
  (same comment as for Arsenic, ion)
- Tin [air, non-urban air or from high stacks]: 1.4505e-14 kg; lognormal variance with pedigree 0.92356, pedigree (1,1,4,1,1)
  (same comment as for Nickel)
- Selenium [water, ground-]: 2.1804e-9 kg; lognormal variance with pedigree 0.53823, pedigree (1,1,4,1,1)
  (same comment as for Vanadium, ion)
- Chromium VI [water, ground-, long-term]: 6.2383e-9 kg; lognormal variance with pedigree 3.2076, pedigree (1,1,4,1,1)
  (same comment as for Arsenic, ion)
- Antimony [air, non-urban air or from high stacks]: 4.1922e-11 kg; lognormal variance with pedigree 0.66574, pedigree (1,1,4,1,1)
  (same comment as for Nickel)
- Tin, ion [water, ground-]: 5.8019e-11 kg; lognormal variance with pedigree 0.65725, pedigree (1,1,4,1,1)
  (same comment as for Vanadium, ion)
- Fluoride [water, ground-, long-term]: 1.1776e-5 kg; lognormal variance with pedigree 0.31942, pedigree (1,1,4,1,1)
  (same comment as for Arsenic, ion)

## Extrapolations
This dataset has been extrapolated from year 2012 to the year of the calculation (2021). The uncertainty has been adjusted accordingly.
