# chassis production, internet access equipment

Dataset: EcoSpold 2, unit process
Geography: RER
Time period: 2000-01-01 to 2021-12-31
Technology level: current
Classification: ISIC rev.4 ecoinvent: 2630:Manufacture of communication equipment
Classification: EcoSpold01Categories: electronics/devices
Tags: ConvertedDataset
Scenario: Business-as-Usual
System model: Allocation, cut-off by classification
Generated by: Marianne Leuenberger
Published in: Leuenberger M. 2010
Database: ecoinvent
isCopyrightProtected: true
accessRestrictedTo: 1

## General comment
Rough assumption based on previous study for telecom equipment and personal communication with experts.
[This dataset was already contained in the ecoinvent database version 2. It was not individually updated during the transfer to ecoinvent version 3. Life Cycle Impact Assessment results may still have changed, as they are affected by changes in the supply chain, i.e. in other datasets. This dataset was generated following the ecoinvent quality guidelines for version 2. It may have been subject to central changes described in the ecoinvent version 3 change report (http://www.ecoinvent.org/database/ecoinvent-version-3/reports-of-changes/), and the results of the central updates were reviewed extensively. The changes added e.g. consistent water flows and other information throughout the database. The documentation of this dataset can be found in the ecoinvent reports of version 2, which are still available via the ecoinvent website. The change report linked above covers all central changes that were made during the conversion process.]

## Included activities end
materials, standard transport distances, electricity use for manufacturing, disposal

## Geography
Switzerland

## Technology
average material composition of chassis for network devices. Life expectancy: 6 years, annual working hour depending on use.

## Reference product
- chassis, internet access equipment: 1 kg; CPC 47401: Parts for the goods of subclasses 47221 to 47223; By-product classification allocatable product
  EcoSpold01Location=RER
  production volume 1.32237 kg
    This is a placeholder value that does not reflect real-world production volumes. This dataset does not currently require a real-world production volume to work in the database framework, and no actual data were collected yet. This has no negative effect on the results of the ecoinvent database. The placeholder value of this activity was scaled according to the nominal GDP of 2005 (source: United Nations, http://data.un.org/Glossary.aspx?q=GDP+%28current+US%24%29, accessed 20130726) to reflect an appropriate share of the global production volume, which is also a placeholder value.
  property carbon content, fossil 0.0691989
    C content calculated as the addition of the C contents in the final product components
  property price 0.85 EUR2005
    Rough estimation. Calculated with prices of single inputs in the ecoinvent inventory of chassis production. The prices of single inputs have been collected already by ecoinvent.
  property carbon content 0.0691989
    carbon content on a dry matter basis (reserved; not for manual entry)
  properties: carbon content, non-fossil 0, water in wet mass 0 kg, wet mass 1 kg, water content 0, dry mass 1 kg, carbon allocation 0.0691989 kg

## By-products
- waste paperboard, unsorted: 0 kg; By-product classification Recyclable; CPC 39240: Waste and scrap of paper or paperboard; pedigree (1,1,1,1,1)
  Assumption according to factsheets of network devices
  EcoSpold01Location=CH
  Uncertainty: assumption according to factsheets of network devices
  production volume 0 kg
    Calculated from the production volume of chassis, internet access equipment in proportion to the respective output amounts.
  property price 0.03924 EUR2005
    Temporary price data. Calculated as 90% of purchasers price based on: Assumed to be 10% less than for sorted waste paperboard
  property carbon content, non-fossil 0.483259
    C content was calculated for 1 kg DM, using data in Tab A.3, ecoinvent v2.2 report 13_I.
  property carbon content 0.483259
    carbon content on a dry matter basis (reserved; not for manual entry)
  properties: dry mass 0.804 kg, heating value, net 15.92 MJ, wet mass 1 kg, water in wet mass 0.196 kg, carbon content, fossil 0, water content 0.243781, carbon allocation 0.38854 kg

## Inputs from technosphere
- aluminium, wrought alloy: 0.017 kg; lognormal variance with pedigree 0.1361, pedigree (5,5,5,3,3)
  Assumption according to factsheets of network devices
  EcoSpold01Location=RER
  Uncertainty: assumption according to factsheets of network devices
  properties: wet mass 1 kg, dry mass 1 kg
- cast iron: 0.05 kg; lognormal variance with pedigree 0.1361, pedigree (5,5,5,3,3)
  EcoSpold01Location=RER
  Assumption according to factsheets of network devices
  Uncertainty: assumption according to factsheets of network devices
  properties: wet mass 1 kg, dry mass 1 kg, carbon content, fossil 0.04
  note on carbon content, fossil: Cast iron is made by remelting pig iron in small furnaces (e.g. cupola furnaces or electric arc furnaces) and poured into moulds to make castings. It usually contains 2% to 6% carbon (ecoinvent v2.2 report 10_partII). An average content of 4% was considered
- wire drawing, copper: 0.15 kg; lognormal variance with pedigree 0.1361, pedigree (5,5,5,3,3)
  (same comment as for cast iron)
- steel, low-alloyed, hot rolled: 0.622 kg; lognormal variance with pedigree 0.1361, pedigree (5,5,5,3,3)
  (same comment as for aluminium, wrought alloy)
  properties: carbon content, fossil 0.005, dry mass 1 kg, wet mass 1 kg
  note on carbon content, fossil: Low alloyed steel composition given in Tab. 3.2 ecoinvent v2.2 report 10_partII. Steel assumed to have a C content of 0.5%
- tin: 0.002 kg; lognormal variance with pedigree 0.1361, pedigree (5,5,5,3,3)
  (same comment as for cast iron)
  properties: wet mass 1 kg, dry mass 1 kg
- copper, cathode: 0.15 kg; lognormal variance with pedigree 0.1361, pedigree (5,5,5,3,3)
  (same comment as for aluminium, wrought alloy)
  properties: wet mass 1 kg, dry mass 1 kg
- polypropylene, granulate: 0.05 kg; lognormal variance with pedigree 0.1361, pedigree (5,5,5,3,3)
  (same comment as for aluminium, wrought alloy)
  properties: wet mass 1 kg, dry mass 1 kg, carbon content, fossil 0.857143, heating value, net 32.78 MJ
  note on carbon content, fossil: Polypropylene is formed by the polymerisation of propylene, C3H6 (ecoinvent v2.2 report 11_II)
  note on heating value, net: Value extracted from "treatment of waste polypropylene, open burning"
- flat glass, coated: 0.02 kg; lognormal variance with pedigree 0.1361, pedigree (5,5,5,3,3)
  (same comment as for aluminium, wrought alloy)
  properties: wet mass 1 kg, dry mass 1 kg
- zinc: 0.001 kg; lognormal variance with pedigree 0.1361, pedigree (5,5,5,3,3)
  (same comment as for cast iron)
  properties: wet mass 1 kg, dry mass 1 kg
- silicone product: 0.001 kg; lognormal variance with pedigree 0.1361, pedigree (5,5,5,3,3)
  (same comment as for cast iron)
  properties: heating value, net 9.83 MJ, wet mass 1 kg, carbon content, fossil 0.324324, dry mass 1 kg
  note on carbon content, fossil: The term silicones is used for compounds in which silicon atoms are linked via oxygen atoms, each silicon atom bearing one or several organic groups. In industrially important silicones, these groups are usually methyl or phenyl (ecoinvent v2.2 report 8_part71 & Ullmann). The chemical formula was considered to be [Si(CH3)2O]n (Ullmann).
- powder coat, steel: 0.05 m2; lognormal variance with pedigree 0.1361, pedigree (5,5,5,3,3)
  (same comment as for aluminium, wrought alloy)
- epoxy resin, liquid: 0.02 kg; lognormal variance with pedigree 0.1361, pedigree (5,5,5,3,3)
  (same comment as for aluminium, wrought alloy)
  properties: carbon content, fossil 0.42325, dry mass 1 kg, wet mass 1 kg, heating value, net 12.82 MJ
- sheet rolling, steel: 0.622 kg; lognormal variance with pedigree 0.1361, pedigree (5,5,5,3,3)
  (same comment as for aluminium, wrought alloy)
- aluminium, cast alloy: 0.033 kg; lognormal variance with pedigree 0.1361, pedigree (5,5,5,3,3)
  (same comment as for aluminium, wrought alloy)
  properties: wet mass 1 kg, dry mass 1 kg
- corrugated board box: 0.004 kg; lognormal variance with pedigree 0.1361, pedigree (5,5,5,3,3)
  EcoSpold01Location=RER
  Packaging
  Uncertainty: packaging
  properties: water content 0.0582011, dry mass 0.945 kg, carbon content, fossil 0.000656085, carbon content, non-fossil 0.432275, wet mass 1 kg, heating value, net 12.86 MJ
  note on carbon content, fossil: Fossil C content was calculated after fossil C contents of chemicals used in the production of board (Tab 10-15 & 10.16 ecoinvent v2.2 report 11_III, part 10)
  note on carbon content, non-fossil: Biogenic C content was calculated after biogenic C contents of chemicals used in the production of board (Tab 10.15 & 10.16, ecoinvent v2.2 report 11_III, part 10).
- polyvinylchloride, bulk polymerised: 0.01 kg; lognormal variance with pedigree 0.1361, pedigree (5,5,5,3,3)
  (same comment as for aluminium, wrought alloy)
  properties: dry mass 1 kg, carbon content, fossil 0.387097, wet mass 1 kg, heating value, net 21.5 MJ
  note on carbon content, fossil: Monomer is vynyl chloride, C2H3Cl (ecoinvent v2.2 report 11_II). MW=62 g/mol
- brass: 0.01 kg; lognormal variance with pedigree 0.1361, pedigree (5,5,5,3,3)
  (same comment as for waste paperboard, unsorted)
  properties: dry mass 1 kg, wet mass 1 kg
- electricity, low voltage: 1 kWh; lognormal variance with pedigree 0.1361, pedigree (5,5,5,3,3)
  EcoSpold01Location=UCTE
  Assumption according to factsheets of network devices
  Uncertainty: assumption according to factsheets of network devices
- polyethylene, high density, granulate: 0.01 kg; lognormal variance with pedigree 0.1361, pedigree (5,5,5,3,3)
  (same comment as for aluminium, wrought alloy)
  properties: dry mass 1 kg, heating value, net 42.47 MJ, wet mass 1 kg, carbon content, fossil 0.857143
  note on carbon content, fossil: Polyethylene is formed out of a huge amount of ethylene monomers (C2H4) (ecoinvent v2.2 report 11_II). MW=28 g/mol
- waste bulk iron, excluding reinforcement: 0 kg; pedigree (1,1,1,1,1)
  (same comment as for waste paperboard, unsorted)
  production volume 0 kg
    (same comment as for waste paperboard, unsorted)
  properties: dry mass 1 kg, wet mass 1 kg
- waste plastic, industrial electronics: -0.11 kg; lognormal variance with pedigree 0.1361, pedigree (5,5,5,3,3)
  (same comment as for waste paperboard, unsorted)
  production volume 0.11 kg
    (same comment as for waste paperboard, unsorted)
  properties: wet mass 1 kg, water content 0.180638, carbon content, fossil 0.81386, dry mass 0.847 kg, heating value, net 34.78 MJ
  note on carbon content, fossil: C content in 1 kg DM was calculated using data in Tab A.2, ecoinvent v2.2 report 13_I
- waste paperboard, unsorted: -0.004 kg; lognormal variance with pedigree 0.1361, pedigree (5,5,5,3,3)
  (same comment as for waste paperboard, unsorted)
  production volume 0.004 kg
  properties: dry mass 0.804 kg, heating value, net 15.92 MJ, price 0.03924 EUR2005, wet mass 1 kg, carbon content, non-fossil 0.483259, water content 0.243781
  note on carbon content, non-fossil: C content was calculated for 1 kg DM, using data in Tab A.3, ecoinvent v2.2 report 13_I.
- waste bulk iron, excluding reinforcement: -0.654882, -0.0171182 kg (2 entries); lognormal variance with pedigree 0.1361, pedigree (5,5,5,3,3)
  (same comment as for waste paperboard, unsorted)
  production volume 0.672 kg

## Sampling procedure
expert guess, factsheets

## Extrapolations
This dataset has been extrapolated from year 2009 to the year of the calculation (2021). The uncertainty has been adjusted accordingly.

## Review by Christian Bauer 2010-02-07
26.01.2010
passed
C:\Dokumente und Einstellungen\Marianne\Eigene Dateien\Projekte\277_Mobitool\Review\[Ecospold_Chassis-v1.1.xls]X-Process
