# graphic paper production, 100% recycled

Dataset: EcoSpold 2, unit process
Geography: RER
Time period: 2008-01-01 to 2021-12-31
Technology level: current
Classification: ISIC rev.4 ecoinvent: 1701:Manufacture of pulp, paper and paperboard
Scenario: Business-as-Usual
System model: Allocation, cut-off by classification
Share of production covered: 2.8 %
Generated by: Thomas Kägi
Database: ecoinvent
isCopyrightProtected: false
accessRestrictedTo: 1

## General comment
This module is an extrapolation of the European graphical recycling paper production based on confidential primary data from 9 common graphical recycling paper (weighted average) on behalf of a project funded by the Swiss Federal Office for the Environment FOEN: The total annual production is 1"242"000 metric tons which represents about 10.4% of the annual production of the graphical recycling papers (without newspaper) in the EU (approximately 2.8% of World production).

## Included activities start
Service starting with the input of labour, raw materials (e.g. unsorted waste paper, lime, other chemicals) and energy

## Included activities end
This module includes the production of recycled graphical paper - including collected but unsorted waste paper, deinking of pulp, paper production, energy production on-site, internal waste water treatment and transports of the auxiliaries to the paper mill. Not included are the infrastructure, transport of input materials since this is supposed to be included in the market activities.

## Technology
Average of present used technology

## Time period
Data have been collected for the years 2008-2010

## Reference product
- graphic paper, 100% recycled: 1 kg; name paper; By-product classification allocatable product; CPC 32129: Other uncoated paper and paperboard, of a kind used for writing, printing or other graphic purposes, and punch[…]
  production volume 1.19e10 kg; name PV_paper
    estimation based on CEPI.org
  property price 0.0976 EUR2005; name paper_price_EUR2005
    Export prices for the World+ according to: http://faostat.fao.org/site/626/DesktopDefault.aspx?PageID=626#ancor downloaded 27 April 2009; calculated as export value divided by export volume.
  property carbon content 0.43299
    carbon content on a dry matter basis (reserved; not for manual entry)
  properties: dry mass 0.945 kg, water content 0.0582011, water in wet mass 0.055 kg, wet mass 1 kg, carbon content, non-fossil 0.43296, heating value, net 14.11 MJ, carbon content, fossil 3e-5, carbon allocation 0.409176 kg

## Inputs from technosphere
- potato starch: 0.0414 kg; source Franov, E. 2011; lognormal variance with pedigree 0.1332, pedigree (2,5,3,5,5)
  properties: dry mass 0.8 kg, water content 0.25, wet mass 1 kg, heating value, net 10.66 MJ, carbon content, non-fossil 0.46
  note on carbon content, non-fossil: C-content of starch is considered 46% on dry mass basis (from "Evolutionary and Biochemical Aspects", A.D. Kay and T. Vrede (in Global Ecology, 2010, Elsevier B.V., S.E. Jørgensen Ed.)).
- heat, district or industrial, natural gas: 1.364 MJ; source Franov, E. 2011; lognormal variance with pedigree 0.1332, pedigree (2,5,3,5,5)
  eiV2.2: Natural gas, burned in industrial furnace low-NOx >100kW/RER S
  properties: heating value, net 1 MJ
- sodium chloride, powder: 0.00016 kg; source Franov, E. 2011; lognormal variance with pedigree 0.1332, pedigree (2,5,3,5,5)
  properties: wet mass 1 kg, dry mass 1 kg
- latex: 0.00371 kg; source Franov, E. 2011; lognormal variance with pedigree 0.1332, pedigree (2,5,3,5,5)
  properties: heating value, net 26.45 MJ, dry mass 1 kg, carbon content, fossil 0.872983, wet mass 1 kg
  note on carbon content, fossil: The Styrene-butadiene dispersion is based on styrene and 1,3-butadiene plus co-monomers like i.e. ac-rylonitrile or (meth-)acrylic acid (ecoinvent v2.2 report 11_III). Following specifications in US Patent 3,875,101 (1971), the dispersion was considered as: 52.5% 1.3-butadiene (0.8571 kg C/kg dry mass); 43% styrene (0.9231 kg C/kg dry mass); 2% acrylic acid (0.5 kg C/kg dry mass); 2.5% acrolein (C3H4O, MW=56; 0.6429 kg C/kg dry mass)
- municipal solid waste: -0.0138 kg; name msw; source Franov, E. 2011; lognormal variance with pedigree 0.1332, pedigree (2,5,3,5,5)
  production volume 1.6422e8 kg; = PV_paper*msw/paper
    Calculated from production volume of reference product using the relative outputs.
  property price 0 EUR2005; name solid_waste_price_EUR2005
  properties: heating value, net 11.74 MJ, water content 0.297017, wet mass 1 kg, carbon content, non-fossil 0.261655, carbon content, fossil 0.171549, dry mass 0.771 kg
  note on heating value, net: Value taken from the general comment of the treatment dataset.
  note on carbon content, non-fossil: MSW composition in tab 4.1, ecoinvent v2.2 report 13_I. C content referred to 1 kg DM
- heat, district or industrial, other than natural gas: 6.558 MJ; source Franov, E. 2011; lognormal variance with pedigree 0.1332, pedigree (2,5,3,5,5)
  EiV2.2: light fuel oil, burned in industrial furnace 1MW, non-modulatuing/RER.
  properties: heating value, net 1 MJ
- sodium dithionite, anhydrous: 0.0005 kg; source Franov, E. 2011; lognormal variance with pedigree 0.1332, pedigree (2,5,3,5,5)
  properties: wet mass 1 kg, dry mass 1 kg
- sulfate pulp, bleached: 0.025175 kg; = 0.0265*0.95; lognormal variance with pedigree 0.1332, pedigree (2,5,3,5,5)
  pulp input is 5% unbleached pulp and 95% bleached pulp
  properties: water content 0.111111, wet mass 1 kg, dry mass 0.9 kg, carbon content, non-fossil 0.494, heating value, net 13.23 MJ
  note on carbon content, non-fossil: C content of dry mass of sulfate pulp is 0.494 kgC/kg dry wood (ecoinvent v2.2 report 6_IX & ecoinvent v2.2 report 9). No other C containing products in the formulation of the pulp.
- chemical, organic: 0.00516 kg; source Franov, E. 2011; lognormal variance with pedigree 0.1332, pedigree (2,5,3,5,5)
  Further specification of chemcials was not possible
  properties: heating value, net 19.03 MJ, carbon content, fossil 0.628, dry mass 1 kg, wet mass 1 kg
  note on carbon content, fossil: This dataset is an unweighted average of 20 organic substances (listed in Tab 88.1, ecoinvent v2.2 report 8, part II), being part of the top100 chemicals included in this database. The C-content has also been calculated as an unweighted average of the C content of the substances composing this dataset.
- optical brighteners, for paper production: 0.00156 kg; source Franov, E. 2011; lognormal variance with pedigree 0.1332, pedigree (2,5,3,5,5)
  properties: dry mass 1 kg, carbon content, fossil 0.557859, wet mass 1 kg, heating value, net 16.9 MJ
  note on carbon content, fossil: Mixture of two optical brighteners (DAS-1 and distyrylbiphenyl type), ecoinvent v2.2 report 11-III, pg 298
- chemical, inorganic: 0.0041 kg; source Franov, E. 2011; lognormal variance with pedigree 0.1332, pedigree (2,5,3,5,5)
  Further specification of chemcials was not possible
  properties: dry mass 1 kg, carbon content, fossil 0.003, wet mass 1 kg
  note on carbon content, fossil: This dataset is an unweighted average of 20 inorganic substances (listed in Tab 88.1, ecoinvent v2.2 report 8, part II), being part of the top100 chemicals included in this database. The C-content has also been calculated as an unweighted average of the C content of the substances composing this dataset.
- sodium hydroxide, without water, in 50% solution state: 0.00261 kg; source Franov, E. 2011; lognormal variance with pedigree 0.1332, pedigree (2,5,3,5,5)
  properties: heating value, net 3.03 MJ, dry mass 1 kg, wet mass 1 kg
- sulfate pulp, unbleached: 0.001325 kg; = 0.0265*0.05; lognormal variance with pedigree 0.1332, pedigree (2,5,3,5,5)
  pulp input is 5% unbleached pulp and 95% bleached pulp
  properties: heating value, net 13.23 MJ, wet mass 1 kg, carbon content, non-fossil 0.494, price 0.355 EUR2005, dry mass 0.9 kg, water content 0.111111
- hazardous waste, for incineration: 0 kg; name haz; source Franov, E. 2011; pedigree (1,1,1,1,1)
  production volume 0 kg
    Calculated from production volume of reference product using the relative outputs.
  property price 0 EUR2005; name hazardous_waste_price_EUR2005
  properties: carbon content, fossil 0.554667, wet mass 1 kg, water content 0.333333, heating value, net 17 MJ, dry mass 0.75 kg
  note on carbon content, fossil: Tab A.6, ecoinvent v2.2 report 13_I. C content has been calculated after data in the tables, and then referred to 1 kg DM
- wastewater, unpolluted: -0.0106 m3; name sewage; source Franov, E. 2011; lognormal variance with pedigree 0.1332, pedigree (2,5,3,5,5)
  production volume 1.2614e8 m3; = PV_paper*sewage/paper
    Calculated from production volume of reference product using the relative outputs.
  property price 0 EUR2005; name sewage_price_EUR2005
  properties: carbon content, fossil 0.00178991, dry mass 0.337476 kg, wet mass 1000 kg, carbon content, non-fossil 0.00178991, water content 2962.17
  note on carbon content, fossil: Assumed to be like in tap water. Bicarbonate content is 2.93 mol/m3. CO2 content is 0.1 mol/m3 (ecoinvent v2.2 report 8, Tab 93.1).
- waste paper, unsorted: 0 kg; source Franov, E. 2011; pedigree (1,1,1,1,1)
  properties: dry mass 0.9 kg, carbon content, non-fossil 0.448889, wet mass 1 kg, water content 0.111111, heating value, net 14.11 MJ
- wood ash mixture, pure: 0 kg; name ash; source Franov, E. 2011; pedigree (1,1,1,1,1)
  production volume 0 kg
    Calculated from production volume of reference product using the relative outputs.
  property price 0 EUR2005; name wood_ash_price_EUR2005
  properties: dry mass 1 kg, carbon content, non-fossil 0.012, wet mass 1 kg
- quicklime, milled, loose: 0.0666 kg; source Franov, E. 2011; lognormal variance with pedigree 0.1332, pedigree (2,5,3,5,5)
  properties: wet mass 1 kg, water content 0.010101, dry mass 0.99 kg
- heat, district or industrial, other than natural gas: 0.0934 MJ; source Franov, E. 2011; lognormal variance with pedigree 0.1332, pedigree (2,5,3,5,5)
  7.59MJ wood chips in co-gen (eiV2.2) lead to 6.56MJ heat
- kaolin: 0.00462 kg; source Franov, E. 2011; lognormal variance with pedigree 0.1332, pedigree (2,5,3,5,5)
  properties: wet mass 1 kg, dry mass 1 kg
- diesel, burned in diesel-electric generating set, 10MW: 0.000527 MJ; source Franov, E. 2011; lognormal variance with pedigree 0.1332, pedigree (2,5,3,5,5)
  properties: heating value, net 1 MJ
- lime: 0.108 kg; source Franov, E. 2011; lognormal variance with pedigree 0.1332, pedigree (2,5,3,5,5)
  properties: dry mass 1 kg, wet mass 1 kg, carbon content, fossil 0.120005
- hydrogen sulfide: 0.00533 kg; source Franov, E. 2011; lognormal variance with pedigree 0.1332, pedigree (2,5,3,5,5)
  properties: dry mass 1 kg, wet mass 1 kg, heating value, net 7.11 MJ
- hydrogen peroxide, without water, in 50% solution state: 0.00533 kg; source Franov, E. 2011; lognormal variance with pedigree 0.1332, pedigree (2,5,3,5,5)
  properties: dry mass 1 kg, heating value, net 7.13 MJ, wet mass 1 kg
- electricity, medium voltage: 1.0092 kWh; source Franov, E. 2011; lognormal variance with pedigree 0.1332, pedigree (2,5,3,5,5)
- sodium silicate, spray powder, 80%: 0.00247 kg; source Franov, E. 2011; lognormal variance with pedigree 0.1332, pedigree (2,5,3,5,5)
  properties: wet mass 1 kg, dry mass 1 kg
- hazardous waste, for incineration: -0.000107198, -2.80209e-6 kg (2 entries); source Franov, E. 2011; lognormal variance with pedigree 0.1332, pedigree (2,5,3,5,5)
  production volume 1.309e6 kg
- waste paper, unsorted: 0.4515, 0.4515 kg (2 entries); source Franov, E. 2011; lognormal variance with pedigree 0.1332, pedigree (2,5,3,5,5)
- wood ash mixture, pure: -0.00674142, -0.00013858 kg (2 entries); source Franov, E. 2011; lognormal variance with pedigree 0.1332, pedigree (2,5,3,5,5)
  production volume 8.1872e7 kg

## Emissions to nature
- AOX, Adsorbable Organic Halogen as Cl [water, unspecified]: 1.79e-6 kg; source Franov, E. 2011; lognormal variance with pedigree 0.1726, pedigree (2,5,3,5,5)
- BOD5, Biological Oxygen Demand [water, unspecified]: 0.001864 kg; = toc*2; lognormal variance with pedigree 0.212, pedigree (5,5,3,5,5)
  relation BOD5 to TOC is about 1:2 according to AbwV (Abwasserverordnung Deutschland)
- Nitrogen [water, unspecified]: 0.00109 kg; source Franov, E. 2011; lognormal variance with pedigree 0.1726, pedigree (2,5,3,5,5)
- DOC, Dissolved Organic Carbon [water, unspecified]: 0.000776667 kg; = cod/3; lognormal variance with pedigree 0.212, pedigree (5,5,3,5,5)
  According to Code of Life Cycle Inventory Practice
- COD, Chemical Oxygen Demand [water, unspecified]: 0.00233 kg; name cod; source Franov, E. 2011; lognormal variance with pedigree 0.1726, pedigree (2,5,3,5,5)
  only COD available, BOD, TOC, DOC are not available
- Phosphorus [water, unspecified]: 1.98e-5 kg; source Franov, E. 2011; lognormal variance with pedigree 0.1726, pedigree (2,5,3,5,5)
- TOC, Total Organic Carbon [water, unspecified]: 0.000932 kg; name toc; = cod/2.5; lognormal variance with pedigree 0.212, pedigree (5,5,3,5,5)
  relation COD to TOC is about 2.5:1 for pulp and paper industry according to "Code of Life Cycle Inventory Practice"

## Sampling procedure
Primary data for the production process were collected for each of the 9 recycled graphical paper. Mass balance of paper materials and energy balance for the energy demand were done for each paper individually. The average data was then weighted according to their respective production volume

## Extrapolations
This dataset has been extrapolated from year 2014 to the year of the calculation (2021). The uncertainty has been adjusted accordingly.
