# cobalt production

Dataset: EcoSpold 2, unit process
Geography: GLO
Time period: 2012-01-01 to 2021-12-31
Technology level: current
Classification: ISIC rev.4 ecoinvent: 2420:Manufacture of basic precious and other non-ferrous metals
Tags: combined production
Scenario: Business-as-Usual
System model: Allocation, cut-off by classification
Share of production covered: 30 %
Generated by: Carol-lynne Pettit
Database: ecoinvent
isCopyrightProtected: true
accessRestrictedTo: 1

## General comment
This dataset represents the production of cobalt by the global cobalt industry. Reference: "The Environmental Performance of Refined Cobalt - Life Cycle Inventory and Life Cycle Assessment of Refined Cobalt - Summary Report", CDI & ERM, Novermber 2016. PM2.5-10 and PM10 emissions to air arise from mine ventillation systems.

## Included activities start
This activity starts from cradle (i.e. including all upstream activities) inclusing the extraction of ore and the collection of secondary material)

## Included activities end
This activity ends at factory gate with the refined cobalt metal. This dataset includes activities related to mining (surface and underground extraction), beneficiation (production of concentrate and/or raffinate solution), primary extraction (selection and further concentration of cobalt), and refining (refining into cobalt metals).

## Geography
The data has been collected from a globally representative sample of companies in the cobalt industry.

## Technology
Cobalt, as a co-product of nickel and copper production, is obtained using a wide range of technologies. The initial life cycle stage covers the mining of the ore through underground or open cast methods. The ore is further processed in beneficiation to produce a concentrate and/or raffinate solution. Metal selection and further concentration is initiated in primary extraction, which may involve calcining, smelting, high pressure leaching, and other processes. The final product is obtained through further refining, which may involve processes such as re-leaching, selective solvent / solution extraction, selective precipitation, electrowinning, and other treatments. Transport is reported separately and consists of only the internal movements of materials / intermediates, and not the movement of final product. Due to its intrinsic value, cobalt has a high recycling rate. However, much of this recycling takes place downstream through the recycling of alloy scrap into new alloy, or goes into the cobalt chemical sector as an intermediate requiring additional refinement. Secondary production, ie production from the recycling of cobalt-containing wastes, is considered in this study in so far as it occurs as part of the participating companies’ production. This was shown to be of very limited significance (less than 1% of cobalt inputs). The secondary materials used for producing cobalt are modelled as entering the system free of environmental burden.

## Time period
Data were collected in 2012

## Parameters
- cobalt output share, cobalt hydroxide: 0.00310894 dimensionless; name Co_output_share_cobalt_hydroxide; = Co_content_cobalt_hydroxide * 0.00541814585154366 / contained_Co_sum
  Share of cobalt contained in the output of cobalt hydroxide. Amount of cobalt hydroxide: 0.00541814585154366 kg
- cobalt content, cobalt hydroxide: 0.634 dimensionless; name Co_content_cobalt_hydroxide
- cobalt content, cobalt oxide: 0.7865 dimensionless; name Co_content_cobalt_oxide
- cobalt output share, cobalt oxide: 0.0873565 dimensionless; name Co_output_share_cobalt_oxide; = Co_content_cobalt_oxide * 0.122722259143365 / contained_Co_sum
  Share of cobalt contained in the output of cobalt oxide. Amount of cobalt oxide output: 0.122722259143365 kg
- cobalt output share, cobalt acetate: 0.00139818 dimensionless; name Co_output_share_cobalt_acetate; = Co_content_cobalt_acetate * 0.00464063438506856 / contained_Co_sum
  Share of cobalt contained in the output of cobalt acetate. Amount of cobalt acetate output: 0.00464063438506856 kg
- cobalt content, cobalt: 1 dimensionless; name Co_content_cobalt
- cobalt content, cobalt acetate: 0.3329 dimensionless; name Co_content_cobalt_acetate
- cobalt output share, cobalt carbonate: 0.00308548 dimensionless; name Co_output_share_cobalt_carbonate; = Co_content_cobalt_carbonate * 0.00688027420342121 / contained_Co_sum
  Share of cobalt contained in the output of cobalt carbonate. Amount of cobalt carbonate output: 0.00688027420342121 kg
- cobalt content, cobalt carbonate: 0.4955 dimensionless; name Co_content_cobalt_carbonate
- cobalt output share, cobalt: 0.905051 dimensionless; name Co_output_share_cobalt; = Co_content_cobalt * 1 / contained_Co_sum
  Share of cobalt contained in the output of cobalt. Amount of cobalt output: 1 kg.
- sum of contained cobalt: 1.10491 kg; name contained_Co_sum; = Co_content_cobalt * 1 + Co_content_cobalt_acetate * 0.00464063438506856 + Co_content_cobalt_carbonate * 0.00688027420342121 + Co_content_cobalt_hydroxide * 0.00541814585154366 + Co_content_cobalt_oxide * 0.122722259143365
  Total amount of cobalt contained in the reference products. The cobalt content is expressed in kg per kg of dry mass. The dry mass of all cobalt products is 1 kg per unit of product and is therefore ignored in the mathematical relation.
  cobalt amount: 1 kg
  cobalt cobalt content: 1
  cobalt acetate amount: 0.00464063438506856 kg
  cobalt acetate cobalt content: 0.3329
  cobalt carbonate amount: 0.00688027420342121 kg
  cobalt carbonate cobalt content: 0.4955
  cobalt hydroxide amount: 0.00541814585154366 kg
  cobalt hydroxide cobalt content: 0.634
  cobalt oxide amount: 0.122722259143365 kg
  cobalt oxide cobalt content: 0.7865
- cobalt output share: 0.905051 dimensionless; name Co_output_share; = IF(cobalt_amount;Co_output_share_cobalt) + IF(cobalt_acetate_amount;Co_output_share_cobalt_acetate) + IF(cobalt_carbonate_amount;Co_output_share_cobalt_carbonate) + IF(cobalt_hydroxide_amount;Co_output_share_cobalt_hydroxide) + IF(cobalt_oxide_amount;Co_output_share_cobalt_oxide)
  Share of cobalt contained in the output.

## Reference product
All rows: By-product classification allocatable product
- cobalt: 0 kg; name cobalt_amount; CPC 41601: Tungsten, molybdenum, tantalum, magnesium, cobalt, cadmium, titanium, zirconium, beryllium, gallium, hafnium, […]; CAS 7440-48-4
  production volume 7.79e7 kg; name cobalt_PV
    Represents the global production volume of refined cobalt in 2012. Source: USGS 2016 Minerals Yearbook, Cobalt.
  property cobalt content 1; name cobalt_amount_Co_content
    cobalt content on a dry matter basis
  property price 26.5168 EUR2005; name cobalt_amount_price_EUR2005
    Price calculated as 5-year market average (2015-2019; USD/kg; USGS [2020]) and converted to EUR2005 (USD2019/EUR2005 exchange rate: 0.62; Official Data Foundation [2020] and Macrotrends [2020]).
    References:
    Official Data Foundation (2020). Inflation Calculator [Online]. Available from: https://www.officialdata.org/us/inflation/2005?endYear=2019&amount=1 [Accessed 28/07/2020]
    USGS (2020). Mineral Commodity Summaries 2020 [Online]. Available from: https://pubs.usgs.gov/periodicals/mcs2020/mcs2020.pdf [Accessed 28/07/2020]
    Macrotrends (2020). Euro Dollar Exchange Rate (EUR USD) - Historical Chart [Online]. Available from: https://www.macrotrends.net/2548/euro-dollar-exchange-rate-historical-chart [Accessed 28/07/2020]
  property carbon content 0
    carbon content on a dry matter basis (reserved; not for manual entry)
  property true value 26.5168; name cobalt_amount_true_value
    allocation property applied in "true value" allocation // value calculated from revenue
  properties: carbon content, non-fossil 0, carbon content, fossil 0, water content 0, water in wet mass 0 kg, wet mass 1 kg, dry mass 1 kg, carbon allocation 0 kg
- cobalt hydroxide: 0 kg; name cobalt_hydroxide_amount; CPC 41601: Tungsten, molybdenum, tantalum, magnesium, cobalt, cadmium, titanium, zirconium, beryllium, gallium, hafnium, […]; CAS 12672-51-4
  Value obtained from the industry.
  production volume 0 kg; name cobalt_hydroxide_PV
    Calculated from the production volume of cobalt in proportion to the output amount relative to the amount of the cobalt reference product.
  property cobalt content 0.634; name cobalt_hydroxide_amount_Co_content
    cobalt content on a dry matter basis
  property price 21.1864 EUR2005; name cobalt_hydroxide_amount_price_EUR2005
    Value provided by the international Cobalt Institute as USD2012/kg. Converted to EUR2005 (USD2012/EUR2005 exchange rate: 0.82; Official Data Foundation [2020] and Macrotrends [2020]).
    References:
    Official Data Foundation (2020). Inflation Calculator [Online]. Available from: https://www.officialdata.org/us/inflation/2005?endYear=2019&amount=1 [Accessed 28/07/2020]
    Macrotrends (2020). Euro Dollar Exchange Rate (EUR USD) - Historical Chart [Online]. Available from: https://www.macrotrends.net/2548/euro-dollar-exchange-rate-historical-chart [Accessed 28/07/2020]
  property carbon content 0
    carbon content on a dry matter basis (reserved; not for manual entry)
  properties: dry mass 1 kg, carbon content, fossil 0, carbon content, non-fossil 0, water content 0, water in wet mass 0 kg, wet mass 1 kg, carbon allocation 0 kg
- cobalt carbonate: 0 kg; name cobalt_carbonate_amount; CPC 41601: Tungsten, molybdenum, tantalum, magnesium, cobalt, cadmium, titanium, zirconium, beryllium, gallium, hafnium, […]; CAS 513-79-1
  Value obtained from the industry.
  production volume 0 kg; name cobalt_carbonate_PV
    (same comment as for cobalt hydroxide)
  property cobalt content 0.4955; name cobalt_carbonate_amount_Co_content
    cobalt content on a dry matter basis
  property heating value, net 3.06 MJ
    LHV is calculated based on the elemental composition of the substance. Based on the name of the substance, the chemical formula of the substance is manually found to be: CCoO3.
  property price 13.6687 EUR2005; name cobalt_carbonate_amount_price_EUR2005
    (same comment as for cobalt hydroxide)
  property carbon content 0.100897
    carbon content on a dry matter basis (reserved; not for manual entry)
  properties: water content 0, carbon content, non-fossil 0.100897, water in wet mass 0 kg, wet mass 1 kg, dry mass 1 kg, carbon content, fossil 0, carbon allocation 0.100897 kg
- cobalt oxide: 0 kg; name cobalt_oxide_amount; CPC 41601: Tungsten, molybdenum, tantalum, magnesium, cobalt, cadmium, titanium, zirconium, beryllium, gallium, hafnium, […]; CAS 1307-96-6
  Value obtained from the industry.
  production volume 0 kg; name cobalt_oxide_PV
    (same comment as for cobalt hydroxide)
  property cobalt content 0.7865; name cobalt_oxide_amount_Co_content
    cobalt content on a dry matter basis
  property price 21.1864 EUR2005; name cobalt_oxide_amount_price_EUR2005
    (same comment as for cobalt hydroxide)
  property carbon content 0
    carbon content on a dry matter basis (reserved; not for manual entry)
  properties: water in wet mass 0 kg, carbon content, fossil 0, carbon content, non-fossil 0, water content 0, dry mass 1 kg, wet mass 1 kg, carbon allocation 0 kg
- calcium carbonate, precipitated: 1 kg; name calcium_carbonate_amount; = 0.630423122085626*Co_output_share; CPC 34240: Phosphates of triammonium; salts and peroxysalts of inorganic acids and metals n.e.c.; CAS 471-34-1; pedigree (1,1,1,1,1)
  Value obtained from the industry. The amount is split between the different reference products based on their cobalt content.
  production volume 4.911e7 kg; = Ref('eb35efe7-13c6-4f76-9068-f798e8df0d6a', 'ProductionVolume') * (ABS(Ref('93df4b2e-c775-451a-8133-bb0a207ad2c4')) / ABS(Ref('eb35efe7-13c6-4f76-9068-f798e8df0d6a'))
    Calculated from the production volume of the reference product in proportion to the output amount relative to the amount of the reference product.
  property price 0.452 EUR2005; name calcium_carbonate_amount_price_EUR2005
    Estimated value. This price is averaged from 4 different suppliers available in the commercial webstore of alibaba. The price refers to a bulk quantity purchase. All websites were retrieved on the 19th Sept 2017. THe exchange rate used is from 2010 when 1 USD - 0.755 EUR.
    Price range:
    supplier 1: 230-260 $ per ton, https://www.alibaba.com/product-detail/Hot-calcium-carbonate-light-or-heavy_1677405130.html?spm=a2700.7724838.2017115.20.3c93b095BC0Sce&s=p
    supplier 2: 100-140 $ per ton, https://www.alibaba.com/product-detail/China-manufacturer-precipitated-calcium-carbonate_60613120303.html?spm=a2700.7724838.2017115.10.3c93b095BC0Sce&s=p
    supplier 3: 460-1600 $ per ton, https://www.alibaba.com/product-detail/Professional-AR-grade-precipitated-calcium-carbonate_60713789652.html?spm=a2700.7724838.2017115.1.3c93b095BC0Sce&s=p
    supplier 4: 800-1,200 $ per ton, https://www.alibaba.com/product-detail/Precipitated-Calcium-Carbonate-products_60232652437.html?spm=a2700.7724838.2017115.27.3c93b095BC0Sce&s=p
  property true value 0.257895; name calcium_carbonate_amount_true_value
    allocation property applied in "true value" allocation // value calculated from revenue
- cobalt acetate: 0 kg; name cobalt_acetate_amount; CPC 41601: Tungsten, molybdenum, tantalum, magnesium, cobalt, cadmium, titanium, zirconium, beryllium, gallium, hafnium, […]; CAS 71-48-7
  Value obtained from the industry.
  production volume 0 kg; name cobalt_acetate_PV
    (same comment as for cobalt hydroxide)
  property heating value, net 12.33 MJ
    LHV is calculated based on the elemental composition of the substance. Based on the name of the substance, the formula is found manually.
  property price 5.39913 EUR2005; name cobalt_acetate_amount_price_EUR2005
    (same comment as for cobalt hydroxide)
  property cobalt content 0.3329; name cobalt_acetate_amount_Co_content
    cobalt content on a dry matter basis
  property carbon content 0.271154
    carbon content on a dry matter basis (reserved; not for manual entry)
  properties: wet mass 1 kg, carbon content, fossil 0.271154, water content 0, carbon content, non-fossil 0, dry mass 1 kg, water in wet mass 0 kg, carbon allocation 0.271154 kg

## By-products
All rows: By-product classification allocatable product; pedigree (1,1,1,1,1)
- ammonium sulfate: 0 kg; name ammonium_sulfate_amount; CPC 34612: Ammonium sulphate; CAS 7783-20-2
  (same comment as for calcium carbonate, precipitated)
  production volume 1.28648e7 kg; = Ref('eb35efe7-13c6-4f76-9068-f798e8df0d6a', 'ProductionVolume') * (ABS(Ref('f2830cd7-69b9-4e1d-9df4-a7d574cc018d')) / ABS(Ref('eb35efe7-13c6-4f76-9068-f798e8df0d6a'))
    (same comment as for calcium carbonate, precipitated)
  property price 0.38 EUR2005; name ammonium_sulfate_amount_price_EUR2005
    Prices are calculated on basis of Import/Export data (tonnes and US$) from UN Trade Statistics Database (http://data.un.org/Browse.aspx?d=ComTrade, accessed 7/7-2010). N, P2O5, or K2O content (http://www.fertilizer.org/ifa/Home-Page/STATISTICS/Conversions-factors)
  property carbon content 0
    carbon content on a dry matter basis (reserved; not for manual entry)
  property true value 0.0627553; name ammonium_sulfate_amount_true_value
    allocation property applied in "true value" allocation // value calculated from revenue
  properties: carbon content, fossil 0, dry mass 1 kg, water content 0, water in wet mass 0 kg, carbon content, non-fossil 0, wet mass 1 kg, carbon allocation 0 kg
- nickel, class 1: 0 kg; name nickel_amount; CPC 41422: Unwrought nickel; CAS 7440-02-0
  (same comment as for calcium carbonate, precipitated)
  production volume 4.21589e8 kg; = Ref('eb35efe7-13c6-4f76-9068-f798e8df0d6a', 'ProductionVolume') * (ABS(Ref('aba0b3a4-7315-4b21-958b-0f1772c710f0')) / ABS(Ref('eb35efe7-13c6-4f76-9068-f798e8df0d6a'))
    Calculated as follows: In total, 11.83 kg of nickel, class 1 are produced per kg of cobalt. 5.99 kg are produced directly from cobalt production activities and 5.84 kg are through the processing of nickel-rich electrolytes produced from cobalt production activities. A total of 376 Mt of refined nickel was produced in the countries represented by the Cobalt Institute in 2012, according to the USGS Minerals Yearbook 2015. This PV (kg) was calculated as 3.76E+8*(5.99/11.83).
  property price 12.0741 EUR2005; name nickel_amount_price_EUR2005
    Price calculated as 5-year market average (2015-2019; USD/kg; USGS [2020]) and converted to EUR2005 (USD2019/EUR2005 exchange rate: 0.62; Official Data Foundation [2020] and Macrotrends [2020]).
  property carbon content 0
    carbon content on a dry matter basis (reserved; not for manual entry)
  property true value 65.3442; name nickel_amount_true_value
    allocation property applied in "true value" allocation // value calculated from revenue
  properties: wet mass 1 kg, carbon content, fossil 0, dry mass 1 kg, carbon content, non-fossil 0, water content 0, water in wet mass 0 kg, carbon allocation 0 kg
- copper concentrate, sulfide ore: 0 kg; name copper_concentrate_amount; CPC 14290: Other non-ferrous metal ores and concentrates (other than uranium or thorium ores and concentrates)
  (same comment as for calcium carbonate, precipitated)
  production volume 2.66985e9 kg; = Ref('eb35efe7-13c6-4f76-9068-f798e8df0d6a', 'ProductionVolume') * (ABS(Ref('a4143591-7466-41a2-b742-0e00ea357e70')) / ABS(Ref('eb35efe7-13c6-4f76-9068-f798e8df0d6a'))
    (same comment as for calcium carbonate, precipitated)
  property price 0.8402 EUR2005; name copper_concentrate_amount_price_EUR2005
    Price calculated as:
    Price = (Cu content * Cu price) + (Au content * Au price) + (Ag content * Ag price) + (Te content * Te price) + (Se content * Se price) Treatment costs [TC] Refining costs [RC] Delivery costs Penalties.
    Equation source: Devlin (2015)
    Price data were taken from USGS (2020) and represent 5-year market averages (2015-2019). TC and RC data were taken from Díaz-Borrego et al. (2019) and represent 3-year market averages (2015-2017). Metal content values were taken from the literature (see Turner & Hischier 2019). Penalties and Delivery costs were assumed to be zero. Prices converted to EUR2005 (USD2019/EUR2005 exchange rate: 0.62; Official Data Foundation [2020] and Macrotrends [2020]).
    References:
    Devlin, D. (2015). Mineral product pricing study [Online]. Available from: https://www.imf.org/external/spanish/np/seminars/2015/andean/pdf/sesion5-devlin-en.pdf [Accessed 28/07/2020]
    Díaz-Borrego et al. (2019; https://doi.org/10.1155/2019/8523748)
    Turner, D. & Hischier, R. (2019). Life cycle inventories of copper production (pyrometallurgy) and anode slime processing. Empa: St Gallen, Switzerland.
    Official Data Foundation (2020). Inflation Calculator [Online]. Available from: https://www.officialdata.org/us/inflation/2005?endYear=2019&amount=1 [Accessed 28/07/2020]
    USGS (2020). Mineral Commodity Summaries 2020 [Online]. Available from: https://pubs.usgs.gov/periodicals/mcs2020/mcs2020.pdf [Accessed 28/07/2020]
    Macrotrends (2020). Euro Dollar Exchange Rate (EUR USD) - Historical Chart [Online]. Available from: https://www.macrotrends.net/2548/euro-dollar-exchange-rate-historical-chart [Accessed 28/07/2020]
  property carbon content 0
    carbon content on a dry matter basis (reserved; not for manual entry)
  property true value 28.796; name copper_concentrate_amount_true_value
    allocation property applied in "true value" allocation // value calculated from revenue
  properties: carbon content, non-fossil 0, water in wet mass 0 kg, dry mass 1 kg, water content 0, wet mass 1 kg, copper content 0, zinc content 0, carbon content, fossil 0, silver content 0, carbon allocation 0 kg
- nickel sulfate: 0 kg; name nickel_sulfate_amount; CPC 34240: Phosphates of triammonium; salts and peroxysalts of inorganic acids and metals n.e.c.; CAS 7786-81-4
  (same comment as for calcium carbonate, precipitated)
  production volume 8.1157e7 kg; = Ref('eb35efe7-13c6-4f76-9068-f798e8df0d6a', 'ProductionVolume') * (ABS(Ref('a10042de-0514-4e05-941a-6719d353f9fd')) / ABS(Ref('eb35efe7-13c6-4f76-9068-f798e8df0d6a'))
    (same comment as for calcium carbonate, precipitated)
  property price 3.00711 EUR2005; name nickel_sulfate_amount_price_EUR2005
    (same comment as for cobalt hydroxide)
  property carbon content 0
    carbon content on a dry matter basis (reserved; not for manual entry)
  property true value 3.13283; name nickel_sulfate_amount_true_value
    allocation property applied in "true value" allocation // value calculated from revenue
  properties: wet mass 1 kg, carbon content, non-fossil 0, dry mass 1 kg, water content 0, water in wet mass 0 kg, carbon content, fossil 0, carbon allocation 0 kg
- electricity, high voltage: 0 kWh; name electricity_amount; CPC 17100: Electrical energy
  (same comment as for calcium carbonate, precipitated)
  production volume 1.2962e8 kWh; = Ref('eb35efe7-13c6-4f76-9068-f798e8df0d6a', 'ProductionVolume') * (ABS(Ref('8610dcb9-2df9-4d5f-8b8a-ab8e1567e963')) / ABS(Ref('eb35efe7-13c6-4f76-9068-f798e8df0d6a'))
    (same comment as for calcium carbonate, precipitated)
  property price 0.0977 EUR2005; name electricity_amount_price_EUR2005
    Temporary price data. Calculated as 90% of purchasers price based on: 94% of the average price (to account for a 6% loss in transformation and transmission) for electricity for industrial consumersin 2005 (excluded taxes). From IEA.
  property true value 0.162565; name electricity_amount_true_value
    allocation property applied in "true value" allocation // value calculated from revenue
- copper, anode: 0 kg; name copper_anode_amount; CPC 41412: Unrefined copper; copper anodes for electrolytic refining
  (same comment as for calcium carbonate, precipitated)
  production volume 4.72893e8 kg; = Ref('eb35efe7-13c6-4f76-9068-f798e8df0d6a', 'ProductionVolume') * (ABS(Ref('20897b3d-7476-4aa1-b61b-7261d70580c4')) / ABS(Ref('eb35efe7-13c6-4f76-9068-f798e8df0d6a'))
    (same comment as for calcium carbonate, precipitated)
  property price 3.843 EUR2005; name copper_anode_amount_price_EUR2005
    Price calculated as:
    Price = (Cu content * Cu price) + (Au content * Au price) + (Ag content * Ag price) + (Te content * Te price) + (Se content * Se price) Delivery costs Penalties.
    Equation source: Devlin (2015)
    Price data were taken from USGS (2020) and represent 5-year market averages (2015-2019). Metal content values were taken from the literature (see Turner & Hischier 2019). Penalties and Delivery costs were assumed to be zero. Prices converted to EUR2005 (USD2019/EUR2005 exchange rate: 0.62; Official Data Foundation [2020] and Macrotrends [2020]).
    References:
    Devlin, D. (2015). Mineral product pricing study [Online]. Available from: https://www.imf.org/external/spanish/np/seminars/2015/andean/pdf/sesion5-devlin-en.pdf [Accessed 28/07/2020]
    Turner, D. & Hischier, R. (2019). Life cycle inventories of copper production (pyrometallurgy) and anode slime processing. Empa: St Gallen, Switzerland.
    Official Data Foundation (2020). Inflation Calculator [Online]. Available from: https://www.officialdata.org/us/inflation/2005?endYear=2019&amount=1 [Accessed 28/07/2020]
    USGS (2020). Mineral Commodity Summaries 2020 [Online]. Available from: https://pubs.usgs.gov/periodicals/mcs2020/mcs2020.pdf [Accessed 28/07/2020]
    Macrotrends (2020). Euro Dollar Exchange Rate (EUR USD) - Historical Chart [Online]. Available from: https://www.macrotrends.net/2548/euro-dollar-exchange-rate-historical-chart [Accessed 28/07/2020]
  property carbon content 0
    carbon content on a dry matter basis (reserved; not for manual entry)
  property true value 23.329; name copper_anode_amount_true_value
    allocation property applied in "true value" allocation // value calculated from revenue
  properties: dry mass 1 kg, wet mass 1 kg, water in wet mass 0 kg, carbon content, non-fossil 0, water content 0, carbon content, fossil 0, copper content 0.997, carbon allocation 0 kg
- ferronickel: 0 kg; name ferronickel_amount; CPC 41114: Ferro-nickel; CAS 11110-39-7
  (same comment as for calcium carbonate, precipitated)
  production volume 2.57252e7 kg; = Ref('eb35efe7-13c6-4f76-9068-f798e8df0d6a', 'ProductionVolume') * (ABS(Ref('c8d64e07-7871-4510-b050-0272941a39a2')) / ABS(Ref('eb35efe7-13c6-4f76-9068-f798e8df0d6a'))
    (same comment as for calcium carbonate, precipitated)
  property price 4.22595 EUR2005; name ferronickel_amount_price_EUR2005
    Calculated value on a per kg nickel basis (i.e. relative to the price of nickel, class 1)
  property heating value, net 0 MJ
    Non combustible products are assumed to have an LHV equal to zero (0).
  property carbon content 0.0165
    carbon content on a dry matter basis (reserved; not for manual entry)
  property true value 1.39555; name ferronickel_amount_true_value
    allocation property applied in "true value" allocation // value calculated from revenue
  properties: carbon content, fossil 0.0165, carbon content, non-fossil 0, water content 0, dry mass 1 kg, wet mass 1 kg, water in wet mass 0 kg, carbon allocation 0.0165 kg
- zinc sulfide: 0 kg; name zinc_sulfide_amount; CPC 34220: Zinc oxide; zinc peroxide; chromium oxides and hydroxides; manganese oxides; iron oxides and hydroxides; earth[…]; CAS 1314-98-3
  (same comment as for calcium carbonate, precipitated)
  production volume 4.58e6 kg; = Ref('eb35efe7-13c6-4f76-9068-f798e8df0d6a', 'ProductionVolume') * (ABS(Ref('8c1e769f-4375-48bc-b9ae-100bf131ec27')) / ABS(Ref('eb35efe7-13c6-4f76-9068-f798e8df0d6a'))
    (same comment as for calcium carbonate, precipitated)
  property price 0.8 EUR2005; name zinc_sulfide_amount_price_EUR2005
    Estimated based on expert judgement and knowledge of the market for chemicals.
  property carbon content 0
    carbon content on a dry matter basis (reserved; not for manual entry)
  property true value 0.0470347; name zinc_sulfide_amount_true_value
    allocation property applied in "true value" allocation // value calculated from revenue
  properties: water content 0, dry mass 1 kg, carbon content, non-fossil 0, carbon content, fossil 0, water in wet mass 0 kg, wet mass 1 kg, carbon allocation 0 kg
- sulfuric acid: 0 kg; name sulfuric_acid_amount; CPC 34231: Chemical elements n.e.c.; inorganic acids except phosphoric, nitric and sulphonitric; inorganic oxygen compoun[…]; CAS 7664-93-9
  (same comment as for calcium carbonate, precipitated)
  production volume 5.18681e9 kg; = Ref('eb35efe7-13c6-4f76-9068-f798e8df0d6a', 'ProductionVolume') * (ABS(Ref('ec41df5f-222f-47eb-9ee9-a3f7f484114f')) / ABS(Ref('eb35efe7-13c6-4f76-9068-f798e8df0d6a'))
    (same comment as for calcium carbonate, precipitated)
  property price 0.063 EUR2005; name sulfuric_acid_amount_price_EUR2005
  property true value 4.19472; name sulfuric_acid_amount_true_value
  properties: carbon content, non-fossil 0, water in wet mass 0 kg, wet mass 1 kg, dry mass 1 kg, water content 0, carbon content, fossil 0, carbon content 0, carbon allocation 0 kg
- copper, cathode: 0 kg; name copper_amount; CPC 41413: Refined copper and copper alloys, unwrought; master alloys of copper; CAS 7440-50-8
  (same comment as for calcium carbonate, precipitated)
  production volume 2.63826e7 kg; = Ref('eb35efe7-13c6-4f76-9068-f798e8df0d6a', 'ProductionVolume') * (ABS(Ref('e35ba1c8-285a-4993-82b1-35e68c706e17')) / ABS(Ref('eb35efe7-13c6-4f76-9068-f798e8df0d6a'))
    (same comment as for calcium carbonate, precipitated)
  property price 3.57105 EUR2005; name copper_amount_price_EUR2005
    (same comment as for cobalt)
  property carbon content 0
    carbon content on a dry matter basis (reserved; not for manual entry)
  property true value 1.20942; name copper_amount_true_value
    allocation property applied in "true value" allocation // value calculated from revenue
  properties: water content 0, carbon content, non-fossil 0, water in wet mass 0 kg, dry mass 1 kg, wet mass 1 kg, carbon content, fossil 0, carbon allocation 0 kg
- nickel concentrate, 16% Ni: 0 kg; name nickel_ore_amount; CPC 14220: Nickel ores and concentrates
  (same comment as for calcium carbonate, precipitated)
  production volume 5.69413e6 kg; = Ref('eb35efe7-13c6-4f76-9068-f798e8df0d6a', 'ProductionVolume') * (ABS(Ref('965b0472-4d72-4a4c-ac2e-e52eacac7e6f')) / ABS(Ref('eb35efe7-13c6-4f76-9068-f798e8df0d6a'))
    (same comment as for calcium carbonate, precipitated)
  property silver content 0
    silver content on a dry matter basis.
    Estimation of the concentrate caracterisation taken from the Environmental Impact Assessment.
  property platinum content 0
    platinum content on a dry matter basis.
    Estimation of the concentrate caracterisation taken from the Environmental Impact Assessment.
  property price 1.71515 EUR2005; name nickel_ore_amount_price_EUR2005
    Price calculated as:
    Price = (Ni content * Ni price) Treatment costs [TC] Refining costs [RC] Delivery costs Penalties.
    Equation source: Devlin (2015)
    Price data were taken from USGS (2020) and represent 5-year market averages (2015-2019). TC and RC data were taken from Díaz-Borrego et al. (2019) and represent 3-year market averages (2015-2017) for copper, which was used as a proxy here. Penalties and Delivery costs were assumed to be zero. Prices converted to EUR2005 (USD2019/EUR2005 exchange rate: 0.62; Official Data Foundation [2020] and Macrotrends [2020]).
    References:
    Devlin, D. (2015). Mineral product pricing study [Online]. Available from: https://www.imf.org/external/spanish/np/seminars/2015/andean/pdf/sesion5-devlin-en.pdf [Accessed 28/07/2020]
    Díaz-Borrego et al. (2019; https://doi.org/10.1155/2019/8523748)
    Official Data Foundation (2020). Inflation Calculator [Online]. Available from: https://www.officialdata.org/us/inflation/2005?endYear=2019&amount=1 [Accessed 28/07/2020]
    USGS (2020). Mineral Commodity Summaries 2020 [Online]. Available from: https://pubs.usgs.gov/periodicals/mcs2020/mcs2020.pdf [Accessed 28/07/2020]
    Macrotrends (2020). Euro Dollar Exchange Rate (EUR USD) - Historical Chart [Online]. Available from: https://www.macrotrends.net/2548/euro-dollar-exchange-rate-historical-chart [Accessed 28/07/2020]
  property palladium content 0
    palladium content on a dry matter basis.
    Estimation of the concentrate caracterisation taken from the Environmental Impact Assessment.
  property recovery rate 0
    Estimation. Recuperation rate for copper used to calculate amount of gold, silver, platinum, palladium and rhodium in ore.
  property gold content 0
    gold content on a dry matter basis.
    Estimation of the concentrate caracterisation taken from the Environmental Impact Assessment.
  property rhodium content 0
    rhodium content on a dry matter basis.
    Estimation of the concentrate caracterisation taken from the Environmental Impact Assessment.
  property carbon content 0
    carbon content on a dry matter basis (reserved; not for manual entry)
  property true value 0.125369; name nickel_ore_amount_true_value
    allocation property applied in "true value" allocation // value calculated from revenue
  properties: water in wet mass 0 kg, dry mass 1 kg, carbon content, fossil 0, carbon content, non-fossil 0, wet mass 1 kg, water content 0, carbon allocation 0 kg
- electrolyte, nickel-rich: 0 m3; name electrolyte_nickel_rich_amount; CPC 342: Basic inorganic chemicals n.e.c.
  (same comment as for calcium carbonate, precipitated)
  production volume 5.34184e6 m3; = Ref('eb35efe7-13c6-4f76-9068-f798e8df0d6a', 'ProductionVolume') * (ABS(Ref('853bb3e7-5a14-467a-83f0-0576c231cf39')) / ABS(Ref('eb35efe7-13c6-4f76-9068-f798e8df0d6a'))
    Calculated as follows: In total, 11.83 kg of nickel, class 1 are produced per kg of cobalt. 5.99 kg are produced directly from cobalt production activities and 5.84 kg are through the processing of nickel-rich electrolytes produced from cobalt production activities. A total of 376 Mt of refined nickel was produced in the countries represented by the Cobalt Institute in 2012, according to the USGS Minerals Yearbook 2015. This PV (m3) was calculated as 3.76E+8*(5.84/11.83)/77.006. The nickel content of the electrolyte is 77.006 kg per m3.
  property nickel content 1; name electrolyte_nickel_rich_amo_Ni_content_0
    nickel content on a dry matter basis. Assuming a nickel density of 8908 kg/m3
  property price 185.957 EUR2005; name electrolyte_nickel_rich_am_price_EUR2005
    Calculated value on a per kg nickel basis (i.e. relative to the price of nickel, class 1)
  property carbon content 0
    carbon content on a dry matter basis (reserved; not for manual entry)
  property true value 12.7516; name electrolyte_nickel_rich_amo_true_value_0
    allocation property applied in "true value" allocation // value calculated from revenue
  properties: carbon content, fossil 0, water in wet mass 991.355 kg, wet mass 1068.36 kg, dry mass 77.006 kg, water content 12.8737, carbon content, non-fossil 0, carbon allocation 0 kg
- ammonia, anhydrous, liquid: 0 kg; name ammonia_amount; CPC 34651: Ammonia, anhydrous; CAS 7664-41-7
  (same comment as for calcium carbonate, precipitated)
  production volume 774716 kg; = Ref('eb35efe7-13c6-4f76-9068-f798e8df0d6a', 'ProductionVolume') * (ABS(Ref('b81363d8-b152-466f-aef5-33accc13d5bf')) / ABS(Ref('eb35efe7-13c6-4f76-9068-f798e8df0d6a'))
    (same comment as for calcium carbonate, precipitated)
  property price 0.333 EUR2005; name ammonia_amount_price_EUR2005
  property true value 0.00331169; name ammonia_amount_true_value
  properties: water in wet mass 0 kg, water content 0, carbon content, non-fossil 0, carbon content, fossil 0, dry mass 1 kg, wet mass 1 kg, carbon content 0, carbon allocation 0 kg
- sulfur: 0 kg; name sulfur_amount; CPC 34520: Sulphur, except sublimed sulphur, precipitated sulphur and colloidal sulphur; CAS 7704-34-9
  (same comment as for calcium carbonate, precipitated)
  production volume 4.81497e6 kg; = Ref('eb35efe7-13c6-4f76-9068-f798e8df0d6a', 'ProductionVolume') * (ABS(Ref('5efa3e16-71b2-4757-8d8e-7a69ea059658')) / ABS(Ref('eb35efe7-13c6-4f76-9068-f798e8df0d6a'))
    (same comment as for calcium carbonate, precipitated)
  property price 0.0551778 EUR2005; name sulfur_amount_price_EUR2005
  property true value 0.00341052; name sulfur_amount_true_value
  properties: water content 0, dry mass 1 kg, carbon content, non-fossil 0, water in wet mass 0 kg, carbon content, fossil 0, wet mass 1 kg, carbon content 0, carbon allocation 0 kg
- copper cake: 0 kg; name copper_cake_amount; CPC 41412: Unrefined copper; copper anodes for electrolytic refining
  (same comment as for calcium carbonate, precipitated)
  production volume 2.95724e8 kg; = Ref('eb35efe7-13c6-4f76-9068-f798e8df0d6a', 'ProductionVolume') * (ABS(Ref('f37a10c6-c782-42e9-8194-dc1dabeba379')) / ABS(Ref('eb35efe7-13c6-4f76-9068-f798e8df0d6a'))
    (same comment as for calcium carbonate, precipitated)
  property price 2.42831 EUR2005; name copper_cake_amount_price_EUR2005
    Calculated value. The concentration of copper in the copper cake is 0.68 kg / kg copper cake. The 5 year market price of copper is 5.8 USD/kg (2015-2019; Source: USGS, 2020, Mineral Commodity Summaries 2020, Available from: https://pubs.usgs.gov/periodicals/mcs2020/mcs2020.pdf [Accessed 28/07/2020). Prices are then converted to EUR2005 (USD2019/EUR2005 exchange rate: 0.62 [based on https://www.officialdata.org/us/inflation/2005?endYear=2019&amount=1 and https://www.macrotrends.net/2548/euro-dollar-exchange-rate-historical-chart])
  property carbon content 0
    carbon content on a dry matter basis (reserved; not for manual entry)
  property true value 9.21836; name copper_cake_amount_true_value
    allocation property applied in "true value" allocation // value calculated from revenue
  properties: carbon content, fossil 0, dry mass 1 kg, water content 0, water in wet mass 0 kg, carbon content, non-fossil 0, wet mass 1 kg, copper content 0.68, carbon allocation 0 kg
- electrolyte, copper-rich: 0 kg; name electrolyte_copper_rich_amount; CPC 342: Basic inorganic chemicals n.e.c.
  (same comment as for calcium carbonate, precipitated)
  production volume 5.37968e7 kg; = Ref('eb35efe7-13c6-4f76-9068-f798e8df0d6a', 'ProductionVolume') * (ABS(Ref('3bef27b0-a171-43ed-b605-5b9cada903d1')) / ABS(Ref('eb35efe7-13c6-4f76-9068-f798e8df0d6a'))
    (same comment as for calcium carbonate, precipitated)
  property copper content 1; name electrolyte_copper_rich_amo_Cu_content_0
    copper content on a dry matter basis
  property price 2.84255 EUR2005; name electrolyte_copper_rich_am_price_EUR2005
    Calculated value on a per kg copper basis (i.e. relative to the price of copper, cathode); assuming a Cu content of 0.796
  property carbon content 0
    carbon content on a dry matter basis (reserved; not for manual entry)
  property true value 1.96303; name electrolyte_copper_rich_amo_true_value_0
    allocation property applied in "true value" allocation // value calculated from revenue
  properties: water in wet mass 0.256716 kg, carbon content, non-fossil 0, wet mass 1.25672 kg, carbon content, fossil 0, dry mass 1 kg, water content 0.256716, carbon allocation 0 kg

## Inputs from technosphere
- nitric acid, without water, in 50% solution state: 0 kg; pedigree (1,1,1,1,1)
  (same comment as for calcium carbonate, precipitated)
  properties: dry mass 1 kg, wet mass 1 kg
- light fuel oil: 0 kg; pedigree (1,1,1,1,1)
  (same comment as for calcium carbonate, precipitated)
  properties: heating value, net 42.6 MJ, carbon content, fossil 0.862, wet mass 1 kg, dry mass 1 kg
- sodium sulfate, anhydrite: 0 kg; pedigree (1,1,1,1,1)
  (same comment as for calcium carbonate, precipitated)
  properties: dry mass 1 kg, wet mass 1 kg
- nickel smelter slag: -0.233158 kg; name nickel_smelter_slag_amount; = (101.770443641039*Co_output_share)*-1; lognormal variance with pedigree 0.0009, pedigree (1,2,2,1,1)
  (same comment as for calcium carbonate, precipitated)
  production volume 7.92792e9 kg; = nickel_smelter_slag_amount*(IF(cobalt_amount;cobalt_PV/ABS(cobalt_amount)*Co_output_share_cobalt) + IF(cobalt_acetate_amount;cobalt_acetate_PV/ABS(cobalt_acetate_amount)*Co_output_share_cobalt_acetate) + IF(cobalt_carbonate_amount;cobalt_carbonate_PV/ABS(cobalt_carbonate_amount)*Co_output_share_cobalt_carbonate) + IF(cobalt_hydroxide_amount;cobalt_hydroxide_PV/ABS(cobalt_hydroxide_amount)*Co_output_share_cobalt_hydroxide) + IF(cobalt_oxide_amount;cobalt_oxide_PV/ABS(cobalt_oxide_amount)*Co_output_share_cobalt_oxide))
    (same comment as for calcium carbonate, precipitated)
  property price 0 EUR2005; name nickel_smelter_slag_amount_price_EUR2005
  properties: wet mass 1 kg, carbon content, fossil 0.00345, dry mass 1 kg
- polyacrylamide: 5.84339e-5 kg; = 0.0255056191139025*Co_output_share; lognormal variance with pedigree 0.0009, pedigree (1,2,2,1,1)
  (same comment as for calcium carbonate, precipitated)
  properties: carbon content, fossil 0.51, wet mass 1 kg, dry mass 1 kg, heating value, net 23.88 MJ
- hard coal: 0 kg; pedigree (1,1,1,1,1)
  (same comment as for calcium carbonate, precipitated)
  properties: wet mass 1 kg, dry mass 0.94 kg, heating value, net 27.91 MJ, carbon content, fossil 0.845, water content 0.0638298
  note on heating value, net: Based on the Characterization factor of Hard coal in the CED method
  note on carbon content, fossil: C content 75-94% (specified in Tab 1.1, report 6, part VI). A mean content of 0.845 kg C/ kg dry hard coal was considered
- sulfuric acid: 0 kg; pedigree (1,1,1,1,1)
  (same comment as for calcium carbonate, precipitated)
  properties: dry mass 1 kg, wet mass 1 kg
- oxygen, liquid: 0 kg; pedigree (1,1,1,1,1)
  (same comment as for calcium carbonate, precipitated)
  properties: wet mass 1 kg, dry mass 1 kg
- chlorine, liquid: 0 kg; pedigree (1,1,1,1,1)
  (same comment as for calcium carbonate, precipitated)
  properties: wet mass 1 kg, dry mass 1 kg
- propane: 0.00984409 kg; = 4.29681263133427*Co_output_share; lognormal variance with pedigree 0.0009, pedigree (1,2,2,1,1)
  (same comment as for calcium carbonate, precipitated)
  properties: heating value, net 46.4 MJ, carbon content, fossil 0.817139, wet mass 1 kg, dry mass 1 kg
  note on heating value, net: Indicative value. Reference: Fuels - Higher and Lower Calorific Values, available at: https://www.engineeringtoolbox.com/fuels-higher-calorific-values-d_169.html
- quicklime, milled, loose: 0 kg; pedigree (1,1,1,1,1)
  (same comment as for calcium carbonate, precipitated)
  properties: dry mass 0.99 kg, water content 0.010101, wet mass 1 kg
- heat, district or industrial, natural gas: 1.56337 MJ; = 682.39046231707*Co_output_share; lognormal variance with pedigree 0.0009, pedigree (1,2,2,1,1)
  (same comment as for calcium carbonate, precipitated)
  properties: heating value, net 1 MJ
- non-sulfidic overburden, off-site: -1.42926 kg; name overburden_amount; = (623.851459291981*Co_output_share)*-1; lognormal variance with pedigree 0.0009, pedigree (1,2,2,1,1)
  (same comment as for calcium carbonate, precipitated)
  production volume 4.8598e10 kg; = overburden_amount*(IF(cobalt_amount;cobalt_PV/ABS(cobalt_amount)*Co_output_share_cobalt) + IF(cobalt_acetate_amount;cobalt_acetate_PV/ABS(cobalt_acetate_amount)*Co_output_share_cobalt_acetate) + IF(cobalt_carbonate_amount;cobalt_carbonate_PV/ABS(cobalt_carbonate_amount)*Co_output_share_cobalt_carbonate) + IF(cobalt_hydroxide_amount;cobalt_hydroxide_PV/ABS(cobalt_hydroxide_amount)*Co_output_share_cobalt_hydroxide) + IF(cobalt_oxide_amount;cobalt_oxide_PV/ABS(cobalt_oxide_amount)*Co_output_share_cobalt_oxide))
    (same comment as for calcium carbonate, precipitated)
  property price 0 EUR2005; name overburden_amount_price_EUR2005
  properties: dry mass 1 kg, wet mass 1 kg
- charcoal: 1.61695e-6 kg; = 0.000705775398941361*Co_output_share; lognormal variance with pedigree 0.0009, pedigree (1,2,2,1,1)
  (same comment as for calcium carbonate, precipitated)
  properties: wet mass 1 kg, dry mass 1 kg, heating value, net 28.4 MJ, carbon content, non-fossil 0.8
- sulfur dioxide, liquid: 0 kg; pedigree (1,1,1,1,1)
  (same comment as for calcium carbonate, precipitated)
  properties: dry mass 1 kg, wet mass 1 kg
- hydrogen peroxide, without water, in 50% solution state: 0 kg; pedigree (1,1,1,1,1)
  (same comment as for calcium carbonate, precipitated)
  properties: wet mass 1 kg, dry mass 1 kg, heating value, net 7.13 MJ
- sodium phosphate: 0 kg; pedigree (1,1,1,1,1)
  (same comment as for calcium carbonate, precipitated)
  properties: dry mass 1 kg, wet mass 1 kg
- transport, freight, lorry >32 metric ton, EURO4: 0 metric ton*km; pedigree (1,1,1,1,1)
  (same comment as for calcium carbonate, precipitated)
- chlorine, gaseous: 0 kg; pedigree (1,1,1,1,1)
  (same comment as for calcium carbonate, precipitated)
  properties: dry mass 1 kg, wet mass 1 kg
- ethanol, without water, in 99.7% solution state, from ethylene: 0 kg; pedigree (1,1,1,1,1)
  (same comment as for calcium carbonate, precipitated)
  properties: carbon content, fossil 0.521739, wet mass 1 kg, heating value, net 31.58 MJ, dry mass 1 kg
- carbon disulfide: 8.0257e-5 kg; = 0.0350311039751321*Co_output_share; lognormal variance with pedigree 0.0009, pedigree (1,2,2,1,1)
  (same comment as for calcium carbonate, precipitated)
  properties: heating value, net 32.72 MJ, carbon content, fossil 0.157895, wet mass 1 kg, dry mass 1 kg
- transport, freight, sea, bulk carrier for dry goods: 0.428604 metric ton*km; = 187.079934858269*Co_output_share; lognormal variance with pedigree 0.1203, pedigree (1,2,2,1,1)
  (same comment as for calcium carbonate, precipitated)
- explosive, tovex: 0.000344815 kg; = 0.15050729367541*Co_output_share; lognormal variance with pedigree 0.0009, pedigree (1,2,2,1,1)
  (same comment as for calcium carbonate, precipitated)
  properties: carbon content, fossil 0.0483756, dry mass 0.92 kg, water content 0.0869565, wet mass 1 kg
- chemical, organic: 0.000967133 kg; = 0.422140615350209*Co_output_share; lognormal variance with pedigree 0.0009, pedigree (1,2,2,1,1)
  (same comment as for calcium carbonate, precipitated)
  properties: dry mass 1 kg, wet mass 1 kg, heating value, net 19.03 MJ, carbon content, fossil 0.628
  note on carbon content, fossil: This dataset is an unweighted average of 20 organic substances (listed in Tab 88.1, ecoinvent v2.2 report 8, part II), being part of the top100 chemicals included in this database. The C-content has also been calculated as an unweighted average of the C content of the substances composing this dataset.
- sulfur: 0.000392223 kg; = 0.171200289492151*Co_output_share; lognormal variance with pedigree 0.0009, pedigree (1,2,2,1,1)
  (same comment as for calcium carbonate, precipitated)
  properties: wet mass 1 kg, dry mass 1 kg
- heavy fuel oil: 0 kg; pedigree (1,1,1,1,1)
  (same comment as for calcium carbonate, precipitated)
  properties: wet mass 1 kg, heating value, net 41.2 MJ, carbon content, fossil 0.849, dry mass 1 kg
- carbon dioxide, liquid: 0 kg; pedigree (1,1,1,1,1)
  (same comment as for calcium carbonate, precipitated)
  properties: heating value, net 8.27 MJ, wet mass 1 kg, carbon content, fossil 0.272727, dry mass 1 kg
- hydrogen sulfide: 0 kg; pedigree (1,1,1,1,1)
  (same comment as for calcium carbonate, precipitated)
  properties: wet mass 1 kg, dry mass 1 kg, heating value, net 7.11 MJ
- steel, low-alloyed: 0.00229529 kg; = 1.00186377756462*Co_output_share; lognormal variance with pedigree 0.0009, pedigree (1,2,2,1,1)
  (same comment as for calcium carbonate, precipitated)
  properties: wet mass 1 kg, dry mass 1 kg, carbon content, fossil 0.005
- sodium hydroxide, without water, in 50% solution state: 0.00824592 kg; = 3.599232491353*Co_output_share; lognormal variance with pedigree 0.0009, pedigree (1,2,2,1,1)
  (same comment as for calcium carbonate, precipitated)
  properties: wet mass 1 kg, dry mass 1 kg, heating value, net 3.03 MJ
- transport, freight, lorry 16-32 metric ton, EURO4: 0 metric ton*km; pedigree (1,1,1,1,1)
  (same comment as for calcium carbonate, precipitated)
- lime, hydrated, loose weight: 0 kg; pedigree (1,1,1,1,1)
  (same comment as for calcium carbonate, precipitated)
  properties: water content 0.00300903, wet mass 1 kg, dry mass 0.997 kg
- kerosene: 0 kg; pedigree (1,1,1,1,1)
  (same comment as for calcium carbonate, precipitated)
  properties: heating value, net 43 MJ, dry mass 1 kg, wet mass 1 kg, carbon content, fossil 0.85
- diesel: 0.00799024 kg; = 3.48763232392329*Co_output_share; lognormal variance with pedigree 0.0009, pedigree (1,2,2,1,1)
  (same comment as for calcium carbonate, precipitated)
  properties: heating value, net 42.8 MJ, wet mass 1 kg, carbon content, fossil 0.865, dry mass 1 kg
  note on carbon content, fossil: C-content of diesel is 86.5% (ecoinvent v2.2 report 6_IV, Tab 3.14)
- ammonium nitrate: 0 kg; pedigree (1,1,1,1,1)
  The exchange has been updated from "ammonium nitrate, as N" into "ammonium nitrate" and therefore its amount has been scaled (multiplied) from 0.2261 kg by 2.8573 kg of "ammonium nitrate" per kg of "ammonium nitrate, as N". Original comment of the exchange is: Value obtained from the industry. The amount is split between the different reference products based on their cobalt content.
  properties: dry mass 1 kg, wet mass 1 kg
- wastewater, average: 0 m3; name wastewater_amount; pedigree (1,1,1,1,1)
  (same comment as for calcium carbonate, precipitated)
  production volume 0 m3
    (same comment as for calcium carbonate, precipitated)
  property price 0 EUR2005; name wastewater_amount_price_EUR2005
  properties: dry mass 0.346837 kg, carbon content, non-fossil 0.194039, water content 2882.2, wet mass 1000 kg
  note on carbon content, non-fossil: 0.0673 kg TOC/m3 (Tab A.17, ecoinvent v2.2 report 13_I). TOC was considered as Total Carbon.
- water, harvested from rainwater: 0.00635695 kg; = 2.77472180720057*Co_output_share; lognormal variance with pedigree 0.0009, pedigree (1,2,2,1,1)
  (same comment as for calcium carbonate, precipitated)
  properties: carbon content, fossil 0.0017899, wet mass 1 kg, dry mass 0.00034 kg, water content 2940.2
- nitrogen, liquid: 0 kg; pedigree (1,1,1,1,1)
  (same comment as for calcium carbonate, precipitated)
  properties: wet mass 1 kg, dry mass 1 kg
- heat, district or industrial, other than natural gas: 0.726409 MJ; = 317.06769541061*Co_output_share; lognormal variance with pedigree 0.0009, pedigree (1,2,2,1,1)
  (same comment as for calcium carbonate, precipitated)
  properties: heating value, net 1 MJ
- diesel, burned in diesel-electric generating set, 10MW: 0.0313926 MJ; = 13.7024705398733*Co_output_share; lognormal variance with pedigree 0.0009, pedigree (1,2,2,1,1)
  (same comment as for calcium carbonate, precipitated)
  properties: heating value, net 1 MJ
- ammonia, anhydrous, liquid: 0 kg; pedigree (1,1,1,1,1)
  (same comment as for calcium carbonate, precipitated)
  properties: dry mass 1 kg, wet mass 1 kg
- natural gas, low pressure: 0 m3; pedigree (1,1,1,1,1)
  (same comment as for calcium carbonate, precipitated)
  properties: dry mass 1 kg, carbon content, fossil 0.695187, heating value, net 39 MJ, wet mass 1 kg
  note on carbon content, fossil: C content considered the same as in high pressure (consumption mix)
  note on heating value, net: Literature value, Source: United Nations Statistics Division (2018) International Recommendations for Energy Statistics (IRES). Available at: http://unstats.un.org/unsd/statcom/doc11/BG-IRES.pdf.
- hydrochloric acid, without water, in 30% solution state: 0 kg; pedigree (1,1,1,1,1)
  (same comment as for calcium carbonate, precipitated)
  properties: heating value, net 3.32 MJ, wet mass 1 kg, dry mass 1 kg
- compressed air, 800 kPa gauge: 0 m3; pedigree (1,1,1,1,1)
  (same comment as for calcium carbonate, precipitated)
- inert waste: 0 kg; name inert_waste_amount; pedigree (1,1,1,1,1)
  (same comment as for calcium carbonate, precipitated)
  production volume 0 kg
    (same comment as for calcium carbonate, precipitated)
  property price 0 EUR2005; name inert_waste_amount_price_EUR2005
  properties: dry mass 1 kg, wet mass 1 kg
- magnesium oxide: 0.00173695 kg; = 0.758156615681969*Co_output_share; lognormal variance with pedigree 0.0009, pedigree (1,2,2,1,1)
  (same comment as for calcium carbonate, precipitated)
  properties: wet mass 1 kg, dry mass 1 kg
- spent solvent mixture: 0 kg; name spent_solvent_amount; pedigree (1,1,1,1,1)
  (same comment as for calcium carbonate, precipitated)
  production volume 0 kg
    (same comment as for calcium carbonate, precipitated)
  property price 0 EUR2005; name spent_solvent_amount_price_EUR2005
  properties: heating value, net 21.7 MJ, water content 0.197605, wet mass 1 kg, carbon content, fossil 0.571257, dry mass 0.835 kg
  note on heating value, net: Value taken from the general comment of the treatment dataset.
  note on carbon content, fossil: Tab A.7, ecoinvent v2.2 report 13_I. C content has been calculated after data in the tables, and then referred to 1 kg DM
- refinery sludge: 0 kg; name refinery_sludge_amount; pedigree (1,1,1,1,1)
  (same comment as for calcium carbonate, precipitated)
  production volume 0 kg
    (same comment as for calcium carbonate, precipitated)
  property price 0 EUR2005; name refinery_sludge_amount_price_EUR2005
  properties: water content 8.52381, carbon content, fossil 0.767857, dry mass 0.105 kg, heating value, net 2.45 MJ, wet mass 1 kg
- benzaldehyde: 0 kg; pedigree (1,1,1,1,1)
  (same comment as for calcium carbonate, precipitated)
  properties: carbon content, fossil 0.792252, wet mass 1 kg, dry mass 1 kg, heating value, net 30.86 MJ
- bentonite: 1.52183e-5 kg; = 0.00664259199003634*Co_output_share; lognormal variance with pedigree 0.0009, pedigree (1,2,2,1,1)
  (same comment as for calcium carbonate, precipitated)
  properties: wet mass 1 kg, dry mass 1 kg
- limestone, crushed, washed: 0 kg; pedigree (1,1,1,1,1)
  (same comment as for calcium carbonate, precipitated)
  properties: wet mass 1 kg, dry mass 0.998 kg, carbon content, fossil 0.117257, water content 0.00200401
  note on carbon content, fossil: Table 3.1, ecoinvent v2.2 report 7, part VII, pg 3. MW CaCO3=100, MW MgCO3=84. C content of limestone is 0.117257 kg/kg DM
- silica sand: 0.0110726 kg; = 4.83304486710504*Co_output_share; lognormal variance with pedigree 0.0009, pedigree (1,2,2,1,1)
  (same comment as for calcium carbonate, precipitated)
  properties: wet mass 1 kg, dry mass 0.99 kg, water content 0.010101
- transport, freight, inland waterways, barge: 0.00337013 metric ton*km; = 1.47101628119475*Co_output_share; lognormal variance with pedigree 0.1203, pedigree (1,2,2,1,1)
  (same comment as for calcium carbonate, precipitated)
- hydrogen, liquid: 0 kg; pedigree (1,1,1,1,1)
  (same comment as for calcium carbonate, precipitated)
  properties: heating value, net 120.21 MJ, dry mass 1 kg, wet mass 1 kg
- tap water: 1.57068 kg; = 685.579048326126*Co_output_share; lognormal variance with pedigree 0.0009, pedigree (1,2,2,1,1)
  (same comment as for calcium carbonate, precipitated)
  properties: wet mass 1 kg, water content 2962.17, carbon content, fossil 0.00178991, dry mass 0.000337476 kg
  note on carbon content, fossil: Bicarbonate content is 2.93 mol/m3. CO2 content is 0.1 mol/m3 (ecoinvent v2.2 report 8, Tab 93.1).
- waste mineral oil: 0 kg; name waste_mineral_oil_amount; pedigree (1,1,1,1,1)
  (same comment as for calcium carbonate, precipitated)
  production volume 0 kg
    (same comment as for calcium carbonate, precipitated)
  property price 0 EUR2005; name waste_mineral_oil_amount_price_EUR2005
  properties: water content 0.111111, carbon content, fossil 0.864444, heating value, net 34.7 MJ, dry mass 0.9 kg, wet mass 1 kg
  note on carbon content, fossil: Tab A.6, ecoinvent v2.2 report 13_I. C content has been calculated after data in the tables, and then referred to 1 kg DM
- phosphoric acid, industrial grade, without water, in 85% solution state: 5.11294e-6 kg; = 0.00223173019335674*Co_output_share; lognormal variance with pedigree 0.0009, pedigree (1,2,2,1,1)
  (same comment as for calcium carbonate, precipitated)
  properties: dry mass 1 kg, wet mass 1 kg
- water, deionised: 0 kg; pedigree (1,1,1,1,1)
  (same comment as for calcium carbonate, precipitated)
  properties: wet mass 1 kg
- leach residue from copper production: -0.0344202 kg; name leach_residue_amount; = (((0.000128671718251306 + 4.64144694131532) + (0.00788697088950315 + 0.00169088729044507)*1084)*Co_output_share)*-1; lognormal variance with pedigree 0.2106, pedigree (5,5,5,5,5)
  Represents the flows that go to neutralization:
  Acid condensate effluent: 0.00788697088950315 m3
  Acid condensate effluent: 0.000128671718251306 kg
  Leach residue: 4.64144694131532 kg
  Waste solution: 0.00169088729044507 m3
  The flows expressed in m3 are converted to kg using a density value of 1084 kg/m3 (Dannenberg et al. 1987).
  The amount is split between the different reference products based on their cobalt content.
  References:
  R. O. Dannenberg, P. C. Gardner, S. R. Crane, and D. C. Seidel (1987). Recovery of Cobalt and Copper From Complex Sulfide Concentrates. Bureau of Mines, Report of Investigations.
  production volume 1.17037e9 kg; = leach_residue_amount*(IF(cobalt_amount;cobalt_PV/ABS(cobalt_amount)*Co_output_share_cobalt) + IF(cobalt_acetate_amount;cobalt_acetate_PV/ABS(cobalt_acetate_amount)*Co_output_share_cobalt_acetate) + IF(cobalt_carbonate_amount;cobalt_carbonate_PV/ABS(cobalt_carbonate_amount)*Co_output_share_cobalt_carbonate) + IF(cobalt_hydroxide_amount;cobalt_hydroxide_PV/ABS(cobalt_hydroxide_amount)*Co_output_share_cobalt_hydroxide) + IF(cobalt_oxide_amount;cobalt_oxide_PV/ABS(cobalt_oxide_amount)*Co_output_share_cobalt_oxide))
    (same comment as for calcium carbonate, precipitated)
  property price 0 EUR2005; name leach_residue_amount_price_EUR2005
  properties: concentration, copper 0.00067 kg/kg, dry mass 0.63 kg, wet mass 1 kg, water content 0.587302
  note on concentration, copper: Nisbett, A., Baxter, K., Marte, K., & Urbani, M. (2009). Flowsheet considerations for copper cobalt projects. Journal of the Southern African Institute of Mining and Metallurgy, 109(11), 641-646.
- manganese sulfate: 8.20219e-6 kg; = 0.00358014652781644*Co_output_share; lognormal variance with pedigree 0.0009, pedigree (1,2,2,1,1)
  (same comment as for calcium carbonate, precipitated)
  properties: wet mass 1 kg, dry mass 1 kg
- diesel, burned in building machine: 0.178667 MJ; = 77.9857996403053*Co_output_share; lognormal variance with pedigree 0.0009, pedigree (1,2,2,1,1)
  (same comment as for calcium carbonate, precipitated)
  properties: heating value, net 1 MJ
- limestone, crushed, for mill: 0 kg; pedigree (1,1,1,1,1)
  (same comment as for calcium carbonate, precipitated)
  properties: carbon content, fossil 0.117492, water content 0.00200401, wet mass 1 kg, dry mass 0.998 kg
- transport, freight, lorry, unspecified: 4.02852e-7 metric ton*km; = 0.000175839341558176*Co_output_share; lognormal variance with pedigree 0.1203, pedigree (1,2,2,1,1)
  (same comment as for calcium carbonate, precipitated)
- sodium tetrahydridoborate: 1.18585e-8 kg; = 5.17606612956792E-06*Co_output_share; lognormal variance with pedigree 0.0009, pedigree (1,2,2,1,1)
  (same comment as for calcium carbonate, precipitated)
  properties: dry mass 1 kg, wet mass 1 kg, heating value, net 12.81 MJ
- process-specific burdens, inert material landfill: 0 kg; pedigree (1,1,1,1,1)
  (same comment as for calcium carbonate, precipitated)
- potassium hydroxide: 6.9648e-5 kg; = 0.0304003985836757*Co_output_share; lognormal variance with pedigree 0.0009, pedigree (1,2,2,1,1)
  (same comment as for calcium carbonate, precipitated)
  properties: wet mass 1 kg, water content 0.168224, dry mass 0.856 kg
- water, decarbonised: 0 kg; pedigree (1,1,1,1,1)
  (same comment as for calcium carbonate, precipitated)
  properties: wet mass 1 kg
- sodium persulfate: 0.000131409 kg; = 0.057358393904651*Co_output_share; lognormal variance with pedigree 0.0009, pedigree (1,2,2,1,1)
  (same comment as for calcium carbonate, precipitated)
  properties: wet mass 1 kg, dry mass 1 kg
- electricity, medium voltage, cobalt industry: 6.25098 kWh; = 2728.47052802951*Co_output_share; lognormal variance with pedigree 0.0009, pedigree (1,2,2,1,1)
  (same comment as for calcium carbonate, precipitated)
- sodium percarbonate, powder: 0 kg; pedigree (1,1,1,1,1)
  (same comment as for calcium carbonate, precipitated)
  properties: wet mass 1 kg, heating value, net 4.63 MJ, dry mass 1 kg, carbon content, fossil 0.0902256
- ethylene glycol: 7.56051e-7 kg; = 0.000330006196845117*Co_output_share; lognormal variance with pedigree 0.0009, pedigree (1,2,2,1,1)
  (same comment as for calcium carbonate, precipitated)
  properties: wet mass 1 kg, carbon content, fossil 0.387097, heating value, net 23.44 MJ, dry mass 1 kg
- lubricating oil: 0 kg; pedigree (1,1,1,1,1)
  (same comment as for calcium carbonate, precipitated)
  properties: wet mass 1 kg, dry mass 1 kg, carbon content, fossil 0.75, heating value, net 40.2 MJ
  note on carbon content, fossil: Lubricating oil is produced from diesel. C-content/dry mass of fats and oils considered 75%, from: ecoinvent v2.2 report, n 15a, pg 40
  note on heating value, net: Literature value, Source: IPCC 2006, 2006 IPCC Guidelines for National Greenhouse Gas Inventories, Prepared by the National Greenhouse Gas Inventories Programme, Eggleston H.S., Buendia L., Miwa K., Ngara T. and Tanabe K. (eds). Published: IGES, Japan
- paraffin: 9.89379e-8 kg; = 4.31850634026059E-05*Co_output_share; lognormal variance with pedigree 0.0009, pedigree (1,2,2,1,1)
  (same comment as for calcium carbonate, precipitated)
  properties: heating value, net 41.5 MJ, wet mass 1 kg, dry mass 1 kg, carbon content, fossil 0.847059
- iron sulfate: 0 kg; pedigree (1,1,1,1,1)
  (same comment as for calcium carbonate, precipitated)
  properties: dry mass 1 kg, wet mass 1 kg
- naphtha: 0 kg; pedigree (1,1,1,1,1)
  (same comment as for calcium carbonate, precipitated)
  properties: heating value, net 45 MJ, dry mass 1 kg, carbon content, fossil 0.919743, wet mass 1 kg
- petroleum coke: 0.00554673 kg; = 2.42107152744278*Co_output_share; lognormal variance with pedigree 0.0009, pedigree (1,2,2,1,1)
  (same comment as for calcium carbonate, precipitated)
  properties: dry mass 1 kg, wet mass 1 kg, carbon content, fossil 0.885, heating value, net 35 MJ
- chemical, inorganic: 1.58524e-6 kg; = 0.000691936665628785*Co_output_share; lognormal variance with pedigree 0.0009, pedigree (1,2,2,1,1)
  (same comment as for calcium carbonate, precipitated)
  properties: carbon content, fossil 0.003, dry mass 1 kg, wet mass 1 kg
  note on carbon content, fossil: This dataset is an unweighted average of 20 inorganic substances (listed in Tab 88.1, ecoinvent v2.2 report 8, part II), being part of the top100 chemicals included in this database. The C-content has also been calculated as an unweighted average of the C content of the substances composing this dataset.
- blast furnace sludge: 0 kg; name sludge_pig_iron_amount; pedigree (1,1,1,1,1)
  (same comment as for calcium carbonate, precipitated)
  production volume 0 kg
    (same comment as for calcium carbonate, precipitated)
  property price 0 EUR2005; name sludge_pig_iron_amount_price_EUR2005
  properties: water content 0.0940919, dry mass 0.914 kg, wet mass 1 kg, carbon content, fossil 0.339168
- acrylic acid: 0 kg; pedigree (1,1,1,1,1)
  (same comment as for calcium carbonate, precipitated)
  properties: heating value, net 21.88 MJ, dry mass 1 kg, wet mass 1 kg, carbon content, fossil 0.5
- acetic acid, without water, in 98% solution state: 7.77681e-6 kg; = 0.00339447272168417*Co_output_share; lognormal variance with pedigree 0.0009, pedigree (1,2,2,1,1)
  (same comment as for calcium carbonate, precipitated)
  properties: carbon content, fossil 0.400016, heating value, net 14.6 MJ, dry mass 1 kg, wet mass 1 kg
  note on heating value, net: Based on literature, page 10, Althaus H.-J., Chudacoff M., Hischier R., Jungbluth N., Osses M. and Primas A. (2007) Life Cycle Inventories of Chemicals. Final report ecoinvent data v2.0 No. 8. EMPA, Swiss Centre for Life Cycle Inventories, Dübendorf, CH, Online-Version under: www.ecoinvent.org.
- transport, freight train: 0.105021 metric ton*km; = 45.8403854394393*Co_output_share; lognormal variance with pedigree 0.1203, pedigree (1,2,2,1,1)
  (same comment as for calcium carbonate, precipitated)
- isobutanol: 0 kg; pedigree (1,1,1,1,1)
  (same comment as for calcium carbonate, precipitated)
  properties: heating value, net 35.99 MJ, wet mass 1 kg, dry mass 1 kg, carbon content, fossil 0.648649
- sulfidic tailings, generic: -0.38175 kg; name sulfidic_tailings_amount; = (166.628593364964*Co_output_share)*-1; lognormal variance with pedigree 0.0009, pedigree (1,2,2,1,1)
  (same comment as for calcium carbonate, precipitated)
  production volume 1.29804e10 kg; = sulfidic_tailings_amount*(IF(cobalt_amount;cobalt_PV/ABS(cobalt_amount)*Co_output_share_cobalt) + IF(cobalt_acetate_amount;cobalt_acetate_PV/ABS(cobalt_acetate_amount)*Co_output_share_cobalt_acetate) + IF(cobalt_carbonate_amount;cobalt_carbonate_PV/ABS(cobalt_carbonate_amount)*Co_output_share_cobalt_carbonate) + IF(cobalt_hydroxide_amount;cobalt_hydroxide_PV/ABS(cobalt_hydroxide_amount)*Co_output_share_cobalt_hydroxide) + IF(cobalt_oxide_amount;cobalt_oxide_PV/ABS(cobalt_oxide_amount)*Co_output_share_cobalt_oxide))
    (same comment as for calcium carbonate, precipitated)
  property price 0 EUR2005; name sulfidic_tailings_amount_price_EUR2005
  properties: oxygen content 0.89157, dry mass 0.7 kg, water content 0.42857, iron content 0.015374, potassium content 0.0025181, calcium content 0.0045972, sodium content 0.0014472, carbon content, fossil 0.0087785, aluminium content 0.014738, wet mass 1 kg, silicon content 0.053273, magnesium content 0.0022359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
- nitric acid, without water, in 50% solution state: 6.18751e-7, 1.53872e-6, 7.37274e-7, 4.69796e-6, 6.16461e-7, 2.53575e-6, 6.68506e-7, 4.16431e-7, 2.00106e-6, 5.41745e-6 kg (10 entries); lognormal variance with pedigree 0.0009, pedigree (1,2,2,1,1)
  (same comment as for calcium carbonate, precipitated)
- light fuel oil: 4.93606e-5, 1.63066e-6, 2.28204e-5, 2.19421e-6, 1.13071e-5, 1.51433e-6, 0.00022991 kg (7 entries); lognormal variance with pedigree 0.0009, pedigree (1,2,2,1,1)
  (same comment as for calcium carbonate, precipitated)
- sodium sulfate, anhydrite: 3.93161e-5, 0.000240708 kg (2 entries); lognormal variance with pedigree 0.0009, pedigree (1,2,2,1,1)
  (same comment as for calcium carbonate, precipitated)
- hard coal: 2.75206e-5, 0.000172909, 0.0008208, 0.000192764, 5.03306e-5, 0.000118352, 0.000115977, 9.02986e-5, 0.000255775, 7.1634e-5 kg (10 entries); lognormal variance with pedigree 0.0009, pedigree (1,2,2,1,1)
  (same comment as for calcium carbonate, precipitated)
- sulfuric acid: 0.0134545, 0.102847 kg (2 entries); lognormal variance with pedigree 0.0009, pedigree (1,2,2,1,1)
  (same comment as for calcium carbonate, precipitated)
- oxygen, liquid: 0.000774778, 0.00282365 kg (2 entries); lognormal variance with pedigree 0.0009, pedigree (1,2,2,1,1)
  (same comment as for calcium carbonate, precipitated)
- chlorine, liquid: 2.40841e-5, 0.000120398 kg (2 entries); lognormal variance with pedigree 0.0009, pedigree (1,2,2,1,1)
  (same comment as for calcium carbonate, precipitated)
- quicklime, milled, loose: 6.29619e-5, 0.00753391 kg (2 entries); lognormal variance with pedigree 0.0009, pedigree (1,2,2,1,1)
  (same comment as for calcium carbonate, precipitated)
- sulfur dioxide, liquid: 0.000241616, 0.000601423 kg (2 entries); lognormal variance with pedigree 0.0009, pedigree (1,2,2,1,1)
  (same comment as for calcium carbonate, precipitated)
- hydrogen peroxide, without water, in 50% solution state: 2.95231e-5, 0.00014015 kg (2 entries); lognormal variance with pedigree 0.0009, pedigree (1,2,2,1,1)
  (same comment as for calcium carbonate, precipitated)
- sodium phosphate: 3.59631e-11, 1.70721e-10 kg (2 entries); lognormal variance with pedigree 0.0009, pedigree (1,2,2,1,1)
  (same comment as for calcium carbonate, precipitated)
- transport, freight, lorry >32 metric ton, EURO4: 0.0182204, 0.156392 metric ton*km (2 entries); lognormal variance with pedigree 0.1203, pedigree (1,2,2,1,1)
  (same comment as for calcium carbonate, precipitated)
- chlorine, gaseous: 2.16776e-5, 0.000106769 kg (2 entries); lognormal variance with pedigree 0.0009, pedigree (1,2,2,1,1)
  (same comment as for calcium carbonate, precipitated)
- ethanol, without water, in 99.7% solution state, from ethylene: 1.50286e-5, 3.3464e-5 kg (2 entries); lognormal variance with pedigree 0.0009, pedigree (1,2,2,1,1)
  (same comment as for calcium carbonate, precipitated)
- heavy fuel oil: 0.00204836, 0.00014367, 0.000425317, 0.000107325, 0.000551489, 8.36611e-5, 0.00994243 kg (7 entries); lognormal variance with pedigree 0.0009, pedigree (1,2,2,1,1)
  (same comment as for calcium carbonate, precipitated)
- carbon dioxide, liquid: 0.00178066, 0.0084591 kg (2 entries); lognormal variance with pedigree 0.0009, pedigree (1,2,2,1,1)
  (same comment as for calcium carbonate, precipitated)
- hydrogen sulfide: 0.000603845, 0.00286653 kg (2 entries); lognormal variance with pedigree 0.0009, pedigree (1,2,2,1,1)
  (same comment as for calcium carbonate, precipitated)
- transport, freight, lorry 16-32 metric ton, EURO4: 0.00270873, 0.02325 metric ton*km (2 entries); lognormal variance with pedigree 0.1203, pedigree (1,2,2,1,1)
  (same comment as for calcium carbonate, precipitated)
- lime, hydrated, loose weight: 1.61671e-5, 0.0019046 kg (2 entries); lognormal variance with pedigree 0.0009, pedigree (1,2,2,1,1)
  (same comment as for calcium carbonate, precipitated)
- kerosene: 1.28476e-5, 4.71234e-7, 7.0552e-6, 9.13267e-7, 2.22382e-6, 3.71132e-7, 6.04467e-7, 6.27775e-5 kg (8 entries); lognormal variance with pedigree 0.0009, pedigree (1,2,2,1,1)
  (same comment as for calcium carbonate, precipitated)
- ammonium nitrate: 0.000366666, 0.000254296, 0.000195454, 0.00066351 kg (4 entries); lognormal variance with pedigree 0.0009, pedigree (1,2,2,1,1)
  (same comment as for ammonium nitrate)
- wastewater, average: -0.00586885, -0.000634899, -0.0122789 m3 (3 entries); lognormal variance with pedigree 0.0009, pedigree (1,2,2,1,1)
  (same comment as for calcium carbonate, precipitated)
  production volume 6.38653e8 m3
- nitrogen, liquid: 0.000412459, 0.00150262 kg (2 entries); lognormal variance with pedigree 0.0009, pedigree (1,2,2,1,1)
  (same comment as for calcium carbonate, precipitated)
- ammonia, anhydrous, liquid: 8.54845e-5, 0.000571349, 0.000132992, 0.000258164, 0.000263504, 0.000120961, 0.000994445, 2.70584e-5, 0.00286159 kg (9 entries); lognormal variance with pedigree 0.0009, pedigree (1,2,2,1,1)
  (same comment as for calcium carbonate, precipitated)
- natural gas, low pressure: 3.11065e-5, 0.0349369 m3 (2 entries); lognormal variance with pedigree 0.0009, pedigree (1,2,2,1,1)
  (same comment as for calcium carbonate, precipitated)
- hydrochloric acid, without water, in 30% solution state: 0.000440913, 0.00197212 kg (2 entries); lognormal variance with pedigree 0.0009, pedigree (1,2,2,1,1)
  (same comment as for calcium carbonate, precipitated)
- compressed air, 800 kPa gauge: 0.0110943, 0.0272641 m3 (2 entries); lognormal variance with pedigree 0.0009, pedigree (1,2,2,1,1)
  (same comment as for calcium carbonate, precipitated)
- inert waste: -0.422232, -0.00363655, -1.48831 kg (3 entries); lognormal variance with pedigree 0.0009, pedigree (1,2,2,1,1)
  (same comment as for calcium carbonate, precipitated)
  production volume 6.50866e10 kg
- spent solvent mixture: -5.48541e-10, -1.28515e-11, -1.40387e-9 kg (3 entries); lognormal variance with pedigree 0.0009, pedigree (1,2,2,1,1)
  (same comment as for calcium carbonate, precipitated)
  production volume 66.8235 kg
- refinery sludge: -0.00016222, -7.42264e-6, -0.00156388 kg (3 entries); lognormal variance with pedigree 0.0009, pedigree (1,2,2,1,1)
  (same comment as for calcium carbonate, precipitated)
  production volume 5.89439e7 kg
- benzaldehyde: 4.03354e-5, 8.16741e-5 kg (2 entries); lognormal variance with pedigree 0.0009, pedigree (1,2,2,1,1)
  (same comment as for calcium carbonate, precipitated)
- limestone, crushed, washed: 0.000437942, 0.051362 kg (2 entries); lognormal variance with pedigree 0.0009, pedigree (1,2,2,1,1)
  (same comment as for calcium carbonate, precipitated)
- hydrogen, liquid: 0.000122346, 0.000559774 kg (2 entries); lognormal variance with pedigree 0.0009, pedigree (1,2,2,1,1)
  (same comment as for calcium carbonate, precipitated)
- waste mineral oil: -9.02325e-7, -2.2338e-8, -2.3626e-6 kg (3 entries); lognormal variance with pedigree 0.0009, pedigree (1,2,2,1,1)
  (same comment as for calcium carbonate, precipitated)
  production volume 111775 kg
- water, deionised: 0.453978, 0.00163421, 1.47376 kg (3 entries); lognormal variance with pedigree 0.0009, pedigree (1,2,2,1,1)
  (same comment as for calcium carbonate, precipitated)
- limestone, crushed, for mill: 9.06463e-6, 1.93549e-5, 0.00226085 kg (3 entries); lognormal variance with pedigree 0.0009, pedigree (1,2,2,1,1)
  (same comment as for calcium carbonate, precipitated)
- process-specific burdens, inert material landfill: 6.76867e-5, 0.00797409 kg (2 entries); lognormal variance with pedigree 0.0009, pedigree (1,2,2,1,1)
  (same comment as for calcium carbonate, precipitated)
- water, decarbonised: 0.317297, 0.0774823, 0.0156201, 0.0513617, 0.0404049, 0.00386223, 0.0302347, 0.0786707, 4.91989e-5, 0.00283547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 kg (13 entries); lognormal variance with pedigree 0.0009, pedigree (1,2,2,1,1)
  (same comment as for calcium carbonate, precipitated)
- sodium percarbonate, powder: 0.00087463, 0.00177101 kg (2 entries); lognormal variance with pedigree 0.0009, pedigree (1,2,2,1,1)
  (same comment as for calcium carbonate, precipitated)
- lubricating oil: 6.91902e-6, 3.28454e-5 kg (2 entries); lognormal variance with pedigree 0.0009, pedigree (1,2,2,1,1)
  (same comment as for calcium carbonate, precipitated)
- iron sulfate: 1.10142e-6, 2.23025e-6 kg (2 entries); lognormal variance with pedigree 0.0009, pedigree (1,2,2,1,1)
  (same comment as for calcium carbonate, precipitated)
- naphtha: 0.00186913, 5.85204e-5, 0.00135791, 1.41801e-5, 0.0001776, 0.000368315, 0.00837241 kg (7 entries); lognormal variance with pedigree 0.0009, pedigree (1,2,2,1,1)
  (same comment as for calcium carbonate, precipitated)
- blast furnace sludge: -0.000925231, -0.000235054, -0.00158188, -0.0104157 kg (4 entries); lognormal variance with pedigree 0.0009, pedigree (1,2,2,1,1)
  (same comment as for calcium carbonate, precipitated)
  production volume 4.47398e8 kg
- acrylic acid: 3.11985e-7, 1.48103e-6 kg (2 entries); lognormal variance with pedigree 0.0009, pedigree (1,2,2,1,1)
  (same comment as for calcium carbonate, precipitated)
- isobutanol: 3.06233e-6, 7.37965e-6 kg (2 entries); lognormal variance with pedigree 0.0009, pedigree (1,2,2,1,1)
  (same comment as for calcium carbonate, precipitated)

## Inputs from nature
All rows: lognormal variance with pedigree 0.0009, pedigree (1,2,2,1,1)
- Magnesium, in ground [natural resource, in ground]: 0.0359378 kg; = 15.6863507434655*Co_output_share
  (same comment as for calcium carbonate, precipitated)
- Water, unspecified natural origin [natural resource, in water]: 0.00259712 m3; = 1.13360721850254*Co_output_share
  (same comment as for calcium carbonate, precipitated)
- Water, river [natural resource, in water]: 0.000641062 m3; = 0.279815037061671*Co_output_share
  (same comment as for calcium carbonate, precipitated)
- Zinc, in ground [natural resource, in ground]: 0.000111403 kg; = 0.048625725354508*Co_output_share
  (same comment as for calcium carbonate, precipitated)
- Gold, in ground [natural resource, in ground]: 1.67113e-9 kg; = 7.29426689475677E-07*Co_output_share
  (same comment as for calcium carbonate, precipitated)
- Silicon, in ground [natural resource, in ground]: 0.140211 kg; = 61.2001420861101*Co_output_share
  (same comment as for calcium carbonate, precipitated)
- Silver, in ground [natural resource, in ground]: 3.00804e-8 kg; = 1.31296804105622E-05*Co_output_share
  (same comment as for calcium carbonate, precipitated)
- Nickel, in ground [natural resource, in ground]: 0.0296178 kg; = 12.9277755753468*Co_output_share
  (same comment as for calcium carbonate, precipitated)
- Chromium, in ground [natural resource, in ground]: 0.00771206 kg; = 3.36621185942295*Co_output_share
  (same comment as for calcium carbonate, precipitated)
- Calcium, in ground [natural resource, in ground]: 0.00350918 kg; = 1.53171034866701*Co_output_share
  (same comment as for calcium carbonate, precipitated)
- Aluminium, in ground [natural resource, in ground]: 0.0227767 kg; = 9.94172159224345*Co_output_share
  (same comment as for calcium carbonate, precipitated)
- Arsenic, in ground [natural resource, in ground]: 5.57013e-5 kg; = 0.024312862677254*Co_output_share
  (same comment as for calcium carbonate, precipitated)
- Copper, in ground [natural resource, in ground]: 0.0545582 kg; = 23.8139110812227*Co_output_share
  (same comment as for calcium carbonate, precipitated)
- Iron, in ground [natural resource, in ground]: 0.768185 kg; = 335.302405677296*Co_output_share
  (same comment as for calcium carbonate, precipitated)
- Water, salt, ocean [natural resource, in water]: 4.78857e-6 m3; = 0.00209014500298901*Co_output_share
  (same comment as for calcium carbonate, precipitated)
- Gangue, in ground [natural resource, in ground]: 1.13875 kg; = 497.050302091586*Co_output_share
  (same comment as for calcium carbonate, precipitated)
- Sulfur, in ground [natural resource, in ground]: 0.402662 kg; = 175.756493952816*Co_output_share
  (same comment as for calcium carbonate, precipitated)
- Cobalt, in ground [natural resource, in ground]: 0.0025837 kg; = 1.12774888668812*Co_output_share
  (same comment as for calcium carbonate, precipitated)
- Water, lake [natural resource, in water]: 0.000492795 m3; = 0.21509831097174*Co_output_share
  (same comment as for calcium carbonate, precipitated)
- Water, well, in ground [natural resource, in water]: 0.000180316 m3; = 0.0787053435327442*Co_output_share
  (same comment as for calcium carbonate, precipitated)
- Manganese, in ground [natural resource, in ground]: 0.00416239 kg; = 1.81682667443637*Co_output_share
  (same comment as for calcium carbonate, precipitated)
- Lead, in ground [natural resource, in ground]: 5.57013e-5 kg; = 0.024312862677254*Co_output_share
  (same comment as for calcium carbonate, precipitated)

## Emissions to nature
- Zinc [air, unspecified]: 1.26883e-6 kg; = 0.000553826009407061*Co_output_share; lognormal variance with pedigree 0.6503, pedigree (1,2,2,1,1)
  (same comment as for calcium carbonate, precipitated)
- Chlorine [air, unspecified]: 6.65801e-8 kg; = 0.000029061339956409*Co_output_share; lognormal variance with pedigree 0.0403, pedigree (1,2,2,1,1)
  (same comment as for calcium carbonate, precipitated)
- Chromium [air, unspecified]: 0.000248496 kg; = 0.108465148987969*Co_output_share; lognormal variance with pedigree 0.6503, pedigree (1,2,2,1,1)
  (same comment as for calcium carbonate, precipitated)
- Lead [water, surface water]: 3.08326e-9 kg; = 1.34580081668973E-06*Co_output_share; lognormal variance with pedigree 0.6503, pedigree (1,2,2,1,1)
  (same comment as for calcium carbonate, precipitated)
- Sulfur trioxide [air, unspecified]: 0.000167843 kg; = 0.0732611470581109*Co_output_share; lognormal variance with pedigree 0.0403, pedigree (1,2,2,1,1)
  (same comment as for calcium carbonate, precipitated)
- Nitrogen [water, ocean]: 5.98097e-5 kg; = 0.0261061474185368*Co_output_share; lognormal variance with pedigree 0.0403, pedigree (1,2,2,1,1)
  (same comment as for calcium carbonate, precipitated)
- Sulfuric acid [water, surface water]: 7.28107e-6 kg; = 0.00317809163737731*Co_output_share; lognormal variance with pedigree 0.0403, pedigree (1,2,2,1,1)
  (same comment as for calcium carbonate, precipitated)
- Arsenic, ion [water, surface water]: 2.05334e-9 kg; = 8.96256568044065E-07*Co_output_share; lognormal variance with pedigree 0.6503, pedigree (1,2,2,1,1)
  (same comment as for calcium carbonate, precipitated)
- Water [air, unspecified]: 0.000264599 m3; = 0.115494010591328*Co_output_share; lognormal variance with pedigree 0.0403, pedigree (1,2,2,1,1)
  (same comment as for calcium carbonate, precipitated)
- VOC, volatile organic compounds, unspecified origin [air, unspecified]: 7.26651e-6 kg; = 0.00317173516444384*Co_output_share; lognormal variance with pedigree 0.0403, pedigree (1,2,2,1,1)
  (same comment as for calcium carbonate, precipitated)
- Sulfur [soil, industrial]: 1.11127e-5 kg; = 0.0048505463213807*Co_output_share; lognormal variance with pedigree 0.0403, pedigree (1,2,2,1,1)
  (same comment as for calcium carbonate, precipitated)
- Cobalt [water, surface water]: 8.69402e-7 kg; = 0.000379482148098517*Co_output_share; lognormal variance with pedigree 0.6503, pedigree (1,2,2,1,1)
  (same comment as for calcium carbonate, precipitated)
- Selenium [air, unspecified]: 8.99547e-8 kg; = 0.000039264022160783*Co_output_share; lognormal variance with pedigree 0.6503, pedigree (1,2,2,1,1)
  (same comment as for calcium carbonate, precipitated)
- Iron, ion [water, ocean]: 5.34012e-6 kg; = 0.0023308923721946*Co_output_share; lognormal variance with pedigree 0.6503, pedigree (1,2,2,1,1)
  (same comment as for calcium carbonate, precipitated)
- Acetic acid [air, unspecified]: 6.25212e-10 kg; = 2.72896831521399E-07*Co_output_share; lognormal variance with pedigree 0.0403, pedigree (1,2,2,1,1)
  (same comment as for calcium carbonate, precipitated)
- Nickel, ion [water, surface water]: 3.94899e-7 kg; = 0.000172368083976443*Co_output_share; lognormal variance with pedigree 0.6503, pedigree (1,2,2,1,1)
  (same comment as for calcium carbonate, precipitated)
- Vanadium [air, unspecified]: 3.07214e-10 kg; = 1.34094903084924E-07*Co_output_share; lognormal variance with pedigree 0.6503, pedigree (1,2,2,1,1)
  (same comment as for calcium carbonate, precipitated)
- Ammonia [air, unspecified]: 1.25856e-6 kg; = 0.000549345235670116*Co_output_share; lognormal variance with pedigree 0.0403, pedigree (1,2,2,1,1)
  (same comment as for calcium carbonate, precipitated)
- Particulates, > 2.5 um, and < 10um [air, unspecified]: 0.000384418 kg; = 0.167793152991367*Co_output_share; lognormal variance with pedigree 0.1203, pedigree (1,2,2,1,1)
  (same comment as for calcium carbonate, precipitated)
- Nitrogen oxides [air, unspecified]: 6.3102e-5 kg; = 0.027543156536213*Co_output_share; lognormal variance with pedigree 0.0403, pedigree (1,2,2,1,1)
  (same comment as for calcium carbonate, precipitated)
- Cobalt [water, ocean]: 1.10992e-7 kg; = 4.84464887517152E-05*Co_output_share; lognormal variance with pedigree 0.6503, pedigree (1,2,2,1,1)
  (same comment as for calcium carbonate, precipitated)
- Lead [air, unspecified]: 6.31644e-6 kg; = 0.00275704120410533*Co_output_share; lognormal variance with pedigree 0.6503, pedigree (1,2,2,1,1)
  (same comment as for calcium carbonate, precipitated)
- Hydrogen sulfide [air, unspecified]: 1.31637e-6 kg; = 0.000574576885094916*Co_output_share; lognormal variance with pedigree 0.0403, pedigree (1,2,2,1,1)
  (same comment as for calcium carbonate, precipitated)
- Silver [air, unspecified]: 1.01743e-10 kg; = 4.44096325256971E-08*Co_output_share; lognormal variance with pedigree 0.6503, pedigree (1,2,2,1,1)
  (same comment as for calcium carbonate, precipitated)
- Zinc, ion [water, ocean]: 7.62443e-9 kg; = 3.32796043483029E-06*Co_output_share; lognormal variance with pedigree 0.6503, pedigree (1,2,2,1,1)
  (same comment as for calcium carbonate, precipitated)
- Carbon dioxide, fossil [air, unspecified]: 0.0538741 kg; = 23.5153160400923*Co_output_share; lognormal variance with pedigree 0.0009, pedigree (1,2,2,1,1)
  (same comment as for calcium carbonate, precipitated)
- Particulates, < 2.5 um [air, unspecified]: 2.34196e-6 kg; = 0.00102223453285349*Co_output_share; lognormal variance with pedigree 0.3003, pedigree (1,2,2,1,1)
  (same comment as for calcium carbonate, precipitated)
- Suspended solids, unspecified [water, surface water]: 4.50765e-5 kg; = 0.0196752933734822*Co_output_share; lognormal variance with pedigree 0.0403, pedigree (1,2,2,1,1)
  (same comment as for calcium carbonate, precipitated)
- Copper, ion [water, surface water]: 3.35034e-7 kg; = 0.000146237759645661*Co_output_share; lognormal variance with pedigree 0.6503, pedigree (1,2,2,1,1)
  (same comment as for calcium carbonate, precipitated)
- Calcium [air, unspecified]: 1.68659e-7 kg; = 7.36174842625008E-05*Co_output_share; lognormal variance with pedigree 0.0403, pedigree (1,2,2,1,1)
  (same comment as for calcium carbonate, precipitated)
- Particulates, > 10 um [air, unspecified]: 0.000315902 kg; = 0.137887110537282*Co_output_share; lognormal variance with pedigree 0.0403, pedigree (1,2,2,1,1)
  (same comment as for calcium carbonate, precipitated)
- Nickel, ion [water, ocean]: 1.54653e-7 kg; = 6.75040993419855E-05*Co_output_share; lognormal variance with pedigree 0.6503, pedigree (1,2,2,1,1)
  (same comment as for calcium carbonate, precipitated)
- Cyanide [water, surface water]: 8.17586e-10 kg; = 3.56865374300792E-07*Co_output_share; lognormal variance with pedigree 0.0403, pedigree (1,2,2,1,1)
  (same comment as for calcium carbonate, precipitated)
- Hydrogen chloride [air, unspecified]: 2.74775e-8 kg; = 0.000011993568870899*Co_output_share; lognormal variance with pedigree 0.0403, pedigree (1,2,2,1,1)
  (same comment as for calcium carbonate, precipitated)
- Mercury [water, ocean]: 1.06646e-10 kg; = 4.65497597356219E-08*Co_output_share; lognormal variance with pedigree 0.6503, pedigree (1,2,2,1,1)
  (same comment as for calcium carbonate, precipitated)
- Sulfuric acid [air, unspecified]: 2.53641e-6 kg; = 0.00110711001277971*Co_output_share; lognormal variance with pedigree 0.0403, pedigree (1,2,2,1,1)
  (same comment as for calcium carbonate, precipitated)
- Chromium, ion [water, surface water]: 1.20397e-10 kg; = 5.25516012682212E-08*Co_output_share; lognormal variance with pedigree 0.6503, pedigree (1,2,2,1,1)
  (same comment as for calcium carbonate, precipitated)
- Sulfur dioxide [air, unspecified]: 0.00271552 kg; = 1.18528954797154*Co_output_share; lognormal variance with pedigree 0.0009, pedigree (1,2,2,1,1)
  (same comment as for calcium carbonate, precipitated)
- Dinitrogen monoxide [air, unspecified]: 2.47247e-6 kg; = 0.00107919945288997*Co_output_share; lognormal variance with pedigree 0.0403, pedigree (1,2,2,1,1)
  (same comment as for calcium carbonate, precipitated)
- Hydrogen sulfide [water, surface water]: 4.11582e-8 kg; = 1.79649863754841E-05*Co_output_share; lognormal variance with pedigree 0.0403, pedigree (1,2,2,1,1)
  (same comment as for calcium carbonate, precipitated)
- Water [water, surface water]: 7.85855e-7 m3; = 0.000343015151740739*Co_output_share; lognormal variance with pedigree 0.0403, pedigree (1,2,2,1,1)
  (same comment as for calcium carbonate, precipitated)
- Mercury [air, unspecified]: 1.25477e-7 kg; = 5.47691684985054E-05*Co_output_share; lognormal variance with pedigree 0.6503, pedigree (1,2,2,1,1)
  (same comment as for calcium carbonate, precipitated)
- Hydrogen [air, unspecified]: 0.015118 kg; = 6.59879004291243*Co_output_share; lognormal variance with pedigree 0.0403, pedigree (1,2,2,1,1)
  (same comment as for calcium carbonate, precipitated)
- Nickel [air, unspecified]: 9.82305e-6 kg; = 0.00428763143495096*Co_output_share; lognormal variance with pedigree 0.6503, pedigree (1,2,2,1,1)
  (same comment as for calcium carbonate, precipitated)
- Cadmium, ion [water, ocean]: 1.02826e-9 kg; = 4.48823056555399E-07*Co_output_share; lognormal variance with pedigree 0.6503, pedigree (1,2,2,1,1)
  (same comment as for calcium carbonate, precipitated)
- Arsenic, ion [water, ocean]: 8.59316e-9 kg; = 3.7507992684303E-06*Co_output_share; lognormal variance with pedigree 0.6503, pedigree (1,2,2,1,1)
  (same comment as for calcium carbonate, precipitated)
- DOC, Dissolved Organic Carbon [water, surface water]: 2.74719e-6 kg; = 0.00119911049986911*Co_output_share; lognormal variance with pedigree 0.0403, pedigree (1,2,2,1,1)
  Value calculated based on the amount of TOC. Based on the ecoinvent Data Quality Guideline (section 5.9.7), the amount of DOC is assumed to be equal to the amount of TOC. The amount is split between the different reference products based on their cobalt content.
- COD, Chemical Oxygen Demand [water, surface water]: 7.41741e-6 kg; = 0.00323759834964659*Co_output_share; lognormal variance with pedigree 0.0403, pedigree (1,2,2,1,1)
  Value calculated based on the amount of TOC. Based on the ecoinvent Data Quality Guideline (section 5.9.7), the amount of COD is assumed to be equal to 2.7 times the amount of TOC. The amount is split between the different reference products based on their cobalt content.
- Arsenic [air, unspecified]: 9.47893e-7 kg; = 0.000413742408221213*Co_output_share; lognormal variance with pedigree 0.0403, pedigree (1,2,2,1,1)
  (same comment as for calcium carbonate, precipitated)
- Manganese [air, unspecified]: 2.29301e-9 kg; = 1.00086853197264E-06*Co_output_share; lognormal variance with pedigree 0.6503, pedigree (1,2,2,1,1)
  (same comment as for calcium carbonate, precipitated)
- Water [water, unspecified]: 2.76328e-6 m3; = 0.00120613418147843*Co_output_share; lognormal variance with pedigree 0.0009, pedigree (1,2,2,1,1)
  (same comment as for calcium carbonate, precipitated)
- Zinc, ion [water, surface water]: 2.78236e-8 kg; = 1.21446262957699E-05*Co_output_share; lognormal variance with pedigree 0.6503, pedigree (1,2,2,1,1)
  (same comment as for calcium carbonate, precipitated)
- Copper, ion [water, ocean]: 2.35896e-8 kg; = 1.02965289445062E-05*Co_output_share; lognormal variance with pedigree 0.6503, pedigree (1,2,2,1,1)
  (same comment as for calcium carbonate, precipitated)
- Carbon monoxide, fossil [air, unspecified]: 3.4186e-5 kg; = 0.0149217142553472*Co_output_share; lognormal variance with pedigree 0.6503, pedigree (1,2,2,1,1)
  (same comment as for calcium carbonate, precipitated)
- Cobalt [air, unspecified]: 6.87447e-7 kg; = 0.000300061244831658*Co_output_share; lognormal variance with pedigree 0.6503, pedigree (1,2,2,1,1)
  (same comment as for calcium carbonate, precipitated)
- Copper [air, unspecified]: 1.53087e-5 kg; = 0.00668204138498499*Co_output_share; lognormal variance with pedigree 0.6503, pedigree (1,2,2,1,1)
  (same comment as for calcium carbonate, precipitated)
- Cadmium, ion [water, surface water]: 3.23455e-10 kg; = 1.41183964171841E-07*Co_output_share; lognormal variance with pedigree 0.6503, pedigree (1,2,2,1,1)
  (same comment as for calcium carbonate, precipitated)
- Nitrogen [air, unspecified]: 0.000245012 kg; = 0.106944435030312*Co_output_share; lognormal variance with pedigree 0.0403, pedigree (1,2,2,1,1)
  (same comment as for calcium carbonate, precipitated)
- TOC, Total Organic Carbon [water, surface water]: 2.74719e-6 kg; = 0.00119911049986911*Co_output_share; lognormal variance with pedigree 0.0403, pedigree (1,2,2,1,1)
  (same comment as for calcium carbonate, precipitated)
- BOD5, Biological Oxygen Demand [water, surface water]: 3.7087e-6 kg; = 0.00161879917482329*Co_output_share; lognormal variance with pedigree 0.0403, pedigree (1,2,2,1,1)
  Value calculated based on the amount of COD. Based on the ecoinvent Data Quality Guideline (section 5.9.7), the amount of BOD5 is assumed to be equal to half the amount of COD. The amount is split between the different reference products based on their cobalt content.
- Methane, fossil [air, unspecified]: 5.49437e-7 kg; = 0.000239822098255097*Co_output_share; lognormal variance with pedigree 0.0403, pedigree (1,2,2,1,1)
  (same comment as for calcium carbonate, precipitated)

## Sampling procedure
Questionnaires were sent to 8 major cobalt producers and responses were received.

## Extrapolations
The project has a reference period of year 2012. Primary, site-specific, data for cobalt production were collected for the calendar year 2012, or the nearest 12 month period for which data were available. In some cases, this meant 2013 data were provided. The reason for the flexibility was to allow for easier data collection for companies where company reporting periods do not follow the calendar year. In selecting the chosen reference period, it was assumed, and confirmed by the participating companies, that no major disruptions to operations or technology changes happened during the data collection period.
