# treatment of sulfidic tailings, from copper mine operation, tailings impoundment

Dataset: EcoSpold 2, unit process
Geography: RU
Time period: 2015-01-01 to 2021-12-31
Technology level: current
Classification: ISIC rev.4 ecoinvent: 3822:Treatment and disposal of hazardous waste
Synonyms: tails; pond; sulphidic; tailing
Scenario: Business-as-Usual
System model: Allocation, cut-off by classification
Share of production covered: 80 %
Generated by: David Turner
Database: ecoinvent
isCopyrightProtected: true
accessRestrictedTo: 1

## General comment
This dataset represents the activity of waste disposal of sulfidic tailings, from copper mine operation in a tailings impoundment in the Russian Federation.
Background: Tailings, a waste material produced during mineral concentration (beneficiation), often contain significant quantities of mobile toxic metals and are typically produced in large quantities. To manage these wastes, tailings are commonly stored behind dammed impoundments, known as tailings ponds. These ponds pose a significant long-term pollution risk as metals may leach out into the surrounding environment, potentially over very long timeframes.
Modelling approach: This dataset was produced using a model developed specifically for assessing the long-term emissions of tailings disposal (see Doka, 2017). The tailings disposal model is based on the modelling framework applied in existing landfill process models used in ecoinvent and is based on a top-down approach. Literature data on measurements of deposited tailings compositions (solids) and measured current concentrations in leachate (liquid) form the basis of the model and are used to characterise pollutant mobility and calculate the currently occurring rate of emissions of the landfill. Heeding chief parameters, such as hydrology, pH development and elemental chemistry, these emissions are then projected into the future. Tailings composition is based on the typical composition of tailings at copper mine sites worldwide; i.e. composition is not region-specific. Land use was calculated following the approach described by Doka (2008). Based on an assumed generic final height of a tailings impoundment of 60 m and an assumed tailings density of 2200 kg/m3, a land area of 7.58E-06 m2 is required per kilogram of sulfidic tailings. The land is assumed to be converted from unknown origin to a disposal site. After an operational phase of 30 years, spontaneous restoration of a consolidated state is assumed to be reached after one hundred years. The total occupation time is therefore 130 years and the land occupation per kilogram tailings is 9.85E-04 m2.
Waste composition (wet, in ppm): H2O 300000; O 622290; H na; C 6145; S 289.86; N 5.0454; P 212.27; B 54.583; Cl 102.61; Br 0.22894; F 772.88; I na; Ag 8.304; As 46.473; Ba 335.12; Cd 3.6523; Co 13.907; Cr 60.142; Cu 876.83; Hg 0.24258; Mn 158.19; Mo 12.151; Ni 19.339; Pb 133.55; Sb 28.698; Se 3.3486; Sn 28.153; V 136.61; Zn 182.34; Be 1.6625; Sc 13.352; Sr 90.588; Ti 229.49; Tl 8.6074; W 9.7967; Si 38694; Fe 10340; Ca 3158.3; Al 11031; K 1832.5; Mg 1606.1; Na 1060.3. // Share of carbon in waste that is biogenic 0%.
Activity extent: The dataset includes all potential emissions to the environment and land use changes. Input exchanges of infrastructure, materials, energy, and water are not included here but are accounted for in the activity, copper mine operation.
References
Doka, G. (2008). Life Cycle Inventory data of mining waste: Emissions from sulfidic tailings disposal. Zürich, Switzerland: Doka Life Cycle Assessments.
Doka, G. (2017). A model for waste-specific and climate-specific life cycle inventories of tailings impoundments. Zürich, Switzerland: Doka Life Cycle Assessments.

## Included activities start
The activity starts at the point of waste deposition in the impoundment. All upstream activities, including the pumping of tailings to the site, any dewatering or treatment, or other transport-related activities are excluded.

## Included activities end
Waste-specific short- and long-term emissions to the environment via impoundment leachate; land transformation and occupation. Note that the structural integrity of the site is assumed to be unwavering during the entie modelled time horizon; i.e. accidental releases of leachate (due to impoundment failure) are not considered.

## Geography
Given name of site is 'Copper deposits; Russia'. Impoundment site with mean annual temperature (MAT) of -4.68935461669058 degC, mean annual precipitation (MAP) of 437.814298594278 mm/year, mean annual actual evaporation (EAT) of 262.509396372839 mm/year, and net infiltration of 306.559600407858 mm/year (using half of natural surface evapotranspiration).
Temperature at site can result in permafrost conditions, which slows down water flow by a factor of 0.955.

## Technology
This is an inventory for an impoundment of copper ore beneficiation tailings waste. The following assumptions were made concerning technology: final impoundment height is 60 meters; operation phase duration is 30 years; and impoundment leachates are released into the environment untreated.

## Time period
'Data on average composition of tailings and tailings-derived leachates from literature sources published between 1994 and 2017 (mean publication date: 2009±6). Mean annual temperature and precipitation data for 1970-2000 (source: Fick and Hijmans, 2017); mean annual evapotranspiration for 1950-2000 (source: Fekete et al., 2002). Production volume based on world mine production data from the USGS Minerals Yearbook 2015. Transfer coefficients from prospective, tailings-specific model.
References:
Fekete, B. M., Vorosmarty, C. J. & Grabs, W. (2002). High-resolution fields of global runoff combining observed river discharge and simulated water balances. Global Biogeochemical Cycles, 16, 15-1 - 15-10.
Fick, S. E. & Hijmans, R. J. (2017). Worldclim 2: New 1-km spatial resolution climate surfaces for global land areas. International Journal of Climatology, 37, 4302-4315.'

## Reference product
- sulfidic tailings, from copper mine operation: -1 kg; By-product classification Waste
  main reference product of this activity (supply of disposal service).
  production volume 1.17e11 kg
    Estimate of the national tailings production volume from the mining and concentration of sulfidic copper ores, based on national mine production of copper from sulfide mineral deposits (kg) multiplied by estimated tailings generation rate per kg copper concentrate produced (160 kg per kg copper concentrate).
  property price 0 EUR2005
    Waste products are assigned a price of zero as they are assumed to require further treatment.
  property carbon content 0.0087785
    carbon content on a dry matter basis (reserved; not for manual entry)
  properties: magnesium content 0.0022944, silicon content 0.055278, nickel content 2.7626e-5, aluminium content 0.015758, tin content 4.0219e-5, dry mass 0.7 kg, wet mass 1 kg, iron content 0.014771, strontium content 0.00012941, chromium content 8.5917e-5, silver content 1.1863e-5, potassium content 0.0026178, arsenic content 6.639e-5, water content 0.42857, cobalt content 1.9866e-5, vanadium content 0.00019515, water in wet mass 0.3 kg, phosphorus content 0.00030324, carbon content, non-fossil 0, sulfur content 0.00041409, sodium content 0.0015148, carbon content, fossil 0.0087785, thallium content 1.2296e-5, nitrogen content 7.2076e-6, calcium content 0.0045119, selenium content 4.7837e-6, copper content 0.0012526, boron content 7.7976e-5, zinc content 0.00026049, molybdenum content 1.7358e-5, titanium content 0.00032784, cadmium content 5.2176e-6, lead content 0.00019078, chlorine content 0.00014659, antimony content 4.0998e-5, tungsten content 1.3995e-5, scandium content 1.9074e-5, manganese content 0.00022598, beryllium content 2.375e-6, mercury content 3.4654e-7, barium content 0.00047874, bromine content 3.2706e-7, oxygen content 0.88899, fluorine content 0.0011041, carbon allocation 0.00614495 kg

## Inputs from nature
- Transformation, from unspecified [natural resource, land]: 7.5758e-6 m2; lognormal variance with pedigree 0.030796, pedigree (1,1,2,1,1)
  conversion of impoundment area.
  Uncertainty: U
- Transformation, to dump site [natural resource, land]: 7.5758e-6 m2; lognormal variance with pedigree 0.030796, pedigree (1,1,2,1,1)
  conversion to impoundment area.
  Uncertainty: U
- Occupation, dump site [natural resource, land]: 0.00098485 m2*year; lognormal variance with pedigree 0.14986, pedigree (1,1,2,1,1)
  for impoundment operation phase and 100 year renaturation phase.
  Uncertainty: U

## Emissions to nature
- Molybdenum [water, ground-, long-term]: 5.7663e-6 kg; lognormal variance with pedigree 0.34525, pedigree (1,1,2,1,1)
  Emissions from long-term leachate (>100a) directly from tailings impoundment.
  Uncertainty: U
- BOD5, Biological Oxygen Demand [water, ground-]: 1.3349e-9 kg; lognormal variance with pedigree 0.33989, pedigree (1,1,2,1,1)
  burden from short-term leachate to groundwater in uncontrolled impoundment in moist cimate.
  Uncertainty: U
- Nickel, ion [water, ground-]: 4.2724e-8 kg; lognormal variance with pedigree 0.43308, pedigree (1,1,2,1,1)
  (same comment as for BOD5, Biological Oxygen Demand)
- Beryllium [water, ground-]: 3.0827e-9 kg; lognormal variance with pedigree 0.51938, pedigree (1,1,2,1,1)
  (same comment as for BOD5, Biological Oxygen Demand)
- Nickel, ion [water, ground-, long-term]: 1.9296e-5 kg; lognormal variance with pedigree 0.29534, pedigree (1,1,2,1,1)
  (same comment as for Molybdenum)
- Antimony [water, ground-, long-term]: 6.9508e-7 kg; lognormal variance with pedigree 1.1474, pedigree (1,1,2,1,1)
  (same comment as for Molybdenum)
- Mercury [water, ground-]: 1.6178e-10 kg; lognormal variance with pedigree 0.61446, pedigree (1,1,2,1,1)
  (same comment as for BOD5, Biological Oxygen Demand)
- Barium [water, ground-]: 1.4217e-9 kg; lognormal variance with pedigree 0.54362, pedigree (1,1,2,1,1)
  (same comment as for BOD5, Biological Oxygen Demand)
- Mercury [water, ground-, long-term]: 2.4241e-7 kg; lognormal variance with pedigree 0.43807, pedigree (1,1,2,1,1)
  (same comment as for Molybdenum)
- Zinc, ion [water, ground-, long-term]: 0.00018177 kg; lognormal variance with pedigree 0.22073, pedigree (1,1,2,1,1)
  (same comment as for Molybdenum)
- Barium [water, ground-, long-term]: 0.00012375 kg; lognormal variance with pedigree 0.26258, pedigree (1,1,2,1,1)
  (same comment as for Molybdenum)
- Molybdenum [water, ground-]: 9.4166e-8 kg; lognormal variance with pedigree 0.40949, pedigree (1,1,2,1,1)
  (same comment as for BOD5, Biological Oxygen Demand)
- Zinc, ion [water, ground-]: 5.6924e-7 kg; lognormal variance with pedigree 0.34754, pedigree (1,1,2,1,1)
  (same comment as for BOD5, Biological Oxygen Demand)
- Antimony [water, ground-]: 8.4155e-9 kg; lognormal variance with pedigree 0.48558, pedigree (1,1,2,1,1)
  (same comment as for BOD5, Biological Oxygen Demand)
- Manganese [water, ground-]: 7.7148e-7 kg; lognormal variance with pedigree 0.33835, pedigree (1,1,2,1,1)
  (same comment as for BOD5, Biological Oxygen Demand)
- Vanadium, ion [water, ground-]: 2.3039e-9 kg; lognormal variance with pedigree 0.52808, pedigree (1,1,2,1,1)
  (same comment as for BOD5, Biological Oxygen Demand)
- Aluminium [water, ground-, long-term]: 0.011026 kg; lognormal variance with pedigree 0.089125, pedigree (1,1,2,1,1)
  (same comment as for Molybdenum)
- Manganese [water, ground-, long-term]: 0.00015742 kg; lognormal variance with pedigree 0.22545, pedigree (1,1,2,1,1)
  (same comment as for Molybdenum)
- Tungsten [water, ground-, long-term]: 1.147e-6 kg; lognormal variance with pedigree 0.6053, pedigree (1,1,2,1,1)
  (same comment as for Molybdenum)
- Nitrate [water, ground-, long-term]: 1.3373e-5 kg; lognormal variance with pedigree 0.34063, pedigree (1,1,2,1,1)
  (same comment as for Molybdenum)
- Lead [water, ground-, long-term]: 0.00013354 kg; lognormal variance with pedigree 0.23108, pedigree (1,1,2,1,1)
  (same comment as for Molybdenum)
- Vanadium, ion [water, ground-, long-term]: 1.9253e-7 kg; lognormal variance with pedigree 2.9237, pedigree (1,1,2,1,1)
  (same comment as for Molybdenum)
- Arsenic, ion [water, ground-, long-term]: 7.097e-7 kg; lognormal variance with pedigree 1.3592, pedigree (1,1,2,1,1)
  (same comment as for Molybdenum)
- Magnesium [water, ground-, long-term]: 0.0015859 kg; lognormal variance with pedigree 0.14923, pedigree (1,1,2,1,1)
  (same comment as for Molybdenum)
- Aluminium [water, ground-]: 5.2317e-6 kg; lognormal variance with pedigree 0.27667, pedigree (1,1,2,1,1)
  (same comment as for BOD5, Biological Oxygen Demand)
- Magnesium [water, ground-]: 2.0197e-5 kg; lognormal variance with pedigree 0.23359, pedigree (1,1,2,1,1)
  (same comment as for BOD5, Biological Oxygen Demand)
- TOC, Total Organic Carbon [water, ground-, long-term]: 0.00043894 kg; lognormal variance with pedigree 0.5421, pedigree (1,1,2,1,1)
  (same comment as for Molybdenum)
- Nitrate [water, ground-]: 4.9684e-6 kg; lognormal variance with pedigree 0.35087, pedigree (1,1,2,1,1)
  (same comment as for BOD5, Biological Oxygen Demand)
- Lead [water, ground-]: 1.0538e-8 kg; lognormal variance with pedigree 0.47781, pedigree (1,1,2,1,1)
  (same comment as for BOD5, Biological Oxygen Demand)
- Arsenic, ion [water, ground-]: 8.553e-9 kg; lognormal variance with pedigree 0.48492, pedigree (1,1,2,1,1)
  (same comment as for BOD5, Biological Oxygen Demand)
- Iron, ion [water, ground-, long-term]: 0.010336 kg; lognormal variance with pedigree 0.091051, pedigree (1,1,2,1,1)
  (same comment as for Molybdenum)
- Tungsten [water, ground-]: 1.4601e-8 kg; lognormal variance with pedigree 0.46819, pedigree (1,1,2,1,1)
  (same comment as for BOD5, Biological Oxygen Demand)
- Ammonium, ion [water, ground-, long-term]: 8.4723e-7 kg; lognormal variance with pedigree 0.34063, pedigree (1,1,2,1,1)
  (same comment as for Molybdenum)
- Iron, ion [water, ground-]: 3.5288e-6 kg; lognormal variance with pedigree 0.2894, pedigree (1,1,2,1,1)
  (same comment as for BOD5, Biological Oxygen Demand)
- Titanium, ion [water, ground-]: 6.2023e-9 kg; lognormal variance with pedigree 0.49528, pedigree (1,1,2,1,1)
  (same comment as for BOD5, Biological Oxygen Demand)
- Ammonium, ion [water, ground-]: 3.1477e-7 kg; lognormal variance with pedigree 0.35087, pedigree (1,1,2,1,1)
  (same comment as for BOD5, Biological Oxygen Demand)
- Fluoride [water, ground-, long-term]: 0.00029004 kg; lognormal variance with pedigree 0.23304, pedigree (1,1,2,1,1)
  (same comment as for Molybdenum)
- Titanium, ion [water, ground-, long-term]: 0.00022948 kg; lognormal variance with pedigree 0.21309, pedigree (1,1,2,1,1)
  (same comment as for Molybdenum)
- Hydrogen sulfide [water, ground-, long-term]: 4.9096e-5 kg; lognormal variance with pedigree 0.2065, pedigree (1,1,2,1,1)
  (same comment as for Molybdenum)
- TOC, Total Organic Carbon [water, ground-]: 7.3278e-7 kg; lognormal variance with pedigree 0.33989, pedigree (1,1,2,1,1)
  (same comment as for BOD5, Biological Oxygen Demand)
- Hydrogen sulfide [water, ground-]: 2.2674e-5 kg; lognormal variance with pedigree 0.21423, pedigree (1,1,2,1,1)
  (same comment as for BOD5, Biological Oxygen Demand)
- Tin, ion [water, ground-, long-term]: 2.8132e-5 kg; lognormal variance with pedigree 0.28287, pedigree (1,1,2,1,1)
  (same comment as for Molybdenum)
- Copper, ion [water, ground-, long-term]: 0.00087653 kg; lognormal variance with pedigree 0.16889, pedigree (1,1,2,1,1)
  (same comment as for Molybdenum)
- Thallium [water, ground-, long-term]: 8.6062e-6 kg; lognormal variance with pedigree 0.32213, pedigree (1,1,2,1,1)
  (same comment as for Molybdenum)
- DOC, Dissolved Organic Carbon [water, ground-, long-term]: 0.00043894 kg; lognormal variance with pedigree 0.5421, pedigree (1,1,2,1,1)
  (same comment as for Molybdenum)
- Tin, ion [water, ground-]: 2.0903e-8 kg; lognormal variance with pedigree 0.45576, pedigree (1,1,2,1,1)
  (same comment as for BOD5, Biological Oxygen Demand)
- Fluoride [water, ground-]: 6.0737e-7 kg; lognormal variance with pedigree 0.34406, pedigree (1,1,2,1,1)
  (same comment as for BOD5, Biological Oxygen Demand)
- Thallium [water, ground-]: 1.1411e-9 kg; lognormal variance with pedigree 0.55169, pedigree (1,1,2,1,1)
  (same comment as for BOD5, Biological Oxygen Demand)
- DOC, Dissolved Organic Carbon [water, ground-]: 7.3278e-7 kg; lognormal variance with pedigree 0.33989, pedigree (1,1,2,1,1)
  (same comment as for BOD5, Biological Oxygen Demand)
- Sulfate [water, ground-, long-term]: 0.00045624 kg; lognormal variance with pedigree 0.2065, pedigree (1,1,2,1,1)
  (same comment as for Molybdenum)
- COD, Chemical Oxygen Demand [water, ground-, long-term]: 3.9981e-5 kg; lognormal variance with pedigree 0.5421, pedigree (1,1,2,1,1)
  (same comment as for Molybdenum)
- Strontium [water, ground-]: 9.0529e-8 kg; lognormal variance with pedigree 0.40723, pedigree (1,1,2,1,1)
  (same comment as for BOD5, Biological Oxygen Demand)
- COD, Chemical Oxygen Demand [water, ground-]: 6.6747e-8 kg; lognormal variance with pedigree 0.33989, pedigree (1,1,2,1,1)
  (same comment as for BOD5, Biological Oxygen Demand)
- Sodium, ion [water, ground-, long-term]: 0.0010361 kg; lognormal variance with pedigree 0.16272, pedigree (1,1,2,1,1)
  (same comment as for Molybdenum)
- Copper, ion [water, ground-]: 3.0163e-7 kg; lognormal variance with pedigree 0.36698, pedigree (1,1,2,1,1)
  (same comment as for BOD5, Biological Oxygen Demand)
- Sulfate [water, ground-]: 0.0002107 kg; lognormal variance with pedigree 0.21423, pedigree (1,1,2,1,1)
  (same comment as for BOD5, Biological Oxygen Demand)
- Cobalt [water, ground-]: 9.3254e-8 kg; lognormal variance with pedigree 0.40941, pedigree (1,1,2,1,1)
  (same comment as for BOD5, Biological Oxygen Demand)
- Strontium [water, ground-, long-term]: 9.0498e-5 kg; lognormal variance with pedigree 0.244, pedigree (1,1,2,1,1)
  (same comment as for Molybdenum)
- Cobalt [water, ground-, long-term]: 1.3813e-5 kg; lognormal variance with pedigree 0.30627, pedigree (1,1,2,1,1)
  (same comment as for Molybdenum)
- Silver, ion [water, ground-, long-term]: 8.3033e-6 kg; lognormal variance with pedigree 0.32331, pedigree (1,1,2,1,1)
  (same comment as for Molybdenum)
- Chromium VI [water, ground-]: 6.3437e-9 kg; lognormal variance with pedigree 0.49475, pedigree (1,1,2,1,1)
  (same comment as for BOD5, Biological Oxygen Demand)
- Sodium, ion [water, ground-]: 7.288e-6 kg; lognormal variance with pedigree 0.26508, pedigree (1,1,2,1,1)
  (same comment as for BOD5, Biological Oxygen Demand)
- Chloride [water, ground-, long-term]: 8.9383e-5 kg; lognormal variance with pedigree 0.24013, pedigree (1,1,2,1,1)
  (same comment as for Molybdenum)
- Silicon [water, ground-, long-term]: 0.00022686 kg; lognormal variance with pedigree 1.7044, pedigree (1,1,2,1,1)
  (same comment as for Molybdenum)
- Chromium VI [water, ground-, long-term]: 5.2813e-7 kg; lognormal variance with pedigree 1.659, pedigree (1,1,2,1,1)
  (same comment as for Molybdenum)
- Silicon [water, ground-]: 2.7129e-6 kg; lognormal variance with pedigree 0.30438, pedigree (1,1,2,1,1)
  (same comment as for BOD5, Biological Oxygen Demand)
- Calcium, ion [water, ground-, long-term]: 0.0031193 kg; lognormal variance with pedigree 0.12761, pedigree (1,1,2,1,1)
  (same comment as for Molybdenum)
- Silver, ion [water, ground-]: 6.9678e-10 kg; lognormal variance with pedigree 0.56801, pedigree (1,1,2,1,1)
  (same comment as for BOD5, Biological Oxygen Demand)
- Chloride [water, ground-]: 1.3227e-5 kg; lognormal variance with pedigree 0.26448, pedigree (1,1,2,1,1)
  (same comment as for BOD5, Biological Oxygen Demand)
- Selenium [water, ground-]: 1.9053e-9 kg; lognormal variance with pedigree 0.53476, pedigree (1,1,2,1,1)
  (same comment as for BOD5, Biological Oxygen Demand)
- Calcium, ion [water, ground-]: 3.9029e-5 kg; lognormal variance with pedigree 0.21248, pedigree (1,1,2,1,1)
  (same comment as for BOD5, Biological Oxygen Demand)
- Scandium [water, ground-, long-term]: 1.3322e-5 kg; lognormal variance with pedigree 0.30762, pedigree (1,1,2,1,1)
  (same comment as for Molybdenum)
- Cadmium, ion [water, ground-, long-term]: 3.6432e-6 kg; lognormal variance with pedigree 0.35033, pedigree (1,1,2,1,1)
  (same comment as for Molybdenum)
- Selenium [water, ground-, long-term]: 1.5555e-7 kg; lognormal variance with pedigree 0.94193, pedigree (1,1,2,1,1)
  (same comment as for Molybdenum)
- Cadmium, ion [water, ground-]: 9.0764e-9 kg; lognormal variance with pedigree 0.48434, pedigree (1,1,2,1,1)
  (same comment as for BOD5, Biological Oxygen Demand)
- Potassium, ion [water, ground-, long-term]: 0.00024816 kg; lognormal variance with pedigree 0.39481, pedigree (1,1,2,1,1)
  (same comment as for Molybdenum)
- Bromine [water, ground-, long-term]: 8.5916e-8 kg; lognormal variance with pedigree 0.49993, pedigree (1,1,2,1,1)
  (same comment as for Molybdenum)
- Scandium [water, ground-]: 2.9094e-8 kg; lognormal variance with pedigree 0.4458, pedigree (1,1,2,1,1)
  (same comment as for BOD5, Biological Oxygen Demand)
- Bromine [water, ground-]: 1.7992e-10 kg; lognormal variance with pedigree 0.61096, pedigree (1,1,2,1,1)
  (same comment as for BOD5, Biological Oxygen Demand)
- Potassium, ion [water, ground-]: 4.4522e-7 kg; lognormal variance with pedigree 0.35452, pedigree (1,1,2,1,1)
  (same comment as for BOD5, Biological Oxygen Demand)
- Boron [water, ground-, long-term]: 1.1397e-6 kg; lognormal variance with pedigree 1.1964, pedigree (1,1,2,1,1)
  (same comment as for Molybdenum)
- Phosphate [water, ground-]: 2.6289e-5 kg; lognormal variance with pedigree 0.26764, pedigree (1,1,2,1,1)
  (same comment as for BOD5, Biological Oxygen Demand)
- Boron [water, ground-]: 1.3774e-8 kg; lognormal variance with pedigree 0.46915, pedigree (1,1,2,1,1)
  (same comment as for BOD5, Biological Oxygen Demand)
- BOD5, Biological Oxygen Demand [water, ground-, long-term]: 7.9962e-7 kg; lognormal variance with pedigree 0.5421, pedigree (1,1,2,1,1)
  (same comment as for Molybdenum)
- Phosphate [water, ground-, long-term]: 0.00062421 kg; lognormal variance with pedigree 0.21572, pedigree (1,1,2,1,1)
  (same comment as for Molybdenum)
- Beryllium [water, ground-, long-term]: 1.6594e-6 kg; lognormal variance with pedigree 0.37605, pedigree (1,1,2,1,1)
  (same comment as for Molybdenum)

## Sampling procedure
Tailings model based on observed leachate concentrations in literature. Extrapolated to 60'000 years heeding chemical characteristics. Initial waste composition from various literature sources. Climate information for national copper deposits (identified from the USGS Major Mineral Deposits database) from literature as follows: global mean annual temperature and precipitation data from Fick and Hijmans (2017); global mean annual evapotranspiration data from Fekete et al. (2002).

References:
Fekete, B. M., Vorosmarty, C. J. & Grabs, W. (2002). High-resolution fields of global runoff combining observed river discharge and simulated water balances. Global Biogeochemical Cycles, 16, 15-1 - 15-10.
Fick, S. E. & Hijmans, R. J. (2017). Worldclim 2: New 1-km spatial resolution climate surfaces for global land areas. International Journal of Climatology, 37, 4302-4315.

## Extrapolations
This dataset has been extrapolated from year 2019 to the year of the calculation (2021). The uncertainty has been adjusted accordingly.
