# quicklime production, in pieces, loose

Dataset: EcoSpold 2, unit process
Geography: CH
Time period: 2000-01-01 to 2021-12-31
Technology level: current
Classification: ISIC rev.4 ecoinvent: 2394:Manufacture of cement, lime and plaster
Synonyms: Lime; CALCIUM OXIDE; Calxyl; Calcia; Burnt lime
Scenario: Business-as-Usual
System model: Allocation, cut-off by classification
Share of production covered: 50 %
Generated by: Daniel Kellenberger (obsolete)
Published in: Kellenberger D. 2004
Database: ecoinvent
isCopyrightProtected: true
accessRestrictedTo: 1

## General comment
This dataset represents the production of 1 kg of quicklime in pieces, obtained by calcination of crushed limestone. This form of quicklime can then be sent for grinding to obtain milled quicklime. Quicklime is used for soil stabilisation in the road construction industry, as a building material, as a process material in the chemical and sugar industries, in the iron and steel industry where it is used as an additive for the formation of slag in electric furnaces, and for the treatment of wastewater.
The inventory is based on data from one company located in Switzerland, and on literature. The infrastructure data is estimated based on a tour and sketches of the process, and normalized with a annual production capacity of about 75'000 tons of product per year.
References:
Kellenberger D., Althaus H.-J., Jungbluth N., Künniger T., Lehmann M. and Thalmann P. (2007) Life Cycle Inventories of Building Products. Data v2.0. ecoinvent report No. 7. EMPA Dübendorf, Swiss Centre for Life Cycle Inventories, Dübendorf, CH.

## Included activities start
From the reception of crushed limestone at the factory gate.

## Included activities end
This activity ends with the production of quicklime. The dataset includes the calcination process, the electricity consumption for preheating the heavy fuel oil and the total heating energy for 'production' and 'administration'. The infrastructure and the measured emissions are also included.

## Geography
Data is based on a Swiss company.

## Technology
Data is based on the Swiss current technology. The company KFN works on a technically high level. Two vertical kilns are in use. The fuel for the calcination process is heavy fuel oil.

## Reference product
- quicklime, in pieces, loose: 1 kg; name RP; source Oates T. 1997; By-product classification allocatable product; CPC 37420: Quicklime, slaked lime and hydraulic lime; CAS 1305-78-8
  Quicklime is produced by the thermal decomposition of limestone. It consists mainly of calcium oxide. Its quality depends on many factors, including physical properties, degree of sintering and chemical composition. As the most readily available and cost effective alkali, quicklime plays an essential part in a wide variety of industrial processes.
  The difference between clinker and quicklime used for products in the binding agent industry is mainly the calcination temperature which is a maximum of 1’450ºC for clinker and a maximum of 1’200ºC for quicklime.
  production volume 1.38678e9 kg; name RP_PV; = 1.6476E+11*0.008417
    Estimated. The Swiss production volume is extrapolated from the global production volume using the nominal GDP of 2005 (source: United Nations, http://data.un.org/Glossary.aspx?q=GDP+%28current+US%24%29, accessed 20130726 and 20130312).
    Gross domestic product (GDP) at current prices is GDP at prices of the current reporting period. Also known as nominal GDP.
  property carbon content, non-fossil 0
    Tab 3.3, ecoinvent v2.2 report 7, part VII, pg 5. Lump quicklime
  property carbon content, fossil 0
    Tab 3.3, ecoinvent v2.2 report 7, part VII, pg 5. Lump quicklime
  property price 0.077 EUR2005
    Calculated value based on data from United Nations Commodity Trade Statistics Database (comtrade.un.org). UN comtrade category: 252210 Quicklime. Year 2005. Using exchange rate of 1EURO = 1.209 USD. Average of price of import into 5 main markets (EU, US, JP, IN and CN).
  property carbon content 0
    carbon content on a dry matter basis (reserved; not for manual entry)
  properties: dry mass 0.99 kg, water content 0.010101, wet mass 1 kg, water in wet mass 0.01 kg, carbon allocation 0 kg

## Inputs from technosphere
- heat, central or small-scale, other than natural gas: 0.00055836 MJ; lognormal variance with pedigree 0.0401, pedigree (1,2,5,1,1)
  Estimation, based on company data. The energy consumption for building heating is considered.
  properties: heating value, net 1 MJ
- industrial machine, heavy, unspecified: 9.23e-6 kg; lognormal variance with pedigree 0.3686, pedigree (4,3,5,1,1)
  Estimation, based on company data. The equipment included in the infrastructure (2 vertical kilns) weight 30t. The estimated lifespan of the machines is 25 years. A total weight of the two types of kiln (SOM + SOFi) is estimated.
- electricity, high voltage: 0.0469 kWh; lognormal variance with pedigree 0.0401, pedigree (1,2,5,1,1)
  Estimation, based on company data. It is assumed that the 50% of the electricity consumption is covered by the grid and the othet 50% by a hydropower plant nearby. The total amount considered is 0.0479 kWh/kg.
- heavy fuel oil: 0.0914 kg; lognormal variance with pedigree 0.0401, pedigree (1,2,5,1,1)
  Estimation, based on company data. The fuel used at the respective company (KFN) for calcining is heavy fuel oil. The other companies supplying the Swiss market use different fuel types. This fact is not reflected in the inventory, which focuses on KFN. The representativeness has been adjusted and therefore the uncertainty has increased.
  Reference(s):
  Kellenberger D., Althaus H.-J., Jungbluth N., Künniger T., Lehmann M. and Thalmann P. (2007) Life Cycle Inventories of Building Products. Final report ecoinvent Data v2.0 No. 7. EMPA Dübendorf, Swiss Centre for Life Cycle Inventories, Dübendorf, CH.
  properties: heating value, net 41.2 MJ, dry mass 1 kg, wet mass 1 kg, carbon content, fossil 0.849
- electricity, medium voltage: 0.0469 kWh; lognormal variance with pedigree 0.0401, pedigree (1,2,5,1,1)
  (same comment as for electricity, high voltage)
- limestone, crushed, washed: 1.73 kg; lognormal variance with pedigree 0.0401, pedigree (1,2,5,1,1)
  Estimation, based on company data. The total amount of crushed limestone used by 2001 was 129.975t. Two types of kiln are used (SOM and SOFi).
  properties: water content 0.00200401, wet mass 1 kg, dry mass 0.998 kg, carbon content, fossil 0.117257
  note on carbon content, fossil: Table 3.1, ecoinvent v2.2 report 7, part VII, pg 3. MW CaCO3=100, MW MgCO3=84. C content of limestone is 0.117257 kg/kg DM

## Emissions to nature
- Carbon dioxide, fossil [air, non-urban air or from high stacks]: 1.07792 kg; source Anonymous 2001; lognormal variance with pedigree 0.0501, pedigree (1,2,5,1,1)
  Calculated. The CO2-emission is caused partly by the calcination of limestone and partly by the fuel combustion. Heavy fuel oil has carbon content of 0.849 (from the dataset 'heavy fuel oil, burned in refinery furnace, CH'). The emissions of fossil CO2 are therefore 0.292209626 per kg of CaO. The emissions for the calcination of limestone are calculated to be 0.785714286.
- NMVOC, non-methane volatile organic compounds, unspecified origin [air, non-urban air or from high stacks]: 4.55e-5 kg; source Anonymous 2001; lognormal variance with pedigree 0.0501, pedigree (1,2,5,1,1)
  Literature value.
  Reference(s):
  Kellenberger D., Althaus H.-J., Jungbluth N., Künniger T., Lehmann M. and Thalmann P. (2007) Life Cycle Inventories of Building Products. Final report ecoinvent Data v2.0 No. 7. EMPA Dübendorf, Swiss Centre for Life Cycle Inventories, Dübendorf, CH.
- Particulates, > 2.5 um, and < 10um [air, non-urban air or from high stacks]: 2.73e-5 kg; source Berdowski J. 1995; lognormal variance with pedigree 0.0501, pedigree (1,2,5,1,1)
  Estimation, based on literature values. The distribution of the dust emissions to the different categories of sizes are made based on the information of the CEPMEIP-Database and adapted, as the amount of PM2.5 emitted increases when TSP is reduced by filters, which are most effective in retaining the particulates of larger size. The 20% are PM<2.5, the 40% are PM>10 and the rest 40% are 2.5<PM<10.
- Nitrogen oxides [air, non-urban air or from high stacks]: 0.000336 kg; source Anonymous 2001; lognormal variance with pedigree 0.0501, pedigree (1,2,5,1,1)
  (same comment as for NMVOC, non-methane volatile organic compounds, unspecified origin)
- Particulates, > 10 um [air, non-urban air or from high stacks]: 2.73e-5 kg; source Berdowski J. 1995; lognormal variance with pedigree 0.0506, pedigree (1,3,5,1,1)
  (same comment as for Particulates, > 2.5 um, and < 10um)
- Carbon monoxide, fossil [air, non-urban air or from high stacks]: 0.00477 kg; source Anonymous 2001; lognormal variance with pedigree 0.0501, pedigree (1,2,5,1,1)
  (same comment as for NMVOC, non-methane volatile organic compounds, unspecified origin)
- Particulates, < 2.5 um [air, non-urban air or from high stacks]: 1.36e-5 kg; source Berdowski J. 1995; lognormal variance with pedigree 0.0501, pedigree (1,2,5,1,1)
  (same comment as for Particulates, > 2.5 um, and < 10um)
- Sulfur dioxide [air, non-urban air or from high stacks]: 0.000336 kg; source Anonymous 2001; lognormal variance with pedigree 0.0501, pedigree (1,2,5,1,1)
  (same comment as for NMVOC, non-methane volatile organic compounds, unspecified origin)

## Sampling procedure
The data is based on information from one company.

## Extrapolations
This dataset has been extrapolated from year 2002 to the year of the calculation (2021). The uncertainty has been adjusted accordingly.

## Review by Emilia Moreno Ruiz 2017-08-10
This dataset was additionally reviewed in a separate review process by Eric Johnson of Atlantic Consulting as well as Emilia Moreno Ruiz and Gregor Wernet of ecoinvent.
