# fatty alcohol production, from palm oil

Dataset: EcoSpold 2, unit process
Geography: RoW
Time period: 1995-01-01 to 2021-12-31
Technology level: modern
Classification: ISIC rev.4 ecoinvent: 2011:Manufacture of basic chemicals
Classification: EcoSpold01Categories: chemicals/organics
Tags: ConvertedDataset
Scenario: Business-as-Usual
System model: Allocation, cut-off by classification
Generated by: Roland Hischier
Published in: Zah R. 2007
Database: ecoinvent
isCopyrightProtected: true
accessRestrictedTo: 1

## General comment
This dataset represents the production of 1 kg of fatty alcohol from palm oil.
Technology is based on European production in the mid 90'. Two production processes were considered: Fatty acid splitting and Methyl ester production. For the dataset it was assumed according to literature sources a mix of 27% of fatty alcohols produced from Fatty Acid Splitting and 73% produced Methyl Ester Production (divided in 56% direct form crude vegetable oil and 17% out of refined oil).
In each step examined, the material and energy input as well as the emissions to air and water and the produced waste are from literature sources. Water consumption and infrastructure are estimation. Transport is calculated based on literature sources.
Production system of fatty alcohols from vegetable oil:
[This dataset was already contained in the ecoinvent database version 2. It was not individually updated during the transfer to ecoinvent version 3. Life Cycle Impact Assessment results may still have changed, as they are affected by changes in the supply chain, i.e. in other datasets. This dataset was generated following the ecoinvent quality guidelines for version 2. It may have been subject to central changes described in the ecoinvent version 3 change report (http://www.ecoinvent.org/database/ecoinvent-version-3/reports-of-changes/), and the results of the central updates were reviewed extensively. The changes added e.g. consistent water flows and other information throughout the database. The documentation of this dataset can be found in the ecoinvent reports of version 2, which are still available via the ecoinvent website. The change report linked above covers all central changes that were made during the conversion process.]

## Included activities start
From reception of palm oil, natural gas, and hydrogen at the factory gate.

## Included activities end
This activity ends with 1 kg of fatty alcohol. This dataset includes material and energy input, water consumption, infrastructure, transport, production of waste and emissions for the production of fatty alcohol out of of crude palm oil and natural gas. The production of the used methanol in the methyl ester production chain is included into this dataset here (therefore the input of natural gas). Water consumption and infrastructure have been estimated.

## Geography
Data based on the European n-olefins production

## Technology
Average technology typical for European production conditions in the mid 90s. //Comment added during dataset update:// the petrochemical route has been designated as modern, since it has the good ability to change capacity with changes in demand compared to most oleochemical raw materials (with palm oil as an exception).
For the production out of palm oil, two main routes exist:
Fatty acid splitting and hydrogenation: The crude oil is contacted with high pressure/high temperature steam in the splitting step, resulting in the production of an aqueous phase containing glycerol and a gaseous phase containing crude fatty acids. In a second step, these fatty acids are transformed into fatty alcohols by the so-called “Lurgi direct hydrogenation”.
Methyl ester production and hydrogenation: in a first step, transesterification of crude or refined vegetable oils together with methanol is made and in a second step these methyl ethers are hydrogenated. It is possible to recover methanol an to return it to the first step - the transesterification.
Flow diagram of the different production ways for the production of fatty alcohols out of oleochemical raw materials :
Reference:
Noweck K. (2001) Fatty Alcohols. In: Ullmann's Encyclopedia of Industrial Chemistry, Sixth Edition, June 2001

## Time period
data of published literature

## Parameters
- fraction, cooling water, to air: 0.3875 dimensionless; name fraction_CW_to_air; = (0.5*fraction_CW_OT_to_air)+(0.5*fraction_CW_R_to_air); lognormal variance with pedigree 0.092025, pedigree (4,4,3,2,4)
  Calculated value based on literature value (see comments of the other parametres present in this dataset) and expert opinion. In the case when no industry/literature data are available about the type of cooling or directly fraction, cooling water, to air specific for the process a default assumption is applied. It is assumed that the once-through cooling system is used in 50% of all cases and recirculating system is used in another 50% of all cases.
- fraction, cooling water, recirculating system, to air: 0.771 dimensionless; name fraction_CW_R_to_air; lognormal variance with pedigree 0.0413, pedigree (2,3,1,3,1)
  Calculated based on literature value (Scown, C.D., 2011, Water Footprint of U.S. Transportation Fuels and supplying information of the article) (Vionnet, S., Quantis Water Database - Technical Report, 2012).
- fraction, process water, to air: 0.15 dimensionless; name fraction_PW_to_air; lognormal variance with pedigree 0.092025, pedigree (4,4,3,2,4)
  Literature value. In case when no industry/process specific data are available, default evaporation fraction value is used. This value is 15% and is based on literature (Statistics Canada, 2007 & Shaffer, K.H., 2008, Consumptive water use in the Great Lakes Basin, USGS & Shiklomanov, 2003, World Water Resources at the Beginning of the 21st Century) and has been approved by an expert.
- fraction, cooling water, cooling pond system, to air: 0.032 dimensionless; name fraction_CW_CP_to_air; lognormal variance with pedigree 0.0413, pedigree (2,3,1,3,1)
  (same comment as for fraction, cooling water, recirculating system, to air)
- fraction, cooling water, once-through system, to air: 0.004 dimensionless; name fraction_CW_OT_to_air; lognormal variance with pedigree 0.0413, pedigree (2,3,1,3,1)
  (same comment as for fraction, cooling water, recirculating system, to air)

## Reference product
- fatty alcohol: 1 kg; source Noweck K. 2001; By-product classification allocatable product; CPC 34139: Other alcohols, phenols, phenol-alcohols, and their halogenated, sulphonated, nitrated or nitrosated derivativ[…]
  EcoSpold01Location=RER
  Fatty alcohols are aliphatic alcohols with chain lengths between C6 and C22:
  CH3(CH2)nCH2OH (n=4-20)
  They are predominantly linear and monohydric and can be saturated or have one or more double bonds. Alcohols with a carbon chain length above C22 are referred to as wax alcohols. Diols with chain lengths exceeding C8 are regarded as substituted fatty alcohols. The character of fatty alcohols (primary or secondary, linear or branched, saturated or unsaturated) is determined by the manufacturing process and the raw material used. Fatty alcohols and their derivatives are used in polymers, surfactants, oil additives and cosmetics and have many specialty uses.
  While saturated fatty alcohols up to dodecanol are clear colorless liquids, the next higher homologues are soft materials. Saturated alcohols crystallize in a nearly orthorhombic lattice and all of them have a lower specific density than water. While lower members have a characteristic odor, higher fatty alcohols are odorless. The boiling as well as the melting points increase uniformly with the chain lengh and are both significantly higher compared with hydrocarbons having the same number of carbon atoms. Suitable solvents therefore are common organic solvents - i.e. petroleum ether, lower alcohols, diethyl ether. Concerning the solubility in water, only hexanol and octanol show some solubility - all higher fatty alcohols are immiscible with water.
  Fatty alcohols are mainly used as derivatives. In Western Europe only 5% of the production is used directly and 95% is used as intermediates. Major property of fatty alcohols is the amphiphilic character. Therefore, surfactants account for 70-75% of total fatty alcohol production. They can be used in detergents, emulsions, cosmetic creams, lotions, or as lubricants.
  production volume 4.992e7 kg
    Global capacity 2600 million kg, capacity utilisation at 75%. (Source: http://goliath.ecnext.com/coms2/gi_0198-101933/Surfactant-producers-take-a-cautious.html). 4% of this is assumed to be sourced from palm oil.
  property heating value, net 41.01 MJ
    LHV is calculated based on the elemental composition of the substance. Based on the name of the substance, the chemical formula of the substance is assumed to be: C16H34O
  property price 2.1 EUR2005
    From ICIS (http://www.icispricing.com/il_shared/Samples/SubPage10100086.asp) Commodity: 'Fatty Alcohols'. Year 2011
  property carbon content, fossil 0.0408973
    Fatty alcohols have chain lengths between C6 and C22, their chemical formula is CH3(CH2)nCH2OH (ecoinvent v2.2 report 12, pg 16). As an average, C14 was used. The dataset represents a mix of 27% produced from fatty acid splitting and 73% produced from methyl ester (ecoinvent v2.2 report 12, pg 21). In the methyl esterification, methanol (CH3OH) has a fossil origin
  property carbon content, non-fossil 0.743434
    (same comment as for fatty alcohol)
  property carbon content 0.784331
    carbon content on a dry matter basis (reserved; not for manual entry)
  properties: wet mass 1 kg, dry mass 1 kg, water in wet mass 0 kg, water content 0, carbon allocation 0.784331 kg

## Inputs from technosphere
- municipal solid waste: 0 kg; pedigree (1,1,1,1,1)
  Literature Value.
  EcoSpold01Location=CH
  Uncertainty: data from ECOSOL study (Literature)
  production volume 0 kg
    Calculated from the production volume of fatty alcohol in proportion to the respective output amounts.
  properties: dry mass 0.771 kg, wet mass 1 kg, carbon content, non-fossil 0.261655, carbon content, fossil 0.171549, water content 0.297017, heating value, net 11.74 MJ
  note on carbon content, non-fossil: MSW composition in tab 4.1, ecoinvent v2.2 report 13_I. C content referred to 1 kg DM
  note on heating value, net: Value taken from the general comment of the treatment dataset.
- chemical factory, organics: 4e-10 unit; lognormal variance with pedigree 0.52, pedigree (5,5,5,5,4)
  EcoSpold01Location=RER
  Estimation: estimated based on large chemical plant
  Uncertainty: estimated from a large chem. plant
- palm oil, crude: 0.927 kg; lognormal variance with pedigree 0.0606, pedigree (2,5,5,5,1)
  EcoSpold01Location=MY
  Literature Value.
  Uncertainty: data from ECOSOL study (Literature)
  properties: wet mass 1 kg, carbon content, non-fossil 0.752881, dry mass 1 kg, heating value, net 37 MJ
  note on carbon content, non-fossil: C49H97O6. Palm oil (tab 17.4, ecoinvent v2.2 report 17-part 17)
  note on heating value, net: Literature value, Source: Biograce, Condensed list of standard values, version 2 - Public. Available at: https://biograce.net/app/webroot/files/file/BioGrace_condensed_list_of_standard_values_-_version_2_-_Public.doc
- heat, district or industrial, other than natural gas: 0 MJ; pedigree (1,1,1,1,1)
  Estimation: estimated based on large chemical plant
  EcoSpold01Location=RER
  Uncertainty: estimation, based on ECOSOL data
  properties: heating value, net 1 MJ
- electricity, medium voltage: 0 kWh; source Hirsinger F. 1995; pedigree (1,1,1,1,1)
  Estimation: estimated based on large chemical plant
  EcoSpold01Location=UCTE
  Uncertainty: estimation, based on ECOSOL data
- heat, district or industrial, natural gas: 0 MJ; source Hirsinger F. 1995; pedigree (1,1,1,1,1)
  EcoSpold01Location=RER
  Estimation: estimated based on large chemical plant
  Uncertainty: estimation, based on ECOSOL data
  properties: heating value, net 1 MJ
- hydrogen, liquid: 0.006 kg; lognormal variance with pedigree 0.0606, pedigree (2,5,5,5,1)
  Literature Value.
  EcoSpold01Location=RER
  Uncertainty: data from ECOSOL study (Literature)
  properties: dry mass 1 kg, wet mass 1 kg, heating value, net 120.21 MJ
- municipal solid waste: -3.01897e-5, -7.60704e-6, -1.08709e-5, -0.0213513 kg (4 entries); lognormal variance with pedigree 0.0606, pedigree (2,5,5,5,1)
  Literature Value.
  EcoSpold01Location=CH
  Uncertainty: data from ECOSOL study (Literature)
  production volume 1.06829e6 kg
- heat, district or industrial, other than natural gas: 0.000848793, 2.09315 MJ (2 entries); lognormal variance with pedigree 0.078, pedigree (4,5,5,5,1)
  (same comment as for heat, district or industrial, other than natural gas)
- electricity, medium voltage: 0.00152523, 0.000292473, 0.00491001, 0.0714118, 0.0100655, 0.032795 kWh (6 entries); source Hirsinger F. 1995; lognormal variance with pedigree 0.078, pedigree (4,5,5,5,1)
  (same comment as for electricity, medium voltage)
- heat, district or industrial, natural gas: 0.0804443, 5.21956 MJ (2 entries); source Hirsinger F. 1995; lognormal variance with pedigree 0.078, pedigree (4,5,5,5,1)
  (same comment as for heat, district or industrial, natural gas)

## Inputs from nature
- Gas, natural, in ground [natural resource, in ground]: 0.0119 m3; source Hirsinger F. 1995; lognormal variance with pedigree 0.0606, pedigree (2,5,5,5,1)
  Literature Value.
  Uncertainty: data from ECOSOL study (Literature)
- Water, cooling, unspecified natural origin [natural resource, in water]: 0.024 m3; name water_cooling_UNO_input; source Hirsinger F. 1995; lognormal variance with pedigree 0.21, pedigree (5,5,5,5,4)
  Estimation: a process water amount of 25% of the cooling water amount is assumed based on literature sources for a large chemical plant.
  Uncertainty: estimated from a large chem. plant
- Water, unspecified natural origin [natural resource, in water]: 0.006 m3; name water_UNO_input; source Hirsinger F. 1995; lognormal variance with pedigree 0.21, pedigree (5,5,5,5,4)
  (same comment as for Water, cooling, unspecified natural origin)

## Emissions to nature
- NMVOC, non-methane volatile organic compounds, unspecified origin [air, urban air close to ground]: 0.00201 kg; source Hirsinger F. 1995; lognormal variance with pedigree 0.1006, pedigree (2,5,5,5,1)
  Literature Value.
  Uncertainty: data from ECOSOL study (Literature)
- COD, Chemical Oxygen Demand [water, surface water]: 0.00142 kg; source Hirsinger F. 1995; lognormal variance with pedigree 0.1006, pedigree (2,5,5,5,1)
  Literature Value.
  Uncertainty: data from ECOSOL study (Literature)
- Suspended solids, unspecified [water, surface water]: 0.000183 kg; source Hirsinger F. 1995; lognormal variance with pedigree 0.1006, pedigree (2,5,5,5,1)
  Literature Value.
  Uncertainty: data from ECOSOL study (Literature)
- Carbon dioxide, fossil [air, urban air close to ground]: 5e-5 kg; source Hirsinger F. 1995; lognormal variance with pedigree 0.0606, pedigree (2,5,5,5,1)
  Literature Value.
  Uncertainty: data from ECOSOL study (Literature)
- Dissolved solids [water, surface water]: 0.00078 kg; source Hirsinger F. 1995; lognormal variance with pedigree 0.1006, pedigree (2,5,5,5,1)
  Literature Value.
  Uncertainty: data from ECOSOL study (Literature)
- TOC, Total Organic Carbon [water, surface water]: 0.000525926 kg; lognormal variance with pedigree 0.1006, pedigree (2,5,5,5,1)
  Calculated by default as TOC (gC) = COD/2.7 (COD measured in g O2). Should more correctly be calculated from the carbon content of the specified emissions to water.
  Uncertainty: data from ECOSOL study (Literature)
- DOC, Dissolved Organic Carbon [water, surface water]: 0.000525926 kg; lognormal variance with pedigree 0.1006, pedigree (2,5,5,5,1)
  Calculated as equal to TOC.
  Uncertainty: data from ECOSOL study (Literature)
- Oils, unspecified [water, surface water]: 2.35e-5 kg; source Hirsinger F. 1995; lognormal variance with pedigree 0.3706, pedigree (2,5,5,5,1)
  Literature Value.
  Uncertainty: data from ECOSOL study (Literature)
- Water [water, unspecified]: 0.0198 m3; name water_to_water_unspecified; = water_cooling_UNO_input*(1-fraction_CW_to_air)+water_UNO_input*(1-fraction_PW_to_air); lognormal variance with pedigree 0.130025, pedigree (4,4,5,2,4)
  Calculated value based on literature values and expert opinion. See comments in the parametres' comment field.
  property fraction, origin: salt water 0; name fraction_origin_salt_water_Ww
  property fraction, origin: unspecified 1; name fraction_origin_unspecified_Ww
  property fraction, origin: fresh water 0; name fraction_origin_fresh_water_Ww
- BOD5, Biological Oxygen Demand [water, surface water]: 0.000283 kg; source Hirsinger F. 1995; lognormal variance with pedigree 0.1006, pedigree (2,5,5,5,1)
  Literature Value.
  Uncertainty: data from ECOSOL study (Literature)
- Water [air, unspecified]: 0.0102 m3; name water_to_air_unspecified; = water_cooling_UNO_input*fraction_CW_to_air+water_UNO_input*fraction_PW_to_air; lognormal variance with pedigree 0.130025, pedigree (4,4,5,2,4)
  (same comment as for Water)
  property fraction, origin: unspecified 1; name fraction_origin_unspecified
  property fraction, origin: salt water 0; name fraction_origin_salt_water
  property fraction, origin: fresh water 0; name fraction_origin_fresh_water

## Extrapolations
data out of ECOSOL study of European Surfactant Industry. Common translation rules used, reported in Chemical report (Althaus et al. 2003). This dataset has been copied from an original dataset covering the geography RER. The uncertainty has been adjusted accordingly.

## Review by Heiko Kunst 2003-06-20
Passed
Passed
