# garage construction, wood, non-insulated, fire-protected

Dataset: EcoSpold 2, unit process
Geography: CH
Time period: 2009-01-01 to 2021-12-31
Technology level: current
Classification: ISIC rev.4 ecoinvent: 4100:Construction of buildings
Tags: WFLDB
Scenario: Business-as-Usual
System model: Allocation, cut-off by classification
Generated by: Rita Schulze
Published in: Nemecek T. 2015
Database: ecoinvent
isCopyrightProtected: true
accessRestrictedTo: 1

## General comment
This dataset represents the construction of 1 m2 of a wooden garage as typically used in farms for the storage of machinery. Features of the model: Building volume: 630 m3; Useable space: 111 m2; Service life span: 50 years.
The garage comprises of a ceiling with non-flammable material and is not insulated. It is a simple construction of wooden walls without insulation material as required for parking vehicles with combustion engine; light basement with concrete.
The repair percentage and the depreciation period of individual construction elements come from Agroscope Tanikon’s Modular Construction Standards for Farm Building Costs (Hilty & Herzog 2000). The construction variants were compiled by D. Herzog, Agroscope Tanikon.
This dataset refers to an average situation; for specific situations exchanges might differ substantially due to site specific parameters.

## Included activities start
The activity starts with the construction of the building.

## Included activities end
Elements included are: Closed garage, concrete floor, non insulated wood construction, flame-resistant; not included are: non-flame-resistant part of the shed
The activity ends with the disposal of the building material, i.e. brick, bulk iron, concrete, plastics, and waste wood.

## Technology
The calculation of the construction materials employed is based on Agroscope PBK+ (Modular Construction Standards for Farm Building Costs +) System (Dux 2004). Based on construction variants for model buildings, the necessary building materials for construction, repair and replacement are calculated with the aid of the PBK+ database. In addition, the consumption of energy and auxiliary materials during operation of the building can be determined.

## Parameters
- LUC_crop_specific: 1 dimensionless
  This parameter allows to switch between a 'crop specific' and a 'country specific' approach when calculating the LUC of a crop. By default, the chosen approach is 'crop specific', so the value of the parameter is 1. If you want to apply a 'country specific' approach, turn the parameter to 0.

## Reference product
- garage, wood, non-insulated, fire-protected: 1 m2; name RP_amount_1; By-product classification allocatable product; CPC 53121: Industrial buildings
  1 m2 usable suface
  production volume 129000 m2; name RP_PV_1
    Assumption: one garage (111m2) per farm, 50 years lifetime, 58'323 farms in CH.
  property price 176.642 EUR2005
    Calculated based on inputs: The price of the product has been calculated as a sum of the values of the material and energy inputs for this product. This value is therefore a rough estimation. It may underestimate the real price since there are additional expenses when producing any product. These expences can include for example labour costs, treatment of waste materials and profit for the producer. Please consider carefully whether this level of data quality is acceptable for your application.
  properties: Surface 111 m2, lifetime 50 year

## Inputs from technosphere
- lean concrete: 0.011514 m3; lognormal variance with pedigree 0.0441216, pedigree (1,2,4,1,1)
  properties: water content 0.0528846, wet mass 2190 kg, dry mass 2080 kg
- polyethylene, high density, granulate: 0.027888 kg; lognormal variance with pedigree 0.0441216, pedigree (1,2,4,1,1)
  Corresponds to 154.78kg for the whole building with 50 years life time, 111 m2 usable space and 630 m3 volume.
  properties: wet mass 1 kg, carbon content, fossil 0.857143, dry mass 1 kg, heating value, net 42.47 MJ
- cement, Portland: 58.637 kg; lognormal variance with pedigree 0.0441216, pedigree (1,2,4,1,1)
  Corresponds to 325'435.35kg for the whole building with 50 years life time, 111 m2 usable space and 630 m3 volume.
  properties: wet mass 1 kg, dry mass 1 kg
- sawnwood, softwood, dried (u=20%), planed: 0.33141 m3; lognormal variance with pedigree 0.0441216, pedigree (1,2,4,1,1)
  Corresponds to 1'839.32m3 for the whole building with 50 years life time, 111 m2 usable space and 630 m3 volume.
  properties: dry mass 450 kg, wet mass 540 kg, water content 0.2, carbon content, non-fossil 0.494, heating value, net 6514.84 MJ
- reinforcing steel: 10.622 kg; lognormal variance with pedigree 0.0441216, pedigree (1,2,4,1,1)
  Corresponds to 58'952.1kg for the whole building with 50 years life time, 111 m2 usable space and 630 m3 volume.
  properties: carbon content, fossil 0.004, dry mass 1 kg, wet mass 1 kg
- zinc coat, pieces: 0.063562 m2; lognormal variance with pedigree 0.0441216, pedigree (1,2,4,1,1)
  Corresponds to 352.77m2 for the whole building with 50 years life time, 111 m2 usable space and 630 m3 volume.
- sheet rolling, copper: 0.64291 kg; lognormal variance with pedigree 0.0441216, pedigree (1,2,4,1,1)
  Corresponds to 3'568.15kg for the whole building with 50 years life time, 111 m2 usable space and 630 m3 volume.
- cast iron: 0.91491 kg; lognormal variance with pedigree 0.0441216, pedigree (1,2,4,1,1)
  Corresponds to 5'077.75kg for the whole building with 50 years life time, 111 m2 usable space and 630 m3 volume.
  properties: dry mass 1 kg, wet mass 1 kg, carbon content, fossil 0.04
- waste brick: -45.412 kg; lognormal variance with pedigree 0.0441216, pedigree (1,2,4,1,1)
  Corresponds to 252'036.6kg from the whole building with 50 years life time, 111 m2 usable space and 630 m3 volume.
  production volume 5.86e6 kg
    Calculated from reference product production volume, reference product amount and byproduct amount.
  properties: dry mass 1 kg, wet mass 1 kg
- concrete, normal: 0.33594 m3; lognormal variance with pedigree 0.0441216, pedigree (1,2,4,1,1)
  Corresponds to 1'864.47m3 for the whole building with 50 years life time, 111 m2 usable space and 630 m3 volume.
  properties: wet mass 2380 kg, dry mass 2190 kg, water content 0.086758
- glued laminated timber, MUF-glue: 0.024389 m3; lognormal variance with pedigree 0.0441216, pedigree (1,2,4,1,1)
  Corresponds to 270.72m3 for the whole building with 50 years life time, 111 m2 usable space and 630 m3 volume. The split between PUR-glue and MUF-glue glued laminated timber is made based on the Swiss relative production volumes for the products.
  properties: price 298 EUR2005, carbon content, fossil 0.01638, dry mass 403.64 kg, water content 0.0975126, carbon content, non-fossil 0.442689, heating value, net 5517.96 MJ, wet mass 443 kg
- waste bulk iron, excluding reinforcement: -0.91491 kg; lognormal variance with pedigree 0.0441216, pedigree (1,2,4,1,1)
  Corresponds to 5077.75kg from the whole building with 50 years life time, 111 m2 usable space and 630 m3 volume.
  production volume 118000 kg
    (same comment as for waste brick)
  properties: dry mass 1 kg, wet mass 1 kg
- electricity, low voltage: 2.4854 kWh; lognormal variance with pedigree 0.0551992, pedigree (3,2,4,1,1)
- waste cement in concrete and mortar: -102.87 kg; lognormal variance with pedigree 0.0441216, pedigree (1,2,4,1,1)
  Corresponds to 570'928.5kg from the whole building with 50 years life time, 111 m2 usable space and 630 m3 volume.
  production volume 1.33e7 kg
    (same comment as for waste brick)
  properties: water content 0.00502513, dry mass 0.995 kg, wet mass 1 kg
- copper, cathode: 0.64291 kg; lognormal variance with pedigree 0.0441216, pedigree (1,2,4,1,1)
  (same comment as for sheet rolling, copper)
  properties: wet mass 1 kg, dry mass 1 kg
- waste concrete, not reinforced: -25.33 kg; lognormal variance with pedigree 0.0441216, pedigree (1,2,4,1,1)
  Corresponds to 140'581.5kg from the whole building with 50 years life time, 111 m2 usable space and 630 m3 volume.
  production volume 3.27e6 kg
    (same comment as for waste brick)
  properties: dry mass 1 kg, wet mass 1 kg
- excavation, skid-steer loader: 0.01727 m3; lognormal variance with pedigree 0.0441216, pedigree (1,2,4,1,1)
  Corresponds to 95.85m3 for the whole building with 50 years life time, 111 m2 usable space and 630 m3 volume.;activityLink introduced to establish a direct link to the corresponding regional supply of this product
- waste polyethylene: -0.027888 kg; lognormal variance with pedigree 0.0441216, pedigree (1,2,4,1,1)
  Corresponds to 154.78kg from the whole building with 50 years life time, 111 m2 usable space and 630 m3 volume.
  production volume 3600 kg
    (same comment as for waste brick)
  properties: wet mass 1 kg, carbon content, fossil 0.825301, dry mass 0.996 kg, water content 0.00401606, heating value, net 42.47 MJ
  note on heating value, net: Value taken from the general comment of the treatment dataset.
- extrusion, plastic pipes: 0.027888 kg; lognormal variance with pedigree 0.0441216, pedigree (1,2,4,1,1)
  (same comment as for polyethylene, high density, granulate)
- waste reinforced concrete: -765.812 kg; lognormal variance with pedigree 0.0441216, pedigree (1,2,4,1,1)
  Corresponds to 4'250'255.82kg from the whole building with 50 years life time, 111 m2 usable space and 630 m3 volume.
  production volume 9.88e7 kg
    (same comment as for waste brick)
  properties: wet mass 1 kg, dry mass 0.99418 kg, water content 0.00585407
- excavation, hydraulic digger: 0.35791 m3; lognormal variance with pedigree 0.0441216, pedigree (1,2,4,1,1)
  Corresponds to 1'986.4m3 for the whole building with 50 years life time, 111 m2 usable space and 630 m3 volume.
- waste building wood, chrome preserved: -58.248 kg; lognormal variance with pedigree 0.0441216, pedigree (1,2,4,1,1)
  Corresponds to 323'276.4kg from the whole building with 50 years life time, 111 m2 usable space and 630 m3 volume.
  production volume 7.51e6 kg
    (same comment as for waste brick)
  properties: wet mass 1 kg, carbon content, non-fossil 0.5, heating value, net 11.63 MJ, water content 0.25, dry mass 0.8 kg
- fibre cement facing tile: 38.63 kg; lognormal variance with pedigree 0.0441216, pedigree (1,2,4,1,1)
  Corresponds to 214'396.5kg for the whole building with 50 years life time, 111 m2 usable space and 630 m3 volume.
  properties: carbon content, fossil 0.0201818, wet mass 1 kg, carbon content, non-fossil 0.0115, dry mass 1 kg
- waste wood, untreated: -141.688 kg; lognormal variance with pedigree 0.0441216, pedigree (1,2,4,1,1)
  Corresponds to 786'368.07kg from the whole building with 50 years life time, 111 m2 usable space and 630 m3 volume.
  production volume 1.82777e7 kg
    Calculated from the reference product amount and production volume
  properties: carbon content, non-fossil 0.48632, dry mass 0.8 kg, wet mass 1 kg, water content 0.25, heating value, net 13.99 MJ
- fibre cement roof slate: 6.7818 kg; lognormal variance with pedigree 0.0441216, pedigree (1,2,4,1,1)
  Corresponds to 37'638.99kg for the whole building with 50 years life time, 111 m2 usable space and 630 m3 volume.
  properties: wet mass 1 kg, carbon content, non-fossil 0.01288, carbon content, fossil 0.0141818, dry mass 1 kg
- scrap copper: -0.64291 kg; name BP_amount_1
  Corresponds to 3568.15.22kg from the whole building with 50 years life time, 111 m2 usable space and 630 m3 volume.
  production volume 82935.4 kg; = RP_PV_1 * (BP_amount_1 / RP_amount_1)
    Calculated from production volume of reference product using the relative outputs.
  property price 0 EUR2005; name BP_amount_1_price_EUR2005
  properties: dry mass 1 kg, wet mass 1 kg
- glued laminated timber, PUR-glue: 0.024389 m3; lognormal variance with pedigree 0.0441216, pedigree (1,2,4,1,1)
  (same comment as for glued laminated timber, MUF-glue)
  properties: water content 0.0989836, heating value, net 5409.08 MJ, price 298 EUR2005, carbon content, non-fossil 0.446904, carbon content, fossil 0.00801, wet mass 439 kg, dry mass 399.46 kg
- gravel, round: 381.38 kg; lognormal variance with pedigree 0.0441216, pedigree (1,2,4,1,1)
  Corresponds to 2'116'659kg for the whole building with 50 years life time, 111 m2 usable space and 630 m3 volume. After the demolition of the garage, the gravel stays in the ground.
  properties: wet mass 1 kg, dry mass 1 kg

## Inputs from nature
- Occupation, urban, discontinuously built [natural resource, land]: 155.45 m2*year; lognormal variance with pedigree 0.206131, pedigree (1,2,4,1,1)
- Transformation, from pasture, man made [natural resource, land]: 3.109 m2; lognormal variance with pedigree 0.488553, pedigree (1,2,4,1,1)
- Transformation, to urban, discontinuously built [natural resource, land]: 3.109 m2; lognormal variance with pedigree 0.488553, pedigree (1,2,4,1,1)
- Occupation, construction site [natural resource, land]: 3.109 m2*year; lognormal variance with pedigree 0.206131, pedigree (1,2,4,1,1)

## Emissions to nature
- Heat, waste [air, non-urban air or from high stacks]: 8.9473 MJ; lognormal variance with pedigree 0.0104805, pedigree (1,2,4,1,1)
  Corresponds to 49'657.52MJ from the whole building with 50 years life time, 111 m2 usable space and 630 m3 volume.

## Sampling procedure
Features of the model used: Building volume: 630 m3; Useable space: 111 m2; Service life span: 50 years.
The repair percentage and the depreciation period of individual construction elements come from ART Tanikon’s Modular Construction Standards for Farm Building Costs (Hilty & Herzog 2000). The construction variants were compiled by D. Herzog, ART Tanikon.

## Extrapolations
This dataset has been extrapolated from year 2012 to the year of the calculation (2021). The uncertainty has been adjusted accordingly.
