# woven bamboo mat production

Dataset: EcoSpold 2, unit process
Geography: PH
Time period: 2010-01-01 to 2021-12-31
Technology level: current
Classification: ISIC rev.4 ecoinvent: 162:Manufacture of products of wood, cork, straw and plaiting materials
Scenario: Business-as-Usual
System model: Allocation, cut-off by classification
Generated by: Edwin Zea Escamilla
Database: ecoinvent
isCopyrightProtected: true
accessRestrictedTo: 1

## General comment
This dataset represents the production of 1 Kg of woven bamboo mat. To produce woven bamboo mats, a bamboo pole is first flattened and then divided into strips with widths between 2 and 4 cm. These strips are then peeled into 1- to 2-mm-thick veneers, which are then woven to form a mat. The entire process is manual and is typically performed in small, rural communities. The woven bamboo mats are usually used as lightweight walls but have also recently been used for industrially produced panels (Xiao, 2009). Both flattened bamboo and woven bamboo mats are commonly manufactured in facilities extremely close to the point of extraction and/or treatment. The input of flattened bamboo is assumed to have a water content of u = 20%. This is a handcrafted process usually done with hatchets and or other simple tools. The figures origin from mainly calculations and literature values. This dataset was developed with the support of the International Organization for Bamboo and Rattan INBAR
References:
Liu, X., et al., Nomenclature for engineered bamboo. BioResources, 2015. 11(1): p. 1141-1161.
Xiao, Y. Development of Prefabricated bamboo Earthquake Relief Shelter. in International conference of modern bamboo structures. 2009. Bogotá, Colombia: Universidad de los Andes.
Zea Escamilla, E. and G. Habert, Environmental impacts from the production of bamboo based construction materials representing the global production diversity. Journal of Cleaner Production, 2013.

## Included activities start
From reception of bamboo pole at the processing facility

## Included activities end
This activity ends with woven bamboo mat (u = 20%) at the processing facility. The dataset includes the inputs for trimming and, processing, as far as they are available. The dataset does not include infrastructure. This process is considered to be handcrafted, no powertools are used.

## Technology
Current production technology

## Reference product
- woven bamboo mat: 1 kg; name RP; CPC 31212: Wood, continuously shaped along any of its edges or faces (including strips and friezes for parquet flooring, […]; By-product classification allocatable product
  production volume 541188 kg; name PV_RP; = 785.28672*689.16
    The production volume is a rough estimate based on the annual production volume of woven bamboo mat panel assuming that all woven bamboo mats are further processed into panels. 785.29 Kg of woven bamboo mat are required for the production of 1 m3 of woven bamboo mat panel.
    All production volumes of bamboo products are calculated based on production volumes of glued laminated bamboo and woven bamboo mat panels, which are the end products of the bamboo production chain (as represented in the ecoinvent database). These are based on export data retrieved from INBAR (at <http://trade.inbar.int:10444/>, last accessed in December 2020) and the global GDP and the GDP of the Philippines for 2018 (retrieved from <https://unstats.un.org/unsd/snaama/Basic>, filtered for GDP, At current price- US Dollar, last accessed in November 2020).
  property price 0.578991 EUR2005; name RP_price_EUR2005
    Based on expert judgement, price given as 0.7 USD/kg. Converted with an exchange rate of 1EURO = 1.209 USD.
  property heating value, net 17.68 MJ
    Jetsada P. & Panmanas S. (2017),Evaluation of lower heating value and elemental composition of bamboo using near infrared spectroscopy,Energy,Volume 121,Pages 147-158,ISSN 0360-5442,https://doi.org/10.1016/j.energy.2017.01.020.
  property carbon content 0.494
    carbon content on a dry matter basis (reserved; not for manual entry)
  properties: water content 0.2, carbon content, non-fossil 0.494, carbon content, fossil 0, water in wet mass 0.166667 kg, wet mass 1 kg, dry mass 0.833333 kg, carbon allocation 0.411667 kg

## Inputs from technosphere
- waste bamboo residues: -0.0697 kg; name bamboo_residues
  production volume 37720.8 kg; = PV_RP*(bamboo_residues/RP)
    Calculated from production volume of reference product using the relative outputs.
  property price 0 EUR2005; name bamboo_residues_price_EUR2005
  properties: wet mass 1 kg, water content 0.8, carbon content, non-fossil 0.494, dry mass 0.555556 kg, heating value, net 17.68 MJ
  note on heating value, net: Jetsada P. & Panmanas S. (2017),Evaluation of lower heating value and elemental composition of bamboo using near infrared spectroscopy,Energy,Volume 121,Pages 147-158,ISSN 0360-5442,https://doi.org/10.1016/j.energy.2017.01.020.
- flattened bamboo: 1.0697 kg; lognormal variance with pedigree 0.004425, pedigree (2,3,3,2,2)
  Flattened bamboo and woven bamboo mats are commonly manufactured in facilities extremely close to the point of extraction and/or treatment. Therefore, no transport has been assumed for the culm.
  properties: carbon content, non-fossil 0.494, dry mass 0.833333 kg, water content 0.2, wet mass 1 kg, heating value, net 17.68 MJ

## Sampling procedure
The dataset is mostly based on literature values and was developed with the support of the International Organization for Bamboo and Rattan INBAR

## Extrapolations
This dataset has been extrapolated from year 2020 to the year of the calculation (2021). The uncertainty has been adjusted accordingly.
