# quicklime production, milled, loose

Dataset: EcoSpold 2, unit process
Geography: CH
Time period: 2000-01-01 to 2021-12-31
Technology level: current
Classification: EcoSpold01Categories: construction materials/additives
Classification: ISIC rev.4 ecoinvent: 2394:Manufacture of cement, lime and plaster
Synonyms: burnt; Calciumhydroxid; quick; caustic; lime
Tags: ConvertedDataset
Scenario: Business-as-Usual
System model: Allocation, cut-off by classification
Share of production covered: 50 %
Generated by: [System]
Published in: Kellenberger D. 2007
Database: ecoinvent
isCopyrightProtected: true
accessRestrictedTo: 1

## General comment
This dataset represents the production of 1 kg of milled quicklime. The infrastructure data is estimated based on a tour and sketches of the process, and normalized with a annual production capacity of about 23'000 tons of product per year. There are no significant dust emissions as a dust control system is installed.
[This dataset was already contained in the ecoinvent database version 2. It was not individually updated during the transfer to ecoinvent version 3. Life Cycle Impact Assessment results may still have changed, as they are affected by changes in the supply chain, i.e. in other datasets. This dataset was generated following the ecoinvent quality guidelines for version 2. It may have been subject to central changes described in the ecoinvent version 3 change report (http://www.ecoinvent.org/database/ecoinvent-version-3/reports-of-changes/), and the results of the central updates were reviewed extensively. The changes added e.g. consistent water flows and other information throughout the database. The documentation of this dataset can be found in the ecoinvent reports of version 2, which are still available via the ecoinvent website. The change report linked above covers all central changes that were made during the conversion process.]

## Included activities start
From the reception of quicklime at the factory gate.

## Included activities end
This activity ends with the quicklime produced. The dataset includes the different production processes (crushing, milling, filtering (cyclone), dedusting, transportation, and storing), the total heating energy for "production" and "administration", and the infrastructure.

## Geography
Data is based on a Swiss company.

## Technology
Data is based on the Swiss current technology. The company KFN works on a technically high level. Effective dust control systems are installed.

## Reference product
- quicklime, milled, loose: 1 kg; source Oates T. 1997; CPC 37420: Quicklime, slaked lime and hydraulic lime; By-product classification allocatable product; CAS 1305-78-8
  Quicklime is produced by the thermal decomposition of limestone. It consists mainly of calcium oxide. Its quality depends on many factors, including physical properties, degree of sintering and chemical composition. As the most readily available and cost effective alkali, quicklime plays an essential part in a wide variety of industrial processes.
  The difference between clinker and quicklime used for products in the binding agent industry is mainly the calcination temperature which is a maximum of 1’450ºC for clinker and a maximum of 1’200ºC for quicklime.
  EcoSpold01Location=CH
  production volume 1.29205e9 kg; = 153504823151.125*0.008417
    Estimated. The Swiss production volume is extrapolated from the global production volume using the nominal GDP of 2005 (source: United Nations, http://data.un.org/Glossary.aspx?q=GDP+%28current+US%24%29, accessed 20130726 and 20130312).
    Gross domestic product (GDP) at current prices is GDP at prices of the current reporting period. Also known as nominal GDP.
  property price 0.077 EUR2005
    Calculated value based on data from United Nations Commodity Trade Statistics Database (comtrade.un.org). UN comtrade category: 252210 Quicklime. Using exchange rate of 1EURO = 1.209 USD. Average of price of import into 5 main markets (EU, US, JP, IN and CN).
  property carbon content, non-fossil 0
    Tab 3.3, ecoinvent v2.2 report 7, part VII, pg 5. Ground quicklime
  property carbon content, fossil 0
    Tab 3.3, ecoinvent v2.2 report 7, part VII, pg 5. Ground quicklime
  property carbon content 0
    carbon content on a dry matter basis (reserved; not for manual entry)
  properties: water in wet mass 0.01 kg, dry mass 0.99 kg, water content 0.010101, wet mass 1 kg, carbon allocation 0 kg

## Inputs from technosphere
- industrial machine, heavy, unspecified: 0.000109 kg; lognormal variance with pedigree 0.3686, pedigree (4,3,5,1,1)
  EcoSpold01Location=RER
  Estimation. The equipment included in the infrastructure (1 crusher, 1 roller mill, 1 plant for dedusting, 1cyclone, and 1 small silo) weight 62t and the estimated lifespan of the machines is 25 years.
- quicklime, in pieces, loose: 1 kg; lognormal variance with pedigree 0.0521, pedigree (3,2,5,1,1)
  Estimation, based on company data. The total amount of milled quicklime used by 2001 was 22.744t. Possible losses due to dust emissions were neglected.
  Activity link justification: precursor production and consumption occur on the same site.
  EcoSpold01Location=CH
  properties: wet mass 1 kg, water content 0.010101, dry mass 0.99 kg
- electricity, medium voltage: 0.0135 kWh; lognormal variance with pedigree 0.0401, pedigree (1,2,5,1,1)
  EcoSpold01Location=CH
  Estimation, based on company data. It is assumed that the 50% of the electricity consumption is covered by the grid and the othet 50% by a hydropower plant nearby.
- heat, central or small-scale, other than natural gas: 0.00141 MJ; lognormal variance with pedigree 0.0401, pedigree (1,2,5,1,1)
  Estimation, based on company data. The energy consumption for building heating is considered.
  EcoSpold01Location=CH
  properties: heating value, net 1 MJ
- conveyor belt: 8.79e-8 m; lognormal variance with pedigree 0.3686, pedigree (4,3,5,1,1)
  EcoSpold01Location=RER
  Estimation. The conveyor belt is assumed to have a length of 50m and a lifetime of 25 years.
- electricity, high voltage: 0.0135 kWh; lognormal variance with pedigree 0.0401, pedigree (1,2,5,1,1)
  Estimation, based on company data. It is assumed that the 50% of the electricity consumption is covered by the grid and the othet 50% by a hydropower plant nearby.

## Sampling procedure
survey

## Extrapolations
This dataset has been extrapolated from year 2002 to the year of the calculation (2021). The uncertainty has been adjusted accordingly.

## Review by Roland Hischier 2011-09-22
Transfer of documentation done.

## Review by Emilia Moreno Ruiz 2014-05-19
AL added for quicklime inputs

## Review by Roberto Dones 2003-07-04
Passed

## Review by Bo Weidema 2012-09-28
replaced "electricity, high voltage, hydro, run-of-river" with "electricity, high voltage" + activity link to "electricity production, hydro, run-of-river"
