# treatment of used tyre

Dataset: EcoSpold 2, unit process
Geography: GLO
Time period: 2005-01-01 to 2021-12-31
Technology level: current
Classification: ISIC rev.4 ecoinvent: 3821:Treatment and disposal of non-hazardous waste
Scenario: Business-as-Usual
System model: Allocation, cut-off by classification
Generated by: Tereza Levova
Database: ecoinvent
isCopyrightProtected: true
accessRestrictedTo: 1

## General comment
This dataset represents simplified treatment of used tyre by incineration of its two main parts; rubber and steel scrap.

## Reference product
- used tyre: -1 kg; name usedtyre; CPC 39260: Used pneumatic tyres of rubber; By-product classification Waste
  production volume 1.21222e10 kg; name usedtyre_PV
    Extrapolated using data from the amount (kg) of scrap tyres produced in year 2010 in EU 27 + Norway and Switzerland, based on the relative GDP in 2010. According to European Tyre and Rubber Manufacturer’s Association (ETRMA, 2011: <http://www.etrma.org/uploads/Modules/Documentsmanager/brochure-elt-2011-final.pdf>), in 2010, 3273 * 106 kg of scrap tyres were produced in EU 27 + Norway and Switzerland.
  property price 0 EUR2005; name usedtyre_price_EUR2005
    Waste products are assigned a price of zero as they are assumed to require further treatment.
  property carbon content, non-fossil 0; name usedtyre_C_content_non_fossil
  property carbon content, fossil 0.82; name usedtyre_C_content_fossil
  property wet mass 1 kg; name usedtyre_WM
  property dry mass 1 kg; name usedtyre_DM
  property water in wet mass 0 kg; name usedtyre_WWM
  property water content 0; name usedtyre_water_content
  property heating value, net 24.85 MJ
    LHV is calculated based on the Carbon content of the product. More details can be found on the respective documentation.
  property carbon content 0.82
    carbon content on a dry matter basis (reserved; not for manual entry)
  properties: carbon allocation 0.82 kg

## Inputs from technosphere
- scrap steel: -0.24 kg; name steel_scrap_BP; = ((1-0.76)*ABS(usedtyre))*-1; lognormal variance with pedigree 0.1306, pedigree (5,5,5,5,4)
  Calculated based on literature (UNEP, 2002, Basel convention technical guidelines on the identification and management of used tyres, http://archive.basel.int/meetings/sbc/workdoc/old%20docs/tech-usedtyres.pdf, accessed 20121219) and estimates. Tyre's composition is 76% rubber and 24% steel.
  This exchange has a direct link to municipal incineration.
  production volume 2.90933e9 kg; name steel_scrap_BP_PV; = (steel_scrap_BP * usedtyre_PV)/ABS(usedtyre)
    Calculated from production volume of reference product using the relative outputs.
  property price 0 EUR2005; name steel_scrap_BP_price_EUR2005
  property carbon content, non-fossil 0; name steel_scrap_BP_CC_fossil
  properties: dry mass 1 kg, wet mass 1 kg
- waste rubber, unspecified: -0.76 kg; name waste_rubber_BP; = (0.76*ABS(usedtyre))*-1; lognormal variance with pedigree 0.1306, pedigree (5,5,5,5,4)
  (same comment as for scrap steel)
  production volume 9.21289e9 kg; name waste_rubber_BP_PV; = (waste_rubber_BP * usedtyre_PV)/ ABS( usedtyre)
    Calculated from production volume of reference product using the relative outputs.
  property carbon content, fossil 0.853; name waste_rubber_BP_CC_fossil
  property price 0 EUR2005; name waste_rubber_BP_price_EUR2005
  properties: dry mass 1 kg, wet mass 1 kg, heating value, net 27.19 MJ
  note on heating value, net: Value taken from the general comment of the treatment dataset.

## Extrapolations
This dataset has been extrapolated from year 2012 to the year of the calculation (2021). The uncertainty has been adjusted accordingly.
