# blast furnace sludge, for recovery, Recycled Content cut-off

Dataset: EcoSpold 2, unit process
Geography: GLO
Time period: 2021-01-01 to 2021-12-31
Technology level: current
Scenario: Business-as-Usual
System model: Allocation, cut-off by classification
Generated by: [System]
isCopyrightProtected: true
accessRestrictedTo: 1

## Reference product
- blast furnace sludge, for recovery: 1 kg; By-product classification Recyclable; CPC 39310: Slag, dross, scalings and other waste from the manufacture of iron or steel
  property antimony content 3.8e-5
    The value of 'antimony content' is documented in Turner & Symeonidis, 2020.
    Reference: Turner David & Symeonidis Avraam, 2020, Life cycle inventories of the treatment of iron and steelmaking by-products, ecoinvent association, Zürich, Switzerland
  property chlorine content 0.000692885
    The value of 'chlorine content' is documented in Turner & Symeonidis, 2020.
    Reference: Turner David & Symeonidis Avraam, 2020, Life cycle inventories of the treatment of iron and steelmaking by-products, ecoinvent association, Zürich, Switzerland
  property oxygen content 0.1123
    The value of 'oxygen content' is documented in Turner & Symeonidis, 2020.
    Reference: Turner David & Symeonidis Avraam, 2020, Life cycle inventories of the treatment of iron and steelmaking by-products, ecoinvent association, Zürich, Switzerland
  property chromium content 7.05882e-5
    The value of 'chromium content' is documented in Turner & Symeonidis, 2020.
    Reference: Turner David & Symeonidis Avraam, 2020, Life cycle inventories of the treatment of iron and steelmaking by-products, ecoinvent association, Zürich, Switzerland
  property sulfur content 0.010133
    The value of 'sulfur content' is documented in Turner & Symeonidis, 2020.
    Reference: Turner David & Symeonidis Avraam, 2020, Life cycle inventories of the treatment of iron and steelmaking by-products, ecoinvent association, Zürich, Switzerland
  property aluminium content 0.0162734
    The value of 'aluminium content' is documented in Turner & Symeonidis, 2020.
    Reference: Turner David & Symeonidis Avraam, 2020, Life cycle inventories of the treatment of iron and steelmaking by-products, ecoinvent association, Zürich, Switzerland
  property calcium content 0.0528292
    The value of 'calcium content' is documented in Turner & Symeonidis, 2020.
    Reference: Turner David & Symeonidis Avraam, 2020, Life cycle inventories of the treatment of iron and steelmaking by-products, ecoinvent association, Zürich, Switzerland
  property manganese content 0.00292201
    The value of 'manganese content' is documented in Turner & Symeonidis, 2020.
    Reference: Turner David & Symeonidis Avraam, 2020, Life cycle inventories of the treatment of iron and steelmaking by-products, ecoinvent association, Zürich, Switzerland
  property arsenic content 7.71362e-5
    The value of 'arsenic content' is documented in Turner & Symeonidis, 2020.
    Reference: Turner David & Symeonidis Avraam, 2020, Life cycle inventories of the treatment of iron and steelmaking by-products, ecoinvent association, Zürich, Switzerland
  property sodium content 0.00329717
    The value of 'sodium content' is documented in Turner & Symeonidis, 2020.
    Reference: Turner David & Symeonidis Avraam, 2020, Life cycle inventories of the treatment of iron and steelmaking by-products, ecoinvent association, Zürich, Switzerland
  property barium content 0.000154661
    The value of 'barium content' is documented in Turner & Symeonidis, 2020.
    Reference: Turner David & Symeonidis Avraam, 2020, Life cycle inventories of the treatment of iron and steelmaking by-products, ecoinvent association, Zürich, Switzerland
  property vanadium content 0.00204407
    The value of 'vanadium content' is documented in Turner & Symeonidis, 2020.
    Reference: Turner David & Symeonidis Avraam, 2020, Life cycle inventories of the treatment of iron and steelmaking by-products, ecoinvent association, Zürich, Switzerland
  property copper content 5.81923e-5
    The value of 'copper content' is documented in Turner & Symeonidis, 2020.
    Reference: Turner David & Symeonidis Avraam, 2020, Life cycle inventories of the treatment of iron and steelmaking by-products, ecoinvent association, Zürich, Switzerland
  property scandium content 4e-6
    The value of 'scandium content' is documented in Turner & Symeonidis, 2020.
    Reference: Turner David & Symeonidis Avraam, 2020, Life cycle inventories of the treatment of iron and steelmaking by-products, ecoinvent association, Zürich, Switzerland
  property nickel content 0.000123693
    The value of 'nickel content' is documented in Turner & Symeonidis, 2020.
    Reference: Turner David & Symeonidis Avraam, 2020, Life cycle inventories of the treatment of iron and steelmaking by-products, ecoinvent association, Zürich, Switzerland
  property titanium content 0.0016417
    The value of 'titanium content' is documented in Turner & Symeonidis, 2020.
    Reference: Turner David & Symeonidis Avraam, 2020, Life cycle inventories of the treatment of iron and steelmaking by-products, ecoinvent association, Zürich, Switzerland
  property silicon content 0.0410655
    The value of 'silicon content' is documented in Turner & Symeonidis, 2020.
    Reference: Turner David & Symeonidis Avraam, 2020, Life cycle inventories of the treatment of iron and steelmaking by-products, ecoinvent association, Zürich, Switzerland
  property magnesium content 0.0214018
    The value of 'magnesium content' is documented in Turner & Symeonidis, 2020.
    Reference: Turner David & Symeonidis Avraam, 2020, Life cycle inventories of the treatment of iron and steelmaking by-products, ecoinvent association, Zürich, Switzerland
  property potassium content 0.00256494
    The value of 'potassium content' is documented in Turner & Symeonidis, 2020.
    Reference: Turner David & Symeonidis Avraam, 2020, Life cycle inventories of the treatment of iron and steelmaking by-products, ecoinvent association, Zürich, Switzerland
  property iron content 0.285273
    The value of 'iron content' is documented in Turner & Symeonidis, 2020.
    Reference: Turner David & Symeonidis Avraam, 2020, Life cycle inventories of the treatment of iron and steelmaking by-products, ecoinvent association, Zürich, Switzerland
  property carbon content, fossil 0.304046
    The value of 'carbon content, fossil' is documented in Turner & Symeonidis, 2020.
    Reference: Turner David & Symeonidis Avraam, 2020, Life cycle inventories of the treatment of iron and steelmaking by-products, ecoinvent association, Zürich, Switzerland
  property zinc content 0.0150255
    The value of 'zinc content' is documented in Turner & Symeonidis, 2020.
    Reference: Turner David & Symeonidis Avraam, 2020, Life cycle inventories of the treatment of iron and steelmaking by-products, ecoinvent association, Zürich, Switzerland
  property lead content 0.00314669
    The value of 'lead content' is documented in Turner & Symeonidis, 2020.
    Reference: Turner David & Symeonidis Avraam, 2020, Life cycle inventories of the treatment of iron and steelmaking by-products, ecoinvent association, Zürich, Switzerland
  property phosphorus content 0.000967749
    The value of 'phosphorus content' is documented in Turner & Symeonidis, 2020.
    Reference: Turner David & Symeonidis Avraam, 2020, Life cycle inventories of the treatment of iron and steelmaking by-products, ecoinvent association, Zürich, Switzerland
  property carbon content, non-fossil 0
    The value of 'carbon content, non-fossil' is documented in Turner & Symeonidis, 2020.
    Reference: Turner David & Symeonidis Avraam, 2020, Life cycle inventories of the treatment of iron and steelmaking by-products, ecoinvent association, Zürich, Switzerland
  property molybdenum content 9e-6
    The value of 'molybdenum content' is documented in Turner & Symeonidis, 2020.
    Reference: Turner David & Symeonidis Avraam, 2020, Life cycle inventories of the treatment of iron and steelmaking by-products, ecoinvent association, Zürich, Switzerland
  property strontium content 9.82853e-5
    The value of 'strontium content' is documented in Turner & Symeonidis, 2020.
    Reference: Turner David & Symeonidis Avraam, 2020, Life cycle inventories of the treatment of iron and steelmaking by-products, ecoinvent association, Zürich, Switzerland
  property tin content 8.48528e-6
    The value of 'tin content' is documented in Turner & Symeonidis, 2020.
    Reference: Turner David & Symeonidis Avraam, 2020, Life cycle inventories of the treatment of iron and steelmaking by-products, ecoinvent association, Zürich, Switzerland
  property fluorine content 0.00223607
    The value of 'fluorine content' is documented in Turner & Symeonidis, 2020.
    Reference: Turner David & Symeonidis Avraam, 2020, Life cycle inventories of the treatment of iron and steelmaking by-products, ecoinvent association, Zürich, Switzerland
  property carbon content 0.304046
    carbon content on a dry matter basis (reserved; not for manual entry)
  properties: water content 0.470588, wet mass 1 kg, water in wet mass 0.32 kg, dry mass 0.68 kg, carbon allocation 0.206751 kg
