# cement production, blast furnace slag 70-100%

Dataset: EcoSpold 2, unit process
Geography: RoW
Time period: 2005-01-01 to 2021-12-31
Technology level: current
Classification: ISIC rev.4 ecoinvent: 2394:Manufacture of cement, lime and plaster
Synonyms: S; slag cement
Scenario: Business-as-Usual
System model: Allocation, cut-off by classification
Share of production covered: 100 %
Generated by: Michael Elias Boesch
Published in: Boesch, M.E. 2010
Database: ecoinvent
isCopyrightProtected: true
accessRestrictedTo: 1

## General comment
The dataset describes the production of cement (S).

## Included activities start
From cradle, i.e. including all upstream activities. As source of gypsum, waste gypsum from flue gas treatment is assumed.

## Included activities end
This activity ends with the cement produced in the cement mill. The dataset does not include packaging and administration.

## Reference product
- cement, blast furnace slag 70-100%: 1 kg; name cement; source Boesch, M.E. 2010; CPC 37440: Portland cement, aluminous cement, slag cement and similar hydraulic cements, except in the form of clinkers; By-product classification allocatable product
  Literature Value
  production volume 2.70362e8 kg; name APV_cement
    The global production volume was calculated as follows:
    1) The total production volume of each country was calculated
    2) The production volume was scaled based construction output (*)
    3) The average of the results was assumed to be the GLO PV
    4) The share of each different technology per country was calculated
    5) The weighted average of the shares for each country was used to split the GLO PV into different technologies
    (*)
    Construction output assumed per country
    Country Share
    CO 1%
    PE 0%
    BR 2%
    ZA 1%
    IN 10%
    US 8%
    CA-QC 0%
    CH 0%
    Europe without Switzerland 20%
    Source:
    OECD. 2018. Input-Output Tables. http://www.oecd.org/trade/input-outputtables.htm.
    United Nations Statistics Division. 2019. UN data. A world of information. http://data.un.org/.
    Timmer, M.P., E. Dietzenbacher, B. Los, R. Stehrer, and G.J. de Vries. 2015. An Illustrated User Guide to the World Input-Output Database: the Case of Global Automotive Production. Review of International Economics 23(3): 575-605. http://doi.wiley.com/10.1111/roie.12178.
    The data was adjusted based on PPP, data from:
    The World Bank. 2019. World Bank Open Data. https://data.worldbank.org/
  property price 0.0615 EUR2005; name cement_price_EUR2005
    2005 import and export prices (total trades (USD) divided by total weight (kg) in China, India, USA, Japan, Russia and Europe, major producers and consumers (http://www.cementchina.net/freport/showfre.asp?id=749) from UN Commodity Trade Statistics Database (http://data.un.org/Explorer.aspxDatabase [Accessed 2 July 2010]). Commodity: Cement (portland, aluminious, slag or hydraulic)
  property carbon content 0
    carbon content on a dry matter basis (reserved; not for manual entry)
  properties: dry mass 1 kg, carbon content, non-fossil 0, water content 0, water in wet mass 0 kg, carbon content, fossil 0, wet mass 1 kg, carbon allocation 0 kg

## Inputs from technosphere
- cement factory: 5.36e-11 unit; = 5.36e-11* cement; source Kellenberger D. 2007; lognormal variance with pedigree 0.3412, pedigree (2,1,5,4,1)
  Literature Value
  Uncertainty: Variance of log-transformed data was taken from ecoinvent report no 1, table 10.3. Value represents demand of infrastructure for input/output group c.
- electricity, medium voltage: 0 kWh; source Boesch, M.E. 2010; pedigree (1,1,1,1,1)
  Literature Value
  Uncertainty: Variance of log-transformed data was taken from ecoinvent report no 1, table 10.3. Value represents demand of products, electricity etc. for input/output group c.
- ground granulated blast furnace slag: 0 kg; name GGBFS; source Boesch, M.E. 2010; pedigree (1,1,1,1,1)
  Literature value
  Uncertainty: Variance of log-transformed data was taken from ecoinvent report no 1, table 10.3. Value represents demand of products, electricity etc. for input/output group c.
  properties: wet mass 1 kg, dry mass 0.99 kg
- gypsum, mineral: 0 kg; source Boesch, M.E. 2010; pedigree (1,1,1,1,1)
  (same comment as for electricity, medium voltage)
  properties: dry mass 1 kg, wet mass 1 kg
- ethylene glycol: 0.00055 kg; = 0.00055* cement; source Kellenberger D. 2007; lognormal variance with pedigree 0.0433, pedigree (3,3,5,3,1)
  Ancillary product for grinding
  Uncertainty: Variance of log-transformed data was taken from ecoinvent report no 1, table 10.3. Value represents demand of products, electricity etc. for input/output group c.
  properties: dry mass 1 kg, wet mass 1 kg, carbon content, fossil 0.387097, heating value, net 23.44 MJ
- clinker: 0 kg; source Boesch, M.E. 2010; pedigree (1,1,1,1,1)
  (same comment as for electricity, medium voltage)
  properties: wet mass 1 kg, dry mass 1 kg
- steel, low-alloyed: 0.00011 kg; name steel; = 0.00011* cement; source Kellenberger D. 2007; lognormal variance with pedigree 0.0433, pedigree (3,3,5,3,1)
  (same comment as for ground granulated blast furnace slag)
  property dry mass 1 kg; name DM
  property water content 0; name water_content
  property wet mass 1 kg; name WM
  property water in wet mass 0 kg; name WWM
  property carbon content, fossil 0.005; name C_content_fossil
  property carbon content, non-fossil 0; name C_content_non_fossil
- heat, district or industrial, other than natural gas: 0 MJ; source Boesch, M.E. 2010; pedigree (1,1,1,1,1)
  Heat for drying of blast furnace slag. Literature Value
  properties: heating value, net 1 MJ
- clinker: 0.1425 kg; source Boesch, M.E. 2010; lognormal variance with pedigree 0.0433, pedigree (3,3,5,3,1)
  (same comment as for electricity, medium voltage)
- electricity, medium voltage: 0.00111839, 0.000214459, 0.00492432, 0.00360032, 0.0523634, 0.0165984, 0.00738065 kWh (7 entries); source Boesch, M.E. 2010; lognormal variance with pedigree 0.0433, pedigree (3,3,5,3,1)
  (same comment as for electricity, medium voltage)
- ground granulated blast furnace slag: 0.242292, 0.0123569, 0.595351 kg (3 entries); source Boesch, M.E. 2010; lognormal variance with pedigree 0.0433, pedigree (3,3,5,3,1)
  (same comment as for ground granulated blast furnace slag)
- gypsum, mineral: 0.00565866, 0.000570429, 0.00127092 kg (3 entries); source Boesch, M.E. 2010; lognormal variance with pedigree 0.0433, pedigree (3,3,5,3,1)
  (same comment as for electricity, medium voltage)
- heat, district or industrial, other than natural gas: 0.0044124, 0.267588 MJ (2 entries); source Boesch, M.E. 2010; lognormal variance with pedigree 0.0086, pedigree (1,1,4,1,1)
  Heat for drying of blast furnace slag. Literature Value

## Emissions to nature
- Heat, waste [air, unspecified]: 0.31 MJ; = 0.310* cement; source Boesch, M.E. 2010; lognormal variance with pedigree 0.0827, pedigree (3,3,5,3,1)
  Literature Value
  Uncertainty: Variance of log-transformed data was taken from ecoinvent report no 1, table 10.3. Value represents others emitted to air for input/output group p.

## Sampling procedure
Data approximates average U.S. production

## Review by Gabor Doka 2012-06-16
Passed (just). See review comments in "cement production, Portland blast furnace slag, 25-70% blast furnace slag, GLO, 2005 - 2009" and "cement production, Portland, CH, 2005 - 2009" which apply to (almost) all cement datasets.

## Review by Emilia Moreno Ruiz 2013-03-07
PV adjusted
