# cashew production

Dataset: EcoSpold 2, unit process
Geography: IN
Time period: 2015-01-01 to 2021-12-31
Technology level: current
Classification: ISIC rev.4 ecoinvent: 0125:Growing of other tree and bush fruits and nuts
Scenario: Business-as-Usual
System model: Allocation, cut-off by classification
Generated by: Sanjeevan Bajaj
Database: ecoinvent
isCopyrightProtected: true
accessRestrictedTo: 1

## General comment
This dataset represents the production of 1 kg of fresh Cashew which is a perineal crop which is harvested in the month of February, 2016 at a farm located in village Tutarkhed, District Valsad of Gujarat. In this area, fields are irrigated with ground water using electric pump and micro irrigation for surface irrigation. The farm has a yield of 580 kg fresh matter per ha for this crop cycle. Harvesting date is 20-Feburary, 2016. Mineral NPK fertilizer input is 279.50-57.50-21.6 kg/ha. Organic fertilizer applied amounts to 510 kg of manure from cattle dung. Only insecticide used has active ingredient as Carbaryl 1275 g/ha, Organophosphate 1785g/ha. Machinery is used for plant protection with fuel consumption of 10 kg/ha, soil cultivation with fuel consumption of 25 kg/ha using plough for soil tillage and 5kg/ha is used for other work process by tractor, transport and trailer.

## Included activities start
As this crop is a peripheral crop it is continuously in process with periodic harvesting in a year.

## Included activities end
The activity ends with the harvesting of the mature Cashew from the Cashew plant.

## Geography
Village Tutarkhed, District Valsad of Gujarat

## Technology
Cultivation of Cashew follows conventional production standards

## Time period
Harvesting date main crop: 20-Feburary, 2016. The soil cultivation, sowing and harvesting dates are taken as the middle date of the week or fortnight told to the data collector by the farmer. The data is collected for one crop cycle. The cycle of one year is considered for entry in ecoeditor.

## Parameters
- LUC_crop_specific: 1 dimensionless
  This parameter allows to switch between a "crop specific" and a "country specific" approach when calculating the LUC of a crop. By default, the chosen approach is "crop specific", so the value of the parameter is 1. If you want to apply a "country specific" approach, turn the parameter to 0.

## Reference product
- cashew: 1 kg; CPC 01372: Cashew nuts, in shell; By-product classification allocatable product
  production volume 6.5e6 kg; = 6.5*1000*1000
    The value was given in tonnes. 1000 has been multiplied to convert it into Kgs. The data was for given year 2015-2016. Source: http://agriexchange.apeda.gov.in/India%20Production/India_Productions.aspx?hscode=1093
  property price 0.579514 EUR2005
    Literature value. Price from FAOSTAT data Producer Prices - Annual (retrieved from: http://www.fao.org/faostat/en/#data/PP, accessed 15Feb2018). Data from 2005.
  property carbon content 0.475
    carbon content on a dry matter basis (reserved; not for manual entry)
  properties: carbon content, fossil 0, carbon content, non-fossil 0.475, dry mass 0.948 kg, wet mass 1 kg, water in wet mass 0.052 kg, water content 0.0548523, carbon allocation 0.4503 kg

## Inputs from technosphere
- land use change, perennial crop: 0.000488624 ha; = (0.2834019452067987 * LUC_crop_specific + 0.0513302764316706 * (1-LUC_crop_specific))/580
  Calculated Value. This value has been calculated by using the ecoinvent LCI calculation tool for crop production.
- tillage, ploughing: 0.000990884 ha; lognormal variance with pedigree 0.0034, pedigree (2,4,2,1,1)
  The data was collected for a hectare area through interview
- irrigation: 1.91 m3; lognormal variance with pedigree 0.0034, pedigree (2,4,2,1,1)
  http://www.agrifarming.in/cashew-farming/ 83 plants per hectare; 1,800.00 litres per tree; 149,400 litres per fortnight for 3 months per acre; 448,200 litres in summer rest rainfed; 448 m3 per acre; 1,108 m3 per hectare; yield of 580kg per ha; 1.91 m3 per kg
  properties: dry mass 0.11 kg, wet mass 1000 kg, water content 9089.91
- [thio]carbamate-compound: 0.00219828 kg; lognormal variance with pedigree 0.0034, pedigree (2,4,2,1,1)
  Substitute for Carbaryl
  properties: wet mass 1 kg, carbon content, fossil 0.626349, dry mass 1 kg
- inorganic nitrogen fertiliser, as N: 0.0385517 kg; lognormal variance with pedigree 0.0034, pedigree (2,4,2,1,1)
  The data was collected for a hectare area through interview
  properties: dry mass 1 kg, wet mass 1 kg
- establishing orchard: 0.00732759 unit; lognormal variance with pedigree 0.0034, pedigree (2,4,2,1,1)
  (same comment as for land use change, perennial crop)
- pesticide, unspecified: 0.00307759 kg; lognormal variance with pedigree 0.0034, pedigree (2,4,2,1,1)
  Group of Insecticide uses - Organophosphate. Calculated Value. This value has been calculated by using the ecoinvent LCI calculation tool for crop production.
  properties: wet mass 1 kg, dry mass 1 kg, carbon content, fossil 0.486978
- inorganic phosphorus fertiliser, as P2O5: 0.0991379 kg; lognormal variance with pedigree 0.0034, pedigree (2,4,2,1,1)
  The data was collected for a hectare area through interview
  properties: dry mass 1 kg, wet mass 1 kg
- fruit tree seedling, for planting: 0.00732759 unit; lognormal variance with pedigree 0.0034, pedigree (2,4,2,1,1)
  (same comment as for land use change, perennial crop)
  properties: carbon content, non-fossil 1, dry mass 0.03 kg, wet mass 0.03 kg
- packaging, for pesticides: 0.0105517 kg; lognormal variance with pedigree 0.0514, pedigree (4,3,2,5,4)
  Total amount of active substance/s of pesticides needed for the production of cashew is calculated to be circa 5.28E-03 kg. Pesticide/s used in this dataset is/are: '[thio]carbamate-compound', 'pesticide, unspecified'. The total amount of active substance/s is doubled in order to account for the packaging of the dilluted product of pesticide/s that is/are applied. Therefore, 1.06E-02 kg of packaging for pesticides is justified with this exchange.
  properties: wet mass 1 kg, carbon content, fossil 0.85714, dry mass 1 kg, price 0.0642 EUR2005, heating value, net 25.97 MJ
- transport, tractor and trailer, agricultural: 0.197722 metric ton*km; lognormal variance with pedigree 0.1228, pedigree (2,4,2,1,1)
  (same comment as for land use change, perennial crop)
- ammonium sulfate: 0.0481897 kg; lognormal variance with pedigree 0.0034, pedigree (2,4,2,1,1)
  (same comment as for land use change, perennial crop)
  properties: wet mass 1 kg, dry mass 1 kg
- compost: 0.87931 kg; lognormal variance with pedigree 0.0034, pedigree (2,4,2,1,1)
  Home made compost
  property potassium content 0.01; name K_content
  property mercury content 1.2e-7; name Hg_content
  property nickel content 1.63e-5; name Ni_content
  property dry mass 0.5 kg; name DM
  property cadmium content 3.6e-7; name Cd_content
  property copper content 5.77e-5; name Cu_content
  property phosphorus content 0.0035; name P_content
  property chromium content 2.23e-5; name Cr_content
  property zinc content 0.000184; name Zn_content
  property lead content 4.9e-5; name Pb_content
  property nitrogen content 0.014; name N_content
  properties: water content 1, wet mass 1 kg, carbon content, non-fossil 0.183645
- urea: 0.847133 kg; lognormal variance with pedigree 0.0034, pedigree (2,4,2,1,1)
  The exchange has been updated from 'urea, as N' into 'urea' and therefore its amount has been scaled (multiplied) from 0.3952 kg by 2.1438 kg of 'urea' per kg of 'urea, as N'. Original comment of the exchange is: The data was collected for a hectare area through interview
  properties: dry mass 1 kg, wet mass 1 kg, carbon content, fossil 0.2
- potassium chloride: 0.0589493 kg; lognormal variance with pedigree 0.0034, pedigree (2,4,2,1,1)
  The exchange has been updated from 'potassium chloride, as K2O' into 'potassium chloride' and therefore its amount has been scaled (multiplied) from 0.0372 kg by 1.5829 kg of 'potassium chloride' per kg of 'potassium chloride, as K2O'. Original comment of the exchange is: Calculated Value. This value has been calculated by using the ecoinvent LCI calculation tool for crop production.
  properties: wet mass 1 kg, dry mass 1 kg
- planting tree: 0.00732759 unit; lognormal variance with pedigree 0.0034, pedigree (2,4,2,1,1)
  (same comment as for land use change, perennial crop)
- polyethylene, high density, granulate: 0.362069 kg; lognormal variance with pedigree 0.0034, pedigree (2,4,2,1,1)
  (same comment as for land use change, perennial crop)
  properties: carbon content, fossil 0.857143, wet mass 1 kg, dry mass 1 kg, heating value, net 42.47 MJ
  note on carbon content, fossil: Polyethylene is formed out of a huge amount of ethylene monomers (C2H4) (ecoinvent v2.2 report 11_II). MW=28 g/mol
- diesel, burned in agricultural machinery: 1.55188 MJ; lognormal variance with pedigree 0.0034, pedigree (2,4,2,1,1)
  This exchange is an aggregation of amounts:
  0.7759396629310344. Comment:
  0.7759396629310344. Comment:
- packaging, for fertilisers: 1.23655 kg; lognormal variance with pedigree 0.0514, pedigree (4,3,2,5,4)
  Total amount of active substance/s of fertilisers needed for the production of 'cashew' is calculated to be circa 6.18E-01 kg. Fertiliser/s used in this dataset is/are: 'ammonium sulfate, as N', 'nitrogen fertiliser, as N', 'phosphate fertiliser, as P2O5', 'potassium chloride, as K2O', 'urea, as N'. The total amount of active substance/s is doubled in order to account for the packaging of the dilluted product of fertiliser/s that is/are applied. Therefore, 1.24E+00 kg of packaging for fertilisers is justified with this exchange.
  properties: heating value, net 25.01 MJ, carbon content, fossil 0.825301, price 0.0642 EUR2005, wet mass 1 kg, dry mass 1 kg
  note on carbon content, fossil: Considering a chemical formula (C2H4)n for polyethylene, carbon content-fossil is calculated to be 0.856286 kg of Carbon per kg of dry mass.

## Inputs from nature
- Occupation, permanent crop, irrigated [natural resource, land]: 11.4943 m2*year; lognormal variance with pedigree 0.0048, pedigree (2,4,2,1,1)
  (same comment as for land use change, perennial crop)
- Carbon dioxide, in air [natural resource, in air]: 3.13288 kg; lognormal variance with pedigree 0.0034, pedigree (2,4,2,1,1)
  (same comment as for land use change, perennial crop)
- Energy, gross calorific value, in biomass [natural resource, biotic]: 36.0525 MJ; lognormal variance with pedigree 0.0034, pedigree (2,4,2,1,1)
  The data was collected for a hectare area through interview
- Transformation, to permanent crop, irrigated [natural resource, land]: 0.862069 m2; lognormal variance with pedigree 0.0108, pedigree (2,4,2,1,1)
  (same comment as for land use change, perennial crop)
- Transformation, from permanent crop, irrigated [natural resource, land]: 0.862069 m2; lognormal variance with pedigree 0.0108, pedigree (2,4,2,1,1)
  (same comment as for land use change, perennial crop)

## Emissions to nature
- Cadmium, ion [water, ground-]: 4.99287e-8 kg; lognormal variance with pedigree 0.0928, pedigree (2,4,2,1,1)
  (same comment as for land use change, perennial crop)
- Copper [soil, agricultural]: 3.24019e-5 kg; lognormal variance with pedigree 0.0428, pedigree (2,4,2,1,1)
  (same comment as for land use change, perennial crop)
- Copper, ion [water, surface water]: 2.53764e-10 kg; lognormal variance with pedigree 0.0928, pedigree (2,4,2,1,1)
  (same comment as for land use change, perennial crop)
- Lead [soil, agricultural]: 1.51452e-5 kg; lognormal variance with pedigree 0.0428, pedigree (2,4,2,1,1)
  (same comment as for land use change, perennial crop)
- Copper, ion [water, ground-]: 3.8999e-6 kg; lognormal variance with pedigree 0.0928, pedigree (2,4,2,1,1)
  (same comment as for land use change, perennial crop)
- Mercury [soil, agricultural]: 2.04159e-7 kg; lognormal variance with pedigree 0.0428, pedigree (2,4,2,1,1)
  (same comment as for land use change, perennial crop)
- Mercury [water, ground-]: 1.24849e-9 kg; lognormal variance with pedigree 0.0928, pedigree (2,4,2,1,1)
  (same comment as for land use change, perennial crop)
- Zinc [soil, agricultural]: 8.60508e-5 kg; lognormal variance with pedigree 0.0428, pedigree (2,4,2,1,1)
  (same comment as for land use change, perennial crop)
- Lead [water, ground-]: 3.91713e-7 kg; lognormal variance with pedigree 0.0928, pedigree (2,4,2,1,1)
  (same comment as for land use change, perennial crop)
- Aldicarb [soil, agricultural]: 0.00219828 kg; lognormal variance with pedigree 0.0358, pedigree (2,4,2,1,1)
  Substitute for Carbaryl
- Mercury [water, surface water]: 4.419e-13 kg; lognormal variance with pedigree 0.0928, pedigree (2,4,2,1,1)
  (same comment as for land use change, perennial crop)
- Nickel [soil, agricultural]: 1.43971e-5 kg; lognormal variance with pedigree 0.0428, pedigree (2,4,2,1,1)
  (same comment as for land use change, perennial crop)
- Phosphorus [water, surface water]: 1.41127e-8 kg; lognormal variance with pedigree 0.0428, pedigree (2,4,2,1,1)
  (same comment as for land use change, perennial crop)
- Zinc, ion [water, ground-]: 2.5439e-5 kg; lognormal variance with pedigree 0.0928, pedigree (2,4,2,1,1)
  (same comment as for land use change, perennial crop)
- Zinc, ion [water, surface water]: 3.22921e-10 kg; lognormal variance with pedigree 0.0928, pedigree (2,4,2,1,1)
  (same comment as for land use change, perennial crop)
- Nickel, ion [water, surface water]: 1.29861e-10 kg; lognormal variance with pedigree 0.0928, pedigree (2,4,2,1,1)
  (same comment as for land use change, perennial crop)
- Nitrate [water, ground-]: 0.385967 kg; lognormal variance with pedigree 0.0428, pedigree (2,4,2,1,1)
  (same comment as for land use change, perennial crop)
- Water [water, surface water]: 0.455172 m3; lognormal variance with pedigree 0.0034, pedigree (2,4,2,1,1)
  (same comment as for land use change, perennial crop)
- Ammonia [air, non-urban air or from high stacks]: 0.0909272 kg; lognormal variance with pedigree 0.0108, pedigree (2,4,2,1,1)
  (same comment as for land use change, perennial crop)
- Water [water, ground-]: 1.77517 m3; lognormal variance with pedigree 0.0034, pedigree (2,4,2,1,1)
  (same comment as for land use change, perennial crop)
- Phosphate [water, surface water]: 0.00100774 kg; lognormal variance with pedigree 0.0428, pedigree (2,4,2,1,1)
  (same comment as for land use change, perennial crop)
- Water [air, non-urban air or from high stacks]: 2.32138 m3; lognormal variance with pedigree 0.0034, pedigree (2,4,2,1,1)
  (same comment as for land use change, perennial crop)
- Chromium, ion [water, ground-]: 2.30068e-5 kg; lognormal variance with pedigree 0.0928, pedigree (2,4,2,1,1)
  (same comment as for land use change, perennial crop)
- Nitrogen oxides [air, non-urban air or from high stacks]: 0.0299313 kg; lognormal variance with pedigree 0.0428, pedigree (2,4,2,1,1)
  (same comment as for land use change, perennial crop)
- Phosphate [water, ground-]: 0.000211461 kg; lognormal variance with pedigree 0.0428, pedigree (2,4,2,1,1)
  (same comment as for land use change, perennial crop)
- Carbon dioxide, fossil [air, non-urban air or from high stacks]: 0.620793 kg; lognormal variance with pedigree 0.0034, pedigree (2,4,2,1,1)
  (same comment as for land use change, perennial crop)
- Cadmium, ion [water, surface water]: 1.83194e-12 kg; lognormal variance with pedigree 0.0928, pedigree (2,4,2,1,1)
  (same comment as for land use change, perennial crop)
- Dinitrogen monoxide [air, non-urban air or from high stacks]: 0.0100134 kg; lognormal variance with pedigree 0.0328, pedigree (2,4,2,1,1)
  (same comment as for land use change, perennial crop)
- Lead [water, surface water]: 9.71424e-11 kg; lognormal variance with pedigree 0.0928, pedigree (2,4,2,1,1)
  (same comment as for land use change, perennial crop)
- Chromium [soil, agricultural]: 4.34317e-5 kg; lognormal variance with pedigree 0.0428, pedigree (2,4,2,1,1)
  (same comment as for land use change, perennial crop)
- Chromium, ion [water, surface water]: 1.75096e-10 kg; lognormal variance with pedigree 0.0928, pedigree (2,4,2,1,1)
  (same comment as for land use change, perennial crop)
- Cadmium [soil, agricultural]: 4.48068e-6 kg; lognormal variance with pedigree 0.0428, pedigree (2,4,2,1,1)
  (same comment as for land use change, perennial crop)

## Sampling procedure
The farmer was identified and contacted by agriculture science faculty familiar with the local farmers in the region. Data was collected directly from the farmer through semi-structured interview using a questionnaire based on the input requirements of the ecoinvent LCI calculation tool for crop production. The farmer does not maintain any written records and has provided the data from recent memory. In this region, typically farmers are unable to provide exact name of active ingredient in the pesticide they use and the same was noted from details given on the pesticide packet. Individual farmer is not able to calculate fuel consumption for his own farm alone and this information has been collected from farming community of the area.

## Extrapolations
This dataset has been extrapolated from year 2018 to the year of the calculation (2021). The uncertainty has been adjusted accordingly.
