# pipeline construction, natural gas, high pressure distribution network

Dataset: EcoSpold 2, unit process
Geography: Europe without Switzerland
Time period: 1990-01-01 to 2021-12-31
Technology level: current
Classification: ISIC rev.4 ecoinvent: 4220:Construction of utility projects
Classification: EcoSpold01Categories: natural gas/fuels
Tags: ConvertedDataset
Scenario: Business-as-Usual
System model: Allocation, cut-off by classification
Generated by: Mireille Faist Emmenegger (obsolete)
Published in: Faist Emmenegger, M. 2007
Database: ecoinvent
isCopyrightProtected: true
accessRestrictedTo: 1

## General comment
Pipeline infrastructure for gas distribution. Life time 40 years. Annual transport of 30 TJ/km/a.
[This dataset was already contained in the ecoinvent database version 2. It was not individually updated during the transfer to ecoinvent version 3. Life Cycle Impact Assessment results may still have changed, as they are affected by changes in the supply chain, i.e. in other datasets. This dataset was generated following the ecoinvent quality guidelines for version 2. It may have been subject to central changes described in the ecoinvent version 3 change report (http://www.ecoinvent.org/database/ecoinvent-version-3/reports-of-changes/), and the results of the central updates were reviewed extensively. The changes added e.g. consistent water flows and other information throughout the database. The documentation of this dataset can be found in the ecoinvent reports of version 2, which are still available via the ecoinvent website. The change report linked above covers all central changes that were made during the conversion process.]

## Included activities end
This dataset describes the infrastructure needed for the European high (>1 bar) and middle (>0.1 bar) pressure distribution network.

## Geography
Proportion of the different materials is based on German data, thickness of the pipelines on Swiss data.

## Technology
The length of the pipelines is based on German statistics, whereas the thickness of the pipeline is estimated (Swiss data).

## Reference product
- pipeline, natural gas, high pressure distribution network: 1 km; name pipeline_amount; By-product classification allocatable product; CPC 53251: Local pipelines
  EcoSpold01Location=RER
  production volume 11500 km; name pipeline_PV; = 460000/40
    The total length of natural gas high pressure distribution network pipeline in Europe without Switzerland amounts to 460000 km. The average lifespan of the pipeline is 40 years, which means that 11500 km of pipeline is built yearly.
  property price 142127 EUR2005
    Calculated based on inputs: The price of the product has been calculated as a sum of the values of the material and energy inputs for this product. This value is therefore a rough estimation. It may underestimate the real price since there are additional expenses when producing any product. These expences can include for example labour costs, treatment of waste materials and profit for the producer. Please consider carefully whether this level of data quality is acceptable for your application.

## Inputs from technosphere
- cast iron: 338 kg; lognormal variance with pedigree 0.1287, pedigree (4,3,5,3,1)
  EcoSpold01Location=RER
  Qualified estimate for CH
  Uncertainty: qualified estimate for CH
  properties: wet mass 1 kg, dry mass 1 kg, carbon content, fossil 0.04
  note on carbon content, fossil: Cast iron is made by remelting pig iron in small furnaces (e.g. cupola furnaces or electric arc furnaces) and poured into moulds to make castings. It usually contains 2% to 6% carbon (ecoinvent v2.2 report 10_partII). An average content of 4% was considered
- sand: 610000 kg; lognormal variance with pedigree 0.1287, pedigree (4,3,5,3,1)
  EcoSpold01Location=CH
  Qualified estimate for CH
  Uncertainty: qualified estimate for CH
  properties: wet mass 1 kg, dry mass 1 kg
- pitch: 1260 kg; lognormal variance with pedigree 0.1287, pedigree (4,3,5,3,1)
  Qualified estimate for CH
  EcoSpold01Location=RER
  Uncertainty: qualified estimate for CH
  properties: carbon content, fossil 0.83, dry mass 1 kg, wet mass 1 kg, heating value, net 28 MJ
- building, hall, steel construction: 0.2 m2; lognormal variance with pedigree 0.3687, pedigree (4,3,5,3,1)
  Qualified estimate for CH
  EcoSpold01Location=CH
  Uncertainty: qualified estimate for CH
- excavation, hydraulic digger: 1200 m3; lognormal variance with pedigree 0.2487, pedigree (4,3,5,3,1)
  EcoSpold01Location=RER
  Qualified estimate for CH
  Uncertainty: qualified estimate for CH
- drawing of pipe, steel: 13900 kg; lognormal variance with pedigree 0.1287, pedigree (4,3,5,3,1)
  Qualified estimate for CH
  EcoSpold01Location=RER
  Uncertainty: qualified estimate for CH
- cement, unspecified: 3900 kg; lognormal variance with pedigree 0.1287, pedigree (4,3,5,3,1)
  Qualified estimate for CH
  EcoSpold01Location=CH
  Uncertainty: qualified estimate for CH
  properties: dry mass 1 kg, wet mass 1 kg
- waste plastic, mixture: -1570 kg; name waste_plastic_mix_amount; lognormal variance with pedigree 0.1287, pedigree (4,3,5,3,1)
  Qualified estimate for CH
  EcoSpold01Location=CH
  Uncertainty: qualified estimate for CH
  production volume 1.8055e7 kg; = pipeline_PV*waste_plastic_mix_amount/pipeline_amount
    Calculated from the production volume of pipeline, natural gas, high pressure distribution network in proportion to the respective output amounts.
  property price 0 EUR2005; name waste_plastic_mix_amount_price_EUR2005
  properties: heating value, net 30.79 MJ, dry mass 0.847 kg, carbon content, fossil 0.747344, water content 0.180638, wet mass 1 kg
  note on heating value, net: Value taken from the general comment of the treatment dataset.
  note on carbon content, fossil: C content in 1 kg DM was calculated using data in Tab A.2, ecoinvent v2.2 report 13_I
- reinforcing steel: 13600 kg; lognormal variance with pedigree 0.1287, pedigree (4,3,5,3,1)
  Qualified estimate for CH
  EcoSpold01Location=RER
  Uncertainty: qualified estimate for CH
  properties: dry mass 1 kg, wet mass 1 kg, carbon content, fossil 0.004
- transport, helicopter: 10.4 hour; lognormal variance with pedigree 0.2487, pedigree (4,3,5,3,1)
  Qualified estimate for CH
  EcoSpold01Location=GLO
  Uncertainty: qualified estimate for CH
- polyethylene, high density, granulate: 2390 kg; lognormal variance with pedigree 0.1287, pedigree (4,3,5,3,1)
  Qualified estimate for CH
  EcoSpold01Location=RER
  Uncertainty: qualified estimate for CH
  properties: heating value, net 42.47 MJ, wet mass 1 kg, dry mass 1 kg, carbon content, fossil 0.857143
  note on carbon content, fossil: Polyethylene is formed out of a huge amount of ethylene monomers (C2H4) (ecoinvent v2.2 report 11_II). MW=28 g/mol
- waste bitumen: -632 kg; name waste_bitumen_amount; lognormal variance with pedigree 0.1287, pedigree (4,3,5,3,1)
  EcoSpold01Location=CH
  Qualified estimate for CH
  Uncertainty: qualified estimate for CH
  production volume 7.268e6 kg; = pipeline_PV*waste_bitumen_amount/pipeline_amount
    (same comment as for waste plastic, mixture)
  property price 0 EUR2005; name waste_bitumen_amount_price_EUR2005
  properties: water content 0.0141988, dry mass 0.986 kg, wet mass 1 kg, carbon content, fossil 0.842657, heating value, net 40.2 MJ
  note on heating value, net: Literature value, Source: IPCC 2006, 2006 IPCC Guidelines for National Greenhouse Gas Inventories, Prepared by the National Greenhouse Gas Inventories Programme, Eggleston H.S., Buendia L., Miwa K., Ngara T. and Tanabe K. (eds). Published: IGES, Japan
- polyethylene, low density, granulate: 758 kg; lognormal variance with pedigree 0.1287, pedigree (4,3,5,3,1)
  EcoSpold01Location=RER
  Qualified estimate for CH
  Uncertainty: qualified estimate for CH
  properties: carbon content, fossil 0.857143, dry mass 1 kg, wet mass 1 kg, heating value, net 42.47 MJ
- building, multi-storey: 16 m3; lognormal variance with pedigree 0.3687, pedigree (4,3,5,3,1)
  EcoSpold01Location=RER
  Qualified estimate for CH
  Uncertainty: qualified estimate for CH
- transport, helicopter, LTO cycle: 4.16 unit; lognormal variance with pedigree 0.2487, pedigree (4,3,5,3,1)
  Qualified estimate for CH
  EcoSpold01Location=GLO
  Uncertainty: qualified estimate for CH
- excavation, skid-steer loader: 19000 m3; lognormal variance with pedigree 0.2487, pedigree (4,3,5,3,1)
  Qualified estimate for CH;activityLink introduced to establish a direct link to the corresponding regional supply of this product
  EcoSpold01Location=RER
  Uncertainty: qualified estimate for CH
- decommissioned pipeline, natural gas: -6960 kg; name decom_pipeline_amount; lognormal variance with pedigree 0.1287, pedigree (4,3,5,3,1)
  Qualified estimate for CH
  EcoSpold01Location=CH
  Uncertainty: qualified estimate for CH
  production volume 8.004e7 kg; = pipeline_PV*decom_pipeline_amount/pipeline_amount
    (same comment as for waste plastic, mixture)
  property price 0 EUR2005; name decom_pipeline_amount_price_EUR2005
  properties: dry mass 1 kg, carbon content, fossil 0.857143, wet mass 1 kg
  note on carbon content, fossil: Carbon content, fossil has been calculated from the carbon content from ethylene or polypropylene.
- concrete, normal: 2.73 m3; lognormal variance with pedigree 0.1287, pedigree (4,3,5,3,1)
  Qualified estimate for CH
  EcoSpold01Location=CH
  Uncertainty: qualified estimate for CH
  properties: dry mass 2190 kg, water content 0.086758, wet mass 2380 kg

## Inputs from nature
- Occupation, industrial area [natural resource, land]: 49.7 m2*year; lognormal variance with pedigree 0.1087, pedigree (4,3,5,3,1)
  Qualified estimate for CH
  Uncertainty: qualified estimate for CH
- Transformation, from forest, unspecified [natural resource, land]: 2000 m2; lognormal variance with pedigree 0.2487, pedigree (4,3,5,3,1)
  Qualified estimate for CH
  Uncertainty: qualified estimate for CH
- Transformation, to annual crop [natural resource, land]: 2000 m2; lognormal variance with pedigree 0.2487, pedigree (4,3,5,3,1)
  Qualified estimate for CH
  Uncertainty: qualified estimate for CH
- Transformation, from unspecified [natural resource, land]: 2.49 m2; lognormal variance with pedigree 0.1887, pedigree (4,3,5,3,1)
  Qualified estimate for CH
  Uncertainty: qualified estimate for CH
- Transformation, to industrial area [natural resource, land]: 2.49 m2; lognormal variance with pedigree 0.1887, pedigree (4,3,5,3,1)
  Qualified estimate for CH
  Uncertainty: qualified estimate for CH
- Occupation, construction site [natural resource, land]: 3330 m2*year; lognormal variance with pedigree 0.1687, pedigree (4,3,5,3,1)
  Qualified estimate for CH
  Uncertainty: qualified estimate for CH

## Sampling procedure
statistics

## Extrapolations
This dataset has been extrapolated from year 2000 to the year of the calculation (2021). The uncertainty has been adjusted accordingly.

## Review by Michael Spielmann (obsolete) 2003-08-10
Passed.
