# cement production, Portland

Dataset: EcoSpold 2, unit process
Geography: IN
Time period: 2014-04-01 to 2021-12-31
Technology level: current
Classification: ISIC rev.4 ecoinvent: 2394:Manufacture of cement, lime and plaster
Synonyms: Ordinary Portland Cement; OPC
Scenario: Business-as-Usual
System model: Allocation, cut-off by classification
Share of production covered: 60 %
Generated by: P V Kiran Ananth
Published in: Kiran Ananth P. V. 2017
Database: ecoinvent
isCopyrightProtected: true
accessRestrictedTo: 1

## General comment
The total installed capacity of cement in india during the year 2014-15 is 390 million tonnes. Total cement production during same year was 270.93 million tonnes. As per the goverment statistics cement industry grew at 5.6% in 2014-15. Cement industry is likely to grow in coming years due to various initiative of goverment of India like National highway project, 100 smart city, housing for all etc. Indian cement plant are most energy efficienct in the word.There thermal and electrical energy consumption is lower than the word. In India, various types of cements are manufactured like ordinary portland cement, pozzolana portland cement, portland slag cement, white cement etc. Ordinary portland cement manufactured by mixing and grinding of clinker and gypsum in certain proportion. The strength of cement considered in this dataset is 43 MPa and 53 MPa.

## Included activities start
Activity starts from clinker storage in Silo. It includes Clinker and additives blending and grinding in cement mill, internal transportation etc.

## Included activities end
This activity ends with the cement produced in the cement mill. The dataset does not include packaging and administration.

## Geography
Data represents for all geographical locations where cement has been manufactured in India.

## Technology
Manufacturing of OPC starts with reception of clinker at factory gate. Grinding of Clinker and Gypsum in appropriate proportion in vertical roller mill or ball mill. For this activity latest available technologies were considered like Vertical roller mill, energy efficient fans etc.

## Time period
For this activity time period of 2014 to 2017 has been considered . As during this period Indian cement industry has done significant works in improving energy efficiency by installing energy efficient equipment, process optimization, equipment retrofit etc.

## Reference product
- cement, Portland: 1 kg; name cement; By-product classification allocatable product; CPC 37440: Portland cement, aluminous cement, slag cement and similar hydraulic cements, except in the form of clinkers; CAS 65997-15-1
  production volume 7.58604e10 kg; name APV_cement; = 270.93*28/100*1000000000
    Total cement production in India during the year 2014-15 was 270.93 million tonnes. Ordinary portland cement share in total cement production is 28% for year 2012. (Referance - ATKearney & CII - Cement vision 2025: Scaling new heights). It was assumed that percentage share of total ordinary portland cement production is same in year of 2014 (75.86 million tonnes).
  property price 0.0541 EUR2005; name cement_price_EUR2005
    2005 import and export prices (total trades (USD) divided by total weight (kg) in China, India, USA, Japan, Russia and Europe, major producers and consumers (http://www.cementchina.net/freport/showfre.asp?id=749) from UN Commodity Trade Statistics Database (http://data.un.org/Explorer.aspxDatabase [Accessed 2 July 2010]). Commodity: Portland cement, other than white cement
  property carbon content 0
    carbon content on a dry matter basis (reserved; not for manual entry)
  properties: water content 0, wet mass 1 kg, dry mass 1 kg, carbon content, non-fossil 0, water in wet mass 0 kg, carbon content, fossil 0, carbon allocation 0 kg

## Inputs from technosphere
- clinker: 0 kg; pedigree (1,1,1,1,1)
  Primary data collected from 20 cement manufacturing units. The value has been calculated as a weighted average with respect to production volume.
  Uncertainty: Variance of log-transformed data was taken from ecoinvent report no 1, table 10.3. Value represents demand of products, electricity etc. for input/output group c.
  properties: dry mass 1 kg, wet mass 1 kg
- cement factory: 5.36e-11 unit; = 5.36e-11* cement; source Kellenberger D. 2007; lognormal variance with pedigree 0.3501, pedigree (3,5,5,3,1)
  Extrapolated value, based on "cement production, Portland GLO" dataset. India specific data not available.
  Uncertainty: Variance of log-transformed data was taken from ecoinvent report no 1, table 10.3. Value represents demand of infrastructure for input/output group c.
- electricity, medium voltage: 0.0317 kWh; = 0.0317* cement; lognormal variance with pedigree 0.0027, pedigree (1,2,3,1,1)
  (same comment as for clinker)
- steel, low-alloyed: 0.00011 kg; = 0.00011*cement; source Kellenberger D. 2007; lognormal variance with pedigree 0.0512, pedigree (2,5,5,5,1)
  Extrapolated value, based on "cement production, Portland GLO" dataset. India specific data not available.
  properties: carbon content, fossil 0.005, wet mass 1 kg, dry mass 1 kg
- gypsum, mineral: 0.045 kg; = 0.045* cement; lognormal variance with pedigree 0.002725, pedigree (1,2,3,2,1)
  (same comment as for clinker)
  properties: wet mass 1 kg, dry mass 1 kg
- ethylene glycol: 0.00019 kg; = 1.9e-4* cement; source Kellenberger D. 2007; lognormal variance with pedigree 0.0507, pedigree (3,5,5,3,1)
  Extrapolated value, based on "cement production, Portland GLO" dataset. India specific data not available.
  Uncertainty: Variance of log-transformed data was taken from ecoinvent report no 1, table 10.3. Value represents demand of products, electricity etc. for input/output group c.
  properties: heating value, net 23.44 MJ, dry mass 1 kg, wet mass 1 kg, carbon content, fossil 0.387097
- clinker: 0.955 kg; lognormal variance with pedigree 0.002725, pedigree (1,2,3,2,1)
  (same comment as for clinker)

## Sampling procedure
For this activity sample questionnaire has been prepared and circulated to all cement manufacturing units in India. Here we have selected clusterwise approch for collecting the data. Due to clusterwise approch variation in quality of raw material , different technologies etc. has taken care. After receiving the data from plants same has been analysed for any discripancies. Extreme minimum and maximum values reported by plants were removed. Final numbers were checked with cement industry expert.

## Extrapolations
This dataset has been extrapolated from year 2017 to the year of the calculation (2021). The uncertainty has been adjusted accordingly.

## Review by Bruno Peuportier 2017-07-27
The requirements from reviewers have been fulfilled
