# railway track construction

Dataset: EcoSpold 2, unit process
Geography: CH
Time period: 1990-01-01 to 2021-12-31
Technology level: current
Classification: ISIC rev.4 ecoinvent: 4210:Construction of roads and railways
Classification: EcoSpold01Categories: transport systems/train
Scenario: Business-as-Usual
System model: Allocation, cut-off by classification
Generated by: Michael Spielmann (obsolete)
Published in: Spielmann M. 2007
Database: ecoinvent
isCopyrightProtected: true
accessRestrictedTo: 1

## General comment
The dataset represents the construction of a railway track in Switzerland. Environmental interventions and inputs from the technosphere are referred to 1-meter and year [ma] rail track. The dataset represents as well the maintenance and land use of a railway track in Switzerland. Environmental interventions and inputs from the technosphere are referred to 1-meter and year [ma] rail track. Railway track disposal is included as well.

## Included activities start
Service starts with the material consumption due to the track bedding, substructure and catenary system. Service for the maintenance and land use starts with the electricty consumption.

## Included activities end
The dataset ends with the construction of 1-meter and year (ma) rail track. The dataset includes the material consumption due to track bedding, substructure and catenary system, transport, energy and fuel consumption. For the data of the maintenance and land use, the dataset ends with the maintenance and land use of 1-meter and year (ma) rail track. The dataset includes the electricity, lubricate and herbicide consumption, emissions to soil and land use. Disposal is included.

## Geography
Data refers to average conditions in Switzerland and a specific conditions in Germany

## Technology
The Swiss rail network includes normal gauge and narrow gauge tracks. It comprises approximately 10200 km rail tracks (SBB, 2002). In addition, 1400 km siding are reported. More than 98% of the goods transport in Switzerland is performed by the SBB. Thus, in line with the inventories for operation and manufacturing, for the calculation of the interventions of rail infrastructure is merely taken the SBB network into account. The SBB rail network predominately comprises one-way tracks and two-way tracks with a length of 1391 km and 1609 km (in the year 2000). One-way tracks are converted in two-way tracks, resulting in approximately 2300 km two way tracks. The material expenditures, if not stated differently, refer to a two-way track. Allocation between passenger and goods transportation is unavoidable. For the Swiss rail network in the year 2000 is applied a total Gtkm-performance of 5.94E+10 Gtkm resulting in a specific rail demand per Gtkm of 3.87E-05 (m*a)/Gtkm. Assuming a ratio gross tonne/carried goods of 2.26Gtkm/tkm is obtained a specific rail demand per functional unit of 8.7E-05 (m*a)/tkm. Is assumed a life span for the infrastructure of 100 years. Thus, all expenditures are aggregated for a life span of 100 years and referred to one year. It should be noted that the modelled energy consumption and material expenditures represent the conditions of the reference year 2000, even though some of these processes have been taken place in the past. Further components of rail track infrastructure, such as signalling infrastructure, train overtaking stations, sound insulation walls and buildings (stations, service garages) are not included in this study. In a recent research von Rozycki et al. (2003), pointed out that these components do not contribute significantly to a life cycle resource consumption of a rail transport system. Timber railroad sleepers are not modelled in this study, since they are continuously replaced with concrete railroad sleepers. For the data of the maintenance and land use, the renewal of materials is already addressed in the construction module Important components not addressed in the construction module are points or switches. Points are required to change tracks. For the SBB-network about 18000 points are in operation. For main lines, on average a point is installed every 830 metres, on the remaining lines the average point density is 270 metres Oggier (2002). In von Rozycki et al. (2003) a heating energy consumption to avoid icing in winter of 400 kWhel/(unit *a) has been stated. For main lines and remaining lines this result in energy consumption of 0.5 kWh/(m*a) and 1.5 kWh/(m*a), respectively. If is further assumed that goods transportation predominately takes place on main lines, and used the allocation factor “gross tonne kilometer”, is obtained an average point electricity consumption of 0.2 kWh/(m*a) or 4.21E-05 kWh/tkm. In addition, points need to be lubricated regularly. In the year 2000 the 69697 litre of lubricates have been consumed for point maintenance. The majority of the employed lubricates are biodegradable (SBB, 2002). The use of herbicides in 2000 has been reported with 4.474 t SBB (2002). The concentration of the active agent is 360g Glyphosat/l. In spite of the fact that Glyphosat is considered as biodegradable Haas (2000) emissions to soil are accounted for in this project. In this project are distinguished between land transformation and land occupation. Whilst transformation directly changes the ecological quality of land, occupation postpones changes of the ecological quality. Furthermore, are distinguished between the area actually used for rail tracks and embankments. Occupation refers to the time period for which the land is unavailable for other activities. The occupation intervention is expressed in terms of land use type, area and time. The unit is therefore square metres *year and the reference1-metre rail track. For transformation (the change of land use to be allocated to a certain user or user type) the situation is more difficult, mainly due to data variability. The yearly change in land use for a certain user may change considerably, as land use change is not a continuous process, but very much determined by political decisions and economic constraints and opportunities. Thus, to assess transformation, the yearly trend has been determined based on a fairly long period of 30 years, from 1971 to 2000.
References:
SBB (2002) Umweltbericht 2000/2001. SBB, Bahnumweltzentrum, Bern, Online-Version under: www.sbb.ch/umwelt.
von Rozycki C., Koeser H. and Schwarz H. (2003) Ecology Profile of the German High-speed Rail Passenger Transport System, ICE. In: International Journal of Life Cycle Assessment, 8(2), pp. 83-91.
Oggier (2002) Entsorgung von Gleisaushub. pdf from http://www.sbb.ch/gs/pdf/umwelt_gleisaushub.pdf.

## Time period
Rail length is based on current statistical data (2000). The material consumption represents a situation in the early 1990ties and a recent high speed track in Germany

## Reference product
- railway track: 1 m*year; name RP_amount_1; By-product classification allocatable product; CPC 53212: Railways
  EcoSpold01Location=CH
  production volume 0.0336675 m*year; name RP_PV_1
    This is a placeholder value that does not reflect real-world production volumes. This dataset does not currently require a real-world production volume to work in the database framework, and no actual data were collected yet. This has no negative effect on the results of the ecoinvent database. The placeholder value of this activity was scaled according to the nominal GDP of 2005 (source: United Nations, http://data.un.org/Glossary.aspx?q=GDP+%28current+US%24%29, accessed 20130726) to reflect an appropriate share of the global production volume, which is also a placeholder value.
  property price 32.1128 EUR2005
    Calculated based on inputs: The price of the product has been calculated as a sum of the values of the material and energy inputs for this product. This value is therefore a rough estimation. It may underestimate the real price since there are additional expenses when producing any product. These expences can include for example labour costs, treatment of waste materials and profit for the producer. Please consider carefully whether this level of data quality is acceptable for your application.

## Inputs from technosphere
- copper, cathode: 0.055 kg; source Elsener J. 1993; lognormal variance with pedigree 0.0607, pedigree (3,3,5,3,3)
  EcoSpold01Location=RER
  Calculated value based in Elsener & Strub (1993) and von Rozycki et al. (2003).
  Further references:
  von Rozycki C., Koeser H. and Schwarz H. (2003) Ecology Profile of the German High-speed Rail Passenger Transport System, ICE. In: International Journal of Life Cycle Assessment, 8(2), pp. 83-91.
  properties: wet mass 1 kg, dry mass 1 kg
- electricity, medium voltage: 63.09 kWh; = 3.99+59.1; source von Rozycki C. 2003; lognormal variance with pedigree 0.0607, pedigree (3,3,5,3,3)
  3.99 kWh electricity is used during the construction of railway track. Literature value.
  59.1 kWh electricity is used during the maintenance of railway track. Literature value from von Rozycki et al. (2003).
  EcoSpold01Location=CH
  Uncertainty: Pedigree matrix set according to expert judgment.
- diesel, burned in building machine: 9.5 MJ; lognormal variance with pedigree 0.1807, pedigree (3,3,5,3,3)
  EcoSpold01Location=GLO
  Literature value.
  properties: heating value, net 1 MJ
- excavation, skid-steer loader: 1.2 m3; lognormal variance with pedigree 0.1807, pedigree (3,3,5,3,3)
  EcoSpold01Location=RER
  Literature value.;activityLink introduced to establish a direct link to the corresponding regional supply of this product
- concrete, high exacting requirements: 0.0431 m3; source Elsener J. 1993; lognormal variance with pedigree 0.0607, pedigree (3,3,5,3,3)
  EcoSpold01Location=CH
  Calculated value based in Elsener & Strub (1993) and von Rozycki et al. (2003).
  Further references:
  von Rozycki C., Koeser H. and Schwarz H. (2003) Ecology Profile of the German High-speed Rail Passenger Transport System, ICE. In: International Journal of Life Cycle Assessment, 8(2), pp. 83-91.
  properties: wet mass 2440 kg, water content 0.0655022, dry mass 2290 kg
- steel, low-alloyed, hot rolled: 0.56 kg; source Elsener J. 1993; lognormal variance with pedigree 0.0607, pedigree (3,3,5,3,3)
  Calculated value based in Elsener & Strub (1993) and von Rozycki et al. (2003).
  Further references:
  von Rozycki C., Koeser H. and Schwarz H. (2003) Ecology Profile of the German High-speed Rail Passenger Transport System, ICE. In: International Journal of Life Cycle Assessment, 8(2), pp. 83-91.
  EcoSpold01Location=RER
  properties: wet mass 1 kg, carbon content, fossil 0.005, dry mass 1 kg
  note on carbon content, fossil: Low alloyed steel composition given in Tab. 3.2 ecoinvent v2.2 report 10_partII. Steel assumed to have a C content of 0.5%
- gravel, crushed: 571 kg; source Elsener J. 1993; lognormal variance with pedigree 0.0607, pedigree (3,3,5,3,3)
  (same comment as for concrete, high exacting requirements)
  properties: dry mass 1 kg, wet mass 1 kg
- lubricating oil: 0.00753 kg; source SBB 2002; lognormal variance with pedigree 0.04, pedigree (1,1,5,1,1)
  Calculated value. In the year 2000 the 69697 litre of lubricates have been consumed for point maintenance. The majority of the employed lubricates are biodegradable (SBB, 2002). Maintenance and land use
  Uncertainty: environmental report
  properties: heating value, net 40.2 MJ, wet mass 1 kg, carbon content, fossil 0.75, dry mass 1 kg
  note on heating value, net: Literature value, Source: IPCC 2006, 2006 IPCC Guidelines for National Greenhouse Gas Inventories, Prepared by the National Greenhouse Gas Inventories Programme, Eggleston H.S., Buendia L., Miwa K., Ngara T. and Tanabe K. (eds). Published: IGES, Japan
- used railway track: -1 m*year; name BP_amount_1; lognormal variance with pedigree 0.0621, pedigree (3,1,5,3,1)
  Uncertainty: own estimation taken into account uncertainties in the infrastructure legth -transport performance ratio and further geographical uncertainties due to extrapolation
  production volume 0.0336675 m*year; = RP_PV_1 * (BP_amount_1 / RP_amount_1)
    Calculated from production volume of reference product using the relative outputs.
  property price 0 EUR2005; name BP_amount_1_price_EUR2005
  property wet mass 690 kg; name WM
  property carbon content, non-fossil 0; name C_content_non_fossil
  property water in wet mass 0 kg; name WWM
  property dry mass 690 kg; name DM
  property water content 0; name water_content
  property carbon content, fossil 8.23188e-5; name C_content_fossil
- zinc: 0.006 kg; source Elsener J. 1993; lognormal variance with pedigree 0.0607, pedigree (3,3,5,3,3)
  (same comment as for copper, cathode)
  properties: dry mass 1 kg, wet mass 1 kg
- reinforcing steel: 13.5 kg; source Elsener J. 1993; lognormal variance with pedigree 0.0607, pedigree (3,3,5,3,3)
  (same comment as for steel, low-alloyed, hot rolled)
  properties: dry mass 1 kg, wet mass 1 kg, carbon content, fossil 0.004
- glyphosate: 0.0007 kg; source SBB 2002; lognormal variance with pedigree 0.04, pedigree (1,1,5,1,1)
  Calculated value. The use of herbicides in 2000 has been reported with 4.474 t SBB (2002). Maintenance and land use
  Uncertainty: environmental report
  properties: dry mass 1 kg, carbon content, fossil 0.214286, wet mass 1 kg

## Inputs from nature
All rows: source SBB 2002
- Transformation, to traffic area, rail network [natural resource, land]: 0.0266 m2; lognormal variance with pedigree 0.2521, pedigree (3,2,5,1,5)
  Calculated value based in oral communication with Müller Gleisbau and SBB (2002). Maintenance and land use
  Uncertainty: literature &own calculations
- Occupation, traffic area, rail network [natural resource, land]: 11.5 m2*year; lognormal variance with pedigree 0.1721, pedigree (3,2,5,1,5)
  (same comment as for Transformation, to traffic area, rail network)
- Occupation, traffic area, rail/road embankment [natural resource, land]: 10.4 m2*year; lognormal variance with pedigree 0.1721, pedigree (3,2,5,1,5)
  (same comment as for Transformation, to traffic area, rail network)
- Transformation, from unspecified [natural resource, land]: 0.0508 m2; lognormal variance with pedigree 0.2521, pedigree (3,2,5,1,5)
  (same comment as for Transformation, to traffic area, rail network)
- Transformation, to traffic area, rail/road embankment [natural resource, land]: 0.0242 m2; lognormal variance with pedigree 0.2521, pedigree (3,2,5,1,5)
  (same comment as for Transformation, to traffic area, rail network)

## Emissions to nature
- Oils, non-fossil [soil, unspecified]: 0.00753 kg; lognormal variance with pedigree 0.05, pedigree (1,1,5,1,1)
  Calculated value. Maintenance and land use
  Uncertainty: environmental report and own calculations
- Glyphosate [soil, industrial]: 0.0007 kg; source SBB 2002; lognormal variance with pedigree 0.05, pedigree (1,1,5,1,1)
  Calculated value based in SBB (2002). Maintenance and land use
  Uncertainty: environmental report and own calculations

## Sampling procedure
national statistics and literature studies

## Extrapolations
This dataset has been extrapolated from year 2000 to the year of the calculation (2021). The uncertainty has been adjusted accordingly.

## Review by Michael Spielmann (obsolete) 2003-07-09
passed. (selfvalidation)

## Review by Roland Hischier 2011-09-23
Transfer of documentation done.
