# hydraulic fluid production, for geological stimulation

Dataset: EcoSpold 2, unit process
Geography: GLO
Time period: 2008-01-01 to 2021-12-31
Technology level: current
Classification: ISIC rev.4 ecoinvent: 2029:Manufacture of other chemical products n.e.c.
Synonyms: fracking fluid; fracfluid
Scenario: Business-as-Usual
System model: Allocation, cut-off by classification
Generated by: Karin Treyer
Database: ecoinvent
isCopyrightProtected: true
accessRestrictedTo: 1

## General comment
This is a dataset for a hydraulic fracturing fluid. Hydraulic fracturing can be conducted by injecting only pure water at high pressure into the rock, as often done for Enhanced Geothermal Systems (Grosser Rat BS 2003, McClure 2012). A big variety of chemicals is often added in deep shale natural gas and oil fracturing in a 0.5-2 vol% range (US Department of Energy 2009, Chesapeake Energy 2012). The US Committee on Energy (2011) indicates the use of over 700 different chemicals, out of them the most recent: Methanol, Isopropanol, Silica-quartz, 2-Butoxyethanol, Ethylene glycol, hydrotreated light petrolium distillates, sodium hydroxide. According to the US Committee for Energy (2011), the composition of these fluids varies by formation, ranging from a simple mixture of water and sand to more complex mixtures with a multitude of chemical additives. The companies may use these chemical additives to thicken or thin the fluids, improve the flow of the fluid, or kill bacteria that can reduce fracturing performance. According to (US Department of Energy 2009), a typical fracture treatment will use very low choncentrations of between 3 and 12 additive chemicals depending on the characteristics of the water and the shale formation being fractures. Overall the concentration of additives in most fracturing fluids is a relatively consisten 0.5% to 2% with water making up 98% to 99.5%. This dataset is modeled with 0.5vol% additives which cover the range of all possible functions that could be built into a fracturing fluid.

Sources:
- Grosser Rat Basel-Stadt. 2003. Ratschlag Nr. 9262 betreffend Rahmenkredit für den Bau eines geothermischen Heiz-Kraftwerks (Deep heat Mining) sowie Beantwortung Anzug Dr. Rudolf Rechsteiner und Konsorten betreffend Geothermie. Vom 5. August 2004 /031323/98526/BD
- McClure, M. 2012. Discrete Fracture Modeling of Hydraulic Stimulation in Enhanced Geothermal Systems. School of Earth Sciences, Energy Resources Engineering, Stanford University.
- US Department of Energy. 2009. Modern Shale Gas. Development in the United States: A Primer. US Department of Energy. Office of Fossil Energy. National Energy Technology Laboratory. April 2009. p.62f
- Chesapeake Energy. 2012. Hydraulic fracturing facts. Fracturing Ingredients, Example of Typical Deep Shale Hydraulic Fracturing Mixture Makeup. www.hydrualicfracturing.com, accessed 30.01.2012
- US Committee on Energy. 2011. Chemicals used in hydraulic fracturing. United States House of Representatives. Committee on Energy and Commerce. Minority Staff. April 2011.

## Included activities start
From reception of the water and the chemicals for production of the hydraulic fluid.

## Included activities end
This activity ends with the hydraulic fracturing fluid ready for use. It is not taken into account that the fluid might be prepared as a concentration and that water might only be added at the well's place. This procedure ensures that the whole water consumption is taken into account.

This dataset includes chemical additives which might be used in hydraulic stimulation.
This dataset doesn't include energy use of the production of the hydraulic fracturing fluid. It doesn't include any modeling of by-products/wastes.

## Technology
Hydraulic fracturing fluids can vary a lot in their composition. A well-documented composition is modelled in this dataset, taking into account all kinds of additive types and purposes.

## Parameters
- fraction, process water, to air: 0.15 dimensionless; name fraction_PW_to_air; lognormal variance with pedigree 0.092025, pedigree (4,4,3,2,4)
  Literature value. In case when no industry/process specific data are available, default evaporation fraction value is used. This value is 15% and is based on literature (Statistics Canada, 2007 & Shaffer, K.H., 2008, Consumptive water use in the Great Lakes Basin, USGS & Shiklomanov, 2003, World Water Resources at the Beginning of the 21st Century) and has been approved by an expert.

## Reference product
- hydraulic fracturing fluid: 1 m3; name hydraulic_frac_fluid; By-product classification allocatable product; CPC 35499: Other chemical products n.e.c.
  production volume 82400 m3; = 41200*2
    As to Wikipedia (2012), between 5 and 800 m3 of hydraulic fluid is used per well. In the United States, about 41200 m3 of hydraulic frac fluid were used per year in the period between 2005 and 2009 (2.06E5 m3 in total) (US Committee of Energy 2011). It can be assumed that a big part of hydraulic fracturing is carried out in the US. To calculate the Annual Production Volume, two assumptions were made:
    1) Used frac fluid equals the produced frac fluid
    2) The APV of the US was doubled for a worldwide production volume.
    Sources:
    - Wikipedia. 2012. Hydraulic fracturing. Wikipedia, the free encyclopedia, accessed 13.02.2012
    -US Committee on Energy. 2011. Chemicals used in hydraulic fracturing. United States House of Representatives. Committee on Energy and Commerce. Minority Staff. April 2011.
  property heating value, net 0 MJ
    Non combustible products are assumed to have an LHV equal to zero (0).
  property price 29.17 EUR2005; name hydraulic_frac_fluid_price_EUR2005
    Calculated value based on data from United Nations Commodity Trade Statistics Database (comtrade.un.org). UN comtrade category: 382550 Wastes of metal pickling liquors, hydraulic fluids, brake fluids, and anti-freeze fluids. Year 2005. Using exchange rate of 1EURO = 1.209 USD. Price of import EU-28 market.
  property carbon content, fossil 0.00145
    calculated based on carbon balance of products needed for hydraulic fluid production
  property carbon content 0.00145
    carbon content on a dry matter basis (reserved; not for manual entry)
  properties: wet mass 1000 kg, carbon content, non-fossil 0, water in wet mass 987.5 kg, water content 79, dry mass 12.5 kg, carbon allocation 0.018125 kg

## Inputs from technosphere
All rows: source US Department of Energy 2009
- lubricating oil: 0 kg; pedigree (1,1,1,1,1)
  Literature value, calculated value.
  - Additive type: friction reducer
  - Function: minimizes friction between the fluid and the pip
  - volumetric share in fracture fluid: 0.088%
  - Density: 0.8 kg/dm3, state of aggregate: liquid (298 K, 100 kPa)[Wikipedia 2011. Mineral oil. Wikipedia, the free encyclopedia. accessed 13.02.2012]
  properties: dry mass 1 kg, heating value, net 40.2 MJ, carbon content, fossil 0.75, wet mass 1 kg
  note on heating value, net: Literature value, Source: IPCC 2006, 2006 IPCC Guidelines for National Greenhouse Gas Inventories, Prepared by the National Greenhouse Gas Inventories Programme, Eggleston H.S., Buendia L., Miwa K., Ngara T. and Tanabe K. (eds). Published: IGES, Japan
  note on carbon content, fossil: Lubricating oil is produced from diesel. C-content/dry mass of fats and oils considered 75%, from: ecoinvent v2.2 report, n 15a, pg 40
- chemical, organic: 0.0772 kg; = ((1.06*1000)*(0.001/100))+((1.665*1000)*(0.004/100)); lognormal variance with pedigree 0.0573, pedigree (4,3,5,3,3)
  Literature value, calculated value. Proxy for glutaraldehyde / citric acid.
  - Additive type: biocide / iron control
  - Function: Eliminates bacteria in the water that produce corrosive byproducts / prevents precipitation of metal oxides
  - volumetric share in fracture fluid: 0.001% / 0.004%
  - Density: 1.06 kg/dm3 / 1.665 kg/dm3, state of aggregate: solid (298 K, 100 kPa)[Wikipedia 2011. Glutaraldehyde / Citric acid. Wikipedia, the free encyclopedia. accessed 13.02.2012]
  properties: carbon content, fossil 0.628, dry mass 1 kg, wet mass 1 kg, heating value, net 19.03 MJ
  note on carbon content, fossil: This dataset is an unweighted average of 20 organic substances (listed in Tab 88.1, ecoinvent v2.2 report 8, part II), being part of the top100 chemicals included in this database. The C-content has also been calculated as an unweighted average of the C content of the substances composing this dataset.
- chemical, inorganic: 0.2336 kg; = ((1.98*1000)*(0.01/100))+((1.78*1000)*(0.002/100)); lognormal variance with pedigree 0.0573, pedigree (4,3,5,3,3)
  Literature value, calculated value.
  - Additive type: Breaker / oxygen scavenger (corrosion inhibitor)
  - Function: Allows a delayed break down of the gel polymer chaings / removes oxygen from the water to protect the pipe from corrosion
  - volumetric share in fracture fluid: 0.01% / 0.002%
  - Density: 1.98 kg/dm3 / 1.78 kg/dm3, state of aggregate: solid (298 K, 100 kPa)[Wikipedia 2011. Ammonium persulfate / Ammonium bisulfate. Wikipedia, the free encyclopedia. accessed 13.02.2012]
  properties: carbon content, fossil 0.003, dry mass 1 kg, wet mass 1 kg
  note on carbon content, fossil: This dataset is an unweighted average of 20 inorganic substances (listed in Tab 88.1, ecoinvent v2.2 report 8, part II), being part of the top100 chemicals included in this database. The C-content has also been calculated as an unweighted average of the C content of the substances composing this dataset.
- potassium chloride: 0 kg; pedigree (1,1,1,1,1)
  The exchange has been updated from 'potassium chloride, as K2O' into 'potassium chloride' and therefore its amount has been scaled (multiplied) from 1.1904 kg by 1.5829 kg of 'potassium chloride' per kg of 'potassium chloride, as K2O'. Original comment of the exchange is: Literature value, calculated value.
  - Additive type: KCI
  - Function: creates a brine carrier fluid
  - volumetric share in fracture fluid: 0.06%
  - Density: 1.984 kg/dm3, state of aggregate: solid (298 K, 100 kPa)[Wikipedia 2011. Potassium chloride. Wikipedia, the free encyclopedia. accessed 13.02.2012]
  properties: dry mass 1 kg, wet mass 1 kg
- soybean meal: 0 kg; pedigree (1,1,1,1,1)
  Literature value, calculated value. Proxy for guar gum or hydroxyethyl cellulose.
  - Additive type: gel
  - Function: thickens the water in order to suspend the sand
  - volumetric share in fracture fluid: 0.056%
  - Density: 0.528 kg/dm3. Approx. density of flour.
  properties: carbon content, non-fossil 0.475627, dry mass 0.89 kg, water content 0.123596, wet mass 1 kg
  note on carbon content, non-fossil: Composition data obtained from Table 2 in Uses of Canola Meal, J. Bonnardeaux, Department of Agriculture and Food, Western Australia, 2007. First, composition data were refered to 1 kg dry mass. Then, C-contents were calculated considering a C-content/dry mass of 46% in carbohydrates (including fibres), 53% in proteins and 75% in fats. All data from "Evolutionary and Biochemical Aspects", A.D. Kay and T. Vrede (in Global Ecology, 2010, Elsevier B.V., S.E. Jørgensen Ed.).
- methanol: 0.704 kg; = (0.8*1000)*(0.088/100); lognormal variance with pedigree 0.0573, pedigree (4,3,5,3,3)
  Literature value, calculated value.
  - Additive type:
  - Function:
  - volumetric share in fracture fluid: 0.00%
  - Density: kg/dm3, state of aggregate: solid (298 K, 100 kPa)[Wikipedia 2011. Borax. Wikipedia, the free encyclopedia. accessed 13.02.2012]
  properties: carbon content, fossil 0.375, dry mass 1 kg, wet mass 1 kg, heating value, net 26.49 MJ
- borax, anhydrous, powder: 0.1211 kg; = (1.73*1000)*(0.007/100); lognormal variance with pedigree 0.0573, pedigree (4,3,5,3,3)
  Literature value, calculated value.
  - Additive type: crosslinker (borate salts)
  - Function: maintains fluid viscosity as temperature increases
  - volumetric share in fracture fluid: 0.007%
  - Density: 1.73 kg/dm3, state of aggregate: solid (298 K, 100 kPa)[Wikipedia 2011. Borax. Wikipedia, the free encyclopedia. accessed 13.02.2012]
  properties: dry mass 1 kg, wet mass 1 kg
- potassium carbonate: 0.2519 kg; = (2.29*1000)*(0.011/100); lognormal variance with pedigree 0.0573, pedigree (4,3,5,3,3)
  Literature value, calculated value.
  - Additive type: pH adjusting agent
  - Function: sodium or potassium carbonate
  - volumetric share in fracture fluid: 0.011%
  - Density: 2.29 kg/dm3, state of aggregate: solid (298 K, 100 kPa)[Wikipedia 2011. Potassium carbonate. Wikipedia, the free encyclopedia. accessed 13.02.2012]
  properties: dry mass 1 kg, wet mass 1 kg, heating value, net 2.63 MJ, carbon content, fossil 0.0869565
- silica sand: 252.015 kg; = (2.65*1000)*(9.51/100); lognormal variance with pedigree 0.0573, pedigree (4,3,5,3,3)
  Literature value, calculated value. Water and sand are the main components of a hydraulic fracturing fluid.
  - Volumetric share in fracture fluid: 0.0951% (US Energy Department 2009 and Green 2011)
  Density: 2.65 kg/dm3 (Adwan 2012)
  Sources:
  - US Department of Energy. 2009. Modern Shale Gas. Development in the United States: A Primer. US Department of Energy. Office of Fossil Energy. National Energy Technology Laboratory. April 2009. p.62f
  - Green M. 2011. Hydraulic Fracturing Fluid Breakdown. in: the energy collective. Posted November 8, 2011. accessed 13.02.2012.
  - Adwan. 2012. Specification. Adwan Chemical Industries Co. Ltd. House of Silica. http://www.adwanchem.com/Silica_Sand.htm, accessed 13.02.2012]
  properties: water content 0.010101, wet mass 1 kg, dry mass 0.99 kg
- isopropanol: 0 kg; pedigree (1,1,1,1,1)
  Literature value, calculated value.
  - Additive type: surfactant
  - Function: used to increase the viscosity of the fracture fluid
  - volumetric share in fracture fluid: 0.085%
  - Density: 0.786 kg/dm3, state of aggregate: liquid (298 K, 100 kPa)[Wikipedia 2011. Isopropyl alcohol (Isopropanol). Wikipedia, the free encyclopedia. accessed 13.02.2012]
  properties: heating value, net 34.3 MJ, carbon content, fossil 0.6, wet mass 1 kg, dry mass 1 kg
- ethylene glycol: 0.47859 kg; = (1.113*1000)*(0.043/100); lognormal variance with pedigree 0.0573, pedigree (4,3,5,3,3)
  Literature value, calculated value.
  - Additive type: scale inhibitor
  - Function: prevents scale deposits in the pipe
  - volumetric share in fracture fluid: 0.043%
  - Density: 1.113 kg/dm3, state of aggregate: liquid (298 K, 100 kPa)[Wikipedia 2011. Ethylene glycol. Wikipedia, the free encyclopedia. accessed 13.02.2012]
  properties: dry mass 1 kg, heating value, net 23.44 MJ, carbon content, fossil 0.387097, wet mass 1 kg
- hydrochloric acid, without water, in 30% solution state: 0 kg; pedigree (1,1,1,1,1)
  Literature value, calculated value. Hydrochloric acid (HCl) is the single largest liquid component used in a fracturing fluid aside from water; while the concentration of the acid may vary, a 15% HCl mix is a typical concentration.
  - Additive type: diluted acid (15%)
  - Function: Help dissolve minerals and initiate cracks in the rock
  - Volumetric share in fracture fluid: 0.123%
  - Density: 1.048 for a 10% concentration; liquid (293 K, 1 atm) [Wikipedia 2011. Hydrochloric acid. Wikipedia, the free encyclopedia. accessed 13.02.2012]
  properties: heating value, net 3.32 MJ, dry mass 1 kg, wet mass 1 kg
- lubricating oil: 0.122496, 0.581504 kg (2 entries); lognormal variance with pedigree 0.0573, pedigree (4,3,5,3,3)
  (same comment as for lubricating oil)
- potassium chloride: 0.144301, 1.73998 kg (2 entries); lognormal variance with pedigree 0.0573, pedigree (4,3,5,3,3)
  (same comment as for potassium chloride)
- soybean meal: 0.0377791, 0.257901 kg (2 entries); lognormal variance with pedigree 0.0573, pedigree (4,3,5,3,3)
  (same comment as for soybean meal)
- isopropanol: 0.116249, 0.551851 kg (2 entries); lognormal variance with pedigree 0.0573, pedigree (4,3,5,3,3)
  (same comment as for isopropanol)
- hydrochloric acid, without water, in 30% solution state: 0.235985, 1.05551 kg (2 entries); lognormal variance with pedigree 0.0573, pedigree (4,3,5,3,3)
  (same comment as for hydrochloric acid, without water, in 30% solution state)

## Inputs from nature
- Water, unspecified natural origin [natural resource, in water]: 0.9 m3; name water_UNO_input; = hydraulic_frac_fluid*0.9; source US Department of Energy 2009; lognormal variance with pedigree 0.041325, pedigree (1,2,5,2,2)
  Literature value, calculated value. Water and sand are the main components of a hydraulic fracturing fluid.
  - Volumetric share in fracture fluid: 0.9% (US Energy Department 2009 and Green 2011)
  A density value of 1.0 kg/dm3 has been chosen (slight simplification).
  Sources:
  - US Department of Energy. 2009. Modern Shale Gas. Development in the United States: A Primer. US Department of Energy. Office of Fossil Energy. National Energy Technology Laboratory. April 2009. p.62f
  - Green M. 2011. Hydraulic Fracturing Fluid Breakdown. in: the energy collective. Posted November 8, 2011. accessed 13.02.2012.
  Literature value, calculated value. Water and sand are the main components of a hydraulic fracturing fluid.
  - Volumetric share in fracture fluid: 0.9% (US Energy Department 2009 and Green 2011)
  A density value of 1.0 kg/dm3 has been chosen (slight simplification).
  Sources:
  - US Department of Energy. 2009. Modern Shale Gas. Development in the United States: A Primer. US Department of Energy. Office of Fossil Energy. National Energy Technology Laboratory. April 2009. p.62f
  - Green M. 2011. Hydraulic Fracturing Fluid Breakdown. in: the energy collective. Posted November 8, 2011. accessed 13.02.2012.

## Emissions to nature
- Water [water, unspecified]: 0.765 m3; name water_to_water_unspecified; = water_UNO_input*(1-fraction_PW_to_air); lognormal variance with pedigree 0.130025, pedigree (4,4,5,2,4)
  Calculated value based on literature values and expert opinion. See comments in the parametres' comment field.
  property fraction, origin: unspecified 1; name fraction_origin_unspecified_Ww
  property fraction, origin: fresh water 0; name fraction_origin_fresh_water_Ww
  property fraction, origin: salt water 0; name fraction_origin_salt_water_Ww
- Water [air, unspecified]: 0.135 m3; name water_to_air_unspecified; = water_UNO_input*fraction_PW_to_air; lognormal variance with pedigree 0.130025, pedigree (4,4,5,2,4)
  (same comment as for Water)
  property fraction, origin: unspecified 1; name fraction_origin_unspecified
  property fraction, origin: fresh water 0; name fraction_origin_fresh_water
  property fraction, origin: salt water 0; name fraction_origin_salt_water

## Extrapolations
This dataset has been extrapolated from year 2008 to the year of the calculation (2021). The uncertainty has been adjusted accordingly.

## Review by Bo Weidema 2012-01-11
Passed.
Reviewed for relevance of dataset structure, exchanges and quality of documentation and readability.

## Review by Bo Weidema 2012-01-11
This dataset has only been reviewed by one editor.
