# treatment of waste graphical paper, municipal incineration

Dataset: EcoSpold 2, unit process
Geography: RoW
Time period: 2006-01-01 to 2021-12-31
Technology level: current
Classification: ISIC rev.4 ecoinvent: 3821:Treatment and disposal of non-hazardous waste
Synonyms: municipal waste incineration; Siedlungsabfallverbrennung; Kehrichtverbrennung
Scenario: Business-as-Usual
System model: Allocation, cut-off by classification
Generated by: Gabor Doka
Published in: Doka G. 2013
Database: ecoinvent
isCopyrightProtected: true
accessRestrictedTo: 1

## General comment
This dataset represents the activity of waste disposal of waste graphical paper in a municipal solid waste incinerator (MSWI) // Recommended use of this dataset: For paper, which goes to disposal as part of communal waste mixture. Larger amounts of separated paper will likely not be disposed in incinerators or landfills, but rather go to recycling. // // Waste composition (wet, in ppm): upper heating value 16.61 MJ/kg; lower heating value 14.12 MJ/kg; H2O 110830; O 378670; H 53852; C 404000; S 1406.7; N 3756.6; P 112.95; B 17.19; Cl 1837.5; Br n.a.; F 19.468; I n.a.; Ag 0.047733; As 2.0485; Ba 114.24; Cd 1.6629; Co 0.7359; Cr 14.461; Cu 60.893; Hg 0.13902; Mn 40.221; Mo 4.2976; Ni 9.4431; Pb 80.374; Sb 0.70911; Se 2.5786; Sn n.a.; V n.a.; Zn 124.8; Be 0.97413; Sc n.a.; Sr 58.276; Ti 171.9; Tl 1.719; W n.a.; Si 21255; Fe 1188.4; Ca 3438.1; Al 12391; K 1327.5; Mg 4297.6; Na 918.83; // Share of carbon in waste that is biogenic 100%. // Share of metals in waste not oxidised and bulk-recyclable (exclude very small or thin parts) Iron: 0%; Alu: 0%; Copper: 0%. // One kg of this waste produces 0.09717 kg of slag and 0.01664 kg of residues, which are landfilled. Additional solidification with 0.006655 kg of cement. // Net energy production: 1.74MJ/kg electric energy and 3.49MJ/kg thermal energy. // Recovery of metal scrap to recycling: 0g iron scrap, 0g aluminium scrap, 0g copper scrap.

## Included activities start
waste incineration from waste reception gate and delivery into waste bunker at incinerator plant site (without transports to the incinerator)

## Included activities end
Waste-specific short-term emissions to water from leachate. Long-term emissions from landfill to ground water.

## Geography
Specific to the technology mix encountered in Switzerland in 2010. Well applicable to modern incineration practices in Europe, North America or Japan.

## Technology
average Swiss MSWI plants in 2010 (grate incinerators) with electrostatic precipitator for fly ash (ESP), wet flue gas scrubber and 25% SNCR , 42.77% SCR-high dust , 32.68% SCR-low dust -DeNOx facilities and 0% without Denox (weighted according to mass of burnt waste, representing Swiss average). Efficiency of iron scrap separation from slag : 58%. Efficiency of non-ferrous scrap separation from slag : 31%. Gross electric efficiency technology mix 15.84% and Gross thermal efficiency technology mix 28.51%

## Time period
Waste composition as given in literature reference, theoretical data or other source. Transfer coefficients for modern MSWI.

## Reference product
- waste graphical paper: -1 kg; name RP; By-product classification Waste; CPC 39990: Other wastes n.e.c.
  Main reference product of this activity (supply of disposal service).
  production volume 4.095e10 kg; name RP_PV; = 1.5E11*0.273
    Calculated based on literature value and estimates. The total production of graphical paper in the world in 2007 is 1.5E11kg (http://www.statista.com/statistics/167107/production-volume-of-paper-by-type/, accessed 20130313).
    Based on data from Europe the treatment technology shares are assumed to be as follows;
    28.7% of waste graphical paper is recycled
    27.3% of waste graphical paper is incinerated
    44.0% of waste graphical paper is landfilled
  property heating value, net 14.12 MJ
    Value taken from the general comment of the treatment dataset.
  property price 0 EUR2005; name RP_price_EUR2005
    Waste products are assigned a price of zero as they are assumed to require further treatment.
  property carbon content 0.454955
    carbon content on a dry matter basis (reserved; not for manual entry)
  properties: dry mass 0.888 kg, water in wet mass 0.112 kg, wet mass 1 kg, carbon content, non-fossil 0.454955, water content 0.126126, carbon content, fossil 0, carbon allocation 0.404 kg

## By-products
- heat, for reuse in municipal waste incineration only: 0 MJ; name E_th_prod_MSWI; By-product classification allocatable product; CPC 17300: Steam and hot water; pedigree (1,1,1,1,1)
  Net electricity generated from this waste and used in internal MSWI plant energy redistribution.
  Uncertainty: uncertainty is calculated from uncertainties in waste composition and uncertainties in energy efficiency and the uncertainty in internal energy demand
  production volume 1.43059e11 MJ; = ABS( E_th_prod_MSWI/ RP)* RP_PV
    calculated in proportion to reference product waste input to incinerator
  property exergy 0.1842 MJ; name E_th_prod_MSWI_exergy
    This exergy property is based on the exergy content of the product.
  property price 0.0106 EUR2005; name E_th_prod_MSWI_price_EUR2005
    Average European district heat price from Ecoheatcool and Euroheat 2005-2006, Ecoheat Work package 1: The European heat market. Final report. 10.6 EUR/GJ i s the price of district heat. http://www.solarthermalworld.org/files/Ecoheatcool%20WP1%20Web.pdf?download
  property true value relation 0.1842; name E_th_prod_MSWI_true_value_relation
    property to calculate "true value" from
- electricity, for reuse in municipal waste incineration only: 0 kWh; name E_el_prod_MSWI; CPC 17100: Electrical energy; By-product classification allocatable product; pedigree (1,1,1,1,1)
  (same comment as for heat, for reuse in municipal waste incineration only)
  production volume 1.97801e10 kWh; = ABS( E_el_prod_MSWI/ RP)* RP_PV
    calculated in proportion to reference product waste input to incinerator
  property true value relation 3.6; name E_el_prod_MSWI_true_value_relation
    property to calculate "true value" from
  property price 0.1 EUR2005; name E_el_prod_MSWI_price_EUR2005
    Estimated to be the same price as in case of electricity, medium voltage.
  property exergy 3.6 MJ; name E_el_prod_MSWI_exergy
    This exergy property is based on the exergy content of the product.

## Inputs from technosphere
- water, decarbonised: 0 kg; pedigree (1,1,1,1,1)
  Incinerator process water used in flue gas scrubber stage.
  Uncertainty: uncertainty calculated from uncertainty in average water input, and the uncertainty of the waste composition of this waste
  properties: wet mass 1 kg
- process-specific burdens, slag landfill: 0 kg; pedigree (1,1,1,1,1)
  Mass-specific expenditures required for landfilling of bottom ash.
  Uncertainty: uncertainty is calculated from uncertainties in waste composition and transfer coefficients in incinerator
- chemical, organic: 2.7389e-6 kg; lognormal variance with pedigree 1.5987, pedigree (1,1,4,1,1)
  Auxilliary inputs for the wastewater treatment stage of the incinerator plant. Proxy for (pure) Trisodium-trimercapto-s-triazine (CAS 17766-26-6), used as 15% diluted solution, aka TMT15.
  Uncertainty: uncertainty calculated from uncertainty in average TMT15 input, of transfer coefficients in the incinerator, and the uncertainty of the waste composition of this waste
  properties: heating value, net 19.03 MJ, dry mass 1 kg, carbon content, fossil 0.628, wet mass 1 kg
- quicklime, milled, packed: 0.00098918 kg; lognormal variance with pedigree 0.57673, pedigree (1,1,4,1,1)
  Auxilliary inputs for the flue gas treatment stage of the incinerator plant.
  Uncertainty: uncertainty calculated from uncertainty in average CaO input, of transfer coefficients in the incinerator, and the uncertainty of the waste composition of this waste
  properties: water content 0.010101, dry mass 0.99 kg, wet mass 1 kg
- ammonia, anhydrous, liquid: 0 kg; pedigree (1,1,1,1,1)
  Input to DeNOx stage (100% NH3).
  Uncertainty: uncertainty calculated from uncertainty in average DeNOx input, uncertainty in the share of thermal NOx, uncertainty of nitrogen content in average municipal waste and the uncertainty in nitrogen content in *this* waste.
  properties: dry mass 1 kg, wet mass 1 kg
- slag landfill: 1.713e-10 unit; lognormal variance with pedigree 0.037211, pedigree (1,1,4,1,1)
  Landfill infrastructure required for landfilling of bottom ash.
  Uncertainty: uncertainty is calculated from uncertainties in waste composition and transfer coefficients in incinerator
- hydrochloric acid, without water, in 30% solution state: 2.262e-5 kg; lognormal variance with pedigree 0.2385, pedigree (1,1,4,1,1)
  Auxilliary inputs for the wastewater treatment stage of the incinerator plant.
  Uncertainty: uncertainty calculated from uncertainty in average HCl input, of transfer coefficients in the incinerator, and the uncertainty of the waste composition of this waste
  properties: dry mass 1 kg, wet mass 1 kg, heating value, net 3.32 MJ
- municipal waste incineration facility: 2.5e-10 unit
  Demands per kilogram waste.
- titanium dioxide: 4.9664e-5 kg; lognormal variance with pedigree 1.027, pedigree (1,1,4,1,1)
  Input to DeNOx stage (TiO2 catalyst carrier)
  Uncertainty: uncertainty calculated from uncertainty in average DeNOx input, uncertainty in the share of thermal NOx, uncertainty of nitrogen content in average municipal waste and the uncertainty in nitrogen content in *this* waste.
  properties: dry mass 1 kg, wet mass 1 kg
- residual material landfill: 3.4662e-11 unit; lognormal variance with pedigree 0.025933, pedigree (1,1,4,1,1)
  Landfill infrastructure required for landfilling of incineration residues.
  Uncertainty: uncertainty is calculated from uncertainties in waste composition and transfer coefficients in incinerator
- process-specific burdens, residual material landfill: 0 kg; pedigree (1,1,1,1,1)
  Mass-specific expenditures required for landfilling of incineration residues.
  Uncertainty: uncertainty is calculated from uncertainties in waste composition and transfer coefficients in incinerator
- chromium oxide, flakes: 1.0136e-6 kg; lognormal variance with pedigree 1.027, pedigree (1,1,4,1,1)
  Input to DeNOx stage.
  Uncertainty: uncertainty calculated from uncertainty in average DeNOx input, uncertainty in the share of thermal NOx, uncertainty of nitrogen content in average municipal waste and the uncertainty in nitrogen content in *this* waste.
  properties: wet mass 1 kg, dry mass 1 kg
- cement, unspecified: 0 kg; pedigree (1,1,1,1,1)
  Cement required for solidification of landfilled residual material.
  Uncertainty: Uncertainty calculated from uncertainty of the waste composition of this waste, of transfer coefficients in the incinerator and of the solidification recipe.
  properties: wet mass 1 kg, dry mass 1 kg
- iron (III) chloride, without water, in 40% solution state: 1.8198e-5 kg; lognormal variance with pedigree 0.41254, pedigree (1,1,4,1,1)
  Auxilliary inputs for the wastewater treatment stage of the incinerator plant.
  Uncertainty: uncertainty calculated from uncertainty in average FeCl3 input, of transfer coefficients in the incinerator, and the uncertainty of the waste composition of this waste
  properties: dry mass 1 kg, wet mass 1 kg
- heat, district or industrial, natural gas: 0 MJ; pedigree (1,1,1,1,1)
  Input to DeNOx stage, to heat up flue gas in low-dust SCR.
  Uncertainty: uncertainty calculated from uncertainty in average DeNOx input, uncertainty in the share of thermal NOx, uncertainty of nitrogen content in average municipal waste and the uncertainty in nitrogen content in *this* waste.
  properties: heating value, net 1 MJ
- chemical, inorganic: 8.6057e-5 kg; lognormal variance with pedigree 0.2385, pedigree (1,1,4,1,1)
  Auxilliary inputs for the wastewater treatment stage of the incinerator plant. Proxy for Polyelectrolyte.
  Uncertainty: uncertainty calculated from uncertainty in average Polyelectrolyte input, of transfer coefficients in the incinerator, and the uncertainty of the waste composition of this waste
  properties: wet mass 1 kg, dry mass 1 kg, carbon content, fossil 0.003
- waste cement, hydrated: 0 kg; name ByP_01; pedigree (1,1,1,1,1)
  Hydrated cement output for solidification of landfilled residual material.
  Uncertainty: Uncertainty calculated from uncertainty of the waste composition of this waste and transfer coefficients in the incinerator and of the solidification recipe.
  production volume 0 kg
    calculated in proportion to reference product waste input to incinerator
  property price 0 EUR2005; name ByP_01_price_EUR2005
  properties: wet mass 1 kg, dry mass 1 kg
- sodium hydroxide, without water, in 50% solution state: 0.00067526 kg; lognormal variance with pedigree 0.25731, pedigree (1,1,4,1,1)
  Auxilliary inputs for the flue gas treatment stage of the incinerator plant.
  Uncertainty: uncertainty calculated from uncertainty in average NaOH input, of transfer coefficients in the incinerator, and the uncertainty of the waste composition of this waste
  properties: wet mass 1 kg, dry mass 1 kg, heating value, net 3.03 MJ
- transport, freight, lorry, unspecified: 0 metric ton*km; pedigree (1,1,1,1,1)
  Transport services to transport incineration residues to landfills.
  Uncertainty: uncertainty calculated from uncertainty of the waste composition of this waste, uncertainty of transfer coefficients and the uncertainty in generic transportation distances
- water, decarbonised: 0.00919917, 0.0239362, 0.0965403, 0.0235746, 0.00475253, 0.0156272, 0.000862716, 0.0122935, 0.0286367, 0.17963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 kg (12 entries); lognormal variance with pedigree 0.41254, pedigree (1,1,4,1,1)
  (same comment as for water, decarbonised)
- process-specific burdens, slag landfill: 0.0272575, 0.0691015 kg (2 entries); lognormal variance with pedigree 0.037211, pedigree (1,1,4,1,1)
  (same comment as for process-specific burdens, slag landfill)
- ammonia, anhydrous, liquid: 0.000166158, 1.42833e-5, 2.22211e-5, 4.40279e-5, 4.31357e-5, 4.52109e-6, 2.02109e-5, 0.000478132 kg (8 entries); lognormal variance with pedigree 0.6828, pedigree (1,1,4,1,1)
  (same comment as for ammonia, anhydrous, liquid)
- process-specific burdens, residual material landfill: 0.00470647, 0.0119315 kg (2 entries); lognormal variance with pedigree 0.025933, pedigree (1,1,4,1,1)
  (same comment as for process-specific burdens, residual material landfill)
- cement, unspecified: 0.000960968, 0.000199949, 1.46449e-5, 4.17427e-5, 0.000944025, 2.77854e-5, 0.000305166, 3.69217e-5, 0.0041239 kg (9 entries); lognormal variance with pedigree 0.035017, pedigree (1,1,4,1,1)
  (same comment as for cement, unspecified)
- heat, district or industrial, natural gas: 0.00164982, 0.039533, 0.107047 MJ (3 entries); lognormal variance with pedigree 0.6828, pedigree (1,1,4,1,1)
  (same comment as for heat, district or industrial, natural gas)
- waste cement, hydrated: -0.00470647, -0.0119315 kg (2 entries); lognormal variance with pedigree 0.035017, pedigree (1,1,4,1,1)
  (same comment as for waste cement, hydrated)
  production volume 6.81326e8 kg
- transport, freight, lorry, unspecified: 0.000517261, 8.0984e-5, 0.00392165 metric ton*km (3 entries); lognormal variance with pedigree 0.029741, pedigree (1,1,4,1,1)
  (same comment as for transport, freight, lorry, unspecified)

## Inputs from nature
- Oxygen [natural resource, in air]: 1.5579 kg; lognormal variance with pedigree 0.034994, pedigree (1,1,4,1,1)
  Oxygen from ambient air needed to combust and oxidise this waste. Net demand, i.e. without O2 leaving the plant in flue gas uncombusted.
  Uncertainty: uncertainty is calculated from uncertainties in waste composition and transfer coefficients to flue gas and soild residues in incinerator

## Emissions to nature
- TOC, Total Organic Carbon [water, surface water]: 0.00020638 kg; lognormal variance with pedigree 0.053165, pedigree (1,1,4,1,1)
  Emissions to water from waste composition and transfer coefficients in incinerator and landfills.
  Uncertainty: uncertainty is calculated from uncertainties in waste composition and transfer coefficients in incinerator and landfills
- TOC, Total Organic Carbon [water, ground-, long-term]: 0.0012005 kg; lognormal variance with pedigree 0.032398, pedigree (1,1,4,1,1)
  Long-term emissions from landfilling of incineration residues.
  Uncertainty: uncertainty is calculated from uncertainties in waste composition and transfer coefficients in incinerator and landfills.
- Phenol, pentachloro- [air, urban air close to ground]: 1.4283e-11 kg; lognormal variance with pedigree 0.101442, pedigree (1,1,4,1,1)
  Incomplete combustion product emitted to air.
  Uncertainty: uncertainty calculated from uncertainty in average operation emissions, and the uncertainty of the flue gas volume from this waste.
- Iron [air, urban air close to ground]: 2.1299e-9 kg; lognormal variance with pedigree 0.70898, pedigree (1,1,4,1,1)
  Emission to air from waste composition and transfer coefficients.
  Uncertainty: uncertainty is calculated from uncertainties in waste composition and transfer coefficients in incinerator
- Benzene [air, urban air close to ground]: 3.2797e-8 kg; lognormal variance with pedigree 0.101442, pedigree (1,1,4,1,1)
  (same comment as for Phenol, pentachloro-)
- Manganese [water, surface water]: 6.2608e-9 kg; lognormal variance with pedigree 0.93789, pedigree (1,1,4,1,1)
  (same comment as for TOC, Total Organic Carbon)
- Heat, waste [water, surface water]: 3.0431 MJ; lognormal variance with pedigree 0.059503, pedigree (1,1,4,1,1)
  Waste heat generated from heating value of this waste plus any electricity required to process it.
  Uncertainty: uncertainty is calculated from uncertainties in waste composition and uncertainties in energy efficiency and the uncertainty in internal energy demand
- NMVOC, non-methane volatile organic compounds, unspecified origin [air, urban air close to ground]: 1.4926e-6 kg; lognormal variance with pedigree 0.101442, pedigree (1,1,4,1,1)
  (same comment as for Phenol, pentachloro-)
- COD, Chemical Oxygen Demand [water, surface water]: 0.00047259 kg; lognormal variance with pedigree 0.053009, pedigree (1,1,4,1,1)
  (same comment as for TOC, Total Organic Carbon)
- Selenium [water, surface water]: 8.7109e-7 kg; lognormal variance with pedigree 1.1545, pedigree (1,1,4,1,1)
  (same comment as for TOC, Total Organic Carbon)
- Cadmium, ion [water, ground-, long-term]: 1.2135e-7 kg; lognormal variance with pedigree 6.965, pedigree (1,1,4,1,1)
  (same comment as for TOC, Total Organic Carbon)
- Cadmium [air, urban air close to ground]: 8.4762e-10 kg; lognormal variance with pedigree 1.5344, pedigree (1,1,4,1,1)
  (same comment as for Iron)
- Aluminium [water, ground-, long-term]: 0.0089603 kg; lognormal variance with pedigree 0.31605, pedigree (1,1,4,1,1)
  (same comment as for TOC, Total Organic Carbon)
- Cadmium, ion [water, surface water]: 1.5939e-10 kg; lognormal variance with pedigree 1.2529, pedigree (1,1,4,1,1)
  (same comment as for TOC, Total Organic Carbon)
- BOD5, Biological Oxygen Demand [water, surface water]: 0.00046652 kg; lognormal variance with pedigree 0.054238, pedigree (1,1,4,1,1)
  (same comment as for TOC, Total Organic Carbon)
- Silver, ion [water, surface water]: 1.7714e-10 kg; lognormal variance with pedigree 1.9089, pedigree (1,1,4,1,1)
  (same comment as for TOC, Total Organic Carbon)
- Barium [air, urban air close to ground]: 4.484e-7 kg; lognormal variance with pedigree 0.96512, pedigree (1,1,4,1,1)
  (same comment as for Iron)
- Chromium VI [water, ground-, long-term]: 1.3266e-6 kg; lognormal variance with pedigree 1.6882, pedigree (1,1,4,1,1)
  (same comment as for TOC, Total Organic Carbon)
- Iron, ion [water, surface water]: 3.1243e-8 kg; lognormal variance with pedigree 0.90797, pedigree (1,1,4,1,1)
  (same comment as for TOC, Total Organic Carbon)
- Calcium, ion [water, ground-, long-term]: 0.0025609 kg; lognormal variance with pedigree 0.4721, pedigree (1,1,4,1,1)
  (same comment as for TOC, Total Organic Carbon)
- Beryllium [water, surface water]: 6.1012e-10 kg; lognormal variance with pedigree 2.096, pedigree (1,1,4,1,1)
  (same comment as for TOC, Total Organic Carbon)
- Molybdenum [water, surface water]: 1.1738e-6 kg; lognormal variance with pedigree 0.96114, pedigree (1,1,4,1,1)
  (same comment as for TOC, Total Organic Carbon)
- Silicon [water, ground-, long-term]: 0.0021467 kg; lognormal variance with pedigree 4.9352, pedigree (1,1,4,1,1)
  (same comment as for TOC, Total Organic Carbon)
- Thallium [air, urban air close to ground]: 1.719e-9 kg; lognormal variance with pedigree 1.5272, pedigree (1,1,4,1,1)
  (same comment as for Iron)
- Molybdenum [air, urban air close to ground]: 5.6548e-9 kg; lognormal variance with pedigree 1.4045, pedigree (1,1,4,1,1)
  (same comment as for Iron)
- Zinc, ion [water, ground-, long-term]: 3.7952e-5 kg; lognormal variance with pedigree 3.0607, pedigree (1,1,4,1,1)
  (same comment as for TOC, Total Organic Carbon)
- Chloride [water, ground-, long-term]: 0.00042579 kg; lognormal variance with pedigree 0.58403, pedigree (1,1,4,1,1)
  (same comment as for TOC, Total Organic Carbon)
- Lead [water, surface water]: 7.6883e-9 kg; lognormal variance with pedigree 0.83906, pedigree (1,1,4,1,1)
  (same comment as for TOC, Total Organic Carbon)
- Nickel [air, urban air close to ground]: 1.1863e-8 kg; lognormal variance with pedigree 1.3027, pedigree (1,1,4,1,1)
  (same comment as for Iron)
- Cobalt [water, ground-, long-term]: 5.9946e-7 kg; lognormal variance with pedigree 1.5297, pedigree (1,1,4,1,1)
  (same comment as for TOC, Total Organic Carbon)
- Nickel, ion [water, surface water]: 6.3448e-9 kg; lognormal variance with pedigree 1.8305, pedigree (1,1,4,1,1)
  (same comment as for TOC, Total Organic Carbon)
- Cyanide [air, urban air close to ground]: 1.2037e-5 kg; lognormal variance with pedigree 1.2698, pedigree (1,1,4,1,1)
  Nitrogen species emitted to air after DeNOx stage.
  Uncertainty: uncertainty calculated from uncertainty in average N-emissions and uncertainty in the share of thermal NOx and the uncertainty in nitrogen content in *this* waste.
- Lead [air, urban air close to ground]: 6.6216e-9 kg; lognormal variance with pedigree 1.0313, pedigree (1,1,4,1,1)
  (same comment as for Iron)
- Thallium [water, ground-, long-term]: 1.0031e-6 kg; lognormal variance with pedigree 1.1118, pedigree (1,1,4,1,1)
  (same comment as for TOC, Total Organic Carbon)
- Potassium, ion [water, ground-, long-term]: 0.001032 kg; lognormal variance with pedigree 0.32517, pedigree (1,1,4,1,1)
  (same comment as for TOC, Total Organic Carbon)
- Cobalt [water, surface water]: 1.3333e-10 kg; lognormal variance with pedigree 1.8903, pedigree (1,1,4,1,1)
  (same comment as for TOC, Total Organic Carbon)
- Antimony [water, ground-, long-term]: 4.5094e-7 kg; lognormal variance with pedigree 1.5794, pedigree (1,1,4,1,1)
  (same comment as for TOC, Total Organic Carbon)
- Copper, ion [water, ground-, long-term]: 5.4392e-5 kg; lognormal variance with pedigree 1.0177, pedigree (1,1,4,1,1)
  (same comment as for TOC, Total Organic Carbon)
- Particulates, < 2.5 um [air, urban air close to ground]: 3.9157e-6 kg; lognormal variance with pedigree 0.43344, pedigree (1,1,4,1,1)
  (same comment as for Phenol, pentachloro-)
- Zinc, ion [water, surface water]: 1.126e-8 kg; lognormal variance with pedigree 0.77848, pedigree (1,1,4,1,1)
  (same comment as for TOC, Total Organic Carbon)
- Mercury [water, ground-, long-term]: 8.8544e-9 kg; lognormal variance with pedigree 3.3488, pedigree (1,1,4,1,1)
  (same comment as for TOC, Total Organic Carbon)
- Heat, waste [air, urban air close to ground]: 12.327 MJ; lognormal variance with pedigree 0.059503, pedigree (1,1,4,1,1)
  (same comment as for Heat, waste)
- Nickel, ion [water, ground-, long-term]: 9.0643e-6 kg; lognormal variance with pedigree 1.2532, pedigree (1,1,4,1,1)
  (same comment as for TOC, Total Organic Carbon)
- Fluoride [water, ground-, long-term]: 1.7455e-5 kg; lognormal variance with pedigree 0.70797, pedigree (1,1,4,1,1)
  (same comment as for TOC, Total Organic Carbon)
- Titanium, ion [water, surface water]: 6.4094e-8 kg; lognormal variance with pedigree 0.67672, pedigree (1,1,4,1,1)
  (same comment as for TOC, Total Organic Carbon)
- DOC, Dissolved Organic Carbon [water, surface water]: 0.00020638 kg; lognormal variance with pedigree 0.053165, pedigree (1,1,4,1,1)
  (same comment as for TOC, Total Organic Carbon)
- Titanium [air, urban air close to ground]: 1.4262e-7 kg; lognormal variance with pedigree 0.921, pedigree (1,1,4,1,1)
  (same comment as for Iron)
- Magnesium [water, ground-, long-term]: 0.0038059 kg; lognormal variance with pedigree 0.46089, pedigree (1,1,4,1,1)
  (same comment as for TOC, Total Organic Carbon)
- Arsenic [air, urban air close to ground]: 1.6047e-8 kg; lognormal variance with pedigree 1.4912, pedigree (1,1,4,1,1)
  (same comment as for Iron)
- Thallium [water, surface water]: 1.0531e-9 kg; lognormal variance with pedigree 1.6962, pedigree (1,1,4,1,1)
  (same comment as for TOC, Total Organic Carbon)
- Water [air, urban air close to ground]: 0.0014443 m3; lognormal variance with pedigree 1.3559, pedigree (1,1,4,1,1)
  Water vapour from waste humidity, hydrogen oxidation and part of the process water.
  Uncertainty: Uncertainty calculated from uncertainty in waste composition, process water input and the uncertainty of fraction to air.
- Carbon dioxide, non-fossil [air, urban air close to ground]: 1.4723 kg; lognormal variance with pedigree 0.031065, pedigree (1,1,4,1,1)
  (same comment as for Iron)
- Iron, ion [water, ground-, long-term]: 0.00059956 kg; lognormal variance with pedigree 0.81901, pedigree (1,1,4,1,1)
  (same comment as for TOC, Total Organic Carbon)
- Benzene, pentachloro- [air, urban air close to ground]: 1.7328e-10 kg; lognormal variance with pedigree 0.101442, pedigree (1,1,4,1,1)
  (same comment as for Phenol, pentachloro-)
- Silicon [air, urban air close to ground]: 3.3104e-8 kg; lognormal variance with pedigree 0.35349, pedigree (1,1,4,1,1)
  (same comment as for Iron)
- Calcium, ion [water, surface water]: 3.8062e-5 kg; lognormal variance with pedigree 0.39421, pedigree (1,1,4,1,1)
  (same comment as for TOC, Total Organic Carbon)
- Silver, ion [water, ground-, long-term]: 3.1043e-8 kg; lognormal variance with pedigree 1.8844, pedigree (1,1,4,1,1)
  (same comment as for TOC, Total Organic Carbon)
- Sodium, ion [water, ground-, long-term]: 0.00066164 kg; lognormal variance with pedigree 0.34443, pedigree (1,1,4,1,1)
  (same comment as for TOC, Total Organic Carbon)
- Benzo(a)pyrene [air, urban air close to ground]: 7.2984e-13 kg; lognormal variance with pedigree 0.43344, pedigree (1,1,4,1,1)
  (same comment as for Phenol, pentachloro-)
- Ammonia [air, urban air close to ground]: 9.3201e-7 kg; lognormal variance with pedigree 0.73583, pedigree (1,1,4,1,1)
  (same comment as for Cyanide)
- Calcium [air, urban air close to ground]: 2.7057e-5 kg; lognormal variance with pedigree 0.5163, pedigree (1,1,4,1,1)
  (same comment as for Iron)
- Magnesium [air, urban air close to ground]: 4.533e-6 kg; lognormal variance with pedigree 0.49539, pedigree (1,1,4,1,1)
  (same comment as for Iron)
- Aluminium [water, surface water]: 1.3409e-6 kg; lognormal variance with pedigree 0.77432, pedigree (1,1,4,1,1)
  (same comment as for TOC, Total Organic Carbon)
- Magnesium [water, surface water]: 2.0053e-5 kg; lognormal variance with pedigree 0.67471, pedigree (1,1,4,1,1)
  (same comment as for TOC, Total Organic Carbon)
- Chloride [water, surface water]: 0.0014106 kg; lognormal variance with pedigree 0.47799, pedigree (1,1,4,1,1)
  (same comment as for TOC, Total Organic Carbon)
- Phosphate [water, surface water]: 6.3504e-8 kg; lognormal variance with pedigree 0.68729, pedigree (1,1,4,1,1)
  (same comment as for TOC, Total Organic Carbon)
- Boron [water, ground-, long-term]: 1.4619e-5 kg; lognormal variance with pedigree 1.0449, pedigree (1,1,4,1,1)
  (same comment as for TOC, Total Organic Carbon)
- Dinitrogen monoxide [air, urban air close to ground]: 5.6028e-5 kg; lognormal variance with pedigree 1.2698, pedigree (1,1,4,1,1)
  (same comment as for Cyanide)
- Hydrogen chloride [air, urban air close to ground]: 1.0486e-6 kg; lognormal variance with pedigree 0.61006, pedigree (1,1,4,1,1)
  (same comment as for Iron)
- Potassium, ion [water, surface water]: 0.00028897 kg; lognormal variance with pedigree 0.37493, pedigree (1,1,4,1,1)
  (same comment as for TOC, Total Organic Carbon)
- Strontium [air, urban air close to ground]: 5.8276e-9 kg; lognormal variance with pedigree 1.0755, pedigree (1,1,4,1,1)
  (same comment as for Iron)
- Sodium, ion [water, surface water]: 0.00024965 kg; lognormal variance with pedigree 0.35067, pedigree (1,1,4,1,1)
  (same comment as for TOC, Total Organic Carbon)
- Chromium [air, urban air close to ground]: 1.2628e-8 kg; lognormal variance with pedigree 1.2442, pedigree (1,1,4,1,1)
  (same comment as for Iron)
- Nitrate [water, surface water]: 4.7887e-5 kg; lognormal variance with pedigree 0.34862, pedigree (1,1,4,1,1)
  (same comment as for TOC, Total Organic Carbon)
- Silicon [water, surface water]: 5.2111e-6 kg; lognormal variance with pedigree 0.59156, pedigree (1,1,4,1,1)
  (same comment as for TOC, Total Organic Carbon)
- Antimony [water, surface water]: 2.4441e-7 kg; lognormal variance with pedigree 1.6166, pedigree (1,1,4,1,1)
  (same comment as for TOC, Total Organic Carbon)
- DOC, Dissolved Organic Carbon [water, ground-, long-term]: 0.0012005 kg; lognormal variance with pedigree 0.032398, pedigree (1,1,4,1,1)
  (same comment as for TOC, Total Organic Carbon)
- Phosphate [water, ground-, long-term]: 1.5135e-5 kg; lognormal variance with pedigree 5.0817, pedigree (1,1,4,1,1)
  (same comment as for TOC, Total Organic Carbon)
- Cobalt [air, urban air close to ground]: 1.3384e-9 kg; lognormal variance with pedigree 1.6346, pedigree (1,1,4,1,1)
  (same comment as for Iron)
- Zinc [air, urban air close to ground]: 8.365e-8 kg; lognormal variance with pedigree 0.96512, pedigree (1,1,4,1,1)
  (same comment as for Iron)
- Sulfur dioxide [air, urban air close to ground]: 1.496e-5 kg; lognormal variance with pedigree 0.63314, pedigree (1,1,4,1,1)
  (same comment as for Iron)
- Antimony [air, urban air close to ground]: 5.6804e-13 kg; lognormal variance with pedigree 1.6914, pedigree (1,1,4,1,1)
  (same comment as for Iron)
- Fluoride [water, surface water]: 1.4886e-6 kg; lognormal variance with pedigree 0.764, pedigree (1,1,4,1,1)
  (same comment as for TOC, Total Organic Carbon)
- Mercury [air, urban air close to ground]: 3.9418e-9 kg; lognormal variance with pedigree 1.8393, pedigree (1,1,4,1,1)
  (same comment as for Iron)
- Selenium [water, ground-, long-term]: 1.6748e-6 kg; lognormal variance with pedigree 1.0622, pedigree (1,1,4,1,1)
  (same comment as for TOC, Total Organic Carbon)
- Strontium [water, ground-, long-term]: 5.82e-5 kg; lognormal variance with pedigree 1.0414, pedigree (1,1,4,1,1)
  (same comment as for TOC, Total Organic Carbon)
- Phosphorus [air, urban air close to ground]: 1.1479e-7 kg; lognormal variance with pedigree 0.97248, pedigree (1,1,4,1,1)
  (same comment as for Iron)
- Selenium [air, urban air close to ground]: 3.0762e-8 kg; lognormal variance with pedigree 1.4624, pedigree (1,1,4,1,1)
  (same comment as for Iron)
- Nitrogen oxides [air, urban air close to ground]: 0.00029514 kg; lognormal variance with pedigree 0.73583, pedigree (1,1,4,1,1)
  Sum of fuel-Nox and thermal-NOx emitted to air after DeNOx stage.
  Uncertainty: uncertainty calculated from uncertainty in average N-emissions and uncertainty in the share of thermal NOx and the uncertainty in nitrogen content in *this* waste.
- Chromium, ion [water, surface water]: 1.1229e-9 kg; lognormal variance with pedigree 1.2629, pedigree (1,1,4,1,1)
  (same comment as for TOC, Total Organic Carbon)
- Carbon monoxide, non-fossil [air, urban air close to ground]: 5.5751e-5 kg; lognormal variance with pedigree 0.83186, pedigree (1,1,4,1,1)
  (same comment as for Phenol, pentachloro-)
- COD, Chemical Oxygen Demand [water, ground-, long-term]: 0.0030339 kg; lognormal variance with pedigree 0.032398, pedigree (1,1,4,1,1)
  (same comment as for TOC, Total Organic Carbon)
- Aluminium [air, urban air close to ground]: 1.0102e-8 kg; lognormal variance with pedigree 0.41998, pedigree (1,1,4,1,1)
  (same comment as for Iron)
- Arsenic, ion [water, surface water]: 1.419e-6 kg; lognormal variance with pedigree 1.3709, pedigree (1,1,4,1,1)
  (same comment as for TOC, Total Organic Carbon)
- Sulfate [water, surface water]: 0.00071362 kg; lognormal variance with pedigree 0.29359, pedigree (1,1,4,1,1)
  (same comment as for TOC, Total Organic Carbon)
- Hydrogen fluoride [air, urban air close to ground]: 1.3135e-7 kg; lognormal variance with pedigree 1.1988, pedigree (1,1,4,1,1)
  (same comment as for Iron)
- Dioxins, measured as 2,3,7,8-tetrachlorodibenzo-p-dioxin [air, urban air close to ground]: 6.559e-14 kg; lognormal variance with pedigree 0.43344, pedigree (1,1,4,1,1)
  (same comment as for Phenol, pentachloro-)
- Mercury [water, surface water]: 1.5098e-10 kg; lognormal variance with pedigree 1.3223, pedigree (1,1,4,1,1)
  (same comment as for TOC, Total Organic Carbon)
- Barium [water, ground-, long-term]: 5.7534e-5 kg; lognormal variance with pedigree 2.294, pedigree (1,1,4,1,1)
  (same comment as for TOC, Total Organic Carbon)
- Boron [water, surface water]: 1.3469e-7 kg; lognormal variance with pedigree 1.4312, pedigree (1,1,4,1,1)
  (same comment as for TOC, Total Organic Carbon)
- Sodium [air, urban air close to ground]: 7.5438e-6 kg; lognormal variance with pedigree 0.68727, pedigree (1,1,4,1,1)
  (same comment as for Iron)
- Copper, ion [water, surface water]: 7.8904e-9 kg; lognormal variance with pedigree 0.93599, pedigree (1,1,4,1,1)
  (same comment as for TOC, Total Organic Carbon)
- Lead [water, ground-, long-term]: 3.886e-5 kg; lognormal variance with pedigree 4.1422, pedigree (1,1,4,1,1)
  (same comment as for TOC, Total Organic Carbon)
- Arsenic, ion [water, ground-, long-term]: 6.1345e-7 kg; lognormal variance with pedigree 1.4849, pedigree (1,1,4,1,1)
  (same comment as for TOC, Total Organic Carbon)
- Titanium, ion [water, ground-, long-term]: 5.139e-5 kg; lognormal variance with pedigree 1.00106, pedigree (1,1,4,1,1)
  (same comment as for TOC, Total Organic Carbon)
- Water [water, surface water]: 0.00047096 m3; lognormal variance with pedigree 1.7236, pedigree (1,1,4,1,1)
  Process water released to surface water.
  Uncertainty: uncertainty calculated from uncertainty in process water input and the uncertainty of fraction to surface water.
- Molybdenum [water, ground-, long-term]: 3.1182e-6 kg; lognormal variance with pedigree 1.3854, pedigree (1,1,4,1,1)
  (same comment as for TOC, Total Organic Carbon)
- Strontium [water, surface water]: 3.6692e-8 kg; lognormal variance with pedigree 1.7535, pedigree (1,1,4,1,1)
  (same comment as for TOC, Total Organic Carbon)
- Methane, non-fossil [air, urban air close to ground]: 4.9196e-7 kg; lognormal variance with pedigree 0.101442, pedigree (1,1,4,1,1)
  (same comment as for Phenol, pentachloro-)
- Manganese [water, ground-, long-term]: 2.4813e-5 kg; lognormal variance with pedigree 2.0689, pedigree (1,1,4,1,1)
  (same comment as for TOC, Total Organic Carbon)
- Benzene, hexachloro- [air, urban air close to ground]: 6.8577e-11 kg; lognormal variance with pedigree 0.101442, pedigree (1,1,4,1,1)
  (same comment as for Phenol, pentachloro-)
- Barium [water, surface water]: 1.5376e-8 kg; lognormal variance with pedigree 1.2439, pedigree (1,1,4,1,1)
  (same comment as for TOC, Total Organic Carbon)
- Beryllium [water, ground-, long-term]: 8.9028e-7 kg; lognormal variance with pedigree 1.5019, pedigree (1,1,4,1,1)
  (same comment as for TOC, Total Organic Carbon)
- Particulates, > 2.5 um, and < 10um [air, urban air close to ground]: 1.9677e-8 kg; lognormal variance with pedigree 0.21007, pedigree (1,1,4,1,1)
  (same comment as for Phenol, pentachloro-)
- Nitrate [water, ground-, long-term]: 0.00013511 kg; lognormal variance with pedigree 0.50235, pedigree (1,1,4,1,1)
  (same comment as for TOC, Total Organic Carbon)
- Copper [air, urban air close to ground]: 5.5772e-9 kg; lognormal variance with pedigree 1.0681, pedigree (1,1,4,1,1)
  (same comment as for Iron)
- BOD5, Biological Oxygen Demand [water, ground-, long-term]: 0.00099237 kg; lognormal variance with pedigree 0.032398, pedigree (1,1,4,1,1)
  (same comment as for TOC, Total Organic Carbon)
- Chromium VI [water, surface water]: 4.0416e-7 kg; lognormal variance with pedigree 1.3002, pedigree (1,1,4,1,1)
  (same comment as for TOC, Total Organic Carbon)
- Toluene [air, urban air close to ground]: 6.5594e-8 kg; lognormal variance with pedigree 0.101442, pedigree (1,1,4,1,1)
  (same comment as for Phenol, pentachloro-)
- Manganese [air, urban air close to ground]: 7.6813e-9 kg; lognormal variance with pedigree 1.1196, pedigree (1,1,4,1,1)
  (same comment as for Iron)
- Sulfate [water, ground-, long-term]: 0.003484 kg; lognormal variance with pedigree 0.35514, pedigree (1,1,4,1,1)
  (same comment as for TOC, Total Organic Carbon)
- Potassium [air, urban air close to ground]: 6.5585e-6 kg; lognormal variance with pedigree 0.64402, pedigree (1,1,4,1,1)
  (same comment as for Iron)
