# chlor-alkali electrolysis, membrane cell

Dataset: EcoSpold 2, unit process
Geography: CA-QC
Time period: 2000-01-01 to 2021-12-31
Technology level: modern
Classification: ISIC rev.4 ecoinvent: 2011:Manufacture of basic chemicals
Synonyms: Chlor; Cloro; Bertholite; Molecular chlorine; Chlore
Scenario: Business-as-Usual
System model: Allocation, cut-off by classification
Generated by: Pascal Lesage
Published in: Althaus H.-J. 2007
Database: ecoinvent
isCopyrightProtected: true
accessRestrictedTo: 1

## General comment
This dataset represents the production of chlorine and sodium hydroxide (NaOH) by means of chlor-alkali electrolysis using a membrane cell. The chlor-alkali process is the main technology for the production of chlorine and sodium hydroxide. In this process, chlorine and sodium hydroxide are produced by electrolysis of a salt solution using either a mercury cell, diaphragm cell or membrane cell.
Chlorine is largely used in the synthesis of chlorinated organic compounds. PVC and isocyanates are the main drivers of chlor-alkali production in the EU-27 and EFTA countries (Euro Chlor 2013). These products are used in a wide range of applications, such as construction materials, plastics, clothing and pesticides.
Sodium hydroxide is a white odorless pellet or solid that is very soluble. Sodium hydroxide is used for the synthesis of other chemicals, and is used in the metal industry, the pulp and paper sector, the textile industry and in other various sectors.
This dataset is mainly based on a document concerning the best available techniques in the chlor-alkali manufacturing industry (European Commission 2001).
References:
Althaus H.-J., Chudacoff M., Hischier R., Jungbluth N., Osses M. and Primas A. (2007) Life Cycle Inventories of Chemicals. Final report ecoinvent data v2.0 No. 8. Swiss Centre for Life Cycle Inventories, Dübendorf, CH.
European Commission (2001) Integrated Pollution Prevention and Control (IPPC) - Reference Document on Best Available Techniques in the Chlor-Alkali Manufacturing Industry. Institute for Prospective Technological Studies, Sevilla.
Euro Chlor (2013) An Eco-profile and Environmental Product Declaration of the European Chlor-Alkali Industry, Chlorine (The chlor-alkali process).

## Included activities start
The activity starts when the raw materials enter the process.

## Included activities end
This activity ends with the production of gaseous chlorine and sodium hydroxide. Besides the electrolysis process in a membrane cell, the following process steps are included in this activity: brine production, brine purification, brine resaturation as well as the final handling of the electrolysis products, without the chlorine liquefaction.

## Geography
European average values, which are assumed to be representative of the production in this geography.

## Technology
In the membrane cell process, the anode and cathode compartments are separated by a perfluoropolymer cation-exchange membrane that selectively transmits sodium ions but suppresses the migration of hydroxyl ions (OH-) from the catholyte into the anolyte. Saturated brine flows through the anode compartment, where chlorine gas is produced at the anode. The electric field in the electrolysis cell causes hydrated sodium ions to migrate through the membrane into the cathode compartment. The cathode compartment is fed with diluted sodium hydroxide solution. Water is electrolysed at the cathode releasing gaseous hydrogen and hydroxyl ions, which combine with the sodium ions and thus increase the concentration of sodium hydroxide in the catholyte. Typically, the outlet concentration of sodium hydroxide is around 32 wt.-%. A part of the product stream is diluted with demineralised water to about 30 wt.-% and used as catholyte inlet. In some units, a more diluted 23 wt.-% NaOH solution is produced. In these cases, the inlet concentration is adjusted to 20-21 wt.-%. Usually the NaOH solution is evaporated to the marketable concentration of 50 wt.-% using steam. Depleted brine leaving the anode compartment is saturated with chlorine and is therefore sent to a dechlorination unit to recover the dissolved chlorine before it is resaturated with salt for recirculation. The advantages of the membrane cell technique are the very high purity of the sodium hydroxide solution produced and the comparably low energy demand. Disadvantages comprise the high requirements on brine purity, the need for sodium hydroxide evaporation to increase concentration, and the comparably high oxygen content in the produced chlorine. In general, multiple cell elements are combined into a single unit, called electrolyser, of whom the design can be either monopolar or bipolar. In a monopolar electrolyser, the anodes and cathodes of the cells are connected electrically in parallel, whereas in the bipolar design, they are connected in series. Therefore, monopolar electrolysers require high current and low voltage, whereas bipolar electrolysers require low current and high voltage. Since bipolar systems allow higher current densities inside the cells, investment and operating costs are usually lower than for monopolar systems.
References:
Euro Chlor (2013) An Eco-profile and Environmental Product Declaration of the European Chlor-Alkali Industry, Chlorine (The chlor-alkali process).

## Parameters
- fraction, cooling water, once-through system, to air: 0.004 dimensionless; name fraction_CW_OT_to_air; lognormal variance with pedigree 0.0413, pedigree (2,3,1,3,1)
  Calculated based on literature value (Scown, C.D., 2011, Water Footprint of U.S. Transportation Fuels and supplying information of the article) (Vionnet, S., Quantis Water Database - Technical Report, 2012).
- world gross domestic product 2011: 7e13 USD(2011); name worldGDP2011; lognormal variance with pedigree 0.0006, pedigree (1,1,1,1,1)
  Comment: World Gross domestic product for 2011, expressed in 2011 USD. Source: World Bank.
- fraction, cooling water, cooling pond system, to air: 0.032 dimensionless; name fraction_CW_CP_to_air; lognormal variance with pedigree 0.0413, pedigree (2,3,1,3,1)
  (same comment as for fraction, cooling water, once-through system, to air)
- Quebec gross domestic product 2011: 3.11e11 USD(2011); name quebecGDP2011; lognormal variance with pedigree 0.0006, pedigree (1,1,1,1,1)
  Quebec Gross domestic product for 2011, expressed in 2011 USD. Source: Institut de la statistique du Québec. Converted from CAD to USD using a yearly average exchange rate of 0.989 CAD/USD (Source: bank of Canada).
- fraction, process water, to air: 0.205 dimensionless; name fraction_PW_to_air; lognormal variance with pedigree 0.092025, pedigree (4,4,3,2,4)
  Literature value (Statistics Canada, 2007 & Shaffer, K.H., 2008, Consumptive water use in the Great Lakes Basin, USGS) (Vionnet, S., Quantis Water Database - Technical Report, 2012).
- fraction, cooling water, recirculating system, to air: 0.771 dimensionless; name fraction_CW_R_to_air; lognormal variance with pedigree 0.0413, pedigree (2,3,1,3,1)
  (same comment as for fraction, cooling water, once-through system, to air)
- fraction, cooling water, to air: 0.3875 dimensionless; name fraction_CW_to_air; = (0.5*fraction_CW_OT_to_air)+(0.5*fraction_CW_R_to_air); lognormal variance with pedigree 0.092025, pedigree (4,4,3,2,4)
  Calculated value based on literature value (see comments of the other parametres present in this dataset) and expert opinion. In the case when no industry/literature data are available about the type of cooling or directly fraction, cooling water, to air specific for the process a default assumption is applied. It is assumed that the once-through cooling system is used in 50% of all cases and recirculating system is used in another 50% of all cases.

## Reference product
- sodium hydroxide, without water, in 50% solution state: 1 kg; name BP_sodium_hydroxide_without_water_in_50; CPC 34231: Chemical elements n.e.c.; inorganic acids except phosphoric, nitric and sulphonitric; inorganic oxygen compoun[…]; By-product classification allocatable product; CAS 1310-73-2
  production volume 1.10449e8 kg; = RP_PV*BP_sodium_hydroxide_without_water_in_50/ABS(RP)
    Calculated from the production volume of chlorine, gaseous in proportion to the respective output amounts.
  property true value 0.21583; name BP_sodium_hydroxide_without_true_value_0
  properties: carbon content, non-fossil 0, water content 0, dry mass 1 kg, price 0.191 EUR2005, water in wet mass 0 kg, carbon content, fossil 0, wet mass 1 kg, heating value, net 3.03 MJ, carbon content 0, carbon allocation 0 kg
- chlorine, gaseous: 0 kg; name RP; CPC 34231: Chemical elements n.e.c.; inorganic acids except phosphoric, nitric and sulphonitric; inorganic oxygen compoun[…]; By-product classification allocatable product; CAS 7782-50-5
  Chlorine is largely used in the synthesis of chlorinated organic compounds. PVC and isocyanates are the main drivers of chlor-alkali production in the EU-27 and EFTA countries (Euro Chlor 2013). These products are used in a wide range of applications, such as construction materials, plastics, clothing and pesticides.
  References:
  Euro Chlor (2013) An Eco-profile and Environmental Product Declaration of the European Chlor-Alkali Industry, Chlorine (The chlor-alkali process).
  production volume 9.77429e7 kg; name RP_PV
    Chlorine production volume for Quebec. Approximate value, scaled according to GDP based on total global chlorine production volume (all technologies) in 2006 of 58 million tonnes (The Chlorine Institute. 2014): GDP CA-QC in 2016: 343537 million CAD. Global GDP in 2016: 75641577 million USD (World Bank, 2017). Average exchange rate in 2016: 1 CAD = 0.755 USD. Quebec GDP hence makes 0.34% of global GDP, resulting in a calculated production volume of 1990 million kg chlorine.
    Reference(s):
    World Bank. 2017. Gross domestic product 2016. Retrieved online from http://databank.worldbank.org/data/download/GDP.pdf, 09 October 2017. Oanada. 2017. https://www.oanda.com/lang/de/currency/average, 9 October 2017.
    Institute de la statistique Quebec. 2017. Annual data (19 years).xlsx. Retrieved from http://www.stat.gouv.qc.ca/statistiques/economie/indicateurs-annuels.xlsx, 09 October 2017.
    The Chlorine Institute. 2014. Stewardship. Chlorine Manufacture. Accessed online at https://www.chlorineinstitute.org/stewardship/chlorine/chlorine-manufacture/, 9th of October 2017.
  property price 0.141 EUR2005
    Global average price for gaseous chlorine derived from the global average price of liquid chlorine by substracting the cost of inputs (0.07 KWh of electricity, medium voltage) needed for the liquefaction (0.007EUR/kg of liquid chlorine at an electricity price of 0.1EUR/kWh). The price for liquid chlorine (0.148 EUR/kg) was calculated as weighted average of the European (238Eur/tonne), US (223EUR/tonne) and the Chinese (84EUR/tonne) (Tecnon OrbiCHem, 2016) price according to the region's market shares (Europe 15%, US 20%, China 45%) scaled to 100% (ruschlor.ru, 2014).
    Reference(s):
    Tecnon OrbiCHem. 2016. Chem-Netfacts, Chemical insight an foresight - on a single page, Chlorine, 1 April 2016, document requested at http://www.orbichem.com/Chem-Netfacts.aspx?P_ID=208, 6 October 2017;
    ruschlor.ru. 2014. International Outlook for the Future of the Chinese Chlor-Alkali Industry retrieved from http://ruschlor.ru/english/images/stories/Pekin%20/Otchet_Engl/_.doc, 6 October 2017
  property carbon content 0
    carbon content on a dry matter basis (reserved; not for manual entry)
  property true value 0.141; name RP_true_value
    allocation property applied in "true value" allocation // value calculated from revenue
  properties: carbon content, fossil 0, carbon content, non-fossil 0, wet mass 1 kg, dry mass 1 kg, water in wet mass 0 kg, water content 0, carbon allocation 0 kg

## By-products
- hydrogen, liquid: 0 kg; name BP_hydrogen_liquid; CPC 34210: Hydrogen, nitrogen, oxygen, carbon dioxide and rare gases; inorganic oxygen compounds of non-metals n.e.c.; By-product classification allocatable product; CAS 1333-74-0
  production volume 2.7368e6 kg; = RP_PV*BP_hydrogen_liquid/ABS(RP)
    (same comment as for sodium hydroxide, without water, in 50% solution state)
  property price 2.68 EUR2005
    Calculated value based on data from United Nations Commodity Trade Statistics Database (comtrade.un.org). UN comtrade category: 280410 Hydrogen. Year 2005. Using exchange rate of 1EURO = 1.209 USD. Average of price of import into 5 main markets (EU, US, JP, IN and CN). Cross reference; Literature (http://www.ttcorp.com/pdf/marketReport.pdf). The price of hydrogen, liquid is 5-10 USD/kg.
  property heating value, net 120.21 MJ
    LHV is calculated based on the elemental composition of the substance. Based on the CAS number of the substance (001333-74-0), the chemical formula of the substance is found to be: H2, (PubChem 2020).
    Reference: Kim, S., Chen, J., Cheng, T., Gindulyte, A., He, J., He, S., Li, Q., Shoemaker, B. A., Thiessen, P. A., Yu, B., Zaslavsky, L., Zhang, J., & Bolton, E. E. (2019). PubChem 2019 update: improved access to chemical data. Nucleic acids research, 47(D1), D1102–D1109. https://doi.org/10.1093/nar/gky1033
  property carbon content 0
    carbon content on a dry matter basis (reserved; not for manual entry)
  property true value 0.07504; name BP_hydrogen_liquid_true_value
    allocation property applied in "true value" allocation // value calculated from revenue
  properties: wet mass 1 kg, water in wet mass 0 kg, carbon content, non-fossil 0, dry mass 1 kg, water content 0, carbon content, fossil 0, carbon allocation 0 kg

## Inputs from technosphere
- sodium chloride, powder: 0.77396 kg; lognormal variance with pedigree 0.0526, pedigree (1,3,5,5,1)
  EC IPPC study 2002
  Uncertainty: E
  properties: dry mass 1 kg, wet mass 1 kg
- barite: 0.00154792 kg; lognormal variance with pedigree 0.0526, pedigree (1,3,5,5,1)
  EC IPPC study 2002
  Uncertainty: E
  properties: dry mass 1 kg, wet mass 1 kg
- sodium hydroxide, without water, in 50% solution state: 0.018575 kg; lognormal variance with pedigree 0.0526, pedigree (1,3,5,5,1)
  EC IPPC study 2002
  Uncertainty: E
  properties: dry mass 1 kg, wet mass 1 kg, heating value, net 3.03 MJ
- calcium chloride: 0.00787228 kg; lognormal variance with pedigree 0.0526, pedigree (1,3,5,5,1)
  EC IPPC study 2002
  Uncertainty: E
  properties: wet mass 1 kg, dry mass 1 kg
- sulfite: 4.42263e-5 kg; lognormal variance with pedigree 0.0526, pedigree (1,3,5,5,1)
  EC IPPC study 2002
  Uncertainty: E
  properties: wet mass 1 kg, dry mass 1 kg
- carbon tetrachloride: 4.42263e-6 kg; lognormal variance with pedigree 0.0526, pedigree (1,3,5,5,1)
  EC IPPC study 2002
  Uncertainty: E
  properties: carbon content, fossil 0.0789474, wet mass 1 kg, dry mass 1 kg, heating value, net 2.37 MJ
- sludge, NaCl electrolysis: -0.00676662 kg; name BP_sludge_NaCl_electrolysis; lognormal variance with pedigree 0.0526, pedigree (1,3,5,5,1)
  EC IPPC study 2002
  Uncertainty: E
  production volume 1.49547e6 kg; = RP_PV*BP_sludge_NaCl_electrolysis/ABS(RP)
    (same comment as for sodium hydroxide, without water, in 50% solution state)
  property price 0 EUR2005; name BP_sludge_NaCl_electrolysi_price_EUR2005
  properties: dry mass 1 kg, wet mass 1 kg
- sulfuric acid: 0.00413073 kg; lognormal variance with pedigree 0.0526, pedigree (1,3,5,5,1)
  Data from survey in literature (Ayres 1997)
  Uncertainty: D
  properties: wet mass 1 kg, dry mass 1 kg
- chemical factory, organics: 1.76905e-10 unit; lognormal variance with pedigree 0.3498, pedigree (2,3,5,4,3)
  Calculated based on literature data published by the industry. For this activity, no information was readily available concerning infrastructure and land-use. Therefore, the infrastructure is estimated based on data from two chemical factories, the BASF site of Ludwigshafen and the chemical factory in Gendorf (which are both located in Germany), which produce a wide range of chemical substances. Based on this data, the following assumptions are made: the built area amounts to about 4.2 ha, the plant has an average output of 50'000 t/a and a lifespan of fifty years. The estimated infrastructure amount is therefore 4.00 E-10 units per kg of produced chemical.
  References:
  Althaus H.-J., Chudacoff M., Hischier R., Jungbluth N., Osses M. and Primas A. (2007) Life Cycle Inventories of Chemicals. ecoinvent report No. 8, v2.0. EMPA Dübendorf, Swiss Centre for Life Cycle Inventories, Dübendorf, CH.
  Gendorf (2000) Umwelterklärung 2000, Werk Gendorf. Werk Gendorf, Burgkirchen.
- electricity, medium voltage: 1.31352 kWh; lognormal variance with pedigree 0.0526, pedigree (1,3,5,5,1)
  EC IPPC study 2002
  Uncertainty: E
- hydrochloric acid, without water, in 30% solution state: 0.0110566 kg; lognormal variance with pedigree 0.0526, pedigree (1,3,5,5,1)
  EC IPPC study 2002
  Uncertainty: E
  properties: heating value, net 3.32 MJ, dry mass 1 kg, wet mass 1 kg
- soda ash, light, crystalline, heptahydrate: 0.00508602 kg; lognormal variance with pedigree 0.0526, pedigree (1,3,5,5,1)
  EC IPPC study 2002
  Uncertainty: E
  properties: dry mass 1 kg, carbon content, fossil 0.0517241, wet mass 1 kg, heating value, net 3.43 MJ
- waste graphical paper: -0.000265358 kg; name BP_waste_graphical_paper; lognormal variance with pedigree 0.0526, pedigree (1,3,5,5,1)
  EC IPPC study 2002
  Uncertainty: E
  production volume 58645.7 kg; = RP_PV*BP_waste_graphical_paper/ABS(RP)
    (same comment as for sodium hydroxide, without water, in 50% solution state)
  property price 0 EUR2005; name BP_waste_graphical_paper_price_EUR2005
  properties: wet mass 1 kg, heating value, net 14.12 MJ, dry mass 0.888 kg, water content 0.126126, carbon content, non-fossil 0.454955
  note on heating value, net: Value taken from the general comment of the treatment dataset.

## Inputs from nature
- Water, cooling, unspecified natural origin [natural resource, in water]: 0.0442263 m3; name water_cooling_UNO_input; lognormal variance with pedigree 0.1306, pedigree (2,5,5,5,4)
  estimate based on literature source
  Uncertainty: e
- Water, unspecified natural origin [natural resource, in water]: 0.000840299 m3; name water_UNO_input; lognormal variance with pedigree 0.0526, pedigree (1,3,5,5,1)
  EC IPPC study 2002
  Uncertainty: E

## Emissions to nature
- TOC, Total Organic Carbon [water, unspecified]: 4.84716e-8 kg; lognormal variance with pedigree 0.218, pedigree (4,5,5,5,5)
  Calculated value. The BOD, COD, TOC and BOD5 are calculated based on the amount and type of emissions released to water in the same activity.
- Chlorinated solvents, unspecified [water, surface water]: 2.65358e-7 kg; lognormal variance with pedigree 0.3626, pedigree (1,3,5,5,1)
  EC IPPC study 2002
  Uncertainty: E
- DOC, Dissolved Organic Carbon [water, unspecified]: 4.84716e-8 kg; lognormal variance with pedigree 0.218, pedigree (4,5,5,5,5)
  (same comment as for TOC, Total Organic Carbon)
- Chlorine [air, urban air close to ground]: 3.5381e-6 kg; lognormal variance with pedigree 0.1026, pedigree (1,3,5,5,1)
  EC IPPC study 2002
  Uncertainty: E
- COD, Chemical Oxygen Demand [water, unspecified]: 1.39598e-7 kg; lognormal variance with pedigree 0.218, pedigree (4,5,5,5,5)
  (same comment as for TOC, Total Organic Carbon)
- Hydrogen [air, urban air close to ground]: 0.000243244 kg; lognormal variance with pedigree 0.1026, pedigree (1,3,5,5,1)
  EC IPPC study 2002
  Uncertainty: E
- BOD5, Biological Oxygen Demand [water, unspecified]: 1.39598e-7 kg; lognormal variance with pedigree 0.218, pedigree (4,5,5,5,5)
  (same comment as for TOC, Total Organic Carbon)
- Methane, tetrachloro-, R-10 [air, urban air close to ground]: 9.95091e-7 kg; lognormal variance with pedigree 0.1826, pedigree (1,3,5,5,1)
  EC IPPC study 2002
  Uncertainty: E
- Sulfate [water, surface water]: 0.00349388 kg; lognormal variance with pedigree 0.1026, pedigree (1,3,5,5,1)
  EC IPPC study 2002
  Uncertainty: E
- Water [air, unspecified]: 0.0173099 m3; = (water_cooling_UNO_input*fraction_CW_to_air)+(water_UNO_input*fraction_PW_to_air); lognormal variance with pedigree 0.0827, pedigree (2,2,5,5,1)
  Calculated as a fraction of the input of water. For more details, refer to the mathematical relation and the parameters.
- Chlorate [water, surface water]: 0.000928752 kg; lognormal variance with pedigree 0.1026, pedigree (1,3,5,5,1)
  EC IPPC study 2002
  Uncertainty: E
- Bromate [water, surface water]: 0.000121622 kg; lognormal variance with pedigree 0.1026, pedigree (1,3,5,5,1)
  EC IPPC study 2002
  Uncertainty: E
- Water [water, unspecified]: 0.0277566 m3; = water_cooling_UNO_input*(1-fraction_CW_to_air)+water_UNO_input*(1-fraction_PW_to_air); lognormal variance with pedigree 0.0827, pedigree (2,2,5,5,1)
  (same comment as for Water)
  property dry mass 0 kg; name DM
  property carbon content, fossil 0; name C_content_fossil
  property water in wet mass 1000 kg; name WWM
  property carbon content, non-fossil 0; name C_content_non_fossil
  property wet mass 1000 kg; name WM
- Chloride [water, surface water]: 0.00663394 kg; lognormal variance with pedigree 0.1026, pedigree (1,3,5,5,1)
  EC IPPC study 2002
  Uncertainty: E
- Carbon dioxide, fossil [air, urban air close to ground]: 0.00137101 kg; lognormal variance with pedigree 0.0526, pedigree (1,3,5,5,1)
  EC IPPC study 2002
  Uncertainty: E

## Sampling procedure
Average values from the ranges indicated in the 'Reference Document on Best Available Techniques in the Chlor-Alkali Manufacturing Industry' published by the European Commission, IPPC (2001).

## Extrapolations
This dataset has been copied from an original dataset covering the geography RER. The uncertainty has been adjusted accordingly.

## Review by Gregor Wernet 2017-08-04
This dataset was additionally reviewed in a separate review process by Eric Johnson of Atlantic Consulting as well as Emilia Moreno Ruiz and Gregor Wernet of ecoinvent.
