# steel production, converter, low-alloyed

Dataset: EcoSpold 2, unit process
Geography: RER
Time period: 2013-01-01 to 2023-12-31
Technology level: modern
Classification: ISIC rev.4 ecoinvent: 2410:Manufacture of basic iron and steel
Scenario: Business-as-Usual
System model: Allocation, cut-off by classification
Generated by: Johannes Müller
Published in: Remus, R. 2013
Database: ecoinvent
isCopyrightProtected: true
accessRestrictedTo: 1

## General comment
"Background:
This activity represents the production of primary low-alloyed steel in a basic oxygen furnace (BOF), a discontinuous process involving the following steps: 1) pretreatment of hot metal (pig iron) from the blast furnace (desulphurisation, deslagging, etc.); 2) mixing of charge (including alloying additions), weighing, transfer and reladling ; 3) oxidation in the BOF (decarburisation and oxidation of impurities); 4) secondary metallurgical treatment in a ladle furnace; and 5) casting (continuous and/or ingot).

Modelling approach:
Data on were mostly taken from the IPPC Best Available Technology report from the European Commission (Remus et al., 2013); note that where only data ranges were provided, the geometric mean of reported values was used here. The proportion of each by-product that is recycled internally (i.e. returned as an input to the process after it has been produced) is based on measured data from plants worldwide reported by worldsteel (2010): slag (including desulphurisation slag, BOF slag, slag from secondary metallurgy and slag from continuous casting), 14%; spittings, 100%; dust and sludge, 22%; and mill scale, 89%.

References:
Remus, R., Aguado-Monsonet, M. A., Roudier, S. & Samcho, L. D. (2013). JRC reference report - Best available techniques (BAT) reference document for iron and steel production. Joint Research Centre - European Commission, Luxemboug.
Worldsteel (2010). Steel industry by-products. World Steel Association: Brussels, Belgium."

## Included activities start
At the gate of the steelmaking plant with the arrival of the hot metal (pig iron).

## Included activities end
At the gate of the steelmaking plant with the cast steel ready for transport to manufacturers and fabricators.

## Geography
Data are taken from basic oxygen furnace plants across Europe and are considered representative of the average situation across Europe.

## Technology
Represents average European technology; LD converter and secondary metallurgy

## Time period
Data are mostly compiled from reports published between 2005 and 2010 but are considered representative of modern operations.

## Parameters
- fraction, cooling water, cooling pond system, to air: 0.032 dimensionless; name fraction_CW_CP_to_air; lognormal variance with pedigree 0.0413, pedigree (2,3,1,3,1)
  Calculated based on literature value (Scown, C.D., 2011, Water Footprint of U.S. Transportation Fuels and supplying information of the article) (Vionnet, S., Quantis Water Database - Technical Report, 2012).
- fraction, process water, to air: 0.095 dimensionless; name fraction_PW_to_air; lognormal variance with pedigree 0.092025, pedigree (4,4,3,2,4)
- fraction, cooling water, recirculating system, to air: 0.771 dimensionless; name fraction_CW_R_to_air; lognormal variance with pedigree 0.0413, pedigree (2,3,1,3,1)
  (same comment as for fraction, cooling water, cooling pond system, to air)
- fraction, cooling water, once-through system, to air: 0.004 dimensionless; name fraction_CW_OT_to_air; lognormal variance with pedigree 0.0413, pedigree (2,3,1,3,1)
  (same comment as for fraction, cooling water, cooling pond system, to air)
- fraction, cooling water, to air: 0.56 dimensionless; name fraction_CW_to_air; lognormal variance with pedigree 0.041425, pedigree (2,3,2,2,1)

## Reference product
- steel, low-alloyed: 1 kg; name RP; By-product classification allocatable product; CPC 41122: Alloy steel in ingots or other primary forms and semi-finished products of alloy steel
  production volume 1.90789e10 kg; name PV
    Calculated based on the amount of crude steel produced in Europe through the BOF route in 2019 (worldsteel, 2020). Of the amount of steel produced in Europe in 2019 that was not stainless steel, 82.6% was unalloyed and 17.4% low-alloyed (eurofer 2020).
    References:
    eurofer (2020). European Steel in Figures 2020. https://www.eurofer.eu/assets/Uploads/European-Steel-in-Figures-2020.pdf (last accessed 2021-08-11).
    worldsteel (2020). Steel Statistical Yearbook 2020 [online]. Available from: https://www.worldsteel.org/en/dam/jcr:5001dac8-0083-46f3-aadd-35aa357acbcc/Steel%2520Statistical%2520Yearbook%25202020%2520%2528concise%2520version%2529.pdf (accessed 20.07.2021).
  property heating value, net 0 MJ
    Non combustible products are assumed to have an LHV equal to zero (0).
  property carbon content, fossil 0.005
    Low alloyed steel composition given in Tab. 3.2 ecoinvent v2.2 report 10_partII. Steel assumed to have a C content of 0.5%
  property carbon content, non-fossil 0
    Low alloyed steel composition given in Tab. 3.2 ecoinvent v2.2 report 10_partII.
  property carbon content 0.005
    carbon content on a dry matter basis (reserved; not for manual entry)
  properties: water in wet mass 0 kg, water content 0, dry mass 1 kg, wet mass 1 kg, price 0.468 EUR2005, carbon allocation 0.005 kg

## Inputs from technosphere
- molybdenite: 0.00059649 kg; lognormal variance with pedigree 0.0512, pedigree (2,5,5,5,1)
  Source: Classen et al. (2009)
  properties: wet mass 1 kg, dry mass 1 kg
- oxygen, liquid: 0.078054 kg; lognormal variance with pedigree 0.0034, pedigree (2,3,2,5,1)
  geometric mean of Remus et al. (2013) data range
  properties: dry mass 1 kg, wet mass 1 kg
- basic oxygen furnace dust: -0.019396 kg; name BOF_dust_amount; lognormal variance with pedigree 0.004425, pedigree (2,3,3,2,2)
  Amount reported by worldsteel (2010) and is representative of the average global situation in 2009. Also based on worldsteel (2010), an internal recovery (recycling) rate of 22% is assumed. Source: Worldsteel (2010). Steel industry by-products. World Steel Association: Brussels, Belgium.
  production volume 3.70053e8 kg; = PV * BOF_dust_amount / RP
    Calculated from production volume of reference product using the relative outputs.
  property price 0 EUR2005; name BOF_dust_amount_price_EUR2005
  properties: zinc content 0.00713417, carbon content, fossil 0.0181399, calcium content 0.0868734, aluminium content 0.0128653, oxygen content 0.312189, wet mass 1 kg, magnesium content 0.00854209, iron content 0.528324, dry mass 0.999 kg, antimony content 0.0031, silicon content 0.0100985, manganese content 0.0049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
  note on zinc content: The value of 'zinc content' is documented in Turner & Symeonidis, 2020. Reference: Turner David & Symeonidis Avraam, 2020, Life cycle inventories of the treatment of iron and steelmaking by-products, ecoinvent association, Zürich, Switzerland
  note on carbon content, fossil: The value of 'carbon content, fossil' is documented in Turner & Symeonidis, 2020. Reference: Turner David & Symeonidis Avraam, 2020, Life cycle inventories of the treatment of iron and steelmaking by-products, ecoinvent association, Zürich, Switzerland
  note on calcium content: The value of 'calcium content' is documented in Turner & Symeonidis, 2020. Reference: Turner David & Symeonidis Avraam, 2020, Life cycle inventories of the treatment of iron and steelmaking by-products, ecoinvent association, Zürich, Switzerland
  note on aluminium content: The value of 'aluminium content' is documented in Turner & Symeonidis, 2020. Reference: Turner David & Symeonidis Avraam, 2020, Life cycle inventories of the treatment of iron and steelmaking by-products, ecoinvent association, Zürich, Switzerland
  note on oxygen content: The value of 'oxygen content' is documented in Turner & Symeonidis, 2020. Reference: Turner David & Symeonidis Avraam, 2020, Life cycle inventories of the treatment of iron and steelmaking by-products, ecoinvent association, Zürich, Switzerland
  note on magnesium content: The value of 'magnesium content' is documented in Turner & Symeonidis, 2020. Reference: Turner David & Symeonidis Avraam, 2020, Life cycle inventories of the treatment of iron and steelmaking by-products, ecoinvent association, Zürich, Switzerland
  note on iron content: The value of 'iron content' is documented in Turner & Symeonidis, 2020. Reference: Turner David & Symeonidis Avraam, 2020, Life cycle inventories of the treatment of iron and steelmaking by-products, ecoinvent association, Zürich, Switzerland
  note on antimony content: The value of 'antimony content' is documented in Turner & Symeonidis, 2020. Reference: Turner David & Symeonidis Avraam, 2020, Life cycle inventories of the treatment of iron and steelmaking by-products, ecoinvent association, Zürich, Switzerland
  note on silicon content: The value of 'silicon content' is documented in Turner & Symeonidis, 2020. Reference: Turner David & Symeonidis Avraam, 2020, Life cycle inventories of the treatment of iron and steelmaking by-products, ecoinvent association, Zürich, Switzerland
  note on manganese content: The value of 'manganese content' is documented in Turner & Symeonidis, 2020. Reference: Turner David & Symeonidis Avraam, 2020, Life cycle inventories of the treatment of iron and steelmaking by-products, ecoinvent association, Zürich, Switzerland
- mill scale: -6.63e-5 kg; name BOF_millScale_amount; lognormal variance with pedigree 0.004425, pedigree (2,3,3,2,2)
  Amount reported by worldsteel (2010) and is representative of the average global situation in 2009. Also based on worldsteel (2010), an internal recovery (recycling) rate of 89% is assumed. Source: Worldsteel (2010). Steel industry by-products. World Steel Association: Brussels, Belgium.
  production volume 1.26493e6 kg; = PV *BOF_millScale_amount / RP
    Calculated from production volume of reference product using the relative outputs.
  property price 0 EUR2005; name BOF_millScale_amount_price_EUR2005
  property sodium content 0.00141069; name BOF_millScale_amount_Na_content
  property silver content 3.1105e-6; name BOF_millScale_amount_Ag_content
  property thallium content 8.02705e-7; name BOF_millScale_amount_Tl_content
  property magnesium content 0.000860419; name BOF_millScale_amount_Mg_content
  property beryllium content 8.02705e-7; name BOF_millScale_amount_Be_content
  property phosphorus content 0.000181101; name BOF_millScale_amount_P_content
  property oxygen content 0.163753; name BOF_millScale_amount_O_content
  property boron content 5.07146e-6; name BOF_millScale_amount_B_content
  property carbon content, fossil 0.00761696; name BOF_millScale_amount_C_content_fossil
  properties: manganese content 0.00850218, potassium content 0.0023911, nickel content 0.00131647, wet mass 1 kg, chromium content 0.00123831, aluminium content 0.00121815, dry mass 0.905505 kg, calcium content 0.0101925, iron content 0.696142, water content 0.104356, silicon content 0.00184691, tungsten content 0.00751569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
  note on potassium content: The value of 'potassium content' is documented in Turner & Symeonidis, 2020. Reference: Turner David & Symeonidis Avraam, 2020, Life cycle inventories of the treatment of iron and steelmaking by-products, ecoinvent association, Zürich, Switzerland
  note on nickel content: The value of 'nickel content' is documented in Turner & Symeonidis, 2020. Reference: Turner David & Symeonidis Avraam, 2020, Life cycle inventories of the treatment of iron and steelmaking by-products, ecoinvent association, Zürich, Switzerland
  note on chromium content: The value of 'chromium content' is documented in Turner & Symeonidis, 2020. Reference: Turner David & Symeonidis Avraam, 2020, Life cycle inventories of the treatment of iron and steelmaking by-products, ecoinvent association, Zürich, Switzerland
  note on tungsten content: The value of 'tungsten content' is documented in Turner & Symeonidis, 2020. Reference: Turner David & Symeonidis Avraam, 2020, Life cycle inventories of the treatment of iron and steelmaking by-products, ecoinvent association, Zürich, Switzerland
- dolomite: 0.00442218 kg; lognormal variance with pedigree 0.0034, pedigree (2,3,2,5,1)
  geometric mean of Remus et al. (2013) data range
  properties: heating value, net 3.95 MJ, dry mass 1 kg, carbon content, fossil 0.130435, wet mass 1 kg
- natural gas, high pressure: 0 m3; pedigree (1,1,1,1,1)
  geometric mean of Remus et al. (2013) data range
  properties: heating value, net 39 MJ, wet mass 0.84 kg, dry mass 0.84 kg, heating value, gross 39 MJ, carbon content, fossil 0.602381
  note on heating value, net: Literature value, Source: United Nations Statistics Division (2018) International Recommendations for Energy Statistics (IRES). Available at: http://unstats.un.org/unsd/statcom/doc11/BG-IRES.pdf.
  note on carbon content, fossil: An average C content of 0.506 kg C/ m3 has been assumed (this average has been calculated using data in Tab 3.5, ecoinvent v2.2 report 6_V
- quicklime, in pieces, loose: 0.044833 kg; lognormal variance with pedigree 0.0034, pedigree (2,3,2,5,1)
  geometric mean of Remus et al. (2013) data range
  properties: water content 0.010101, wet mass 1 kg, dry mass 0.99 kg
- blast oxygen furnace converter: 1.3333e-11 unit; lognormal variance with pedigree 0.5, pedigree (5,5,5,5,5)
  Source: Classen et al. (2009)
- coke: 0.000183216 MJ; lognormal variance with pedigree 0.0034, pedigree (2,3,2,5,1)
  geometric mean of Remus et al. (2013) data range
  properties: heating value, net 28.6 MJ, wet mass 0.034965 kg, water content 0.0638298, dry mass 0.0328671 kg, carbon content, fossil 0.869149
  note on carbon content, fossil: 81.7% C and 6% water in wet mass (ecoinvent v2.1 report 6_VI Table 7.1)
- compressed air, 600 kPa gauge: 0.0144222 m3; lognormal variance with pedigree 0.0572, pedigree (2,3,5,5,3)
  geometric mean of Remus et al. (2013) data range
- basic oxygen furnace secondary metallurgy slag: -0.0003008 kg; name BOF_SM_slag_amount; lognormal variance with pedigree 0.004425, pedigree (2,3,3,2,2)
  Amount reported by worldsteel (2010) and is representative of the average global situation in 2009. Also based on worldsteel (2010), an internal recovery (recycling) rate of 14% is assumed. Source: Worldsteel (2010). Steel industry by-products. World Steel Association: Brussels, Belgium.
  production volume 5.73892e6 kg; = PV * BOF_SM_slag_amount / RP
    Calculated from production volume of reference product using the relative outputs.
  property price 0 EUR2005; name BOF_SM_slag_amount_price_EUR2005
  properties: fluorine content 0.0129487, silicon content 0.0601451, oxygen content 0.476841, aluminium content 0.0530427, magnesium content 0.0427775, iron content 0.0199153, calcium content 0.312637, wet mass 1 kg, manganese content 0.00556519, sulfur content 0.00614898, water content 0.00502513, dry mass 0.995 kg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
  note on fluorine content: The value of 'fluorine content' is documented in Turner & Symeonidis, 2020. Reference: Turner David & Symeonidis Avraam, 2020, Life cycle inventories of the treatment of iron and steelmaking by-products, ecoinvent association, Zürich, Switzerland
  note on sulfur content: The value of 'sulfur content' is documented in Turner & Symeonidis, 2020. Reference: Turner David & Symeonidis Avraam, 2020, Life cycle inventories of the treatment of iron and steelmaking by-products, ecoinvent association, Zürich, Switzerland
- ferronickel: 0.045 kg; lognormal variance with pedigree 0.002, pedigree (1,1,1,5,1)
  Source: Classen et al. (2009)
  properties: wet mass 1 kg, carbon content, fossil 0.0165, iron content 0.7, dry mass 1 kg
  note on carbon content, fossil: Ferronickel (CAS 11133-76-9) is a market product of the nickel industry. It consists of an alloy of iron with nickel, with a nickel content of 20 - 50 %, and a C content of 1.5 - 1.8% (Tab. 3.2 ecoinvent v2.2 report 20_part IV). An average C content of 1.65% was considered
- wastewater from pig iron production: 0 m3; name BP_6; pedigree (1,1,1,1,1)
  geometric mean of Remus et al. (2013) data range
  production volume 0 m3
    Calculated from the production volume of steel, chromium steel 18/8 in proportion to the respective output amounts.
  property price 0 EUR2005; name BP_6_price_EUR2005
  properties: dry mass 0.337476 kg, wet mass 1000 kg, water content 2962.17, carbon content, fossil 1.2149e-5
- pig iron: 0.867945 kg; lognormal variance with pedigree 0.0034, pedigree (2,3,2,5,1)
  geometric mean of Remus et al. (2013) data range. Adjusted with RMS to balance Fe-Content.Note that the ratio of pig iron to iron scrap inputs was based on average data from European steelmakers. The values were then adjusted to ensure Fe balance. This ratio is, however, highly variable among regions, globally, and the value used may not be representative of a) the average global situation or b) the situation in other regions. We advise caution when appliying these data elsewhere.
  properties: iron content 0.92, wet mass 1 kg, carbon content, fossil 0.045, dry mass 1 kg
  note on carbon content, fossil: Pig iron is the iron produced in the blast furnace. It is an alloy of 94% Fe and more than 2% C (world average 4.5%). (ecoinvent v2.2 report 10_partII)
- iron scrap, sorted, pressed: 0.198865 kg; lognormal variance with pedigree 0.0034, pedigree (2,3,2,5,1)
  geometric mean of Remus et al. (2013) data range minus amounts of alloys (based on Classen et al., 2009) Adjusted with RMS to balance Fe-Content.
  properties: dry mass 1 kg, wet mass 1 kg, iron content 0.92
- basic oxygen furnace sludge: -0.0003008 kg; name BOF_sludge_amount; lognormal variance with pedigree 0.004425, pedigree (2,3,3,2,2)
  (same comment as for basic oxygen furnace dust)
  production volume 5.73892e6 kg; = PV * BOF_sludge_amount / RP
    Calculated from production volume of reference product using the relative outputs.
  property price 0 EUR2005; name BOF_sludge_amount_price_EUR2005
  properties: aluminium content 0.00224181, oxygen content 0.0208176, water content 0.470588, manganese content 0.00169783, magnesium content 0.00196609, dry mass 0.68 kg, carbon content, fossil 0.00588235, iron content 0.608767, silicon content 0.00570528, calcium content 0.0202279, zinc content 0.0109474, wet mass 1 kg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
- ferromanganese, high-coal, 74.5% Mn: 0.015278 kg; lognormal variance with pedigree 0.0512, pedigree (2,5,5,5,1)
  Source: Classen et al. (2009)
  properties: wet mass 1 kg, iron content 0.15, heating value, net 2.27 MJ, carbon content, fossil 0.075, dry mass 1 kg
  note on carbon content, fossil: Typical composition of ferromanganese, high-carbon is given in Tab. 3.4 ecoinvent v2.2 report 20_part VII
- iron ore concentrate: 0.000622896 kg; lognormal variance with pedigree 0.002, pedigree (1,1,1,5,1)
  geometric mean of Remus et al. (2013) data range
  property iron content 0.65; name prod_ironOre65_kg_Fe_content
  properties: wet mass 1 kg, dry mass 1 kg
- inert waste, for final disposal: -0.000565685 kg; name BOF_inert_amount; lognormal variance with pedigree 0.004425, pedigree (2,3,3,2,2)
  Represents used refractories, etc.
  production volume 1.07926e7 kg; = PV*(BOF_inert_amount/abs(RP))
    Calculated from production volume of reference product using the relative outputs.
  property price 0 EUR2005; name BOF_inert_amount_price_EUR2005
  properties: wet mass 1 kg, dry mass 0.995 kg, water content 0.00502513
- electricity, medium voltage: 0.0241523 kWh; lognormal variance with pedigree 0.0034, pedigree (2,3,2,5,1)
  geometric mean of Remus et al. (2013) data range
- basic oxygen furnace slag: -0.104898 kg; name BOF_slag_amount; lognormal variance with pedigree 0.004425, pedigree (2,3,3,2,2)
  (same comment as for basic oxygen furnace secondary metallurgy slag)
  production volume 2.00133e9 kg; = PV * BOF_slag_amount/ RP
    Calculated from production volume of reference product using the relative outputs.
  property price 0 EUR2005; name BOF_slag_amount_price_EUR2005
  properties: water content 0.00502513, phosphorus content 0.0102096, calcium content 0.324525, oxygen content 0.329259, magnesium content 0.0350101, vanadium content 0.00554358, iron content 0.182475, wet mass 1 kg, dry mass 0.995 kg, aluminium content 0.0101034, manganese content 0.0250783, silicon content 0.0600014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
  note on phosphorus content: The value of 'phosphorus content' is documented in Turner & Symeonidis, 2020. Reference: Turner David & Symeonidis Avraam, 2020, Life cycle inventories of the treatment of iron and steelmaking by-products, ecoinvent association, Zürich, Switzerland
  note on vanadium content: The value of 'vanadium content' is documented in Turner & Symeonidis, 2020. Reference: Turner David & Symeonidis Avraam, 2020, Life cycle inventories of the treatment of iron and steelmaking by-products, ecoinvent association, Zürich, Switzerland
- natural gas, high pressure: 0.00119447, 7.71221e-6 m3 (2 entries); lognormal variance with pedigree 0.0034, pedigree (2,3,2,5,1)
  geometric mean of Remus et al. (2013) data range
- wastewater from pig iron production: -0.00103268, -0.000308963 m3 (2 entries); lognormal variance with pedigree 0.0912, pedigree (2,3,5,5,3)
  geometric mean of Remus et al. (2013) data range
  production volume 2.5597e7 m3

## Inputs from nature
- Water, cooling, unspecified natural origin [natural resource, in water]: 0.00577581 m3; name water_cooling_UNO_input; source Byers, W. 2003; lognormal variance with pedigree 0.0152, pedigree (2,3,3,5,1)
  geometric mean of Remus et al. (2013) data range
  property dry mass 0.1101 kg; name DM
  property wet mass 1000 kg; name WM
  property water content 9081.65; name water_content
  property water in wet mass 999.89 kg; name WWM
  property carbon content, fossil 0.0104329; name C_content_fossil
  property carbon content, non-fossil 0; name C_content_non_fossil

## Emissions to nature
- Chromium [air, unspecified]: 2.73861e-8 kg; lognormal variance with pedigree 0.6534, pedigree (2,3,2,5,1)
  geometric mean of Remus et al. (2013) data range
- PAH, polycyclic aromatic hydrocarbons [air, unspecified]: 1e-8 kg; lognormal variance with pedigree 0.3034, pedigree (2,3,2,5,1)
  geometric mean of Remus et al. (2013) data range
- Copper [air, unspecified]: 1.38684e-7 kg; lognormal variance with pedigree 0.6534, pedigree (2,3,2,5,1)
  geometric mean of Remus et al. (2013) data range
- Nitrogen oxides [air, unspecified]: 2.12368e-5 kg; lognormal variance with pedigree 0.0434, pedigree (2,3,2,5,1)
  geometric mean of Remus et al. (2013) data range
- Particulates, < 2.5 um [air, unspecified]: 4.47437e-5 kg; lognormal variance with pedigree 0.3034, pedigree (2,3,2,5,1)
  geometric mean of Remus et al. (2013) data range
- Dioxins, measured as 2,3,7,8-tetrachlorodibenzo-p-dioxin [air, unspecified]: 6.35767e-14 kg; lognormal variance with pedigree 0.3034, pedigree (2,3,2,5,1)
  geometric mean of Remus et al. (2013) data range
- Manganese [air, unspecified]: 6.84105e-7 kg; lognormal variance with pedigree 0.6534, pedigree (2,3,2,5,1)
  geometric mean of Remus et al. (2013) data range
- Iron [air, unspecified]: 4.115e-5 kg; lognormal variance with pedigree 0.7012, pedigree (2,3,5,5,3)
  geometric mean of Remus et al. (2013) data range
- Lead [air, unspecified]: 4.08167e-7 kg; lognormal variance with pedigree 0.6534, pedigree (2,3,2,5,1)
  geometric mean of Remus et al. (2013) data range
- Water [air, unspecified]: 0.00611841 m3; name water_to_air_unspecified; lognormal variance with pedigree 0.0427, pedigree (2,2,1,5,1)
  Source: Classen et al. (2009)
  property fraction, origin: salt water 0; name fraction_origin_salt_water
  property fraction, origin: fresh water 0; name fraction_origin_fresh_water
  property fraction, origin: unspecified 1; name fraction_origin_unspecified
- Heat, waste [air, unspecified]: 0.204696 MJ; lognormal variance with pedigree 0.0912, pedigree (2,3,5,5,3)
  Calculated from energy balanced model
- Carbon monoxide, fossil [air, unspecified]: 0.00168214 kg; lognormal variance with pedigree 0.6534, pedigree (2,3,2,5,1)
  geometric mean of Remus et al. (2013) data range
- Carbon dioxide, fossil [air, unspecified]: 0.0627089 kg; lognormal variance with pedigree 0.0034, pedigree (2,3,2,5,1)
  geometric mean of Remus et al. (2013) data range

## Sampling procedure
Data were taken from direct measurements at blast furnace plants across Europe.

Note that there may be mass imbalances in the dataset. This is because the values represent the average situation in steelmaking many different plants and have not been augmented or adjusted. Similarily, these values represent the situation post-ventilation/off-gas management, i.e. it is not the mass of carbon, for instance, that is produced that is reported but the amount that is actually, on average, emitted to the environment considering an average mix of steelmaking, technologies, off-gas management approaches, and internal recovery (recycling) or utilisation rates at integrated steelmakers in Europe.

It should also be noted that data on radionucleid emissions to air, e.g. of Pollonium 210 and Lead 210, were not available and have therefore not been inventoried here.
