# potassium chloride production

Dataset: EcoSpold 2, unit process
Geography: RoW
Time period: 2000-01-01 to 2021-12-31
Technology level: current
Classification: ISIC rev.4 ecoinvent: 2012:Manufacture of fertilizers and nitrogen compounds
Synonyms: Muriate of potash
Scenario: Business-as-Usual
System model: Allocation, cut-off by classification
Generated by: Anna Kounina
Database: ecoinvent
isCopyrightProtected: true
accessRestrictedTo: 1

## General comment
This dataset is a weighted average from the respective regional datasets.
This dataset represents the production of 1 kg of potassium chloride, with 60% K2O. Potassium chloride (formula KCl), also known as muriate of potash, is an odorless salt that has a white or colorless vitreous crystal appearanceis. Izt is mostly used as potassium (K) fertiliser that can also be a component in multi-nutrient fertilisers. Potassium chloride is produced by shaft mining and beneficiation. The modelled process includes the mining of potash salt. The incoming waste from the production is treated as inert material on a landfill site. Potassium chloride is produced in a wide variety of crystal sizes, according to the potash ore and process used. Different applications demand various particle-size distributions obtained by screening.
Potassium chloride is mainly used as a fertiliser, and is also used in medicine, in scientific applications, and in food processing, where it is known as E number additive E508.
The main data source for this dataset is Fertilizers Europe (2014), complemented by Althaus et al (2007).
References:
Fertilizers Europe (2014): Average Emissions Year 2011. Fertilizers Europe Environmental report (internal).
Fertilizers Europe (2016): Average Emissions Year 2014. Fertilizers Europe Environmental report (internal). Used for updated energy and GHG emission in Carbon Footprint Calculator
Althaus H.-J., Chudacoff M., Hischier R., Jungbluth N., Osses M. and Primas A. (2007) Life Cycle Inventories of Chemicals. ecoinvent report No. 8, v2.0. EMPA Dübendorf, Swiss Centre for Life Cycle Inventories, Dübendorf, CH.

## Included activities start
The activity starts from potash extraction at the mine.

## Included activities end
This activites ends with the production of 1 kg of potassium chloride.

## Geography
This dataset is a weighted average built from the following geographies: CA-SK, RER.

## Technology
Average techlogy from the regional counterparts as given in the geography comment.

## Time period
Primary data were collected on fertiliser production for the year 2011. These data were based on annual average data for the year 2011.

## Reference product
- potassium chloride: 1 kg; name RP; CPC 34631: Potassium chloride (muriate of potash); By-product classification allocatable product; CAS 7447-40-7
  production volume 5.23688e10 kg; name PVRP
    Value in kg/y. International Fertilizers Association (2007 - 2018).
  property chlorine content 0.451774
    Chlorine content (on a dry matter basis) of potassium chloride, industrial grade is calculated from the molecular formula of the substance (KCl).
  property price 0.184 EUR2005
    Prices are calculated on basis of Import/Export data (tonnes and US$) from UN Trade Statistics Database (http://data.un.org/Browse.aspx?d=ComTrade, accessed 7/7-2010). N, P2O5, or K2O content (http://www.fertilizer.org/ifa/Home-Page/STATISTICS/Conversions-factors)
  property carbon content, fossil 0
    Carbon content, fossil is calculated based on the chemical formula of the substance.
  property potassium content 0.498226
    Potassium content (on a dry matter basis) of potassium chloride, industrial grade is calculated from the molecular formula of the substance (KCl).
  property carbon content 0
    carbon content on a dry matter basis (reserved; not for manual entry)
  properties: water content 0, water in wet mass 0 kg, wet mass 1 kg, carbon content, non-fossil 0, dry mass 1 kg, carbon allocation 0 kg

## Inputs from technosphere
- chemical, inorganic: 0.00868321 kg; lognormal variance with pedigree 0.1638, pedigree (2,3,5,5,5)
  This flow is weighted averages using the exchanges in the corresponding regional data.
  properties: wet mass 1 kg, carbon content, fossil 0.003, dry mass 1 kg
  note on carbon content, fossil: This dataset is an unweighted average of 20 inorganic substances (listed in Tab 88.1, ecoinvent v2.2 report 8, part II), being part of the top100 chemicals included in this database. The C-content has also been calculated as an unweighted average of the C content of the substances composing this dataset.
- diesel, burned in building machine: 0.0261672 MJ; lognormal variance with pedigree 0.0053, pedigree (2,2,3,5,1)
  This flow is weighted averages using the exchanges in the corresponding regional data.
  properties: heating value, net 1 MJ
- steam, in chemical industry: 0.34814 kg; lognormal variance with pedigree 0.0433, pedigree (2,2,5,5,1)
  This flow is weighted averages using the exchanges in the corresponding regional data.
  properties: dry mass 1 kg, wet mass 1 kg
- chemical factory, organics: 5.73436e-10 unit; lognormal variance with pedigree 0.4632, pedigree (2,3,5,5,5)
  This flow is weighted averages using the exchanges in the corresponding regional data.
- potash salt: 2.20935 kg; lognormal variance with pedigree 0.0433, pedigree (2,2,5,5,1)
  This flow is weighted averages using the exchanges in the corresponding regional data.
  properties: dry mass 1 kg, oxygen content 0.0169852, potassium content 0.0830148, wet mass 1 kg
  note on oxygen content: Oxygen content (on a dry matter basis) of potash salt is calculated from the molecular formula of the substance ().
  note on potassium content: Potassium content (on a dry matter basis) of potash salt is calculated from the molecular formula of the substance ().
- electricity, low voltage: 0 kWh; pedigree (1,1,1,1,1)
  This flow is weighted averages using the exchanges in the corresponding regional data.
- electricity, medium voltage: 0 kWh; pedigree (1,1,1,1,1)
  This flow is weighted averages using the exchanges in the corresponding regional data.
- hazardous waste, for incineration: -0.000206876 kg; name BP1; lognormal variance with pedigree 0.1638, pedigree (2,3,5,5,5)
  This flow is weighted averages using the exchanges in the corresponding regional data.
  production volume 1.09225e7 kg; = PVRP*BP1/RP
    Calculated based on the production volume of the reference product.
  property price 0 EUR2005; name BP1_price_EUR2005
  properties: water content 0.333333, dry mass 0.75 kg, carbon content, fossil 0.554667, wet mass 1 kg, heating value, net 17 MJ
  note on carbon content, fossil: Tab A.6, ecoinvent v2.2 report 13_I. C content has been calculated after data in the tables, and then referred to 1 kg DM
  note on heating value, net: Value taken from the general comment of the treatment dataset.
- heat, district or industrial, natural gas: 0 MJ; pedigree (1,1,1,1,1)
  This flow is weighted averages using the exchanges in the corresponding regional data.
  properties: heating value, net 1 MJ
- municipal solid waste: 0 kg; name BP2; pedigree (1,1,1,1,1)
  This flow is weighted averages using the exchanges in the corresponding regional data.
  production volume 0 kg
    Calculated based on the production volume of the reference product.
  properties: water content 0.297017, carbon content, fossil 0.171549, carbon content, non-fossil 0.261655, wet mass 1 kg, dry mass 0.771 kg, heating value, net 11.74 MJ
  note on carbon content, fossil: MSW composition in tab 4.1, ecoinvent v2.2 report 13_I. C content referred to 1 kg DM
- salt tailing from potash mine: -4.83255 kg; name BP3; lognormal variance with pedigree 0.1258, pedigree (2,3,3,5,5)
  This flow is weighted averages using the exchanges in the corresponding regional data.
  production volume 2.50676e11 kg; = PVRP*BP3/RP
    Calculated based on the production volume of the reference product.
  property price 0 EUR2005; name BP3_price_EUR2005
  properties: dry mass 1 kg, wet mass 1 kg
- electricity, low voltage: 0.000151191, 2.75289e-5, 0.00044325, 0.0068053, 0.00110098, 0.00316144 kWh (6 entries); lognormal variance with pedigree 0.0433, pedigree (2,2,5,5,1)
  This flow is weighted averages using the exchanges in the corresponding regional data.
- electricity, medium voltage: 0.00098216, 0.000188336, 0.00316177, 0.0459851, 0.00648163, 0.0211181 kWh (6 entries); lognormal variance with pedigree 0.0053, pedigree (2,2,3,5,1)
  This flow is weighted averages using the exchanges in the corresponding regional data.
- heat, district or industrial, natural gas: 0.00858399, 0.556964 MJ (2 entries); lognormal variance with pedigree 0.0053, pedigree (2,2,3,5,1)
  This flow is weighted averages using the exchanges in the corresponding regional data.
- municipal solid waste: -8.69606e-7, -2.19119e-7, -3.13134e-7, -0.00061502 kg (4 entries); lognormal variance with pedigree 0.1638, pedigree (2,3,5,5,5)
  This flow is weighted averages using the exchanges in the corresponding regional data.
  production volume 3.32368e7 kg

## Inputs from nature
- Water, cooling, unspecified natural origin [natural resource, in water]: 0.0111764 m3; lognormal variance with pedigree 0.1638, pedigree (2,3,5,5,5)
  This flow is weighted averages using the exchanges in the corresponding regional data.
- Water, river [natural resource, in water]: 0.00300903 m3; lognormal variance with pedigree 0.1638, pedigree (2,3,5,5,5)
  This flow is weighted averages using the exchanges in the corresponding regional data.
- Sylvite, in ground [natural resource, in ground]: 1.22719 kg; lognormal variance with pedigree 0.1258, pedigree (2,3,3,5,5)
  This flow is weighted averages using the exchanges in the corresponding regional data.

## Emissions to nature
- Sulfur [water, surface water]: 0.0107465 kg; lognormal variance with pedigree 0.2232, pedigree (2,3,5,5,5)
  This flow is weighted averages using the exchanges in the corresponding regional data.
- Potassium, ion [water, surface water]: 0.00138416 kg; lognormal variance with pedigree 0.8132, pedigree (2,3,5,5,5)
  This flow is weighted averages using the exchanges in the corresponding regional data.
- Water [air, unspecified]: 0.00572272 m3; lognormal variance with pedigree 0.2032, pedigree (2,3,5,5,5)
  This flow is weighted averages using the exchanges in the corresponding regional data.
- Hydrogen chloride [air, urban air close to ground]: 7.97824e-6 kg; lognormal variance with pedigree 0.2232, pedigree (2,3,5,5,5)
  This flow is weighted averages using the exchanges in the corresponding regional data.
- Chloride [water, surface water]: 0.108325 kg; lognormal variance with pedigree 0.2232, pedigree (2,3,5,5,5)
  This flow is weighted averages using the exchanges in the corresponding regional data.
- Particulates, > 10 um [air, urban air close to ground]: 9.09033e-6 kg; lognormal variance with pedigree 0.2232, pedigree (2,3,5,5,5)
  This flow is weighted averages using the exchanges in the corresponding regional data.
- Particulates, > 2.5 um, and < 10um [air, urban air close to ground]: 0.000175745 kg; lognormal variance with pedigree 0.2932, pedigree (2,3,5,5,5)
  This flow is weighted averages using the exchanges in the corresponding regional data.
- Water [water, unspecified]: 0.00877133 m3; lognormal variance with pedigree 0.2032, pedigree (2,3,5,5,5)
  This flow is weighted averages using the exchanges in the corresponding regional data.
- Magnesium [water, surface water]: 0.0104027 kg; lognormal variance with pedigree 0.8132, pedigree (2,3,5,5,5)
  This flow is weighted averages using the exchanges in the corresponding regional data.
- Sodium, ion [water, surface water]: 0.0632757 kg; lognormal variance with pedigree 0.8132, pedigree (2,3,5,5,5)
  This flow is weighted averages using the exchanges in the corresponding regional data.
- Particulates, < 2.5 um [air, urban air close to ground]: 4.99968e-7 kg; lognormal variance with pedigree 0.4832, pedigree (2,3,5,5,5)
  This flow is weighted averages using the exchanges in the corresponding regional data.
- Calcium, ion [water, surface water]: 0.00179682 kg; lognormal variance with pedigree 0.8132, pedigree (2,3,5,5,5)
  This flow is weighted averages using the exchanges in the corresponding regional data.

## Extrapolations
This dataset was built as a weighted average of regional datasets of the same activityName. Weights are based on production volumes.
CA-SK: production volume = 9.5e+09 kg/year, weight = 0.6493
RER: production volume = 5.13e+09 kg/year, weight = 0.3507
