# orange production, fresh grade

Dataset: EcoSpold 2, unit process
Geography: RoW
Time period: 2000-01-01 to 2021-12-31
Technology level: current
Classification: ISIC rev.4 ecoinvent: 0123:Growing of citrus fruits
Tags: WFLDB
Scenario: Business-as-Usual
System model: Allocation, cut-off by classification
Generated by: [System]
Database: ecoinvent
isCopyrightProtected: true
accessRestrictedTo: 1

## General comment
This dataset is a weighted average of the regional datasets, with weights based on production volume of the reference product. Detailed comments and sources about the exchanges can be found in the regional datasets.
The geographicalCorrelation score of every pedigree matrix of was changed to '5'.
Sum of regional production volumes: 6.497e+9 kg
ES: PV = 2.890e+9 kg; weight = 0.4447
US: PV = 2.135e+9 kg; weight = 0.3286
ZA: PV = 1.473e+9 kg; weight = 0.2267
Yield of the global dataset = 30857.3991487 kg/ha, calculated as a weighted average of the regional yields.
The comments below were part of the ES regional dataset.
This dataset represents the production of 1 kg of orange, fresh grade (Navelina). Fresh grade oranges are meant for direct human consumption. The reference flow is the average yield per ha and for the year 2000: yield (30 t/ha) obtained under irrigated conditions (total amount of water 4187 m3/ha). The data are representative for orange production, fresh grade (Navelina), in Spain (Ribera Alta and Ribera Baixa) used for the export market. Mineral NPK fertiliser input is 300-65-135 kg/ha. Organic fertilisers applied amount to 3.6 t/ha of solid manure. Total active ingredients (a.i.) applied as pesticides amount to 14 kg a.i./ha and 74.7 kg/ha of horticultural oil.
The dataset was modelled within the project 'World Food LCA database (WFLDB)'. The aim of this project was to provide inventories of a broad variety of agricultural products and processes and to cover for each product at least 50% of the global export market. The export share of fresh grade oranges produced in Spain amounts to 20.5% of the global export (tonnage exported in 2010). The production system regarded in this dataset aimed at representing fresh grade oranges produced in Spain or the export market.
PEF-Quality: data quality rating (DQR) = 2.2 (i.e. good quality). This dataset refers to an average situation; for specific situations exchanges might differ substantially due to site specific parameters

## Included activities start
This activity starts with the nursery producing fruit tree seedlings, i.e.grafted young trees to be planted.

## Included activities end
This activity ends with the waste treatment after the clearing of the orchard (rooting up the trees). The dataset includes all activities during a year in the productive phase of the orchard including the establishment phase per year of lifetime (20 years), the clearing of the orchard including waste treatment.
The establishment phase of the orchard includes tree nursery, soil cultivation, planting trees, sowing grass, installation of trellis system (posts and wires) and irrigation. Fertiliser and pesticide use in a year of the establishment phase is assumed to be half of the amount of a year in the productive phase.
The productive phase of the orchard includes machine operations, corresponding infrastructure, fuel use and sheds. Machine operations in the productive phase are: soil cultivation (mulching, mowing), fertiliser and pesticide application, harvesting and irrigation. Further, direct field emissions and land use change are included. At the end of the productive phase the orchard is cleared by rooting up the trees.
The inputs of seedlings, fertilisers and pesticides as well as packaging of fertilisers and pesticides are considered. The dataset doesn't include emissions from manure storage because these are within the system boundary of animal production. Heavy metal uptake by the crop is considered.

## Reference product
- orange, fresh grade: 1 kg; CPC 01323: Oranges; By-product classification allocatable product
  production volume 3.1241e10 kg
    Source: FAOSTAT. Average, 2009-2012. 45.33% processing, 54.67% fresh (http://www.fao.org/docrep/006/y5143e/y5143e12.htm)
  property price 0.16 EUR2005
    Personal communication with the Technical Head of Citrus at Core Fruit, South Africa on 26.04.2018
  property carbon content, non-fossil 0.350629
    calculation: C-content of components according to ecoinvent report No. 15a. Source of composition: Souci, S.W., Fachmann, W., Kraut, H. (Hg.: Bundesminsiterium fur Ernahrung, Landwirtschaft und Forsten, Bonn) 'Die Zusammensetzung der Lebensmittel - Nahrwerttabellen', medpharm Scientific Publishers Stuttgart, CRC Press; 2000.
  property carbon content 0.350629
    carbon content on a dry matter basis (reserved; not for manual entry)
  properties: water in wet mass 0.457112 kg, water content 0.842, carbon content, fossil 0, wet mass 1 kg, dry mass 0.542888 kg, carbon allocation 0.190353 kg

## Inputs from technosphere
- inorganic nitrogen fertiliser, as N: 0 kg; pedigree (1,1,1,1,1)
  Calculated based on literature values or expert estimation: The total amount of nutrient (USDA 2015) multiplied by the country-share of fertiliser type (IFA 2014). See supporting documentation 'WFLDB-Documentation.pdf' chapter 'Fertiliser application' for L3 and L4 data (https://ecoquery.ecoinvent.org/File/Reports).
  properties: dry mass 1 kg, wet mass 1 kg
- phosphate rock, beneficiated: 0 kg; pedigree (1,1,1,1,1)
  The exchange has been updated from 'phosphate rock, as P2O5, beneficiated, dry' into 'phosphate rock, beneficiated' and therefore its amount has been scaled (multiplied) from 0 kg by 3.125 kg of 'phosphate rock, beneficiated' per kg of 'phosphate rock, as P2O5, beneficiated, dry'. Original comment of the exchange is: Calculated based on literature values or expert estimation: The total amount of nutrient (USDA 2015) multiplied by the country-share of fertiliser type (IFA 2014). See supporting documentation 'WFLDB-Documentation.pdf' chapter 'Fertiliser application' for L3 and L4 data (https://ecoquery.ecoinvent.org/File/Reports).
  Corresponds to 0.169 kg/ha
  properties: dry mass 1 kg, wet mass 1 kg
- naphtha: 0 kg; pedigree (1,1,1,1,1)
  Literature value or expert estimation (USDA 2015).
  properties: dry mass 1 kg, wet mass 1 kg, carbon content, fossil 0.919743, heating value, net 45 MJ
- [sulfonyl]urea-compound: 9.3169e-6 kg; lognormal variance with pedigree 0.00984984, pedigree (2,2,3,5,1)
  Literature value or expert estimation (USDA 2015).
  properties: dry mass 1 kg, carbon content, fossil 0.540853, wet mass 1 kg
- mulching: 3.4138e-5 ha; lognormal variance with pedigree 0.120177, pedigree (2,1,3,5,1)
  Proxy: Extrapolated using a modified MEXALCA-approach (Roches et al. 2010; Nemecek et al. 2012). See supporting documentation 'WFLDB-Documentation.pdf' chapter 'Machinery processes' for L1 data (https://ecoquery.ecoinvent.org/File/Reports).
- [thio]carbamate-compound: 8.16537e-7 kg; lognormal variance with pedigree 0.00984984, pedigree (2,2,3,5,1)
  Literature value or expert estimation (USDA 2015).
  properties: dry mass 1 kg, wet mass 1 kg, carbon content, fossil 0.626349
- mowing, by motor mower: 0.000110844 ha; lognormal variance with pedigree 0.120177, pedigree (2,1,3,5,1)
  (same comment as for mulching)
- acetamide-anillide-compound, unspecified: 7.85132e-8 kg; lognormal variance with pedigree 0.00984984, pedigree (2,2,3,5,1)
  Literature value or expert estimation (USDA 2015).
  properties: carbon content, fossil 0.659175, dry mass 1 kg, wet mass 1 kg
- irrigation: 0 m3; pedigree (1,1,1,1,1)
  Calculated value: The total amount of water used for irrigation (calculated from evapotranspiration, Pfister et al. 2011) multiplied by the share of irrigation technique (Expert estimate based on US data). See supporting documentation 'WFLDB-Documentation.pdf' chapter 'Water use for irrigation' for L1 data (https://ecoquery.ecoinvent.org/File/Reports).
  properties: water content 9089.91, dry mass 0.11 kg, wet mass 1000 kg
- cyclic N-compound: 1.96806e-6 kg; lognormal variance with pedigree 0.00984984, pedigree (2,2,3,5,1)
  Literature value or expert estimation (USDA 2015).
  properties: dry mass 1 kg, carbon content, fossil 0.641962, wet mass 1 kg
- glyphosate: 6.66772e-5 kg; lognormal variance with pedigree 0.00984984, pedigree (2,2,3,5,1)
  Literature value or expert estimation (USDA 2015).
  properties: carbon content, fossil 0.214286, wet mass 1 kg, dry mass 1 kg
- dinitroaniline-compound: 5.26562e-6 kg; lognormal variance with pedigree 0.00984984, pedigree (2,2,3,5,1)
  Literature value or expert estimation (USDA 2015).
  properties: carbon content, fossil 0.55516, dry mass 1 kg, wet mass 1 kg
- fertilising, by broadcaster: 0.000111053 ha; lognormal variance with pedigree 0.120177, pedigree (2,1,3,5,1)
  (same comment as for mulching)
- kaolin: 7.34884e-6 kg; lognormal variance with pedigree 0.00984984, pedigree (2,2,3,5,1)
  Literature value or expert estimation (USDA 2015).
  properties: wet mass 1 kg, dry mass 1 kg
- fruit tree seedling, for planting: 0.000415498 unit; lognormal variance with pedigree 0.120177, pedigree (2,1,3,5,1)
  Literature value or expert estimation (California Department of Food and Agriculture CDFA 2014). This is the number of trees per ha divided by the lifetime years of the orchard.
  properties: dry mass 0.578035 kg, carbon content, non-fossil 0.439481, wet mass 1 kg, water content 0.73
  note on carbon content, non-fossil: calculation: C-content of components according to ecoinvent report No. 15a. Source of composition: https://ndb.nal.usda.gov/ndb/search/. Unspecific seedling used as proxy.
- urea: 0.000472484 kg; lognormal variance with pedigree 0.120177, pedigree (2,1,3,5,1)
  The exchange has been updated from 'urea, as N' into 'urea' and therefore its amount has been scaled (multiplied) from 0.0002 kg by 2.1438 kg of 'urea' per kg of 'urea, as N'. Original comment of the exchange is: Calculated based on literature values or expert estimation: The total amount of nutrient (USDA 2015) multiplied by the country-share of fertiliser type (IFA 2014). See supporting documentation 'WFLDB-Documentation.pdf' chapter 'Fertiliser application' for L3 and L4 data (https://ecoquery.ecoinvent.org/File/Reports).
  Corresponds to 11.0 kg/ha
  properties: carbon content, fossil 0.2, wet mass 1 kg, dry mass 1 kg
- establishing orchard: 0.000415498 unit; lognormal variance with pedigree 0.120177, pedigree (2,1,3,5,1)
  (same comment as for fruit tree seedling, for planting)
- triazine-compound, unspecified: 5.53399e-5 kg; lognormal variance with pedigree 0.00984984, pedigree (2,2,3,5,1)
  Literature value or expert estimation (USDA 2015).
  properties: dry mass 1 kg, wet mass 1 kg, carbon content, fossil 0.475616
- copper oxide: 4.91245e-5 kg; lognormal variance with pedigree 0.00984984, pedigree (2,2,3,5,1)
  Literature value or expert estimation (USDA 2015).
  properties: dry mass 1 kg, wet mass 1 kg
- transport, tractor and trailer, agricultural: 0.00040294 metric ton*km; lognormal variance with pedigree 0.158439, pedigree (4,1,3,5,1)
  On-farm transport: Yield (in tonnes) multiplied by the average distance from field to farm. The distance was obtained by extrapolation (modified MEXALCA approach). See supporting documentation 'WFLDB-Documentation.pdf' chapter 'Machinery processes' (https://ecoquery.ecoinvent.org/File/Reports).
- ammonium sulfate: 4.57865e-5 kg; lognormal variance with pedigree 0.120177, pedigree (2,1,3,5,1)
  Calculated based on literature values or expert estimation: The total amount of nutrient (USDA 2015) multiplied by the country-share of fertiliser type (IFA 2014). See supporting documentation 'WFLDB-Documentation.pdf' chapter 'Fertiliser application' for L3 and L4 data (https://ecoquery.ecoinvent.org/File/Reports).
  Corresponds to 2.18 kg/ha
  properties: wet mass 1 kg, dry mass 1 kg
- potassium sulfate: 5.31656e-5 kg; lognormal variance with pedigree 0.120177, pedigree (2,1,3,5,1)
  The exchange has been updated from 'potassium sulfate, as K2O' into 'potassium sulfate' and therefore its amount has been scaled (multiplied) from 0 kg by 1.85 kg of 'potassium sulfate' per kg of 'potassium sulfate, as K2O'. Original comment of the exchange is: Calculated based on literature values or expert estimation: The total amount of nutrient (USDA 2015) multiplied by the country-share of fertiliser type (IFA 2014). See supporting documentation 'WFLDB-Documentation.pdf' chapter 'Fertiliser application' for L3 and L4 data (https://ecoquery.ecoinvent.org/File/Reports).
  Corresponds to 1.51 kg/ha
  properties: dry mass 1 kg, wet mass 1 kg
- application of plant protection product, by field sprayer: 0.000199521 ha; lognormal variance with pedigree 0.120664, pedigree (2,2,3,5,1)
  Proxy: Extrapolated using a modified MEXALCA-approach (Roches et al. 2010; Nemecek et al. 2012). See supporting documentation 'WFLDB-Documentation.pdf' chapter 'Machinery processes' for L1 data (https://ecoquery.ecoinvent.org/File/Reports). Field sprayer used as a proxy for pesticide application in orchards.
- inorganic potassium fertiliser, as K2O: 0 kg; pedigree (1,1,1,1,1)
  Calculated based on literature values or expert estimation: The total amount of nutrient (USDA 2015) multiplied by the country-share of fertiliser type (IFA 2014). See supporting documentation 'WFLDB-Documentation.pdf' chapter 'Fertiliser application' for L3 and L4 data (https://ecoquery.ecoinvent.org/File/Reports).
  Corresponds to 10.6 kg/ha
  properties: dry mass 1 kg, wet mass 1 kg
- ammonium nitrate: 0 kg; pedigree (1,1,1,1,1)
  The exchange has been updated from 'ammonium nitrate, as N' into 'ammonium nitrate' and therefore its amount has been scaled (multiplied) from 0.0039 kg by 2.8573 kg of 'ammonium nitrate' per kg of 'ammonium nitrate, as N'. Original comment of the exchange is: Calculated based on literature values or expert estimation: The total amount of nutrient (USDA 2015) multiplied by the country-share of fertiliser type (IFA 2014). See supporting documentation 'WFLDB-Documentation.pdf' chapter 'Fertiliser application' for L3 and L4 data (https://ecoquery.ecoinvent.org/File/Reports).
  Corresponds to 2.82 kg/ha
  properties: wet mass 1 kg, dry mass 1 kg
- potassium chloride: 0.000642894 kg; lognormal variance with pedigree 0.120177, pedigree (2,1,3,5,1)
  The exchange has been updated from 'potassium chloride, as K2O' into 'potassium chloride' and therefore its amount has been scaled (multiplied) from 0.0004 kg by 1.5829 kg of 'potassium chloride' per kg of 'potassium chloride, as K2O'. Original comment of the exchange is: Calculated based on literature values or expert estimation: The total amount of nutrient (USDA 2015) multiplied by the country-share of fertiliser type (IFA 2014). See supporting documentation 'WFLDB-Documentation.pdf' chapter 'Fertiliser application' for L3 and L4 data (https://ecoquery.ecoinvent.org/File/Reports).
  Corresponds to 32.7 kg/ha
  properties: wet mass 1 kg, dry mass 1 kg
- manure, solid, cattle: 0.0322488 kg; lognormal variance with pedigree 0.120177, pedigree (2,1,3,5,1)
  Calculated based on literature values: The total amount of manure (Sanjuan et al. 2005) multiplied by the country-share of manure per animal category (FAOSTAT 2015). See supporting documentation 'WFLDB-Documentation.pdf' chapter 'Fertiliser application' (https://ecoquery.ecoinvent.org/File/Reports).
  Corresponds to 2180.0 kg/ha
  properties: dry mass 0.22 kg, carbon content, non-fossil 0.441, wet mass 1 kg, water content 3.5454
- planting tree: 0.000415498 unit; lognormal variance with pedigree 0.120177, pedigree (2,1,3,5,1)
  (same comment as for fruit tree seedling, for planting)
- poultry manure, dried: 0.0211196 kg; lognormal variance with pedigree 0.120177, pedigree (2,1,3,5,1)
  Calculated based on literature values: The total amount of manure (Sanjuan et al. 2005) multiplied by the country-share of manure per animal category (FAOSTAT 2015). See supporting documentation 'WFLDB-Documentation.pdf' chapter 'Fertiliser application' (https://ecoquery.ecoinvent.org/File/Reports).
  Corresponds to 1420.0 kg/ha
  properties: copper content 4.38e-5, nitrogen content 0.532, lead content 2.92e-6, nickel content 4e-5, phosphorus content 0.0167, carbon content, non-fossil 0.33389, potassium content 0.024, mercury content 2e-7, wet mass 1 kg, cadmium content 2.92e-7, dry mass 0.865 kg, water content 0.156069, zinc content 0.000349
- inorganic phosphorus fertiliser, as P2O5: 0 kg; pedigree (1,1,1,1,1)
  Calculated based on literature values or expert estimation: The total amount of nutrient (USDA 2015) multiplied by the country-share of fertiliser type (IFA 2014). See supporting documentation 'WFLDB-Documentation.pdf' chapter 'Fertiliser application' for L3 and L4 data (https://ecoquery.ecoinvent.org/File/Reports).
  Corresponds to 9.44 kg/ha
  properties: dry mass 1 kg, wet mass 1 kg
- waste wood, untreated: 0 kg; pedigree (1,1,1,1,1)
  Wood from trees after 1-2 years of sorrage at the field (20% water) per lifetime year (20 years) of the orchard
  production volume 0 kg
    Calculated from reference product production volume, reference product amount and byproduct amount.
  properties: water content 0.25, wet mass 1 kg, carbon content, non-fossil 0.48632, dry mass 0.8 kg, heating value, net 13.99 MJ
  note on heating value, net: Value taken from the general comment of the treatment dataset.
- solid manure loading and spreading, by hydraulic loader and spreader: 0.0533684 kg; lognormal variance with pedigree 0.120177, pedigree (2,1,3,5,1)
  This amount corresponds the input of solid manure. Sanjuan et al. 2005
- phenoxy-compound: 4.72687e-5 kg; lognormal variance with pedigree 0.00984984, pedigree (2,2,3,5,1)
  Literature value or expert estimation (USDA 2015).
  properties: dry mass 1 kg, wet mass 1 kg, carbon content, fossil 0.532559
- packaging, for pesticides: 0.000701694 kg; lognormal variance with pedigree 0.0532, pedigree (4,3,3,5,4)
  Total amount of active substance/s of pesticides needed for the production of orange, fresh grade is calculated to be circa 3.51E-04 kg. Pesticide/s used in this dataset is/are: '[sulfonyl]urea-compound', '[thio]carbamate-compound', 'acetamide-anillide-compound, unspecified', 'copper oxide', 'cyclic N-compound', 'dinitroaniline-compound', 'glyphosate', 'kaolin' (This substance can be used also as fertiliser but here it is accounted as pesticide only), 'organophosphorus-compound, unspecified', 'phenoxy-compound', 'triazine-compound, unspecified'. The total amount of active substance/s is doubled in order to account for the packaging of the dilluted product of pesticide/s that is/are applied. Therefore, 7.02E-04 kg of packaging for pesticides is justified with this exchange.
  properties: heating value, net 25.97 MJ, dry mass 1 kg, price 0.0642 EUR2005, carbon content, fossil 0.85714, wet mass 1 kg
- trellis system, wooden poles, soft wood, tar impregnated: 1.48246e-9 ha; lognormal variance with pedigree 0.120177, pedigree (2,1,3,5,1)
  Used to attach trees in orchards with a tree density of more than 500 trees per ha.
- organophosphorus-compound, unspecified: 0.000107642 kg; lognormal variance with pedigree 0.00984984, pedigree (2,2,3,5,1)
  Literature value or expert estimation (USDA 2015).
  properties: dry mass 1 kg, wet mass 1 kg, carbon content, fossil 0.260898
- packaging, for fertilisers: 0.0217442 kg; lognormal variance with pedigree 0.0532, pedigree (4,3,3,5,4)
  Total amount of active substance/s of fertilisers needed for the production of 'orange, fresh grade' is calculated to be circa 1.09E-02 kg. Fertiliser/s used in this dataset is/are: 'ammonia, liquid', 'ammonium nitrate, as N', 'ammonium sulfate, as N', 'nitrogen fertiliser, as N', 'phosphate fertiliser, as P2O5', 'phosphate rock, as P2O5, beneficiated, dry', 'potassium chloride, as K2O', 'potassium fertiliser, as K2O', 'potassium sulfate, as K2O', 'urea, as N'. The total amount of active substance/s is doubled in order to account for the packaging of the dilluted product of fertiliser/s that is/are applied. Therefore, 2.17E-02 kg of packaging for fertilisers is justified with this exchange.
  properties: wet mass 1 kg, carbon content, fossil 0.825301, dry mass 1 kg, heating value, net 25.01 MJ, price 0.0642 EUR2005
  note on carbon content, fossil: Considering a chemical formula (C2H4)n for polyethylene, carbon content-fossil is calculated to be 0.856286 kg of Carbon per kg of dry mass.
- ammonia, anhydrous, liquid: 0 kg; pedigree (1,1,1,1,1)
  Calculated based on literature values or expert estimation: The total amount of nutrient (USDA 2015) multiplied by the country-share of fertiliser type (IFA 2014). See supporting documentation 'WFLDB-Documentation.pdf' chapter 'Fertiliser application' for L3 and L4 data (https://ecoquery.ecoinvent.org/File/Reports).
  Corresponds to 65.0 kg/ha
  properties: dry mass 1 kg, wet mass 1 kg
- inorganic nitrogen fertiliser, as N: 1.18303e-7, 6.30448e-6, 7.90417e-7, 9.06184e-6, 2.29455e-7, 8.09917e-6, 1.06303e-6, 2.5734e-6, 2.84511e-5, 1.69914e-5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 kg (61 entries); lognormal variance with pedigree 0.120177, pedigree (2,1,3,5,1)
  (same comment as for inorganic nitrogen fertiliser, as N)
- phosphate rock, beneficiated: 7.11169e-8, 5.35687e-6 kg (2 entries); lognormal variance with pedigree 0.120177, pedigree (2,1,3,5,1)
  (same comment as for phosphate rock, beneficiated)
- naphtha: 0.000152758, 5.03347e-5, 0.00116797, 0.000316795 kg (4 entries); lognormal variance with pedigree 0.00984984, pedigree (2,2,3,5,1)
  Literature value or expert estimation (USDA 2015).
- irrigation: 0.00201775, 8.56472e-5, 3.42589e-6, 0.0180373, 0.000295583, 1.47804e-5, 0.000136606, 0.0346619, 0.000666285, 0.000227721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 m3 (14 entries); lognormal variance with pedigree 0.120177, pedigree (2,1,3,5,1)
  (same comment as for irrigation)
- inorganic potassium fertiliser, as K2O: 6.03585e-8, 1.74947e-6, 1.4486e-6, 8.66934e-6, 4.56867e-7, 1.75838e-5, 1.8716e-6, 5.75727e-7, 0.000217402, 1.55632e-5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 kg (61 entries); lognormal variance with pedigree 0.120177, pedigree (2,1,3,5,1)
  (same comment as for inorganic potassium fertiliser, as K2O)
- ammonium nitrate: 0.00254384, 0.0086356 kg (2 entries); lognormal variance with pedigree 0.120177, pedigree (2,1,3,5,1)
  (same comment as for ammonium nitrate)
- inorganic phosphorus fertiliser, as P2O5: 1.70496e-7, 1.41262e-5, 9.05726e-7, 1.83275e-5, 2.01771e-7, 1.46754e-5, 3.96367e-7, 2.0872e-6, 0.000114908, 2.42125e-5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 kg (61 entries); lognormal variance with pedigree 0.120177, pedigree (2,1,3,5,1)
  (same comment as for inorganic phosphorus fertiliser, as P2O5)
- waste wood, untreated: -9.84548e-5, -0.000322751, -0.00017827, -0.000300854, -0.000344251, -0.014486, -0.000306585, -0.00179865, -0.000131502, -6.55568e-5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 kg (40 entries); lognormal variance with pedigree 0.120177, pedigree (2,1,3,5,1)
  (same comment as for waste wood, untreated)
  production volume 1.31739e9 kg
- ammonia, anhydrous, liquid: 0.000150975, 2.01906e-5, 3.9194e-5, 4.10795e-6, 1.83641e-5, 0.00043444 kg (6 entries); lognormal variance with pedigree 0.120177, pedigree (2,1,3,5,1)
  (same comment as for ammonia, anhydrous, liquid)

## Inputs from nature
- Energy, gross calorific value, in biomass [natural resource, biotic]: 2.55048 MJ; lognormal variance with pedigree 0.00984984, pedigree (2,2,3,5,1)
  Calculated value: dry matter content = 16%
- Carbon dioxide, in air [natural resource, in air]: 0.222489 kg; lognormal variance with pedigree 0.00984984, pedigree (2,2,3,5,1)
  Calculated value: CO2 uptake by biomass. Dry matter content = 16%
- Transformation, to permanent crop, irrigated [natural resource, land]: 0.0158095 m2; lognormal variance with pedigree 0.0402144, pedigree (2,1,3,5,1)
  10000 m2 divided by the life time of the perennial crop (20 years).
- Transformation, from permanent crop, irrigated [natural resource, land]: 0.0158095 m2; lognormal variance with pedigree 0.0402144, pedigree (2,1,3,5,1)
  10000 m2 divided by the life time of the perennial crop (20 years).
- Occupation, permanent crop, irrigated [natural resource, land]: 0.317043 m2*year; lognormal variance with pedigree 0.0160616, pedigree (2,1,3,5,1)
  Related to the duration from harvest date of previous crop to harvest date of main crop.

## Emissions to nature
- Methiocarb [soil, agricultural]: 8.00384e-7 kg; lognormal variance with pedigree 0.0407216, pedigree (2,2,3,5,1)
  Calculated value - 100% emission in soil. See 'WFLDB-Guidelines.pdf', available at https://ecoquery.ecoinvent.org/File/Reports.
- Dimethoate [soil, agricultural]: 5.64385e-7 kg; lognormal variance with pedigree 0.0407216, pedigree (2,2,3,5,1)
  (same comment as for Methiocarb)
- Nickel [soil, agricultural]: 2.56292e-7 kg
  Comment on mathematicalRelation:
  1.83868448997e-07 from Calculated value - Freiermuth (2006). See 'WFLDB-Guidelines.pdf', available at https://ecoquery.ecoinvent.org/File/Reports.
  -1.65045364482e-07 from Crop, default, heavy metals uptake model
  Heavy metal uptake can be excluded by setting the parameter heavyMetalUptakeSwitch to zero.
- Cadmium [soil, agricultural]: 1.52051e-7 kg
  Comment on mathematicalRelation:
  7.83434318196e-08 from Calculated value - Freiermuth (2006). See 'WFLDB-Guidelines.pdf', available at https://ecoquery.ecoinvent.org/File/Reports.
  -1.6043180461e-08 from Crop, default, heavy metals uptake model
  Heavy metal uptake can be excluded by setting the parameter heavyMetalUptakeSwitch to zero.
- Mineral oil [soil, agricultural]: 0.00168777 kg; lognormal variance with pedigree 0.0407216, pedigree (2,2,3,5,1)
  (same comment as for Methiocarb)
- Ammonia [air, non-urban air or from high stacks]: 0.000442133 kg; lognormal variance with pedigree 0.0407216, pedigree (2,2,3,5,1)
  Calculated value - EMEP/EEA (2013). See 'WFLDB-Guidelines.pdf', available at https://ecoquery.ecoinvent.org/File/Reports.
- Mercury [water, surface water]: 1.76043e-10 kg; lognormal variance with pedigree 0.352938, pedigree (2,2,3,5,1)
  Calculated value - Freiermuth (2006). See 'WFLDB-Guidelines.pdf', available at https://ecoquery.ecoinvent.org/File/Reports.
- Water [water, surface water]: 0.0247823 m3; lognormal variance with pedigree 0.120177, pedigree (2,1,3,5,1)
  Calculated value - Emission calculated from water balance. See 'WFLDB-Guidelines.pdf', available at https://ecoquery.ecoinvent.org/File/Reports.
- Mercury [water, ground-]: 3.98545e-11 kg; lognormal variance with pedigree 0.352938, pedigree (2,2,3,5,1)
  (same comment as for Mercury)
- Mercury [soil, agricultural]: 1.10763e-9 kg
  Comment on mathematicalRelation:
  1.82128802549e-09 from Calculated value - Freiermuth (2006). See 'WFLDB-Guidelines.pdf', available at https://ecoquery.ecoinvent.org/File/Reports.
  -6.40779226685e-09 from Crop, default, heavy metals uptake model
  Heavy metal uptake can be excluded by setting the parameter heavyMetalUptakeSwitch to zero.
- MCPA [soil, agricultural]: 4.67034e-5 kg; lognormal variance with pedigree 0.0407216, pedigree (2,2,3,5,1)
  (same comment as for Methiocarb)
- Zinc, ion [water, surface water]: 1.18379e-7 kg; lognormal variance with pedigree 0.352938, pedigree (2,2,3,5,1)
  (same comment as for Mercury)
- Kaolin [soil, agricultural]: 7.34871e-6 kg; lognormal variance with pedigree 0.0407216, pedigree (2,2,3,5,1)
  (same comment as for Methiocarb)
- Lead [water, surface water]: 1.62076e-8 kg; lognormal variance with pedigree 0.352938, pedigree (2,2,3,5,1)
  (same comment as for Mercury)
- Zinc, ion [water, ground-]: 5.48296e-7 kg; lognormal variance with pedigree 0.352938, pedigree (2,2,3,5,1)
  (same comment as for Mercury)
- Lead [water, ground-]: 3.97243e-9 kg; lognormal variance with pedigree 0.352938, pedigree (2,2,3,5,1)
  (same comment as for Mercury)
- Zinc [soil, agricultural]: -2.08005e-6 kg
  Comment on mathematicalRelation:
  1.17290274221e-06 from Calculated value - Freiermuth (2006). See 'WFLDB-Guidelines.pdf', available at https://ecoquery.ecoinvent.org/File/Reports.
  -5.05958999313e-06 from Crop, default, heavy metals uptake model
  Heavy metal uptake can be excluded by setting the parameter heavyMetalUptakeSwitch to zero.
- Lead [soil, agricultural]: 5.24409e-8 kg
  Comment on mathematicalRelation:
  9.61709038666e-08 from Calculated value - Freiermuth (2006). See 'WFLDB-Guidelines.pdf', available at https://ecoquery.ecoinvent.org/File/Reports.
  -8.54409168593e-08 from Crop, default, heavy metals uptake model
  Heavy metal uptake can be excluded by setting the parameter heavyMetalUptakeSwitch to zero.
- Glyphosate [soil, agricultural]: 6.66771e-5 kg; lognormal variance with pedigree 0.0407216, pedigree (2,2,3,5,1)
  (same comment as for Methiocarb)
- Water [water, ground-]: 0.00619552 m3; lognormal variance with pedigree 0.120177, pedigree (2,1,3,5,1)
  (same comment as for Water)
- Diuron [soil, agricultural]: 8.39383e-6 kg; lognormal variance with pedigree 0.0407216, pedigree (2,2,3,5,1)
  (same comment as for Methiocarb)
- Dinitrogen monoxide [air, non-urban air or from high stacks]: 0.000123712 kg; lognormal variance with pedigree 0.120664, pedigree (2,2,3,5,1)
  Calculated value - IPCC (2006). See 'WFLDB-Guidelines.pdf', available at https://ecoquery.ecoinvent.org/File/Reports.
- Water [air, non-urban air or from high stacks]: 0.0943581 m3; lognormal variance with pedigree 0.120177, pedigree (2,1,3,5,1)
  (same comment as for Water)
- Copper, ion [water, surface water]: 1.07656e-7 kg; lognormal variance with pedigree 0.352938, pedigree (2,2,3,5,1)
  (same comment as for Mercury)
- Simazine [soil, agricultural]: 5.51692e-5 kg; lognormal variance with pedigree 0.246022, pedigree (5,5,5,5,5)
  (same comment as for Methiocarb)
- Copper, ion [water, ground-]: 1.09797e-7 kg; lognormal variance with pedigree 0.352938, pedigree (2,2,3,5,1)
  (same comment as for Mercury)
- Phosphorus [water, surface water]: 1.90991e-6 kg; lognormal variance with pedigree 0.171866, pedigree (2,2,3,5,1)
  Calculated value - Prasuhn (2006) and SQCB-Erosion. See 'WFLDB-Guidelines.pdf', available at https://ecoquery.ecoinvent.org/File/Reports.
- Spinosad [soil, agricultural]: 4.66904e-7 kg; lognormal variance with pedigree 0.0407216, pedigree (2,2,3,5,1)
  (same comment as for Methiocarb)
- Copper [soil, agricultural]: 5.00972e-5 kg
  Comment on mathematicalRelation:
  0.000145411955775 from Calculated value - Freiermuth (2006). See 'WFLDB-Guidelines.pdf', available at https://ecoquery.ecoinvent.org/File/Reports.
  -1.04704109314e-06 from Crop, default, heavy metals uptake model
  Heavy metal uptake can be excluded by setting the parameter heavyMetalUptakeSwitch to zero.
- Chromium, ion [water, surface water]: 7.13862e-8 kg; lognormal variance with pedigree 0.352938, pedigree (2,2,3,5,1)
  (same comment as for Mercury)
- Phosphate [water, surface water]: 2.85691e-5 kg; lognormal variance with pedigree 0.171866, pedigree (2,2,3,5,1)
  Calculated value - Prasuhn (2006). See 'WFLDB-Guidelines.pdf', available at https://ecoquery.ecoinvent.org/File/Reports.
- Oryzalin [soil, agricultural]: 6.66992e-7 kg; lognormal variance with pedigree 0.0407216, pedigree (2,2,3,5,1)
  (same comment as for Methiocarb)
- Chromium, ion [water, ground-]: 6.17391e-7 kg; lognormal variance with pedigree 0.352938, pedigree (2,2,3,5,1)
  (same comment as for Mercury)
- Phosphate [water, ground-]: 5.82958e-6 kg; lognormal variance with pedigree 0.171866, pedigree (2,2,3,5,1)
  (same comment as for Phosphate)
- Oxyfluorfen [soil, agricultural]: 2.25751e-7 kg; lognormal variance with pedigree 0.0407216, pedigree (2,2,3,5,1)
  (same comment as for Methiocarb)
- 2,4-D [soil, agricultural]: 5.65305e-7 kg; lognormal variance with pedigree 0.0407216, pedigree (2,2,3,5,1)
  (same comment as for Methiocarb)
- Chromium [soil, agricultural]: 5.8603e-7 kg
  Comment on mathematicalRelation:
  -8.61092510463e-08 from Crop, default, heavy metals uptake model
  Heavy metal uptake can be excluded by setting the parameter heavyMetalUptakeSwitch to zero.
- Nitrogen oxides [air, non-urban air or from high stacks]: 0.000251379 kg; lognormal variance with pedigree 0.120664, pedigree (2,2,3,5,1)
  Calculated value - EEA/EMEP (2013). See 'WFLDB-Guidelines.pdf', available at https://ecoquery.ecoinvent.org/File/Reports.
- Chlorpyrifos methyl [soil, agricultural]: 0.000106509 kg; lognormal variance with pedigree 0.246022, pedigree (5,5,5,5,5)
  (same comment as for Methiocarb)
- Pendimethalin [soil, agricultural]: 4.49458e-6 kg; lognormal variance with pedigree 0.0407216, pedigree (2,2,3,5,1)
  (same comment as for Methiocarb)
- Imidacloprid [soil, agricultural]: 1.25191e-6 kg; lognormal variance with pedigree 0.0407216, pedigree (2,2,3,5,1)
  (same comment as for Methiocarb)
- Nitrate [water, ground-]: 0.00251384 kg; lognormal variance with pedigree 0.171866, pedigree (2,2,3,5,1)
- Carbon dioxide, fossil [air, non-urban air or from high stacks]: 0.000519031 kg; lognormal variance with pedigree 0.00984984, pedigree (2,2,3,5,1)
  Calculated value - CO2 emissions from urea and lime. See 'WFLDB-Guidelines.pdf', available at https://ecoquery.ecoinvent.org/File/Reports.
- Buprofezin [soil, agricultural]: 6.77243e-7 kg; lognormal variance with pedigree 0.0407216, pedigree (2,2,3,5,1)
  (same comment as for Methiocarb)
- Carbon dioxide, from soil or biomass stock [air, non-urban air or from high stacks]: 0.00496477 kg; normal variance with pedigree 0.5452, pedigree (3,3,5,5,2)
  Global average LUC emissions according 2nd edition of the Quantis-modified tool developed by Blonk Consultants 'WFLDB-adapted-Blonk 2014 direct-land-use-change-assessment-tool_2015-05-18a.xlsx', tab. 'Country & land use unknown'. The emission are based on the relative change in production areas in all countries for a given crop. The weighted average is used which takes into acount relative difference in crop expansion into primary forest, secondary forest, grassland, perennial and annual land.
  Uncertainty: Uncertainty estimated based on IPCC guidlines 2006.
- Nickel, ion [water, surface water]: 5.29325e-8 kg; lognormal variance with pedigree 0.352938, pedigree (2,2,3,5,1)
  (same comment as for Mercury)
- Cadmium, ion [water, surface water]: 7.83513e-10 kg; lognormal variance with pedigree 0.352938, pedigree (2,2,3,5,1)
  (same comment as for Mercury)
- Metalaxyl-M [soil, agricultural]: 7.69599e-8 kg; lognormal variance with pedigree 0.0407216, pedigree (2,2,3,5,1)
  (same comment as for Methiocarb)
- Nickel, ion [water, ground-]: 5.01377e-12 kg; lognormal variance with pedigree 0.352938, pedigree (2,2,3,5,1)
  (same comment as for Mercury)
- Cadmium, ion [water, ground-]: 1.37105e-9 kg; lognormal variance with pedigree 0.352938, pedigree (2,2,3,5,1)
  (same comment as for Mercury)

## Sampling procedure
WFLDB Methodological Guidelines for the Life Cycle Inventory of Agricultural Products in the latest version, available at: https://ecoquery.ecoinvent.org/File/Reports. Data sources: Data were categorised from level 0 (L0) to level (L4) as follows: L0 = estimate, proxy; L1 = statistical data (e.g. FAOSTAT); L2 = L1 adapted to crop and country; L3 = literature data or L1 resp. L2 data approved by experts; medium detailing (i.e. kg of total N-fertiliser); L4 = L3 data of high detailing (i.e. portion N-fertiliser types).In this dataset data were obtained for yield: L3; Fertilisers: L4; Pesticides: L1; Machinery: L0; Irrigation: L2. For information regarding the calculation of individual exchanges see supporting documentation WFLDB-Documentation.pdf

## Extrapolations
The amount of the exchanges are weighted average of regional datasets.

## Review by Assumpció ANTON 2016-05-30
Be aware that the use of statistics in input calculations could provide some specific inputs not common for specific crops, this should be corrected if better information is available and better reflexed in DQR . Currently, I would dissent for some of good marks provided, being a revision of criteria applied advisable.

Pesticides will need to be amended periodically checking for update of pesticides' ban.
