# transport, freight, sea, container ship with reefer, freezing

Dataset: EcoSpold 2, unit process
Geography: GLO
Time period: 2010-01-01 to 2021-12-31
Technology level: current
Classification: ISIC rev.4 ecoinvent: 5012:Sea and coastal freight water transport
Scenario: Business-as-Usual
System model: Allocation, cut-off by classification
Generated by: Tereza Levova
Database: ecoinvent
isCopyrightProtected: true
accessRestrictedTo: 1

## General comment
This dataset represent transport of reefer (refrigerated container) on a transoceanic ship. The operation mode of the reefer is freezing (temperature between -35°C and -18°C).
The amount of operation of the reefer needed is calculated using the assumption of the average speed of the transoceanic ship.
Transoceanic ship carying reefers (http://www.hellenicshippingnews.com/cma-cgm-is-launching-the-citrus-express-service-for-seasonal-exportation-of-fruits-between-east-med-and-black-sea/, accessed 20141216).

## Included activities start
This dataset simply combine two other activities - transport, freight, sea, transoceanic ship and operation of reefer, For more information on these two activities please see the datasets representing these two activities.

## Parameters
- speed: 26 km/hour; name speed_ship; lognormal variance with pedigree 0.0166, pedigree (4,5,1,1,1)
  Estimated value based on an literature and (http://people.hofstra.edu/geotrans/eng/ch3en/conc3en/ch3c4en.html, accessed 20141216) expert judgement. This value represents an average speed of transoceanic ship with reefers including all stops and breaks.

## Reference product
- transport, freight, sea, container ship with reefer, freezing: 1 metric ton*km; name transport_ship_RP; By-product classification allocatable product; CPC 65211: Coastal and transoceanic water transport services of freight by refrigerator vessels
  production volume 1.43722e9 metric ton*km; = 42.8E9*1.46*0.05*0.46
    Estimated based on literature.
    42.8 billion tonne-miles was the total sea cargo in 2011 (International Transport Forum, http://www.internationaltransportforum.org/statistics/StatBrief/2013-12-Trends-Perspective.pdf, accessed20150108).
    1 tonne mile is equal to 1.46 tonne kilometre.
    It is estimated, that out of all the cargo 5% was cargo in need of atmosphere control.
    According to literature (Drawry, 2008, published in http://www.hamburg-sued.com/group/media/sharedmedia/dokumente/brochures/Reefer_guide.pdf, accessed 20141216) the type of food transported in reefers is following;
    31% fresh fruits and vegetables (excl. bananas)
    20% bananas
    24% meat and poultry
    19% fish and seafood
    6% various (medicine, flowers, etc.)
    The fruits and vegetables (54%) in general need to be cooled during its storage and transport and the meat and seafood (46%) need to be frozen. The various is divided half/half between cooling and freezing.
  property price 0.00252415 EUR2005; name transport_ship_RP_price_EUR2005
    Calculated based on inputs: The price of the product has been calculated as a sum of the values of the material and energy inputs for this product. This value is therefore a rough estimation. It may underestimate the real price since there are additional expenses when producing any product. These expences can include for example labour costs, treatment of waste materials and profit for the producer. Please consider carefully whether this level of data quality is acceptable for your application.

## Inputs from technosphere
- operation, reefer, freezing: 1.60256 kg*day; = 1000*( transport_ship_RP/speed_ship/24); lognormal variance with pedigree 0.0186, pedigree (4,5,3,1,1)
  Calculated value based on estimated speed of the ship.
- transport, freight, sea, container ship: 1 metric ton*km; lognormal variance with pedigree 0.0026, pedigree (1,1,3,1,1)

## Extrapolations
This dataset has been extrapolated from year 2014 to the year of the calculation (2021). The uncertainty has been adjusted accordingly.
