# textile production, kenaf, weaving

Dataset: EcoSpold 2, unit process
Geography: IN
Time period: 2016-04-01 to 2021-03-31
Technology level: current
Classification: ISIC rev.4 ecoinvent: 1312:Weaving of textiles
Classification: EcoSpold01Categories: textiles/processing
Scenario: Business-as-Usual
System model: Allocation, cut-off by classification
Generated by: Avraam Symeonidis
Database: ecoinvent
isCopyrightProtected: true
accessRestrictedTo: 1

## General comment
Inventory refers to 1 kg woven kenaf textile
The process involves winding, beaming, weaving, damping, calendaring and lapping. The process starts with arrival of yarn to weaving section, beaming process follows when spool winding ends. To improve the quality of woven cloth and weaving efficiency, the wrap yarns are coated with sizing (starch paste). Adequate moisture is essential in this process. Weaving involves interlacement of two sets of threads, called "wrap" and "weft" yarns, to produce the fabric of desired quality, followed by damping (done manually) in which the rolled woven cloth is unrolled, and water is sprinkled on it continuously to provide desired moisture. After damping the damped fabric passes through pairs of heavy rollers, which renders the threads in fabric, flattened and improves the quality and appearance (calendaring). The last step is lapping in which Hessian fabrics are folded into the required size used in "Bale press" operation on the lapping machine.
The inventory is mainly based on industry data from a composite spinning and weaving mill located in Bellur, West Bengal (East India) and substantiated where necessary with secondary data from literature. The main inputs are jute yarn, TKP sizing solution (maize starch), sodium carbonate, salicylic acid, water and energy. It is important to note here that the energy data is calculated based on available secondary data for energy requirement of a similar to kenaf fibre processing machines.

## Included activities start
The activity starts with reception of yarn, kenaf.

## Included activities end
This activity ends with 1 kg textile, kenaf as the final product of the weaving process and ready to be transported.

## Reference product
- textile, kenaf: 1 kg; CPC 26570: Woven fabrics of jute and other textile bast fibres (except flax, true hemp and ramie); By-product classification allocatable product
  production volume 1.82227e7 kg
    It has been assumed that all kenaf yarn was used for textile production, considering losses of 2% (ecoinvent v2 report 21).
  property price 1.05 EUR2005
    Approximation. Average 2005 prices for EU27, USA, China, Japan and India from Import/Export data (US$ and tonnes) in UN Commodity Trade Statistics Database; Commodity: Fabrics, woven of jute or other textile bast fibres of heading 2640
  property heating value, net 14.87 MJ
    LHV is calculated based on the Carbon content of the product. More details can be found on the respective documentation.
  property carbon content 0.490909
    carbon content on a dry matter basis (reserved; not for manual entry)
  properties: water in wet mass 0 kg, carbon content, fossil 0, dry mass 1 kg, carbon content, non-fossil 0.490909, water content 0, wet mass 1 kg, carbon allocation 0.490909 kg

## Inputs from technosphere
- salicylic acid: 0.0001 kg; lognormal variance with pedigree 0.0126, pedigree (4,4,3,1,1)
  used for preparing sizing solution
  properties: heating value, net 23.71 MJ
- building, hall: 3.88681e-5 m2; = 20000/(857601*12*50); lognormal variance with pedigree 0.3026, pedigree (2,1,3,1,1)
  square meters of building divided by production per year and life time of the plant
- maize starch: 0.002577 kg; lognormal variance with pedigree 0.0126, pedigree (4,4,3,1,1)
  used for preparing sizing solution. Used to improve the quality of woven cloth and weaving efficiency.
  properties: carbon content, non-fossil 0.46, water content 0.162791, dry mass 0.86 kg, wet mass 1 kg, heating value, net 11.64 MJ
  note on carbon content, non-fossil: C-content of starch is considered 46% on dry mass basis (from "Evolutionary and Biochemical Aspects", A.D. Kay and T. Vrede (in Global Ecology, 2010, Elsevier B.V., S.E. Jørgensen Ed.)).
- electricity, low voltage: 0.63 kWh; lognormal variance with pedigree 0.0046, pedigree (1,4,3,1,1)
  sum of electricity used for
  Beaming
  Weaving
  Damping
  Calendering
  Lapping
  Compressor
- yarn, kenaf: 1 kg; lognormal variance with pedigree 0.0046, pedigree (1,4,3,1,1)
  properties: dry mass 1 kg, carbon content, non-fossil 0.490909, heating value, net 14.87 MJ, wet mass 1 kg
- chemical, organic: 0.0001 kg; lognormal variance with pedigree 0.0126, pedigree (4,4,3,1,1)
  Sodium carbonate, used for preparing sizing solution
  properties: wet mass 1 kg, dry mass 1 kg, carbon content, fossil 0.628, heating value, net 19.03 MJ
  note on carbon content, fossil: This dataset is an unweighted average of 20 organic substances (listed in Tab 88.1, ecoinvent v2.2 report 8, part II), being part of the top100 chemicals included in this database. The C-content has also been calculated as an unweighted average of the C content of the substances composing this dataset.

## Inputs from nature
- Water, well, in ground [natural resource, in water]: 0.0003473 m3; name water; = (0.2+0.1473)/1000; lognormal variance with pedigree 0.0046, pedigree (1,4,3,1,1)
  used for damping and preparing sizing solution. This is completly absorbed in fabric hence no output of water to air or wastewater considered here.

## Sampling procedure
Data has been collected through field visit and interview. Data has been obtained from a composite spinning and weaving mill located in Bellur, West Bengal (East India), India based on the representativeness of currently used technology, and the company’s willingness to share the data. Data are not strictly related to kenaf bur rather to a similar to kenaf natural fibre.

## Extrapolations
This dataset has been extrapolated from year 2017 to the year of the calculation (2021). The uncertainty has been adjusted accordingly.
