# cable production, network cable, category 5, without plugs

Dataset: EcoSpold 2, unit process
Geography: GLO
Time period: 2000-01-01 to 2021-12-31
Technology level: current
Classification: ISIC rev.4 ecoinvent: 2610:Manufacture of electronic components and boards
Classification: EcoSpold01Categories: electronics/component
Synonyms: Patch cable; Patch cord
Tags: ConvertedDataset
Scenario: Business-as-Usual
System model: Allocation, cut-off by classification
Generated by: Martin Lehmann
Published in: Hischier R. 2007
Database: ecoinvent
isCopyrightProtected: false
accessRestrictedTo: 1

## General comment
This dataset represents the production of 1 m of a typical network cable for desktop or laptop computers. It is based on a network cable UNINET flex 4P produced by Daetwyler of recent date and commonly in use, with a weight of 0.036 kg (without plugs). Main data are based on weighting and calculations of a Swiss type computer cable at EMPA laboratories, supported by EPD information.
[This dataset was already contained in the ecoinvent database version 2. It was not individually updated during the transfer to ecoinvent version 3. Life Cycle Impact Assessment results may still have changed, as they are affected by changes in the supply chain, i.e. in other datasets. This dataset was generated following the ecoinvent quality guidelines for version 2. It may have been subject to central changes described in the ecoinvent version 3 change report (http://www.ecoinvent.org/database/ecoinvent-version-3/reports-of-changes/), and the results of the central updates were reviewed extensively. The changes added e.g. consistent water flows and other information throughout the database. The documentation of this dataset can be found in the ecoinvent reports of version 2, which are still available via the ecoinvent website. The change report linked above covers all central changes that were made during the conversion process.]

## Included activities start
From reception of metal and plastic materials at the factory gate.

## Included activities end
This dataset includes materials copper, soft PVC, LDPE and tin (as coating) with their respective manufacturing processes, infrastructure, electricity for the assembly of the connector, the fuel oil, propane and water input, the disposal of plastic and rubber parts, the VOC and methanol emissions created during the processing, plus the road and rail transportation for input materials from the regional storage to the production site. The accumulated hazardous waste is also reported.

## Geography
The data describes a typical network cable for computers in 2006. The kind of cable is produced by international manufacturers and available all over the world. Therefore a global dataset is justifiable.

## Technology
The manufacturing process is represented by wire drawing (of copper), plastic extrusion (for LDPE and PVC), tin coating. Cable manufacturing is a process that typically is composed of: Insulation of copper conductors or optical fibres with selected polymer(s); If specified, shielding of insulated copper conductors (based on cable design); If specified, twisting of insulated conductors into pairs or triplets or quads (based on cable design); If specified, shielding of insulated pairs, triplets, or quads (based on cable design); Cabling of insulated conductors and/or pairs, triplets, quads into groups (based on cable de-sign); If specified, shielding of group(s) of conductors/pairs/triplets (based on cable design); Cabling of together unshielded and shielded groups of conductors into the cable bundle; If specified, overall shielding of cable bundle (based on cable design); If specified, application of separation barriers around cable bundle and/or overall shield; Jacketing over cable bundle or shielded cable bundle with selected polymer; Perform outgoing QA testing (tests based on cable design).

## Parameters
- fraction, process water, to air: 0.061 dimensionless; name fraction_PW_to_air; lognormal variance with pedigree 0.092025, pedigree (4,4,3,2,4)
  Literature value (Statistics Canada, 2007 & Shaffer, K.H., 2008, Consumptive water use in the Great Lakes Basin, USGS) (Vionnet, S., Quantis Water Database - Technical Report, 2012).
- fraction, tap water, to air: 0.061 dimensionless; name fraction_TW_to_air; = fraction_PW_to_air; lognormal variance with pedigree 0.092025, pedigree (4,4,3,2,4)
  Calculated value. See comment in the other parametres present in this dataset. Tap water is considered to be always used as process water, thus process water fractions to air are applied to all tap water input flows to calculate the amount of water consumed in the processes.

## Reference product
- cable, network cable, category 5, without plugs: 1 m; By-product classification allocatable product; CPC 46310: Insulated winding wire
  EcoSpold01Location=GLO
  Category 5 cable, commonly known as Cat 5, is an unshielded twisted pair cable type designed for high signal integrity. Category 5 has been superseded by the Category 5e specification. This type of cable is often used in structured cabling for computer networks such as Ethernet, although it is also used to carry many other signals such as basic voice services, token ring, and ATM (Asynchrone Transfere Mode, at up to 155 Mbit/s, over short distances). Category 5 cable includes four twisted pairs in a single cable jacket. This use of balanced lines helps preserve a high signal-to-noise ratio despite interference from both external sources and other pairs (this latter form of interference is called crosstalk) .
  Patch cables come in two varieties, straight through or reversed. One application of patch cables is for patching between modular patch panels in system centers. This is the straight through variety. Another application is to connect workstation equipment to the wall jack, and these could be eitherstraight through or reversed depending upon the manufacturer. Reversed cables are normally used for voice systems. Cable types, connector types and cabling topologies are defined by TIA/EIA-568-B. TIA/EIA-568-B represents a set of three standards that address commercial building cabling for telecommunications products and services. Perhaps the best known feature of TIA/EIA-568-B.1-2001 is the pin/pair assignments for eight-conductor 100-ohm balanced twisted pair cabling. These assignments are named T568A and T568B and they define the pinout, or order of connections, for wires in 8P8C eight-pin modular connector plugs and jacks.
  production volume 1 m
    Unknown
    Dummy value to be replaced by measured, estimated or calculated value
  property price 0.68 EUR2005
    USA price used for both RER and world. According to Industrial Commodity Statistics Yearbook 2005, volume 1. Physical Quantity Data. UN. New York 2008 (hard copy ). The US price divided by US production volume.
  property carbon content, fossil 0.203917
    Calculated as the addition of C contents in the product composition. Then referred to 1 kg DM
  property carbon content 0.203917
    carbon content on a dry matter basis (reserved; not for manual entry)
  properties: wet mass 0.036 kg, water in wet mass 0 kg, carbon content, non-fossil 0, water content 0, dry mass 0.036 kg, carbon allocation 0.00734101 kg

## Inputs from technosphere
- liquefied petroleum gas: 6.6774e-6 kg; lognormal variance with pedigree 0.0527, pedigree (2,4,5,3,1)
  Measured Value, in the Empa laboratories.
  EcoSpold01Location=RER
  properties: carbon content, fossil 0.821863, dry mass 1 kg, wet mass 1 kg, heating value, net 45.5 MJ
  note on heating value, net: Indicative value. Reference: Fuels - Higher and Lower Calorific Values, available at: https://www.engineeringtoolbox.com/fuels-higher-calorific-values-d_169.html
- extrusion, plastic film: 0.001 kg; lognormal variance with pedigree 0.0521, pedigree (1,4,5,3,1)
  Measured Value, in the Empa laboratories.
  EcoSpold01Location=RER
- electricity, medium voltage: 0.09354 kWh; source Draka 2004; lognormal variance with pedigree 0.0521, pedigree (1,4,5,3,1)
  EcoSpold01Location=UCTE
  Literature Value.
- zinc coat, pieces: 0.037699 m2; lognormal variance with pedigree 0.0521, pedigree (1,4,5,3,1)
  EcoSpold01Location=RER
  Measured Value, in the Empa laboratories.
- extrusion, plastic pipes: 0.01675 kg; lognormal variance with pedigree 0.0527, pedigree (2,4,5,3,1)
  Measured Value, in the Empa laboratories.
  EcoSpold01Location=RER
- copper, cathode: 0.01825 kg; lognormal variance with pedigree 0.0527, pedigree (2,4,5,3,1)
  Measured Value, in the Empa laboratories.
  EcoSpold01Location=RER
  properties: dry mass 1 kg, wet mass 1 kg
- waste plastic, mixture: 0 kg; source Draka 2004; pedigree (1,1,1,1,1)
  Literature Value.
  EcoSpold01Location=CH
  production volume 0 kg
    Calculated from the production volume of cable, network cable, category 5, without plugs in proportion to the respective output amounts.
  properties: water content 0.180638, wet mass 1 kg, carbon content, fossil 0.747344, dry mass 0.847 kg, heating value, net 30.79 MJ
  note on carbon content, fossil: C content in 1 kg DM was calculated using data in Tab A.2, ecoinvent v2.2 report 13_I
  note on heating value, net: Value taken from the general comment of the treatment dataset.
- polyvinylchloride, emulsion polymerised: 0.00213831 kg; lognormal variance with pedigree 0.0527, pedigree (2,4,5,3,1)
  EcoSpold01Location=RER
  Measured Value, in the Empa laboratories.
  properties: dry mass 1 kg, wet mass 1 kg, carbon content, fossil 0.387097, heating value, net 21.5 MJ
  note on carbon content, fossil: Monomer is vynyl chloride, C2H3Cl (ecoinvent v2.2 report 11_II). MW=62 g/mol
- heat, district or industrial, other than natural gas: 0.022529 MJ; source Draka 2004; lognormal variance with pedigree 0.0527, pedigree (2,4,5,3,1)
  EcoSpold01Location=RER
  Literature Value.
  properties: heating value, net 1 MJ
- polyethylene, low density, granulate: 0.001 kg; lognormal variance with pedigree 0.0521, pedigree (1,4,5,3,1)
  EcoSpold01Location=RER
  Measured Value, in the Empa laboratories.
  properties: wet mass 1 kg, carbon content, fossil 0.857143, dry mass 1 kg, heating value, net 42.47 MJ
  note on carbon content, fossil: Polyethylene is formed out of a huge amount of ethylene monomers (C2H4) (ecoinvent v2.2 report 11_II). MW=28 g/mol
- wire drawing, copper: 0.01825 kg; lognormal variance with pedigree 0.0527, pedigree (2,4,5,3,1)
  Measured Value, in the Empa laboratories.
  EcoSpold01Location=RER
- hazardous waste, for incineration: 0 kg; source Draka 2004; pedigree (1,1,1,1,1)
  Literature Value.
  EcoSpold01Location=CH
  production volume 0 kg
    (same comment as for waste plastic, mixture)
  properties: wet mass 1 kg, heating value, net 17 MJ, dry mass 0.75 kg, carbon content, fossil 0.554667, water content 0.333333
  note on carbon content, fossil: Tab A.6, ecoinvent v2.2 report 13_I. C content has been calculated after data in the tables, and then referred to 1 kg DM
- tap water: 0.726 kg; name tap_water_input; source Draka 2004; lognormal variance with pedigree 0.0527, pedigree (2,4,5,3,1)
  EcoSpold01Location=RER
  Literature Value.
  properties: dry mass 0.000337476 kg, wet mass 1 kg, water content 2962.17, carbon content, fossil 0.00178991
  note on carbon content, fossil: Bicarbonate content is 2.93 mol/m3. CO2 content is 0.1 mol/m3 (ecoinvent v2.2 report 8, Tab 93.1).
- printed wiring board mounting facility: 7.488e-9 unit; lognormal variance with pedigree 0.3527, pedigree (2,4,5,3,1)
  EcoSpold01Location=GLO
  Proxy, infrastructure for printed wiring board is used.
- polyvinylchloride, suspension polymerised: 0.0146117 kg; lognormal variance with pedigree 0.0527, pedigree (2,4,5,3,1)
  EcoSpold01Location=RER
  Measured Value, in the Empa laboratories.
  properties: carbon content, fossil 0.387097, wet mass 1 kg, heating value, net 21.5 MJ, dry mass 1 kg
- waste plastic, mixture: -8.7561e-5, -6.75044e-6, -2.78817e-6, -2.64763e-6, -0.00010103, -1.12639e-6, -5.10524e-7, -0.000707266 kg (8 entries); source Draka 2004; lognormal variance with pedigree 0.0527, pedigree (2,4,5,3,1)
  Literature Value.
  EcoSpold01Location=CH
  production volume 0.00090968 kg
- hazardous waste, for incineration: -3.5523e-5, -9.28551e-7, -7.38684e-5 kg (3 entries); source Draka 2004; lognormal variance with pedigree 0.0521, pedigree (1,4,5,3,1)
  Literature Value.
  EcoSpold01Location=CH
  production volume 0.00011032 kg

## Emissions to nature
- NMVOC, non-methane volatile organic compounds, unspecified origin [air, non-urban air or from high stacks]: 3.4839e-6 kg; source Draka 2004; lognormal variance with pedigree 0.1721, pedigree (1,4,5,3,1)
  Literature Value.
- Water [water, unspecified]: 0.000681714 m3; name water_to_water_unspecified; = (tap_water_input/1000)*(1-fraction_TW_to_air); lognormal variance with pedigree 0.0807, pedigree (2,2,5,1,1)
  Calculated value based on literature values and expert opinion. See comments in the parametres' comment field.
  property fraction, origin: salt water 0; name fraction_origin_salt_water_Ww
  property fraction, origin: fresh water 1; name fraction_origin_fresh_water_Ww
  property wet mass 1000 kg; name WM
  property carbon content, non-fossil 0; name C_content_non_fossil
  property water in wet mass 1000 kg; name WWM
  property carbon content, fossil 0; name C_content_fossil
  property dry mass 0 kg; name DM
  property fraction, origin: unspecified 0; name fraction_origin_unspecified_Ww
- Water [air, unspecified]: 4.4286e-5 m3; name water_to_air_unspecified; = (tap_water_input/1000*fraction_TW_to_air); lognormal variance with pedigree 0.0807, pedigree (2,2,5,1,1)
  (same comment as for Water)
  property fraction, origin: salt water 0; name fraction_origin_salt_water
  property fraction, origin: unspecified 0; name fraction_origin_unspecified
  property fraction, origin: fresh water 1; name fraction_origin_fresh_water
- Methanol [air, non-urban air or from high stacks]: 4.6452e-6 kg; source Draka 2004; lognormal variance with pedigree 0.1721, pedigree (1,4,5,3,1)
  Literature Value.

## Sampling procedure
Weighing and measuring of materials. Literature for electricity consumption (assembly), emissions and waste.

## Extrapolations
This dataset has been extrapolated from year 2006 to the year of the calculation (2021). The uncertainty has been adjusted accordingly.

## Review by Rolf Frischknecht 2007-11-07
passed

## Review by Roland Hischier 2011-09-22
Transfer of documentation done.
