# wood preservation, spray tunnel/deluging, solvent-based preservative, outdoor use, no ground contact

Dataset: EcoSpold 2, unit process
Geography: RER
Time period: 2012-01-01 to 2021-12-31
Technology level: current
Classification: ISIC rev.4 ecoinvent: 1610:Sawmilling and planing of wood
Synonyms: flow coating
Tags: Swiss brush-up completed
Scenario: Business-as-Usual
System model: Allocation, cut-off by classification
Generated by: Frank Werner
Database: ecoinvent
isCopyrightProtected: true
accessRestrictedTo: 1

## General comment
This dataset covers the treatment of wood in automated spraying and deluging/flow coating equipments. The automated spraying and deluging/flow coating process is considered to be a surface treatment and not a deep penetraton treatment.
Automated spraying is mostly applied at sawmills and carpentry shops, whereas deluging systems mainly operate in carpentry shops. Unlike all other industrial treatment processes, sawmill treatments aim to preserve wood in the short-term. Freshly cut wood is treated with fungicides to prevent the discoloration caused by blue stain forming fungi. This coloration depreciates the value of the wood.
Carpentry shops on the other hand fabricate wooden construction materials and treat them for long term protection against insects and fungi, e.g. by applying wood preservatives as primers before further surface treatment.
Despite some small differences in the operation and infrastructure, dipping/immersion applied by the two industrial sectors can be described by a generic 'automated sparying/deluging' emission scenario (OECD 2000).
Automated spray/deluge systems consist of longitudinal or transversal boxes that apply a (sometimes diluted) preservative to the wood on a continuously moving convey or belt.
In the case of automated spraying,the sawn timber enters the spraying box that applies the preservative to the surface of the wood for a period of 3 - 5 seconds. The particle size of the spray is a critical parameter for the effectiveness of the treatment. Spray boxes are relatively contained. Splashguards surround the spraying boxes to eliminate any droplets of spray from the rest of the mill area. Droplets are large enough to prevent the respiration of preservative solution.
After the spray boxes, the treated wood is stacked or sorted and put into the yard for shipment off-site. At sawmills, the treated wood does not remain in storage for long time periods. Wood is generally shipped off-site to manufacturers within 2-3 days after treatment. Longer storage periods occur at carpentry shops (adapted from OECD 2000).
Deluging/flow coating is a comparable automated method of applying industrial liquid coatings that involves directing numerous individual streams of coating over one or multiple parts that move horizontally on a conveyor, e.g. during wood window manufacturing. Flow coating can be used to cover multi-dimensional surfaces of a variety of shapes. The run-off paint or wood preserverative is recollected and reused. wooden semi-fabricates.

The following picture shows an installation for encapsulated automatic spraying as, e.g. used in sawmills:

## Included activities start
Service starting with the reception of the wood preservative at the factory gate

## Included activities end
The data set contains the treatment service of dried wood with wood preservative (primer) for use class 3 (outdoor use, no ground contact) based on organic solvents in the automated spraying or deluging process. It covers the necessary inputs of the wood preservative, electricity as well as some infrastructure. For the inventorying of emissions into surface water and air, see general comment.The dataset does not include wood. Also eventual waste streams (e.g. saw dust recollected from the automated spraying or deluging equipment) are not included.

## Parameters
- share of collected rainwater: 0.5 dimensionless; name share_collected_rainwater
- efficiency of air filter: 0.75 dimensionless; name efficiency_air_filter

## Reference product
- wood preservation, spray tunnel/deluging, organic solvent-based, outdoor use, no ground contact: 1 kg; CPC 54730: Painting services; By-product classification allocatable product
  production volume 2.58805e6 kg; name p_preservation; = 22300 * 1000/3429519*16584000 * 0.1* 0.72/3
    Total production in DE (2000): 22300 t (OECD 2000), extrapolated to RER via GDP, assuming 90% waterborne preservatives, a slit of 1/3 each between use classes 1-3 and a share of 72% spraying/deluging and 28% dipping (split in Germany for 2000, according to OECD 2000)
  property price 0.842861 EUR2005
    Calculated based on inputs: The price of the product has been calculated as a sum of the values of the material and energy inputs for this product. This value is therefore a rough estimation. It may underestimate the real price since there are additional expenses when producing any product. These expences can include for example labour costs, treatment of waste materials and profit for the producer. Please consider carefully whether this level of data quality is acceptable for your application.

## Inputs from technosphere
- wood preservation facility, flow coating equipment: 4.35388e-6 unit; = 1/((160*(2*(0.04+0.05)*2*(1.3+1.6))*0.25)*220*25); source Uhlemann T. 2012; lognormal variance with pedigree 0.576, pedigree (4,4,4,1,3)
  160 window frames (1300 mm x 1650 mm; circumference of profile: 4 x 5 cm) per day, 220 days a year of 25 years
- wood preservative, organic, outdoor use, no ground contact: 1 kg; lognormal variance with pedigree 0.0336, pedigree (1,3,4,1,1)
  properties: UVEK_relative_amount_8 0.1, UVEK_link_8 4417, UVEK_link_9 4433
  note on UVEK_relative_amount_8: No scaling needed as transport is modelled in market dataset that has been part of the brush-up
  note on UVEK_link_8: This link has been introduced to model transport specifically for the SAM model; to be used only in special submissions in coordination with ecoinvent and the Swiss FOEN.
- electricity, medium voltage: 0.568726 kWh; = (1.1*0.5+7*3/5)/((160/5)*(2*(0.04+0.05)*2*(1.3+1.6))*0.25); source Uhlemann T. 2012; lognormal variance with pedigree 0.037, pedigree (1,4,4,5,1)
  Hourly electricity consumption: 1.1 kW at a load factor of 0.5 (range: 0.2 - 0.8) for nossel stock plus 7 kWh/m3 for 3 m3 of pressurised air consumption/5 hours a day; coated area: 160/5 standardised windows (see comment field on wood preservation facility for surface calculation) at 0.25 kg preservative per m2.
  properties: UVEK_link_1 1779, UVEK_relative_amount_1 1
  note on UVEK_link_1: to be used only in special submissions in coordination with ecoinvent and the Swiss FOEN

## Emissions to nature
- 1,4-Butanediol [air, non-urban air or from high stacks]: 0.001552 kg; = (1-efficiency_air_filter)*0.0064*0.97; source OECD 2000; lognormal variance with pedigree 0.4001, pedigree (3,5,5,3,1)
  scenario according to (OECD 2000, p. 29 ff); proxy for a more complex aliphatic diol
  property carbon content, fossil 0.533098; name C_content_fossil_Butanediol
- NMVOC, non-methane volatile organic compounds, unspecified origin [air, non-urban air or from high stacks]: 0.21 kg; name nmvoc; = (1-efficiency_air_filter)*0.84*1; source OECD 2000; lognormal variance with pedigree 0.2501, pedigree (3,5,5,3,1)
  scenario according to (OECD 2000, p. 29ff); proxy for naphta
  property carbon content, non-fossil 0; name C_content_non_fossil_NMVOC
  property carbon content, fossil 0.854049; name C_content_fossil_NMVOC
- Butylcarbamate, iodopropynyl [water, surface water]: 0.0001125 kg; = (1-share_collected_rainwater)*0.0075*0.03; source OECD 2000; lognormal variance with pedigree 0.6001, pedigree (3,5,5,3,1)
  scenario according to (OECD 2000, p. 29ff)
- 2-Methyl-1-propanol [air, non-urban air or from high stacks]: 0.0202972 kg; = (1-efficiency_air_filter)*(0.0313*0.97+0.0524*0.97); source OECD 2000; lognormal variance with pedigree 0.4001, pedigree (3,5,5,3,1)
  scenario according to (OECD 2000, p. 29ff); proxy for more complex aliphatic alcohols
  property carbon content, fossil 0.648168; name C_content_fossil_Methyl_propanol
- Propiconazole [air, non-urban air or from high stacks]: 1.2e-6 kg; = (1-efficiency_air_filter)*0.0024*0.002; source OECD 2000; lognormal variance with pedigree 0.4001, pedigree (3,5,5,3,1)
  scenario according to (OECD 2000, p. 29ff)
  property carbon content, fossil 0.525977; name C_content_fossil_Propiconazole
- 2-Methyl-1-propanol [water, surface water]: 0.0012555 kg; = (1-share_collected_rainwater)*(0.0313*0.03+0.0524*0.03); source OECD 2000; lognormal variance with pedigree 0.6001, pedigree (3,5,5,3,1)
  scenario according to (OECD 2000, p. 29ff); proxy for more complex aliphatic alcohols
  property carbon content, fossil 0.648168; name C_content_fossil
- Cypermethrin [air, non-urban air or from high stacks]: 5e-7 kg; = (1-efficiency_air_filter)*0.001*0.002; source OECD 2000; lognormal variance with pedigree 0.4001, pedigree (3,5,5,3,1)
  scenario according to (OECD 2000, p. 29ff)
  property carbon content, fossil 0.634734; name C_content_fossil_Cypermethrin
- 1,4-Butanediol [water, surface water]: 9.6e-5 kg; = (1-share_collected_rainwater)*0.0064*0.03; source OECD 2000; lognormal variance with pedigree 0.6001, pedigree (3,5,5,3,1)
  scenario according to (OECD 2000, p. 29 ff); proxy for a more complex aliphatic diol
- Butylcarbamate, iodopropynyl [air, non-urban air or from high stacks]: 3.9375e-5 kg; = (1-efficiency_air_filter)*0.0075*0.021; source OECD 2000; lognormal variance with pedigree 0.6001, pedigree (3,5,5,3,1)
  scenario according to (OECD 2000, p. 29ff)
  property carbon content, fossil 0.341527; name C_content_fossil_IPBC
- Propiconazole [water, surface water]: 3.6e-5 kg; = (1-share_collected_rainwater)*0.0024*0.03; source OECD 2000; lognormal variance with pedigree 0.6001, pedigree (3,5,5,3,1)
  scenario according to (OECD 2000, p. 29ff)
- Carbon dioxide, fossil [air, non-urban air or from high stacks]: 2.12683 kg; = (0.84*1* C_content_fossil_NMVOC+0.001*0.002* C_content_fossil_Cypermethrin+0.0024*0.002* C_content_fossil_Propiconazole+0.0075*0.021* C_content_fossil_IPBC+(0.0313*0.97+0.0524*0.97)* C_content_fossil_Methyl_propanol+0.0064*0.97* C_content_fossil_Butanediol)*efficiency_air_filter/12*44; lognormal variance with pedigree 0.073, pedigree (5,1,4,1,1)
  assuming that all C retained in the filter is finally converted to CO2, irrespective of the filter technology
  property dry mass 1 kg; name DM
  property wet mass 1 kg; name WM

## Sampling procedure
Plant measurements for input of energy, water, etc. Estimates based on literature for air-borne emissions and emissions into water.

## Extrapolations
This dataset has been extrapolated from year 2012 to the year of the calculation (2021). The uncertainty has been adjusted accordingly.
