# sawnwood production, softwood, raw, dried (u=10%)

Dataset: EcoSpold 2, unit process
Geography: RoW
Time period: 2014-01-01 to 2021-12-31
Technology level: current
Classification: EcoSpold01Categories: wooden materials/extraction
Classification: ISIC rev.4 ecoinvent: 1610:Sawmilling and planing of wood
Scenario: Business-as-Usual
System model: Allocation, cut-off by classification
Generated by: Emilia Moreno Ruiz
Database: ecoinvent
isCopyrightProtected: false
accessRestrictedTo: 1

## General comment
This activity is providing a more generic sawnwood product, combining inputs from the specific products issued from drying in the sawmil. The relative contribution is based in their Production Volumes.

## Included activities start
Entry of the specific products issued of the drying activity

## Included activities end
Delivery of the generic planed product

## Reference product
- sawnwood, softwood, raw, dried (u=10%): 1 m3; By-product classification allocatable product; CPC 31101: Wood, sawn or chipped lengthwise, sliced or peeled, of a thickness exceeding 6 mm, of coniferous wood
  production volume 1.33931e7 m3; = 189669000*0.1
    10% of the Production Volume issued from the drying has been made accesible as this generic product
  property price 160 EUR2005
    Expert judgement (Urs Luginbühl, Swiss Sawmilling industry, personal communication in June 2014). Cross-reference; FAOSTAT (accessed 20140428). The price is calculated by using data on total world import quantity (m3) and import value (1000 USD), year 2005. 109432798 m3 of Sawnwood (C) - coniferous was imported in the world in 2005. The import value was 22249842000 USD. The calculated price is thus (22249842000/109432798=203*0.8=) 164 Euro.
  property heating value, net 7227.56 MJ
    Assumed equal to "sawnwood, softwood, dried (u=10%), planed".The property is based on a value of 13.38MJ/kg
  property carbon content 0.494
    carbon content on a dry matter basis (reserved; not for manual entry)
  properties: water in wet mass 42.24 kg, water content 0.1, carbon content, non-fossil 0.494, wet mass 464.64 kg, dry mass 422.4 kg, carbon content, fossil 0, carbon allocation 208.666 kg

## Inputs from technosphere
- sawnwood, lath, softwood, raw, dried (u=10%): 0.16 m3; lognormal variance with pedigree 0.0026, pedigree (1,1,3,1,1)
  The input share has been calculated using data from the drying activity
  properties: water content 0.1, wet mass 464.64 kg, heating value, net 6218.91 MJ, dry mass 422.4 kg, carbon content, non-fossil 0.494
- sawnwood, board, softwood, raw, dried (u=10%): 0.45 m3; lognormal variance with pedigree 0.0026, pedigree (1,1,3,1,1)
  The input share has been calculated using data from the drying activity
  properties: heating value, net 5700.67 MJ, carbon content, non-fossil 0.494, water content 0.1, dry mass 422.4 kg, wet mass 464.64 kg
  note on heating value, net: Assumed equal to "sawnwood, softwood, dried (u=10%), planed".The property is based on a value of 13.38MJ/kg
- sawnwood, beam, softwood, raw, dried (u=10%): 0.39 m3; lognormal variance with pedigree 0.0026, pedigree (1,1,3,1,1)
  The input share has been calculated using data from the drying activity
  properties: wet mass 464.64 kg, water content 0.1, heating value, net 6218.91 MJ, carbon content, non-fossil 0.494, dry mass 422.4 kg
