# sodium chloride production, brine solution

Dataset: EcoSpold 2, unit process
Geography: RER
Time period: 1994-01-01 to 2021-12-31
Technology level: current
Classification: ISIC rev.4 ecoinvent: 0893:Extraction of salt
Classification: EcoSpold01Categories: chemicals/inorganics
Synonyms: Salzlösung; salt solution
Tags: ConvertedDataset
Scenario: Business-as-Usual
System model: Allocation, cut-off by classification
Generated by: Roland Hischier
Published in: Althaus H.-J. 2007
Database: ecoinvent
isCopyrightProtected: true
accessRestrictedTo: 1

## General comment
[This dataset was already contained in the ecoinvent database version 2. It was not individually updated during the transfer to ecoinvent version 3. Life Cycle Impact Assessment results may still have changed, as they are affected by changes in the supply chain, i.e. in other datasets. This dataset was generated following the ecoinvent quality guidelines for version 2. It may have been subject to central changes described in the ecoinvent version 3 change report (http://www.ecoinvent.org/database/ecoinvent-version-3/reports-of-changes/), and the results of the central updates were reviewed extensively. The changes added e.g. consistent water flows and other information throughout the database. The documentation of this dataset can be found in the ecoinvent reports of version 2, which are still available via the ecoinvent website. The change report linked above covers all central changes that were made during the conversion process.]

## Included activities end
this module includes the solution mining process of sodium chloride for the preparation of a brine for industrial use. No cleaning or drying step are therefore included.

## Geography
estimation, based on one European literature source - valable for european situation

## Technology
modern solution mining technique (mix)

## Parameters
- fraction, process water, to air: 0.205 dimensionless; name fraction_PW_to_air; lognormal variance with pedigree 0.092025, pedigree (4,4,3,2,4)
  Literature value (Statistics Canada, 2007 & Shaffer, K.H., 2008, Consumptive water use in the Great Lakes Basin, USGS) (Vionnet, S., Quantis Water Database - Technical Report, 2012).

## Reference product
- sodium chloride, brine solution: 1 kg; By-product classification allocatable product; CPC 16200: Salt and pure sodium chloride; sea water; CAS 7647-14-5
  EcoSpold01Location=RER
  production volume 1.32237 kg
    This is a placeholder value that does not reflect real-world production volumes. This dataset does not currently require a real-world production volume to work in the database framework, and no actual data were collected yet. This has no negative effect on the results of the ecoinvent database. The placeholder value of this activity was scaled according to the nominal GDP of 2005 (source: United Nations, http://data.un.org/Glossary.aspx?q=GDP+%28current+US%24%29, accessed 20130726) to reflect an appropriate share of the global production volume, which is also a placeholder value.
  property price 0.221501 EUR2005
    Calculated based on inputs: The price of the product has been calculated as a sum of the values of the material and energy inputs for this product. This value is therefore a rough estimation. It may underestimate the real price since there are additional expenses when producing any product. These expences can include for example labour costs, treatment of waste materials and profit for the producer. Please consider carefully whether this level of data quality is acceptable for your application.
  property carbon content 0
    carbon content on a dry matter basis (reserved; not for manual entry)
  properties: carbon content, fossil 0, wet mass 1 kg, carbon content, non-fossil 0, water in wet mass 0 kg, dry mass 1 kg, water content 0, carbon allocation 0 kg

## Inputs from technosphere
- heat, district or industrial, natural gas: 0.169 MJ; lognormal variance with pedigree 0.1501, pedigree (3,5,5,3,4)
  EcoSpold01Location=RER
  Based on 1 literature source
  Uncertainty: based on 1 literature source
  properties: heating value, net 1 MJ
- electricity, medium voltage: 0.067 kWh; lognormal variance with pedigree 0.1501, pedigree (3,5,5,3,4)
  EcoSpold01Location=UCTE
  Based on 1 literature source
  Uncertainty: based on 1 literature source
- heat, district or industrial, other than natural gas: 0.169 MJ; lognormal variance with pedigree 0.1501, pedigree (3,5,5,3,4)
  (same comment as for heat, district or industrial, natural gas)
  properties: heating value, net 1 MJ
- chemical factory, organics: 4e-10 unit; lognormal variance with pedigree 0.5861, pedigree (4,5,5,3,5)
  EcoSpold01Location=RER
  Estimation, based on Infrastructure of chemical production
  Uncertainty: Estimation, based on Infrastructure of chemical production

## Inputs from nature
- Sodium chloride, in ground [natural resource, in ground]: 1 kg; lognormal variance with pedigree 0.1501, pedigree (3,5,5,3,4)
  Based on 1 literature source
  Uncertainty: based on 1 literature source
- Water, salt, sole [natural resource, in water]: 0.00255624 m3; name water_salt_sole_input; source IPPC - Integrated Pollution Prevention a 2007; lognormal variance with pedigree 0.052625, pedigree (3,3,5,2,1)
  Calculated based on literature (IPPC, 2007, Large Volume Inorganic Chemicals; Kostick, D.S., 2008, Minerals Yearbook - Salt), (Vionnet, S., Quantis Water Database - Technical Report, 2012).
  property carbon content, non-fossil 0; name C_content_non_fossil
  property water content 28.2857; name water_content
  property carbon content, fossil 0; name C_content_fossil
  property dry mass 35 kg; name DM
  property water in wet mass 990 kg; name WWM
  property wet mass 1025 kg; name WM
- Water, unspecified natural origin [natural resource, in water]: 0.00382 m3; name water_UNO_input; lognormal variance with pedigree 0.1501, pedigree (3,5,5,3,4)
  Based on 1 literature source
  Uncertainty: based on 1 literature source

## Emissions to nature
- Water [air, unspecified]: 0.00130713 m3; name water_to_air_unspecified; = (water_salt_sole_input*fraction_PW_to_air)+(water_UNO_input*fraction_PW_to_air); lognormal variance with pedigree 0.0807, pedigree (2,2,5,1,1)
  Calculated value based on literature values and expert opinion. See comments in the parametres' comment field.
  property fraction, origin: unspecified 0.599099; name fraction_origin_unspecified
  property fraction, origin: salt water 0.400901; name fraction_origin_salt_water
  property fraction, origin: fresh water 0; name fraction_origin_fresh_water
- Water [water, unspecified]: 0.00506911 m3; name water_to_water_unspecified; = water_salt_sole_input*(1-fraction_PW_to_air)+water_UNO_input*(1-fraction_PW_to_air); lognormal variance with pedigree 0.0807, pedigree (2,2,5,1,1)
  (same comment as for Water)
  property fraction, origin: salt water 0.400901; name fraction_origin_salt_water_Ww
  property fraction, origin: fresh water 0; name fraction_origin_fresh_water_Ww
  property fraction, origin: unspecified 0.599099; name fraction_origin_unspecified_Ww

## Sampling procedure
literature data

## Extrapolations
This dataset has been extrapolated from year 1994 to the year of the calculation (2021). The uncertainty has been adjusted accordingly.

## Review by Heiko Kunst 2003-06-20
Passed
Passed
