# board, softwood, raw, kiln drying to u=20%

Dataset: EcoSpold 2, unit process
Geography: RoW
Time period: 2011-01-01 to 2021-12-31
Technology level: current
Classification: ISIC rev.4 ecoinvent: 1610:Sawmilling and planing of wood
Scenario: Business-as-Usual
System model: Allocation, cut-off by classification
Generated by: [System]
Published in: Bauer, C. 2007
Database: ecoinvent
isCopyrightProtected: true
accessRestrictedTo: 1

## General comment
This dataset represents the service of kiln drying of one m3 sawn softwood board. The wood chip used in the process is considered to be supplied internally which are generated from slabs and sidings when sawing. Characteristics of the of wood chips to be burned: Dry wood density 440 kg/m3;the low heating value 3007 MJ/m3., humidity when burned is estimated to be around 50%, which is achieved after some weeks of drying in the storage. Air emission factors as well as the boiler efficiency represent average annual operation including start and stop (warm-up and shut-down). The boiler used is considered to be 300 kW and emission profile refers to the facility. Shrinkage ratio of between the moisture content of u=30% - 0% is 0.004 %/%.
The data was provided by and approved by the Swiss forest industry (Holzindustrie Schweiz HIS).
Within ecoinvent, three products - boards, beams and laths - are distinguished:
After being sawn, the resulting products can either be air dried down to a moisture content of u=20% (mass of water per dry mass), kiln dried down to u=20% or kiln dried down to u=10%. The activity name indicates the respective product, drying technology and target moisture.

## Included activities start
Kiln drying process starting from sawn softwood, at the sawmill site, assumed to lose some water before the start of the kiln drying process.

## Included activities end
This activity ends with kiln dried softwood board, at sawmill. The dataset includes kiln drying of wet wood assumed as u=60% down to u=20%,shrinkage and emissions associated with wood chip incineration. The dataset does not include air emissions released from the wood, as these emissions are assumed to be similar to natural emissions from decomposition/rotting of wood.

## Parameters
- emission of Nitrogen oxides: 0.00024 kg/MJ; name no2
  updated emission profile (amount of emission in kg/MJ heat) based on personal communication, PSI, 2014
- emission of zinc: 4e-7 kg/MJ; name zinc
  (same comment as for emission of Nitrogen oxides)
- emission of lead: 3.33333e-8 kg/MJ; name lead
  (same comment as for emission of Nitrogen oxides)
- emission of polycyclic aromatic hydrocarbons: 1.48e-8 kg/MJ; name PAH
  (same comment as for emission of Nitrogen oxides)
- emission of ammonia: 2.30667e-6 kg/MJ; name ammonia
  (same comment as for emission of Nitrogen oxides)
- emission of m-Xylene: 1.6e-7 kg/MJ; name mXylene
  (same comment as for emission of Nitrogen oxides)
- furnace, wood chip: 2.31481e-8 unit/MJ; name furnace_energy
  inventory of furnace per MJ of heating demand
- wood ash: 0.000634667 kg/MJ; name woodash
  generation of wood ash per MJ
- emission of benzo(a)pyrene: 6.66667e-10 kg/MJ; name benzo
  (same comment as for emission of Nitrogen oxides)
- moisture content board: 20 dimensionless; name moisture_board
  moisture content of board
- emission of benzene: 1.21333e-6 kg/MJ; name benzene
  (same comment as for emission of Nitrogen oxides)
- emission of dioxin measured as 2,3,7,8-tetrachlorodibenzo-p-dioxin: 4.13333e-14 kg/MJ; name tetrachloro
  (same comment as for emission of Nitrogen oxides)
- emission of Formaldehyde: 1.73333e-7 kg/MJ; name Formaldehyde
  (same comment as for emission of Nitrogen oxides)
- moisture content wood chip: 50 dimensionless; name moisture_woodchip
  moisture content of wood chip
- emission of Fluorine: 6.66667e-8 kg/MJ; name Fluorine
  (same comment as for emission of Nitrogen oxides)
- total heat: 468 MJ; name heat_woodchip
  total thermal energy required for the drying process per m3 of output
- emission of Nickel: 8e-9 kg/MJ; name Nickel
  (same comment as for emission of Nitrogen oxides)
- emission of Particulates >10: 6.66667e-6 kg/MJ; name Particulates_higher_10
  (same comment as for emission of Nitrogen oxides)
- emission of Mercury: 4e-10 kg/MJ; name Mercury
  (same comment as for emission of Nitrogen oxides)
- emission of sulfur dioxide: 3.33333e-6 kg/MJ; name SO2
  (same comment as for emission of Nitrogen oxides)
- emission of benzene, ethyl: 4e-8 kg/MJ; name ben_ethyl
  (same comment as for emission of Nitrogen oxides)
- emission of Potassium: 3.12e-5 kg/MJ; name Potassium
  (same comment as for emission of Nitrogen oxides)
- emission of Phosphorus: 4e-7 kg/MJ; name Phosphorus
  (same comment as for emission of Nitrogen oxides)
- emission of Phenol, pentachloro-: 1.08e-11 kg/MJ; name Phenol_pentachloro
  (same comment as for emission of Nitrogen oxides)
- emission of toluene: 4e-7 kg/MJ; name toluene
  (same comment as for emission of Nitrogen oxides)
- emission of Particulates >2.5 to <10: 6.66667e-6 kg/MJ; name Particulates2_5_to_10
  (same comment as for emission of Nitrogen oxides)
- emission of bromine: 8e-8 kg/MJ; name bro
  (same comment as for emission of Nitrogen oxides)
- emission of benzene, hexachloro: 9.6e-15 kg/MJ; name ben_hexa
  (same comment as for emission of Nitrogen oxides)
- emission of Particulates 2.5: 0.00012 kg/MJ; name Particulate2_5
  (same comment as for emission of Nitrogen oxides)
- emission of dinitrogen monoxide: 3.06667e-6 kg/MJ; name N2O
  (same comment as for emission of Nitrogen oxides)
- emission of sodium: 1.73333e-6 kg/MJ; name sodium
  (same comment as for emission of Nitrogen oxides)
- emission of calcium: 7.8e-6 kg/MJ; name calcium
  (same comment as for emission of Nitrogen oxides)
- emission of Methane, non-fossil: 5.33333e-7 kg/MJ; name Methane_nonfossil
  (same comment as for emission of Nitrogen oxides)
- emission of arsenic: 1.33333e-9 kg/MJ; name arsenic
  (same comment as for emission of Nitrogen oxides)
- emission of chlorine: 2.4e-7 kg/MJ; name ch
  (same comment as for emission of Nitrogen oxides)
- emission of cadmium: 9.33333e-10 kg/MJ; name cadmium
  (same comment as for emission of Nitrogen oxides)
- emission of acetaldehyde: 8.13333e-8 kg/MJ; name acet
  (same comment as for emission of Nitrogen oxides)
- emission of chromium 4: 5.33333e-11 kg/MJ; name chroIV
  (same comment as for emission of Nitrogen oxides)
- emission of Magnesium: 4.8e-7 kg/MJ; name Magnesium
  (same comment as for emission of Nitrogen oxides)
- wood density, dry: 440 kg/m3; name dry_wood_d
  kg oven-dry matter/oven-dry volume
- shrinkage ratio (u=30% - 0%): 0.004 dimensionless; name shrinkage_ratio
  shrinkage ratio between u=30% to 0%
- emission of carbon monoxide, non-fossil: 0.0004 kg/MJ; name co
  (same comment as for emission of Nitrogen oxides)
- emission of copper: 2.93333e-8 kg/MJ; name copper
  (same comment as for emission of Nitrogen oxides)
- emission of Manganese: 2.26667e-7 kg/MJ; name Manganese
  (same comment as for emission of Nitrogen oxides)
- emission of Hydrocarbons, aliphatic, unsaturated: 4.13333e-6 kg/MJ; name Hydrocarbons_aliphatic
  (same comment as for emission of Nitrogen oxides)
- emission of Hydrocarbons, aliphatic, alkanes, unspecified: 1.21333e-6 kg/MJ; name Hydrocarbons_aliphatic_alkanes
  (same comment as for emission of Nitrogen oxides)
- emission of non-methane volatile organic compounds, unspecified origin: 1.4e-5 kg/MJ; name NMVOC
  (same comment as for emission of Nitrogen oxides)
- emission of chromium: 5.28e-9 kg/MJ; name chromium
  (same comment as for emission of Nitrogen oxides)
- wood density, basic: 404.8 kg/m3; name basic_wood_d
  kg oven-dry matter/wet volume
- scaling factor: 1.33333 dimensionless; name scaling_factor; lognormal variance with pedigree 0.0016, pedigree (2,1,1,1,1)
  The scaling factor corresponds to the inverse of the average annual efficiency of the heating system, including start/stop (warm up and cool down). Therefore, this efficiency will be lower than figures provided by manufacturers. The estimated value was provided by T.Nussbaumer, Verenum, and represents the average installed boiler in this size category in Switzerland.

## Reference product
- sawnwood, board, softwood, raw, dried (u=20%): 1 m3; name board_raw_kiln; CPC 31101: Wood, sawn or chipped lengthwise, sliced or peeled, of a thickness exceeding 6 mm, of coniferous wood; By-product classification allocatable product
  production volume 1.062e7 m3; name p_sawnwood_dried; = 57510/1079420*296662059
    Annual production of sawn softwood (sawnwood C = coniferous from FAOStat for Switzerland), extrapolatedion to global production volume via the production volumes of sawnwood (C = coniferous) in Switzerland and globally according to FAOStat
  property heating value, net 5860.46 MJ
    LHV is calculated based on the Carbon content of the product. More details can be found on the respective documentation.The property is based on a value of 12.06MJ/kg
  property wet mass 485.76 kg; = basic_wood_d*(1+ water_content)
  property price 160 EUR2005; name board_raw_kiln_price_EUR2005
    Expert judgement (Urs Luginbühl, Swiss Sawmilling industry, personal communication in June 2014). Cross-reference; FAOSTAT (accessed 20140428). The price is calculated by using data on total world import quantity (m3) and import value (1000 USD), year 2005. 109432798 m3 of Sawnwood (C) - coniferous was imported in the world in 2005. The import value was 22249842000 USD. The calculated price is thus (22249842000/109432798=203*0.8=) 164 Euro.
  property water content 0.2; name water_content
  property dry mass 404.8 kg; = basic_wood_d
  property water in wet mass 80.96 kg; name WWM_dried; = basic_wood_d* water_content
  property carbon content 0.494
    carbon content on a dry matter basis (reserved; not for manual entry)
  properties: carbon content, non-fossil 0.494, carbon content, fossil 0, carbon allocation 199.971 kg

## Inputs from technosphere
- wood ash mixture, pure: -0.297024 kg; name wood_ash; lognormal variance with pedigree 0.0112, pedigree (2,1,4,5,1)
  calculated from the amount of wood ash per MJ heat produced times the amount of heat needed for drying; according to updated emission profiles by PSI and heat requirements from industry.
  production volume 3.17147e6 kg; = wood_ash*p_sawnwood_dried/board_raw_kiln
    Calculated from production volume of reference product using the relative outputs.
  property price 0 EUR2005; name wood_ash_price_EUR2005
  properties: dry mass 1 kg, wet mass 1 kg, carbon content, non-fossil 0.012
- furnace, wood chips, with silo, 300kW: 1.08333e-5 unit; name furnace; lognormal variance with pedigree 0.4406, pedigree (2,1,4,5,1)
  infrastructure for the production of heat from wood chips
- electricity, medium voltage: 0 kWh; name elec_midvol; pedigree (1,1,1,1,1)
  used to run the kiln; industry data
- wood chips, wet, measured as dry mass: 33.5124 kg; name woodchip_soft; lognormal variance with pedigree 0.0106, pedigree (2,1,4,5,1)
  used as a fuel to produce heat for the drying process
  property dry mass 1 kg; name woodchip_soft_DM
  property water content 0.5; name woodchip_soft_water_content
  property water in wet mass 0.5 kg; name woodchip_soft_WWM
  property heating value, net 12.4133 MJ; name woodchip_soft_Net_Heat_Value
  property heating value, gross 20.4 MJ; name woodchip_soft_Gross_Heat_Value
  property wet mass 1.5 kg; name woodchip_soft_WM
  property carbon content, non-fossil 0.494; name woodchip_soft_C_content_non_fossil
  property carbon content, fossil 0; name woodchip_soft_C_content_fossil
  note on heating value, net: net (lower) heating (calorific) value; calculated according to ecoinvent guidelines 2.2
  note on heating value, gross: gross (upper) heating (calorific) value according to ecoinvent guidelines 2.2
- technical wood drying facility: 3.66e-6 unit; name wooddrying; lognormal variance with pedigree 0.4406, pedigree (2,1,4,5,1)
  infrastructure, data from ecoinvent 2.2
- sawnwood, softwood, raw: 1.04167 m3; name m_sawnwood; source Rudi Wagenführ 2000; lognormal variance with pedigree 0.0106, pedigree (2,1,4,5,1)
  Processed internally within the sawmill
  property water in wet mass 271.04 kg; name WWM_sawnwood
  properties: wet mass 658.24 kg, water content 0.7, carbon content, non-fossil 0.494, dry mass 387.2 kg, heating value, net 5130.57 MJ
- electricity, medium voltage: 0.169521, 0.0325068, 0.264987, 0.545722, 7.93704, 1.11873, 3.23149 kWh (7 entries); lognormal variance with pedigree 0.0106, pedigree (2,1,4,5,1)
  used to run the kiln; industry data

## Emissions to nature
- Lead [air, urban air close to ground]: 1.56e-5 kg; lognormal variance with pedigree 0.0112, pedigree (2,1,4,5,1)
  calculated from the emission profile per MJ heat produced times the amount of heat needed for drying; according to updated emission profiles by PSI and heat requirements from industry.
- Fluorine [air, urban air close to ground]: 3.12e-5 kg; lognormal variance with pedigree 0.0112, pedigree (2,1,4,5,1)
  (same comment as for Lead)
- Carbon monoxide, non-fossil [air, urban air close to ground]: 0.1872 kg; lognormal variance with pedigree 0.0112, pedigree (2,1,4,5,1)
  (same comment as for Lead)
- Chromium [air, urban air close to ground]: 2.47104e-6 kg; lognormal variance with pedigree 0.0112, pedigree (2,1,4,5,1)
  (same comment as for Lead)
- Hydrocarbons, aliphatic, unsaturated [air, urban air close to ground]: 0.0019344 kg; lognormal variance with pedigree 0.0112, pedigree (2,1,4,5,1)
  (same comment as for Lead)
- Particulates, > 2.5 um, and < 10um [air, unspecified]: 0.00312 kg; lognormal variance with pedigree 0.0166, pedigree (2,1,4,5,1)
  (same comment as for Lead)
- Manganese [air, urban air close to ground]: 0.00010608 kg; lognormal variance with pedigree 0.0112, pedigree (2,1,4,5,1)
  (same comment as for Lead)
- Benzo(a)pyrene [air, urban air close to ground]: 3.12e-7 kg; lognormal variance with pedigree 0.0112, pedigree (2,1,4,5,1)
  (same comment as for Lead)
- Methane, non-fossil [air, urban air close to ground]: 0.0002496 kg; lognormal variance with pedigree 0.0112, pedigree (2,1,4,5,1)
  (same comment as for Lead)
- Cadmium [air, urban air close to ground]: 4.368e-7 kg; lognormal variance with pedigree 0.0112, pedigree (2,1,4,5,1)
  (same comment as for Lead)
- Chromium VI [air, urban air close to ground]: 2.496e-8 kg; lognormal variance with pedigree 0.0112, pedigree (2,1,4,5,1)
  (same comment as for Lead)
- Benzene [air, urban air close to ground]: 0.00056784 kg; lognormal variance with pedigree 0.0112, pedigree (2,1,4,5,1)
  (same comment as for Lead)
- Dioxins, measured as 2,3,7,8-tetrachlorodibenzo-p-dioxin [air, urban air close to ground]: 1.9344e-11 kg; lognormal variance with pedigree 0.0112, pedigree (2,1,4,5,1)
  (same comment as for Lead)
- Carbon dioxide, non-fossil [air, urban air close to ground]: 60.702 kg; lognormal variance with pedigree 0.0112, pedigree (2,1,4,5,1)
  (same comment as for Lead)
- Copper [air, urban air close to ground]: 1.3728e-5 kg; lognormal variance with pedigree 0.0112, pedigree (2,1,4,5,1)
  (same comment as for Lead)
- Water [air, unspecified]: 0.201373 m3; = (m_sawnwood*WWM_sawnwood-board_raw_kiln*WWM_dried)/1000; lognormal variance with pedigree 0.014, pedigree (1,1,4,1,1)
  difference in water contained in the sawnwood before and after drying, converted from kg to m3
- Formaldehyde [air, urban air close to ground]: 8.112e-5 kg; lognormal variance with pedigree 0.0112, pedigree (2,1,4,5,1)
  (same comment as for Lead)
- Calcium [air, urban air close to ground]: 0.0036504 kg; lognormal variance with pedigree 0.0112, pedigree (2,1,4,5,1)
  (same comment as for Lead)
- Magnesium [air, urban air close to ground]: 0.00022464 kg; lognormal variance with pedigree 0.0112, pedigree (2,1,4,5,1)
  (same comment as for Lead)
- Benzene, hexachloro- [air, urban air close to ground]: 4.4928e-12 kg; lognormal variance with pedigree 0.0112, pedigree (2,1,4,5,1)
  (same comment as for Lead)
- Benzene, ethyl- [air, urban air close to ground]: 1.872e-5 kg; lognormal variance with pedigree 0.0112, pedigree (2,1,4,5,1)
  (same comment as for Lead)
- NMVOC, non-methane volatile organic compounds, unspecified origin [air, urban air close to ground]: 0.006552 kg; lognormal variance with pedigree 0.0112, pedigree (2,1,4,5,1)
  (same comment as for Lead)
- Phenol, pentachloro- [air, urban air close to ground]: 5.0544e-9 kg; lognormal variance with pedigree 0.0112, pedigree (2,1,4,5,1)
  (same comment as for Lead)
- Phosphorus [air, urban air close to ground]: 0.0001872 kg; lognormal variance with pedigree 0.0112, pedigree (2,1,4,5,1)
  (same comment as for Lead)
- Nickel [air, urban air close to ground]: 3.744e-6 kg; lognormal variance with pedigree 0.0112, pedigree (2,1,4,5,1)
  (same comment as for Lead)
- Potassium [air, urban air close to ground]: 0.0146016 kg; lognormal variance with pedigree 0.0112, pedigree (2,1,4,5,1)
  (same comment as for Lead)
- Sulfur dioxide [air, urban air close to ground]: 0.00156 kg; lognormal variance with pedigree 0.0112, pedigree (2,1,4,5,1)
  (same comment as for Lead)
- m-Xylene [air, urban air close to ground]: 7.488e-5 kg; lognormal variance with pedigree 0.0112, pedigree (2,1,4,5,1)
  (same comment as for Lead)
- Arsenic [air, urban air close to ground]: 6.24e-7 kg; lognormal variance with pedigree 0.0112, pedigree (2,1,4,5,1)
  (same comment as for Lead)
- Zinc [air, urban air close to ground]: 0.0001872 kg; lognormal variance with pedigree 0.0112, pedigree (2,1,4,5,1)
  (same comment as for Lead)
- Hydrocarbons, aliphatic, alkanes, unspecified [air, urban air close to ground]: 0.00056784 kg; lognormal variance with pedigree 0.0112, pedigree (2,1,4,5,1)
  (same comment as for Lead)
- Particulates, < 2.5 um [air, urban air close to ground]: 0.05616 kg; lognormal variance with pedigree 0.0112, pedigree (2,1,4,5,1)
  (same comment as for Lead)
- Toluene [air, urban air close to ground]: 0.0001872 kg; lognormal variance with pedigree 0.0112, pedigree (2,1,4,5,1)
  (same comment as for Lead)
- Dinitrogen monoxide [air, urban air close to ground]: 0.0014352 kg; lognormal variance with pedigree 0.0112, pedigree (2,1,4,5,1)
  (same comment as for Lead)
- Sodium [air, urban air close to ground]: 0.0008112 kg; lognormal variance with pedigree 0.0112, pedigree (2,1,4,5,1)
  (same comment as for Lead)
- Bromine [air, urban air close to ground]: 3.744e-5 kg; lognormal variance with pedigree 0.0112, pedigree (2,1,4,5,1)
  (same comment as for Lead)
- Chlorine [air, urban air close to ground]: 0.00011232 kg; lognormal variance with pedigree 0.0112, pedigree (2,1,4,5,1)
  (same comment as for Lead)
- Ammonia [air, urban air close to ground]: 0.00107952 kg; lognormal variance with pedigree 0.0112, pedigree (2,1,4,5,1)
  (same comment as for Lead)
- PAH, polycyclic aromatic hydrocarbons [air, urban air close to ground]: 6.9264e-6 kg; lognormal variance with pedigree 0.0112, pedigree (2,1,4,5,1)
  (same comment as for Lead)
- Mercury [air, urban air close to ground]: 1.872e-7 kg; lognormal variance with pedigree 0.0112, pedigree (2,1,4,5,1)
  (same comment as for Lead)
- Acetaldehyde [air, urban air close to ground]: 3.8064e-5 kg; lognormal variance with pedigree 0.0112, pedigree (2,1,4,5,1)
  (same comment as for Lead)
- Nitrogen oxides [air, urban air close to ground]: 0.11232 kg; lognormal variance with pedigree 0.0112, pedigree (2,1,4,5,1)
  (same comment as for Lead)

## Sampling procedure
complementary literature and sampling from sawmills

## Extrapolations
extrapolated from CH data, uncertainty modeled accordingly.
