# port facilities construction

Dataset: EcoSpold 2, unit process
Geography: RER
Time period: 1990-01-01 to 2021-12-31
Technology level: current
Classification: ISIC rev.4 ecoinvent: 4290:Construction of other civil engineering projects
Classification: EcoSpold01Categories: transport systems/ship
Scenario: Business-as-Usual
System model: Allocation, cut-off by classification
Generated by: Michael Spielmann (obsolete)
Published in: Spielmann M. 2007
Database: ecoinvent
isCopyrightProtected: true
accessRestrictedTo: 1

## General comment
The dataset represents the construction, the maintenance, the land use and the disposal of one port with life time assumed to be 100 years.

## Included activities start
Port facilities construction is starting with material for the construction. Port maintenance and land use is starting with the energy consumption.

## Included activities end
The dataset ends with the construction, maintenance and disposal of one port. The dataset includes material for the construction, energy use and disposal accounting for excavation and transport of the deconstructed material as well as for disposal of the materials as inert waste, 5% water on inert material landfill. For the maintenance and land use dataset, it ends with the maintenance and land use of one port. It includes emissions of to water due to non removed oil spills, land occupation and transformation and energy consumption.

## Geography
Data refers to one port in Europe.

## Technology
The data represents the conditions at the Port of Rotterdam in the Netherlands. Construction expenditures for sealed area of ports data is available from Maibach et al. (1999). Material composition and demand of the sealed industrial area is derived from the construction and disposal expenditures of a Swiss highway. The built-up are is modelled as a steel building. The life span of the port is assumed to be 100 years. The figures for disposal are derived from Maibach et al. (1999) and are rough estimates, accounting for excavation and transport of the deconstructed material as well as for disposal of the materials as inert waste, 5% water on inert material landfill. The dataset of maintenance and land use represents the area of the Port of Rotterdam in the year 2002. Oil spills occurring in the water area are accounted for as emissions to water. Energy consumption at the port is based on assumptions for the specific electricity consumption at the port in Hamburg.

## Time period
Land use data represents conditions in 2002.

## Reference product
- port facilities: 1 unit; CPC 53232: Harbours, waterways and related facilities; By-product classification allocatable product
  production volume 1.32237 unit
    This is a placeholder value that does not reflect real-world production volumes. This dataset does not currently require a real-world production volume to work in the database framework, and no actual data were collected yet. This has no negative effect on the results of the ecoinvent database. The placeholder value of this activity was scaled according to the nominal GDP of 2005 (source: United Nations, http://data.un.org/Glossary.aspx?q=GDP+%28current+US%24%29, accessed 20130726) to reflect an appropriate share of the global production volume, which is also a placeholder value.
  property price 2.27476e10 EUR2005
    Calculated based on inputs: The price of the product has been calculated as a sum of the values of the material and energy inputs for this product. This value is therefore a rough estimation. It may underestimate the real price since there are additional expenses when producing any product. These expences can include for example labour costs, treatment of waste materials and profit for the producer. Please consider carefully whether this level of data quality is acceptable for your application.

## Inputs from technosphere
- building, hall, steel construction: 41500 m2; lognormal variance with pedigree 0.34, pedigree (1,1,5,1,1)
  Estimation. The value is a rough estimate.
- concrete, medium strength: 27900 m3; lognormal variance with pedigree 0.34, pedigree (1,1,5,1,1)
  Literature value. Material composition and demand of the sealed industrial area is derived from the construction and disposal expenditures of a Swiss highway.
  properties: dry mass 2190 kg, wet mass 2380 kg, water content 0.086758
- gravel, crushed: 7.77e8 kg; lognormal variance with pedigree 0.34, pedigree (1,1,5,1,1)
  (same comment as for concrete, medium strength)
  properties: dry mass 1 kg, wet mass 1 kg
- electricity, medium voltage: 2.27045e11 kWh; = 4.53E+07+2.27E+11; lognormal variance with pedigree 0.16, pedigree (1,1,5,1,1)
  4.53E+07 kWH electricity is used during the port facilities construction. Estimation. The value represents construction activities and is a rough estimate.
  2.27E+11 kWh electricity is used during the maintenance and land use of the port. Calculated value. Energy consumption at the port is based on assumptions for the specific electricity consumption at the port in Hamburg.
  Uncertainty: P
- steel, low-alloyed, hot rolled: 1.65e6 kg; lognormal variance with pedigree 0.34, pedigree (1,1,5,1,1)
  (same comment as for concrete, medium strength)
  properties: carbon content, fossil 0.005, wet mass 1 kg, dry mass 1 kg
  note on carbon content, fossil: Low alloyed steel composition given in Tab. 3.2 ecoinvent v2.2 report 10_partII. Steel assumed to have a C content of 0.5%
- pitch: 0 kg; pedigree (1,1,1,1,1)
  (same comment as for concrete, medium strength)
  properties: dry mass 1 kg, carbon content, fossil 0.83, wet mass 1 kg, heating value, net 28 MJ
- diesel, burned in building machine: 3.8e6 MJ; lognormal variance with pedigree 0.34, pedigree (1,1,5,1,1)
  Estimation. The value represents construction activities and is a rough estimate.
  properties: heating value, net 1 MJ
- excavation, skid-steer loader: 3.7e6 m3; source Maibach M. 1999; lognormal variance with pedigree 0.34, pedigree (1,1,5,1,1)
  Estimation. The figures for disposal are derived from Maibach et al. (1999) and are rough estimates;activityLink introduced to establish a direct link to the corresponding regional supply of this product
- inert waste, for final disposal: -1.11e9 kg; source Maibach M. 1999; lognormal variance with pedigree 0.34, pedigree (1,1,5,1,1)
  Estimation. The figures for disposal are derived from Maibach et al. (1999) and are rough estimates.
  production volume 1.11e9 kg
    Calculated from the production volume of port facilities in proportion to the respective output amounts.
  properties: wet mass 1 kg, dry mass 0.995 kg, water content 0.00502513
- reinforcing steel: 16700 kg; lognormal variance with pedigree 0.34, pedigree (1,1,5,1,1)
  (same comment as for concrete, medium strength)
  properties: dry mass 1 kg, carbon content, fossil 0.004, wet mass 1 kg
- pitch: 2.53334e7, 166565 kg (2 entries); lognormal variance with pedigree 0.34, pedigree (1,1,5,1,1)
  (same comment as for concrete, medium strength)

## Inputs from nature
All rows: lognormal variance with pedigree 0.08, pedigree (1,1,5,1,1)
- Occupation, lake, artificial [natural resource, land]: 3.5e9 m2*year
  Calculated value. The data is derived from Port of Rotterdam (2002) and oral communication. Maintenance and land use
- Transformation, from unspecified [natural resource, land]: 5.95e7 m2
  Estimation based on land occupation and an assumed life span of the port of 100 years. Maintenance and land use
- Transformation, to traffic area, road network [natural resource, land]: 1.22e7 m2
  (same comment as for Transformation, from unspecified)
- Transformation, to industrial area [natural resource, land]: 1.22415e7 m2
  (same comment as for Transformation, from unspecified)
- Occupation, traffic area, road network [natural resource, land]: 1.22e9 m2*year
  (same comment as for Occupation, lake, artificial)
- Transformation, to lake, artificial [natural resource, land]: 3.5e7 m2
  (same comment as for Transformation, from unspecified)
- Occupation, industrial area [natural resource, land]: 1.22415e9 m2*year
  (same comment as for Occupation, lake, artificial)

## Emissions to nature
- NMVOC, non-methane volatile organic compounds, unspecified origin [air, non-urban air or from high stacks]: 25500 kg; lognormal variance with pedigree 0.34, pedigree (1,1,5,1,1)
  Estimation. The value represents construction activities and is a rough estimate.
- BOD5, Biological Oxygen Demand [water, ocean]: 3.15e7 kg; lognormal variance with pedigree 0.16, pedigree (1,1,5,1,1)
  Calculate value, according to quality guidelines, derived from emissions of oil. Maintenance and land use
- COD, Chemical Oxygen Demand [water, ocean]: 3.15e7 kg; lognormal variance with pedigree 0.16, pedigree (1,1,5,1,1)
  Calculated value, according to quality guidelines, derived from emissions of oil. Maintenance and land use
- Oils, unspecified [water, unspecified]: 1e7 kg; lognormal variance with pedigree 1.31, pedigree (1,1,5,1,1)
  Oral communication. The data represents the geometirc mean of oil spills between 1994 - 1998 in Port of Rotterdam. Maintenance and land use
  property water content 0; name water_content
  property water in wet mass 0 kg; name WWM
  property dry mass 1 kg; name DM
  property carbon content, fossil 0.375; name C_content_fossil
  property carbon content, non-fossil 0.375; name C_content_non_fossil
  property wet mass 1 kg; name WM
- DOC, Dissolved Organic Carbon [water, ocean]: 8.66e6 kg; lognormal variance with pedigree 0.16, pedigree (1,1,5,1,1)
  (same comment as for COD, Chemical Oxygen Demand)
- TOC, Total Organic Carbon [water, ocean]: 8.66e6 kg; lognormal variance with pedigree 0.16, pedigree (1,1,5,1,1)
  (same comment as for COD, Chemical Oxygen Demand)

## Sampling procedure
literature studies and own assumptions

## Extrapolations
This dataset has been extrapolated from year 1992 to the year of the calculation (2021). The uncertainty has been adjusted accordingly.

## Review by Carl Vadenbo 2012-06-29
In preparation for the release of ecoinvent v3.0, the datasets 'port facilities RER' and 'operation, maintenance, port RER' in ecoinvent v2.2 were merged into the dataset 'port facilities construction, RER 1990-1992'. The amounts of the exchanges were reviewed and were found to correspond to the disaggregated datasets. The uncertainty information has only been adjusted for geographical representativeness in GLO, and consequently needs to be revised before subsequent releases of the database. Despite this shortcoming, the new dataset was accepted for inclusion into the ecoinvent database on 2012.07.04.

## Review by Niels Jungbluth 2003-08-20
passed.

## Review by Roland Hischier 2011-09-23
Transfer of Documentation done.
