# electricity production, wind, 1-3MW turbine, onshore

Dataset: EcoSpold 2, unit process
Geography: CO
Time period: 2014-01-01 to 2021-12-31
Technology level: modern
Classification: ISIC rev.4 ecoinvent: 3510:Electric power generation, transmission and distribution
Tags: wind power
Scenario: Business-as-Usual
System model: Allocation, cut-off by classification
Generated by: Germán Santa María Restrepo
Published in: Suppen, N. 2017
Database: ecoinvent
isCopyrightProtected: true
accessRestrictedTo: 1

## General comment
This dataset represents the production of high voltage electricity at onshore grid-connected wind power plants in Colombia in 2014. Jepirachi is the only operating wind farm in Colombia at the moment. It is an onshore windfarm with fifteen 1,3 MW aerogenerators. The dataset includes operation and maintenance expenditures as well as infrastructure inputs. This dataset is based on "electricity production, wind, 1-3MW turbine, onshore, GLO" accessed on 25/10/2017. Wind load hours have been adapted to local conditions (see parameters).
According to The Wind Power Database (2014), total installed wind capacity on-and offshore Colombia in the end of 2014 amounted to 18,42 MW. According to XM Informacion Inteligente database 2014, around 3% of the capacity is installed offshore. Percentages of the three onshore wind power plant classes modelled in ecoinvent referring to the total installed capacity (12015 wind farms by 12/2014): <1MW 14.5%; 1-3MW 70.6%; >3MW 11.9%. These values are based on 54 countries analysed in the database: AT, AU, BE, BG, BR, CA, CH, CL, CN, CY, DE, DK, EE, ES, FI, FR, GB, GR, HR, HU, ID, IE, IN, IR, IT, JP, KR, LT, LU, LV, MK, MT, MX, MY, NL, NO, PE, PL, PT, RO, RS, RU, SA, SE, SI, SK, TH, TR, TW, TZ, UA, US, ZA. [Retreived from The Wind Power. 2014. Windpower and wind farms database. www.thewindpower.net, Status December 2014]

## Included activities start
From operation of the wind power plant to high voltage electricity at the plant. According to (European Communities 2001), electricity produced with wind turbines in a wind power plant is connected to medium voltage or high voltage systems, depending on the size of the windfarm. Normally, each wind turbine contains a transformer from low voltage to medium voltage. The network connection additionally transforms the electricity to high voltage electricity. It is assumed here, that there are no stand-alone grid-connected small wind turbines and that all electricity is connected to the network in form of high voltage electricity.

Source:
European Communities. 2001. Wind Turbine Grid Connection and Interaction. Deutsches Windenergie-Institut /Tech-wise A/S /DM Energy, p. 7 Tab.2.1

## Included activities end
This activity ends with the production of 1kWh of high voltage electricity produced at the power plant and delivered to the grid.

This dataset includes
- the operation and maintenance of the wind power plant
- change of lubricating oil every year

This dataset doesn't include
- raw materials extraction, decommissioning and waste treatment as these activities are already included in infrastructure datasets
- transformation of the electricity produced in order to deliver in to the grid as this is already included in the infrastructure datasets.

## Geography
This dataset is based on the GLO dataset with adjustments to the regional context with data from wind farms in Colombia.

## Time period
The Annual Production Volume is valid for the year 2014.

## Parameters
- Wind load hours: 3812.72 hour; name wind_load_hours; = ( totalElectricity)/(capacity_installed*1000); lognormal variance with pedigree 0.0506, pedigree (5,3,1,1,3)
  Calculated value.
  nan
- use of lubricating oil for maintenance: 157.5 kg; name lubricating_oil_maintenance; = 63*(2/0.8); lognormal variance with pedigree 0.0912, pedigree (4,4,5,4,4)
  Estimation of the use of maintenance lubricating oil per year, extrapolated from the 800 kW turbine in (Burger & Bauer 2007) (63 kg per year) with the rate of capacities.
  nan
- total net electricity: 7.02303e7 kWh; name totalElectricity; lognormal variance with pedigree 0.0006, pedigree (1,1,1,1,1)
  Literature value/statistics for Colombian wind farms that provide electricity to the national interconnected network.
  Taken from XM National Statistics for Colombia in 2014. URL: http://informacioninteligente10.xm.com.co/oferta/Paginas/HistoricoOferta.aspx accessed 21/07/2017 File: "Generacion_(kWh)_2014"
- Percentage of onshore wind power plant class capacity on total: 1 dimensionless; name percentage_class_onshore; lognormal variance with pedigree 0.0016, pedigree (2,1,1,1,1)
  Jepirachi is the only operating wind farm in Colombia at the moment. It is an onshore windfarm with fifteen 1,3 MW aerogenerators.
  Source: Parque Eólico Jepírachi, epm <http://www.epm.com.co/site/Home/Institucional/Nuestrasplantas/Energ%C3%ADa/ParqueE%C3%B3lico.aspx> accessed: 30/10/2017.
- distance: 200 km; lognormal variance with pedigree 0.1016, pedigree (4,5,5,4,4)
  Estimation. Maintenance transport to the power plant. One person travels two times per year over a distance of 200 km each time, one time for check only with a car, one time for change of the lubricating oil with a lorry.
  nan
- Installed capacity: 18.42 MW; name capacity_installed; lognormal variance with pedigree 0.001225, pedigree (2,1,1,2,1)
  Literature value. Total installed capacity.
  Source:
  XM National Statistics for Colombia in 2014. URL: http://informacioninteligente10.xm.com.co/oferta/Paginas/HistoricoOferta.aspx accessed 21/07/2017 File: " Capacidad_Efectiva_Neta_(kW)_2014".

## Reference product
- electricity, high voltage: 1 kWh; name amount_RP; By-product classification allocatable product; CPC 17100: Electrical energy
  production volume 7.02303e7 kWh; name APV_electricity; = totalElectricity
    (same comment as for total net electricity)
  property price 0.0977 EUR2005
    Temporary price data. Calculated as 90% of purchasers price based on: 94% of the average price (to account for a 6% loss in transformation and transmission) for electricity for industrial consumersin 2005 (excluded taxes). From IEA.

## Inputs from technosphere
- wind turbine network connection, 2MW, onshore: 6.557e-9 unit; = 1/(lifetime*(capacity_MW*1000)*wind_load_hours); lognormal variance with pedigree 0.227, pedigree (5,5,5,5,5)
  Calculated value
  properties: lifetime 20 year
  note on lifetime: Estimation/literature value. Today, wind turbine producers often use a lifetime of 20 years for all parts of the wind turbine in their financial calculataions, even if it can be assumed that the foundation could have a longer lifetime.
- wind turbine, 2MW, onshore: 6.557e-9 unit; = 1/(lifetime*(capacity_MW*1000)*wind_load_hours); lognormal variance with pedigree 0.227, pedigree (5,5,5,5,5)
  Calculated value
  property lifetime 20 year; name lifetime
  property capacity [MW] 2 MW; name capacity_MW
- lubricating oil: 2.06545e-5 kg; name lubricating_oil; = lubricating_oil_maintenance*lifetime/(lifetime*(capacity_MW*1000)*wind_load_hours); lognormal variance with pedigree 0.002, pedigree (1,1,3,1,1)
  Calculated value/Estimation. Estimated consumption of 157.5 kg lubrication oil per year, extrapolated from the 800 kW turbine in (Burger & Bauer 2004) with the rate of capacities are assumed for maintainance.
  properties: carbon content, fossil 0.75, heating value, net 40.2 MJ, dry mass 1 kg, wet mass 1 kg
  note on carbon content, fossil: Lubricating oil is produced from diesel. C-content/dry mass of fats and oils considered 75%, from: ecoinvent v2.2 report, n 15a, pg 40
  note on heating value, net: Literature value, Source: IPCC 2006, 2006 IPCC Guidelines for National Greenhouse Gas Inventories, Prepared by the National Greenhouse Gas Inventories Programme, Eggleston H.S., Buendia L., Miwa K., Ngara T. and Tanabe K. (eds). Published: IGES, Japan
- transport, freight, lorry 7.5-16 metric ton, EURO3: 5.41727e-13 metric ton*km; = ((lubricating_oil/1000)/2)*(distance*2*lifetime/(lifetime*(capacity_MW*1000)*wind_load_hours)); undefined min 2.11326e-12, max 2.11326e-12, standardDeviation95 0, pedigree (1,1,3,1,1)
  Calculated value. Two maintenance transports to the power plant with 200 km each. Once a year, the lubricating oil is transported and changed.
- waste mineral oil: -2.06545e-5 kg; name waste_min_oil_10; = (lubricating_oil)*-1; lognormal variance with pedigree 0.002, pedigree (1,1,3,1,1)
  Calculated value. The same amount as lubricating oil use.
  production volume 1450.58 kg; = APV_electricity* waste_min_oil_10
    Calculated from production volume of reference product using the relative outputs.
    Due to reasons of the parent-child relationship, a safety amount of 400000kg waste mineral oil was added.
  property price 0 EUR2005; name waste_min_oil_10_price_EUR2005
  properties: carbon content, fossil 0.864444, water content 0.111111, heating value, net 34.7 MJ, wet mass 1 kg, dry mass 0.9 kg
  note on carbon content, fossil: Tab A.6, ecoinvent v2.2 report 13_I. C content has been calculated after data in the tables, and then referred to 1 kg DM
  note on heating value, net: Value taken from the general comment of the treatment dataset.

## Inputs from nature
- Energy, kinetic (in wind), converted [natural resource, in air]: 3.87 MJ; undefined min 3.87, max 3.87, standardDeviation95 0, pedigree (1,1,3,1,1)

## Sampling procedure
Literature, calculations

## Extrapolations
This dataset has been extrapolated from year 2017 to the year of the calculation (2021). The uncertainty has been adjusted accordingly.

## Review by Christopher Oberschelp 2017-11-21
Dataset is very thoroughly and transparently documented. Key exchanges look correct while comparison with similar datasets after impact assessment may still help to find individual deviations.
