# sunn hemp production

Dataset: EcoSpold 2, unit process
Geography: IN
Time period: 2016-05-05 to 2021-05-06
Technology level: current
Classification: EcoSpold01Categories: agricultural production/plant production
Classification: ISIC rev.4 ecoinvent: 0116:Growing of fibre crops
Scenario: Business-as-Usual
System model: Allocation, cut-off by classification
Generated by: Madhuri Nigam
Published in: Faist Emmenegger, M. 2018
Database: ecoinvent
isCopyrightProtected: true
accessRestrictedTo: 1

## General comment
This inventory dataset covers the field activity for the production of 1 kg of Sunnhemp plant (green mater) in India in 2016-17 through Sunnhemp cultivation. This process also yield seeds as byproduct which are used for green manure. The farm has a yield of 15,000 kg fresh green matter per ha for this crop cycle. Mineral NPK fertilizer input is 20-40-20 kg/ha.
Sunnhemp Research Station (CRIJAF), Pratapgarh, Uttar Predesh has been researching in this area and has optimised the cultivation of Sunnhemp for fibre production. It is cultivated mostly as a 'kharif' crop and is sown with the commencement of South-West monsoon in the month of May and June and harvested in the month of September and October. The farming dataset, covers soil preparation (fall tillage), inputs of seeds, application of mineral and organic fertilizers, spraying pesticides, irrigation water and ends with the harvesting of Sunnhemp plant.
Insects-pest and diseases do not affect Sunnhemp crop easily. They can be applied when required. Sunnhemp as a rotational crop and being a legume it has potential to meet its requirement of nitrogen by fixation of atmospheric nitrogen by bacteriods located in the nodules in the root and this is good for soil renovation. For better crop , manuring with farm yard manure or cakes is recommended. Application of fertilizers is recommended at combination of 20 kg N, 40 kg P and 20 kg K per has been optimised for best results. Usually, Sunnhemp crop can be grown in rain-fed and irrigated conditions both, but in irrigated condition, higher production can be obtained. Two irrigations favour the production of good quality fibre.
Machinery and fixed overhead are excluded from life cycle inventory for the activity, since the machineries and fixed overheads provide services over several years, and their impacts per kg of Sunnhemp plant is very low.

## Included activities start
This activity begins from land preparation for sowing.

## Included activities end
The activity ends at the harvesting of the mature sunnhemp plant.

## Time period
Soil cultivating date for main crop: 5 May 2016; harvest date of main crop: 15 Aug 2016

## Reference product
- sunn hemp plant, harvested: 1 kg; name refpro; By-product classification allocatable product; CPC 0192: Fibre crops
  Reference product: Sunnhemp plant, harvested
  production volume 1.88e7 kg; name RP_PV_1; = 18800*1000
    Source: https://www.researchgate.net/profile/Surja_Sarkar/publication/304570874_sunnhemp_in_India/links/57a58a1708ae3f45292f5595/sunnhemp-in-India.pdf
  property price 0.849076 EUR2005; name refpro_price_EUR2005
    Calculated value. The data is taken from Ministry of Agriculture and Forestry of Alberta Canada (Ministry of Agriculture and Forestry of Alberta Canada. Industrial Hemp Enterprise (2017). Retrieved from: http://www1.agric.gov.ab.ca/$department/deptdocs.nsf/all/agdex126, accessed 15Feb2018). The source reports an average cost of production of 500 USD per acre. The yeald per acre is 1074 pounds which equals to 487kg.
  property carbon content 0.475
    carbon content on a dry matter basis (reserved; not for manual entry)
  properties: carbon content, non-fossil 0.475, water in wet mass 0.0496 kg, carbon content, fossil 0, wet mass 1 kg, dry mass 0.9504 kg, water content 0.0521886, carbon allocation 0.45144 kg

## Inputs from technosphere
- ammonia, anhydrous, liquid: 1.1438e-7 kg; lognormal variance with pedigree 0.0046, pedigree (1,4,3,1,1)
  Calculated Value. This value has been calculated by using the Ecoinvent LCI calculation tool for crop production.
  properties: wet mass 1 kg, dry mass 1 kg
- tillage, harrowing, by rotary harrow: 0.000102261 ha; lognormal variance with pedigree 0.0046, pedigree (1,4,3,1,1)
  The data was collected for a hectare area through interview. The tillage activity was scaled based on the diesel used for tillage in the ecoinvent dataset and the diesel consumption data collected in the project
- inorganic nitrogen fertiliser, as N: 0.000795003 kg; lognormal variance with pedigree 0.0046, pedigree (1,4,3,1,1)
  This exchange is an aggregation of amounts:
  5.29334945124156E-4. Comment:
  8.096482080397373E-5. Comment:
  8.096482080397373E-5. Comment:
  8.21017269402988E-5. Comment:
  2.098748849888653E-6. Comment:
  1.9537681647165734E-5. Comment:
  properties: wet mass 1 kg, dry mass 1 kg
- land use change, annual crop: 5.13303e-6 ha; lognormal variance with pedigree 0.0046, pedigree (1,4,3,1,1)
  (same comment as for ammonia, anhydrous, liquid)
- packaging, for pesticides: 0.000533333 kg; lognormal variance with pedigree 0.0532, pedigree (4,3,3,5,4)
  Total amount of active substance/s of pesticides needed for the production of hemp is calculated to be circa 2.67E-04 kg. Pesticide/s used in this dataset is/are: 'benzimidazole-compound', 'pendimethalin', 'pesticide, unspecified'. The total amount of active substance/s is doubled in order to account for the packaging of the dilluted product of pesticide/s that is/are applied. Therefore, 5.33E-04 kg of packaging for pesticides is justified with this exchange.
  properties: wet mass 1 kg, price 0.0642 EUR2005, heating value, net 25.97 MJ, carbon content, fossil 0.85714, dry mass 1 kg
- ammonium sulfate: 8.8075e-6 kg; lognormal variance with pedigree 0.0046, pedigree (1,4,3,1,1)
  (same comment as for ammonia, anhydrous, liquid)
  properties: wet mass 1 kg, dry mass 1 kg
- inorganic potassium fertiliser, as K2O: 0.000389613 kg; lognormal variance with pedigree 0.0046, pedigree (1,4,3,1,1)
  (same comment as for ammonia, anhydrous, liquid)
  properties: dry mass 1 kg, wet mass 1 kg
- pesticide, unspecified: 6.66667e-5 kg; lognormal variance with pedigree 0.0046, pedigree (1,4,3,1,1)
  The data was collected for a hectare area through interview
  properties: wet mass 1 kg, dry mass 1 kg, carbon content, fossil 0.486978
- urea: 0.00113479 kg; lognormal variance with pedigree 0.0046, pedigree (1,4,3,1,1)
  The exchange has been updated from 'urea, as N' into 'urea' and therefore its amount has been scaled (multiplied) from 0.0005 kg by 2.1438 kg of 'urea' per kg of 'urea, as N'. Original comment of the exchange is: The data was collected for a hectare area through interview.
  properties: dry mass 1 kg, carbon content, fossil 0.2, wet mass 1 kg
- potassium chloride: 0.00148355 kg; lognormal variance with pedigree 0.0046, pedigree (1,4,3,1,1)
  The exchange has been updated from 'potassium chloride, as K2O' into 'potassium chloride' and therefore its amount has been scaled (multiplied) from 0.0009 kg by 1.5829 kg of 'potassium chloride' per kg of 'potassium chloride, as K2O'. Original comment of the exchange is: Calculated Value. This value has been calculated by using the Ecoinvent LCI calculation tool for crop production.
  properties: wet mass 1 kg, dry mass 1 kg
- ammonium nitrate: 2.68792e-7 kg; lognormal variance with pedigree 0.0046, pedigree (1,4,3,1,1)
  The exchange has been updated from 'ammonium nitrate, as N' into 'ammonium nitrate' and therefore its amount has been scaled (multiplied) from 0 kg by 2.8573 kg of 'ammonium nitrate' per kg of 'ammonium nitrate, as N'.
  properties: dry mass 1 kg, wet mass 1 kg
- phosphate rock, beneficiated: 7.55404e-6 kg; lognormal variance with pedigree 0.0046, pedigree (1,4,3,1,1)
  The exchange has been updated from 'phosphate rock, as P2O5, beneficiated, dry' into 'phosphate rock, beneficiated' and therefore its amount has been scaled (multiplied) from 0 kg by 3.125 kg of 'phosphate rock, beneficiated' per kg of 'phosphate rock, as P2O5, beneficiated, dry'. Original comment of the exchange is: Calculated Value. This value has been calculated by using the Ecoinvent LCI calculation tool for crop production.
  properties: wet mass 1 kg, dry mass 1 kg
- benzimidazole-compound: 0.000133333 kg; lognormal variance with pedigree 0.0046, pedigree (1,4,3,1,1)
  The data was collected for a hectare area through interview
  properties: dry mass 1 kg, wet mass 1 kg, carbon content, fossil 0.529668
- waste wood, untreated: -0.293333 kg; name Wastewood; lognormal variance with pedigree 0.0126, pedigree (4,4,3,1,1)
  The data was collected for a hectare area through interview. This exchange is an aggregation of amounts:
  0.26666666666666666. Comment: byproduct- Sticks, Used in burning as fuel
  0.02666666666666667. Comment: byproduct-seeds, used as green manure
  production volume 5.51467e6 kg; = RP_PV_1* Wastewood/ refpro
    Calculated from production volume of reference product using the relative outputs.
  property price 0 EUR2005; name Wastewood_price_EUR2005
  properties: heating value, net 13.99 MJ
  note on heating value, net: Value taken from the general comment of the treatment dataset.
- potassium sulfate: 1.1994e-5 kg; lognormal variance with pedigree 0.0046, pedigree (1,4,3,1,1)
  The exchange has been updated from 'potassium sulfate, as K2O' into 'potassium sulfate' and therefore its amount has been scaled (multiplied) from 0 kg by 1.85 kg of 'potassium sulfate' per kg of 'potassium sulfate, as K2O'. Original comment of the exchange is: Calculated Value. This value has been calculated by using the Ecoinvent LCI calculation tool for crop production.
  properties: wet mass 1 kg, dry mass 1 kg
- pendimethalin: 6.66667e-5 kg; lognormal variance with pedigree 0.0046, pedigree (1,4,3,1,1)
  The data was collected for a hectare area through interview
  properties: wet mass 1 kg, dry mass 1 kg, carbon content, fossil 0.55516
- linseed seed, at farm: 0.00266667 kg; lognormal variance with pedigree 0.0046, pedigree (1,4,3,1,1)
  data for sunnhemp seeds
  properties: wet mass 1 kg, carbon content, non-fossil 1, dry mass 1 kg
- inorganic phosphorus fertiliser, as P2O5: 0.00266425 kg; lognormal variance with pedigree 0.0046, pedigree (1,4,3,1,1)
  This exchange is an aggregation of amounts:
  1.184562774356624E-5. Comment:
  2.1769908938966694E-4. Comment:
  9.777801564178881E-4. Comment:
  9.777801564178881E-4. Comment:
  4.79144343686736E-4. Comment:
  properties: dry mass 1 kg, wet mass 1 kg
- packaging, for fertilisers: 0.0106667 kg; lognormal variance with pedigree 0.0532, pedigree (4,3,3,5,4)
  Total amount of active substance/s of fertilisers needed for the production of 'hemp' is calculated to be circa 5.33E-03 kg. Fertiliser/s used in this dataset is/are: 'ammonia, liquid', 'ammonium nitrate, as N', 'ammonium sulfate, as N', 'nitrogen fertiliser, as N', 'phosphate fertiliser, as P2O5', 'phosphate rock, as P2O5, beneficiated, dry', 'potassium chloride, as K2O', 'potassium fertiliser, as K2O', 'potassium sulfate, as K2O', 'urea, as N'. The total amount of active substance/s is doubled in order to account for the packaging of the dilluted product of fertiliser/s that is/are applied. Therefore, 1.07E-02 kg of packaging for fertilisers is justified with this exchange.
  properties: price 0.0642 EUR2005, wet mass 1 kg, carbon content, fossil 0.825301, heating value, net 25.01 MJ, dry mass 1 kg
  note on carbon content, fossil: Considering a chemical formula (C2H4)n for polyethylene, carbon content-fossil is calculated to be 0.856286 kg of Carbon per kg of dry mass.
- irrigation: 0.08 m3; lognormal variance with pedigree 0.0046, pedigree (1,4,3,1,1)
  4-6 times per crop. The data was collected for a hectare area through interview.
  properties: dry mass 0.11 kg, wet mass 1000 kg, water content 9089.91

## Inputs from nature
- Transformation, from annual crop, irrigated [natural resource, land]: 0.666667 m2; lognormal variance with pedigree 0.0126, pedigree (2,4,3,1,1)
  (same comment as for ammonia, anhydrous, liquid)
- Occupation, annual crop, irrigated [natural resource, land]: 0.666667 m2*year; lognormal variance with pedigree 0.006, pedigree (1,4,3,1,1)
  (same comment as for ammonia, anhydrous, liquid)
- Transformation, to annual crop, irrigated [natural resource, land]: 0.666667 m2; lognormal variance with pedigree 0.0126, pedigree (2,4,3,1,1)
  (same comment as for ammonia, anhydrous, liquid)
- Energy, gross calorific value, in biomass [natural resource, biotic]: 11.25 MJ; lognormal variance with pedigree 0.0046, pedigree (1,4,3,1,1)
  (same comment as for ammonia, anhydrous, liquid)
- Carbon dioxide, in air [natural resource, in air]: 0.967346 kg; lognormal variance with pedigree 0.0046, pedigree (1,4,3,1,1)
  (same comment as for ammonia, anhydrous, liquid)

## Emissions to nature
- Copper, ion [water, surface water]: 1.61174e-6 kg; lognormal variance with pedigree 0.094, pedigree (1,4,3,1,1)
  (same comment as for ammonia, anhydrous, liquid)
- Copper [soil, agricultural]: -5.50291e-6 kg
  (same comment as for ammonia, anhydrous, liquid)
- Lead [soil, agricultural]: -6.78805e-7 kg
  (same comment as for ammonia, anhydrous, liquid)
- Chromium, ion [water, ground-]: 1.22301e-6 kg; lognormal variance with pedigree 0.094, pedigree (1,4,3,1,1)
  (same comment as for ammonia, anhydrous, liquid)
- Mercury [soil, agricultural]: -2.67924e-8 kg
  (same comment as for ammonia, anhydrous, liquid)
- Water [air, non-urban air or from high stacks]: 0.0408 m3; lognormal variance with pedigree 0.0046, pedigree (1,4,3,1,1)
  (same comment as for ammonia, anhydrous, liquid)
- Chromium, ion [water, surface water]: 2.4104e-6 kg; lognormal variance with pedigree 0.094, pedigree (1,4,3,1,1)
  (same comment as for ammonia, anhydrous, liquid)
- Cadmium [soil, agricultural]: 1.93676e-8 kg; lognormal variance with pedigree 0.044, pedigree (1,4,3,1,1)
  (same comment as for ammonia, anhydrous, liquid)
- Cadmium, ion [water, ground-]: 2.49294e-9 kg; lognormal variance with pedigree 0.094, pedigree (1,4,3,1,1)
  (same comment as for ammonia, anhydrous, liquid)
- Nitrogen oxides [air, non-urban air or from high stacks]: 8.17709e-5 kg; lognormal variance with pedigree 0.044, pedigree (1,4,3,1,1)
  (same comment as for ammonia, anhydrous, liquid)
- Phosphorus [water, surface water]: 0.000237479 kg; lognormal variance with pedigree 0.044, pedigree (1,4,3,1,1)
  (same comment as for ammonia, anhydrous, liquid)
- Dinitrogen monoxide [air, non-urban air or from high stacks]: 3.90336e-5 kg; lognormal variance with pedigree 0.034, pedigree (1,4,3,1,1)
  (same comment as for ammonia, anhydrous, liquid)
- Cadmium, ion [water, surface water]: 2.07459e-8 kg; lognormal variance with pedigree 0.094, pedigree (1,4,3,1,1)
  (same comment as for ammonia, anhydrous, liquid)
- Carbon dioxide, fossil [air, non-urban air or from high stacks]: 0.00124739 kg; lognormal variance with pedigree 0.0046, pedigree (1,4,3,1,1)
  (same comment as for ammonia, anhydrous, liquid)
- Phosphate [water, ground-]: 1.43089e-5 kg; lognormal variance with pedigree 0.044, pedigree (1,4,3,1,1)
  (same comment as for ammonia, anhydrous, liquid)
- Water [water, surface water]: 0.008 m3; lognormal variance with pedigree 0.0046, pedigree (1,4,3,1,1)
  (same comment as for ammonia, anhydrous, liquid)
- Phosphate [water, surface water]: 3.93494e-5 kg; lognormal variance with pedigree 0.044, pedigree (1,4,3,1,1)
  (same comment as for ammonia, anhydrous, liquid)
- Water [water, ground-]: 0.0312 m3; lognormal variance with pedigree 0.0046, pedigree (1,4,3,1,1)
  (same comment as for ammonia, anhydrous, liquid)
- Ammonia [air, non-urban air or from high stacks]: 0.000196028 kg; lognormal variance with pedigree 0.008, pedigree (1,4,3,1,1)
  (same comment as for ammonia, anhydrous, liquid)
- Nickel, ion [water, surface water]: 1.17001e-6 kg; lognormal variance with pedigree 0.094, pedigree (1,4,3,1,1)
  (same comment as for ammonia, anhydrous, liquid)
- Nitrate [water, ground-]: 0.00569566 kg; lognormal variance with pedigree 0.044, pedigree (1,4,3,1,1)
  (same comment as for ammonia, anhydrous, liquid)
- Zinc, ion [water, surface water]: 1.60354e-6 kg; lognormal variance with pedigree 0.094, pedigree (1,4,3,1,1)
  (same comment as for ammonia, anhydrous, liquid)
- Zinc, ion [water, ground-]: 6.15366e-7 kg; lognormal variance with pedigree 0.094, pedigree (1,4,3,1,1)
  (same comment as for ammonia, anhydrous, liquid)
- Lead [water, surface water]: 3.93366e-7 kg; lognormal variance with pedigree 0.094, pedigree (1,4,3,1,1)
  (same comment as for ammonia, anhydrous, liquid)
- Mercury [water, ground-]: 3.28251e-11 kg; lognormal variance with pedigree 0.094, pedigree (1,4,3,1,1)
  (same comment as for ammonia, anhydrous, liquid)
- Lead [water, ground-]: 6.98128e-9 kg; lognormal variance with pedigree 0.094, pedigree (1,4,3,1,1)
  (same comment as for ammonia, anhydrous, liquid)
- Pendimethalin [soil, agricultural]: 6.66667e-5 kg; lognormal variance with pedigree 0.045, pedigree (4,4,3,1,1)
  (same comment as for ammonia, anhydrous, liquid)
- Chromium [soil, agricultural]: -2.60734e-6 kg
  (same comment as for ammonia, anhydrous, liquid)
- Mercury [water, surface water]: 3.19569e-9 kg; lognormal variance with pedigree 0.094, pedigree (1,4,3,1,1)
  (same comment as for ammonia, anhydrous, liquid)
- Nickel [soil, agricultural]: -1.67049e-6 kg
  (same comment as for ammonia, anhydrous, liquid)
- Zinc [soil, agricultural]: -2.07781e-5 kg
  (same comment as for ammonia, anhydrous, liquid)
- Copper, ion [water, ground-]: 1.66503e-7 kg; lognormal variance with pedigree 0.094, pedigree (1,4,3,1,1)
  (same comment as for ammonia, anhydrous, liquid)
- Carbendazim [soil, agricultural]: 0.000133333 kg; lognormal variance with pedigree 0.045, pedigree (4,4,3,1,1)
  (same comment as for ammonia, anhydrous, liquid)

## Sampling procedure
Data has been collected through field visit and interview. Data has been obtained from a Sunnhemp Research Station in Uttar Pradesh (North India) as they have been researching for the improvement and promotion of Sunnhemp cultivation technology in India, and expressed willingness to share the data.

## Extrapolations
This dataset has been extrapolated from year 2017 to the year of the calculation (2021). The uncertainty has been adjusted accordingly.
