# lorry production, with refrigeration machine, carbon dioxide, liquid as refrigerant, 16 metric ton

Dataset: EcoSpold 2, unit process
Geography: GLO
Time period: 1998-01-01 to 2021-12-31
Technology level: modern
Classification: ISIC rev.4 ecoinvent: 2910:Manufacture of motor vehicles
Classification: EcoSpold01Categories: transport systems/road
Scenario: Business-as-Usual
System model: Allocation, cut-off by classification
Generated by: Tereza Levova
Published in: Spielmann M. 2007
Database: ecoinvent
isCopyrightProtected: true
accessRestrictedTo: 1

## General comment
This dataset represents production of lorry which is used for transport of cargo which need to be transported in controlled atmosphere (certain temperature, humidity, air flow, etc.). This type of small lorry with insulation and refrigeration machine are primarily used for transport of food over short distances (urban cycle).
Based on "lorry production, 16 metric ton, RER 2002". Material consumption values refer to the production of one average lorry in the referring weight class (net weight 6800t). Total Kilometric performance: 5.40E+05. Interventions for manufacturing processes of vehicles are independent of weight class. The disposal of lorry is included too.
The amount of the insulation needed is calculated based on technical description of the Volvo FH16 rigid truck (model FH42RB6HC1) (Volvo, http://www.volvotrucks.com/trucks/uk-market/en-gb/trucks/volvo-fh16/pages/fh16_specification.aspx, accessed 20141103).
Lorry with refrigeration machine (Source: http://www.trucktrailer.carrier.com/, accessed 20141103).

## Included activities start
The dataset starts with the material used for the production of the lorry.

## Included activities end
The inventory includes processes of material, energy and water use in vehicle manufacturing (final assembly, engine production and manufacturing of metal parts). Rail and road transport of materials is accounted for. The refrigeration machine and extra insulation for the cargo space is included as well. Plant infrastructure is included, addressing issues such as land use, building, road and parking construction. Vehicle disposal is as well included.

## Technology
Current production technology, environmental issues have been addressed in the past.
The technology using carbon, dioxide, liquid as refrigerant is considered modern technology.

## Time period
The material consumption represents a current 16t vehicle (Volvo FH). The data for vehicle production are representative for lorry production of one German company with an environmental management system. The data includes the final assembly (2000), engine production (2002) and the manufacturing of metal parts (2002).
References:
Volvo Truck Corporation (2004) Environmental product declaration: Volvo 8500 Low-Entry. Download of March from http://www.volvo.com/bus/global/engb/
volvogroup/core+values/environment/downloads.htm.

## Parameters
- fraction, tap water, to air: 0.15 dimensionless; name fraction_TW_to_air; = fraction_PW_to_air; lognormal variance with pedigree 0.092025, pedigree (4,4,3,2,4)
  Calculated value. See comment in the other parametres present in this dataset. Tap water is considered to be always used as process water, thus process water fractions to air are applied to all tap water input flows to calculate the amount of water consumed in the processes.
- thickness of glass fibre reinforced polypropylene liner: 1.89692 mm; name thickness_liner; lognormal variance with pedigree 0.0018, pedigree (2,3,1,1,1)
  Estimated value based on detailed technical description of reefer (refrigerated container) production.
- area: 54.16 m2; name area_cargo; = (lorry_cargo_length* lorry_cargo_width*2)+( lorry_cargo_length* lorry_cargo_height*2)+( lorry_cargo_height* lorry_cargo_width*2); lognormal variance with pedigree 0.0006, pedigree (1,1,1,1,1)
  Calculated value.
- thickness of insulation: 80 mm; name thickness_insulation; lognormal variance with pedigree 0.0018, pedigree (2,3,1,1,1)
  (same comment as for thickness of glass fibre reinforced polypropylene liner)
- density of glass fibre reinforced polypropylene: 1050 kg/m3; name density_GFP_polypropylene; lognormal variance with pedigree 0.0032, pedigree (3,3,1,1,1)
  Literature value (http://cdn.intechopen.com/pdfs-wm/34071.pdf, accessed 20141016). The filler content is assumed to be 20%.
- fraction, process water, to air: 0.15 dimensionless; name fraction_PW_to_air; lognormal variance with pedigree 0.092025, pedigree (4,4,3,2,4)
  Literature value. In case when no industry/process specific data are available, default evaporation fraction value is used. This value is 15% and is based on literature (Statistics Canada, 2007 & Shaffer, K.H., 2008, Consumptive water use in the Great Lakes Basin, USGS & Shiklomanov, 2003, World Water Resources at the Beginning of the 21st Century) and has been approved by an expert.
- density of polyurethane foam insulation: 50 kg/m3; name density_insulation; lognormal variance with pedigree 0.0106, pedigree (4,4,1,1,1)
  (same comment as for thickness of glass fibre reinforced polypropylene liner)

## Reference product
- lorry with refrigeration machine, carbon dioxide, liquid as refrigerant, 16 metric ton: 1 unit; name lorry_RP; By-product classification allocatable product; CPC 49114: Motor vehicles n.e.c. for the transport of goods
  production volume 7200 unit; name lorry_RP_PV; = 1200000*0.3*0.2*0.1
    Calculated based on literature value.
    1200000 units of refrigerated trucks in operation world wide in 2002 (IPCC/TEAP Special Report: Safeguarding the Ozone Layer and the Global Climate System).
    Out of that
    30% are trailer units
    40% independent truck units
    30% smaller units (used for this dataset)
    It is estimated, that 20% of this amount is renewed every year.
    It is estimated, that 90% of those trucks use R134a as refrigerant and 10% use carbon dioxide, liquid as refrigerant.
  property price 22576.7 EUR2005; name lorry_RP_price_EUR2005
    Calculated based on inputs: The price of the product has been calculated as a sum of the values of the material and energy inputs for this product. This value is therefore a rough estimation. It may underestimate the real price since there are additional expenses when producing any product. These expences can include for example labour costs, treatment of waste materials and profit for the producer. Please consider carefully whether this level of data quality is acceptable for your application.
  property lifetime capacity [metric ton*km] 540000 metric ton*km; name lorry_lifetime_capacity
    Literature value (ecoinvent v2, report 14_Transport).
  property length, external 5 m; name lorry_cargo_length
  property width, external 2.44 m; name lorry_cargo_width
  property lifetime 15 year; name lorry_lifetime
    Estimated value.
  property height, external 2 m; name lorry_cargo_height

## Inputs from technosphere
- heat, district or industrial, natural gas: 32300 MJ; source MAN Nutzfahrzeuge AG 2000; lognormal variance with pedigree 0.052, pedigree (1,1,5,5,1)
  Literature value. Energy expenditures for stationary combustion processes are available from environmental reports of a German lorry manufacturer MAN Nutzfahrzeuge AG (2000)andMAN Nutzfahrzeuge AG (2000). The data is available for various manufacturing sites performing different tasks in the manufacturing chain. The total value used in this study comprises stamping processes, metal part and wiring harness manufacturing, engine production and testing as well as the final assembly.
  Additional references:
  MAN Nutzfahrzeuge AG (2002) Umwelterklärung 2002. MAN Nutzfahrzeuge AG, München.
  EcoSpold01Location=RER
  properties: heating value, net 1 MJ
- aluminium, cast alloy: 68.8 kg; = 0.32*215; source Volvo Truck Corporation 2004; lognormal variance with pedigree 0.162, pedigree (1,1,5,5,1)
  215 kg aluminium, production mix. Estimated value. Based on the material composition of a Volovo FH as available from product declaration.
  0.32: part of aluminium cast alloy in aluminium, production mix. Based on the aluminium, production mix in ecoinvent v2.2.
  properties: dry mass 1 kg, wet mass 1 kg
- sheet rolling, steel: 418 kg; source Volvo Truck Corporation 2004; lognormal variance with pedigree 0.052, pedigree (1,1,5,5,1)
  EcoSpold01Location=RER
  Estimated value. Based on the material composition of a Volvo FH as available from product declaration.
- refrigeration machine, carbon dioxide, liquid as refrigerant: 1 unit; lognormal variance with pedigree 0.0406, pedigree (1,1,5,1,1)
  Literature value.
  There are different types of refrigeration machines used in refrigerated transport by lorries. The Carrier Supra 560 type of refrigeration machine weight 385 kg (Carrier, http://www.trucktrailer.carrier.com/StaticFiles/Carrier.com/Carrier%20Brand%20Sites%20Content/Carrier%20Transicold%20North%20America%20TruckTrailer/Files/Products/Truck/Diesel/Supra%20560/Supra560.pdf, accessed 20141103).
- heat, district or industrial, other than natural gas: 860.7 MJ; source MAN Nutzfahrzeuge AG 2000; lognormal variance with pedigree 0.052, pedigree (1,1,5,5,1)
  EcoSpold01Location=RER
  Literature value. Energy expenditures for stationary combustion processes are available from environmental reports of a German lorry manufacturer MAN Nutzfahrzeuge AG (2000)andMAN Nutzfahrzeuge AG (2000). The data is available for various manufacturing sites performing different tasks in the manufacturing chain. The total value used in this study comprises stamping processes, metal part and wiring harness manufacturing, engine production and testing as well as the final assembly.
  Additional references:
  MAN Nutzfahrzeuge AG (2002) Umwelterklärung 2002. MAN Nutzfahrzeuge AG, München.
  properties: heating value, net 1 MJ
- sulfuric acid: 0 kg; source Volvo Truck Corporation 2004; pedigree (1,1,1,1,1)
  Estimated value. Based on the material composition of a Volvo FH as available from product declaration.
  EcoSpold01Location=RER
  properties: wet mass 1 kg, dry mass 1 kg
- used lorry with refrigeration machine, 16 metric ton: -1 unit; name BP_amount_2
  production volume 7200 unit; = BP_amount_2/ lorry_RP* lorry_RP_PV
    Calculated from production volume of reference product using the relative outputs.
  property price 0 EUR2005; name BP_amount_2_price_EUR2005
- polypropylene, granulate: 102.481 kg; name PP_in; = (area_cargo)*(thickness_liner/1000)* density_GFP_polypropylene*0.95; lognormal variance with pedigree 0.0566, pedigree (4,5,5,1,1)
  Calculated value.
  The walls are covered on the inside of the cargo space by polypropylene fibre reinforced thermoplastic. Since this product is not available in the database ordinary polypropylene is used instead.
  properties: dry mass 1 kg, wet mass 1 kg, carbon content, fossil 0.857143, heating value, net 32.78 MJ
  note on heating value, net: Value extracted from "treatment of waste polypropylene, open burning"
- section bar rolling, steel: 1630 kg; source Volvo Truck Corporation 2004; lognormal variance with pedigree 0.082, pedigree (1,1,5,5,1)
  (same comment as for sheet rolling, steel)
- road vehicle factory: 8.73e-7 unit; lognormal variance with pedigree 0.342, pedigree (1,1,5,5,1)
  EcoSpold01Location=RER
  Estimated value. Expenditures for the infrastructure of a road vehicle plant have been estimated and linked to vehicle manufacturing.
- waste polyurethane foam: 0 kg; name waste_PP; pedigree (1,1,1,1,1)
  Estimated value. It is estimated, that app. 10% of the insulation is cut-off as a waste during the assembly of the container.
  production volume 0 kg
    Calculated from production volume of reference product using the relative outputs.
  property price 0 EUR2005; name waste_PP_price_EUR2005
  properties: carbon content, fossil 0.641283, water content 0.00200401, dry mass 0.998 kg, wet mass 1 kg, heating value, net 30.67 MJ
- acetic acid, without water, in 98% solution state: 0.066 kg; source MAN Nutzfahrzeuge AG 2000; lognormal variance with pedigree 0.052, pedigree (1,1,5,5,1)
  Literature value. Data represent MAN production sites in Germany and comprises: final truck assembly, engine manufacturing, manufacturing of metal parts. Data available from environmental reports of the company.
  Additional references:
  MAN Nutzfahrzeuge AG (2002) Umwelterklärung 2002. MAN Nutzfahrzeuge AG, München
  EcoSpold01Location=RER
  properties: dry mass 1 kg, carbon content, fossil 0.400016, wet mass 1 kg, heating value, net 14.6 MJ
  note on heating value, net: Based on literature, page 10, Althaus H.-J., Chudacoff M., Hischier R., Jungbluth N., Osses M. and Primas A. (2007) Life Cycle Inventories of Chemicals. Final report ecoinvent data v2.0 No. 8. EMPA, Swiss Centre for Life Cycle Inventories, Dübendorf, CH, Online-Version under: www.ecoinvent.org.
- steel, low-alloyed, hot rolled: 11.4 kg; source Volvo Truck Corporation 2004; lognormal variance with pedigree 1.372, pedigree (1,1,5,5,1)
  (same comment as for sheet rolling, steel)
  properties: dry mass 1 kg, carbon content, fossil 0.005, wet mass 1 kg
  note on carbon content, fossil: Low alloyed steel composition given in Tab. 3.2 ecoinvent v2.2 report 10_partII. Steel assumed to have a C content of 0.5%
- polyurethane, rigid foam: 0 kg; name PUR_foam_input; pedigree (1,1,1,1,1)
  Calculated value.
  properties: wet mass 1 kg, carbon content, fossil 0.69089, dry mass 1 kg, heating value, net 30.67 MJ
- tap water: 16400 kg; name tap_water_input; source MAN Nutzfahrzeuge AG 2002; lognormal variance with pedigree 0.052, pedigree (1,1,5,5,1)
  Calculated value. About 95% of the consumed tap water and groundwater are used in the final assembly of vehicles (own calculations based on MAN Nutzfahrzeuge AG (2002)).
  EcoSpold01Location=RER
  properties: carbon content, fossil 0.00178991, water content 2962.17, wet mass 1 kg, dry mass 0.000337476 kg
  note on carbon content, fossil: Bicarbonate content is 2.93 mol/m3. CO2 content is 0.1 mol/m3 (ecoinvent v2.2 report 8, Tab 93.1).
- wastewater, average: 0 m3; name BP_amount_1; source MAN Nutzfahrzeuge AG 2000; pedigree (1,1,1,1,1)
  EcoSpold01Location=CH
  Literature value. Data represent MAN production sites in Germany and comprises: final truck assembly, engine manufacturing, manufacturing of metal parts. Data available from environmental reports of the company.
  Additional references:
  MAN Nutzfahrzeuge AG (2002) Umwelterklärung 2002. MAN Nutzfahrzeuge AG, München
  production volume 0 m3
    Calculated from the production volume of lorry, 16 metric ton in proportion to the respective output amounts.
  property price 0 EUR2005; name BP_amount_1_price_EUR2005
  properties: wet mass 1000 kg, water content 2882.2, carbon content, non-fossil 0.194039, dry mass 0.346837 kg
  note on carbon content, non-fossil: 0.0673 kg TOC/m3 (Tab A.17, ecoinvent v2.2 report 13_I). TOC was considered as Total Carbon.
- lubricating oil: 0 kg; source MAN Nutzfahrzeuge AG 2000; pedigree (1,1,1,1,1)
  EcoSpold01Location=RER
  Literature value. Data represent MAN production sites in Germany and comprises: final truck assembly, engine manufacturing, manufacturing of metal parts. Data available from environmental reports of the company.
  Additional references:
  MAN Nutzfahrzeuge AG (2002) Umwelterklärung 2002. MAN Nutzfahrzeuge AG, München
  properties: heating value, net 40.2 MJ, dry mass 1 kg, carbon content, fossil 0.75, wet mass 1 kg
  note on heating value, net: Literature value, Source: IPCC 2006, 2006 IPCC Guidelines for National Greenhouse Gas Inventories, Prepared by the National Greenhouse Gas Inventories Programme, Eggleston H.S., Buendia L., Miwa K., Ngara T. and Tanabe K. (eds). Published: IGES, Japan
  note on carbon content, fossil: Lubricating oil is produced from diesel. C-content/dry mass of fats and oils considered 75%, from: ecoinvent v2.2 report, n 15a, pg 40
- electricity, medium voltage: 4740 kWh; source MAN Nutzfahrzeuge AG 2000; lognormal variance with pedigree 0.052, pedigree (1,1,5,5,1)
  Literature value. Energy expenditures for stationary combustion processes are available from environmental reports of a German lorry manufacturer MAN Nutzfahrzeuge AG (2000)andMAN Nutzfahrzeuge AG (2000). The data is available for various manufacturing sites performing different tasks in the manufacturing chain. The total value used in this study comprises stamping processes, metal part and wiring harness manufacturing, engine production and testing as well as the final assembly.
  Additional references:
  MAN Nutzfahrzeuge AG (2002) Umwelterklärung 2002. MAN Nutzfahrzeuge AG, München.
  EcoSpold01Location=UCTE
- alkyd paint, white, without solvent, in 60% solution state: 0 kg; source Volvo Truck Corporation 2004; pedigree (1,1,1,1,1)
  EcoSpold01Location=RER
  Estimated value. Based on the material composition of a Volovo FH as available from product declaration.
  properties: carbon content, fossil 0.140367, dry mass 1 kg, wet mass 1 kg, heating value, net 10.3 MJ, carbon content, non-fossil 0.199629
  note on carbon content, fossil: C content was calculated as an addition of C content in the raw materials.
- aluminium, wrought alloy: 146.2 kg; = 0.68*215; source Volvo Truck Corporation 2004; lognormal variance with pedigree 0.162, pedigree (1,1,5,5,1)
  215 kg aluminium, production mix. Estimated value. Based on the material composition of a Volovo FH as available from product declaration.
  0.68: part of aluminium, wrought alloy in aluminium, production mix. Based on the aluminium, production mix in ecoinvent v2.2.
  properties: wet mass 1 kg, dry mass 1 kg
- stone wool, packed: 10 kg; source Volvo Truck Corporation 2004; lognormal variance with pedigree 0.052, pedigree (1,1,5,5,1)
  EcoSpold01Location=CH
  Estimated value. Based on the material composition of a Volvo FH as available from product declaration.
  properties: wet mass 1 kg, dry mass 1 kg, carbon content, fossil 0.015401
  note on carbon content, fossil: The chemical composition of the glass fibres used in the rock wool production is similar to the composition of naturally cooled volcano basalt and has a composition listed in Tab. 3.1 and 3.2 in ecoinvent v2.2 report 16, part XIV. Rock wool contains: a minimum of 96% mineral fibres,between 0.5 and 3.0 weight percent of phenolic resin depending on the specific product characteristics, and about 0.2 percent mineral oil (ecoinvent v2.2 report 16, part XIV). An average composition of 1.8% phenolic resin, 0.2% mineral oil, and 98% mineral fibres has been assumed and used to calculate C content of the rock wool
- wire drawing, copper: 30 kg; source Volvo Truck Corporation 2004; lognormal variance with pedigree 0.162, pedigree (1,1,5,5,1)
  (same comment as for sulfuric acid)
- synthetic rubber: 375 kg; source Volvo Truck Corporation 2004; lognormal variance with pedigree 0.082, pedigree (1,1,5,5,1)
  (same comment as for sulfuric acid)
  properties: heating value, net 26.42 MJ, wet mass 1 kg, dry mass 1 kg, carbon content, fossil 0.871949
  note on carbon content, fossil: EPDM (Ethylene-propene-diene terpolymer) rubber is a terpolymer of ethylene, propene, and a diene with the residual unsaturated portion of the diene in the side chain (ecoinvent v2.2 report 7-part XX & Ullmann). Chemical formula (deduced from Evidences of Solvent-Induced Miscibility in Polychloroprene-co-Ethylene-Propene Diene Terpolymer Blends, Dubey et al., Journal of Applied Polymer Science, 2009, 111:1884–1891): C20H35
- wastewater from lorry production: -2.18 m3; name BP_amount_3; source MAN Nutzfahrzeuge AG 2000; lognormal variance with pedigree 0.052, pedigree (1,1,5,5,1)
  (same comment as for wastewater, average)
  production volume 15696 m3; = BP_amount_3/ lorry_RP* lorry_RP_PV
    (same comment as for wastewater, average)
  property price 0 EUR2005; name BP_amount_3_price_EUR2005
  properties: wet mass 1000 kg, dry mass 0.337476 kg, water content 2962.17
- cast iron: 1450 kg; source Volvo Truck Corporation 2004; lognormal variance with pedigree 0.082, pedigree (1,1,5,5,1)
  (same comment as for alkyd paint, white, without solvent, in 60% solution state)
  properties: carbon content, fossil 0.04, wet mass 1 kg, dry mass 1 kg
  note on carbon content, fossil: Cast iron is made by remelting pig iron in small furnaces (e.g. cupola furnaces or electric arc furnaces) and poured into moulds to make castings. It usually contains 2% to 6% carbon (ecoinvent v2.2 report 10_partII). An average content of 4% was considered
- steel, chromium steel 18/8, hot rolled: 5 kg; source Volvo Truck Corporation 2004; lognormal variance with pedigree 0.162, pedigree (1,1,5,5,1)
  (same comment as for sulfuric acid)
  properties: carbon content, fossil 0.0008, dry mass 1 kg, wet mass 1 kg
  note on carbon content, fossil: Stainless steel model is the grade 304 steel (18/8 stainless, 18% chromium 8% nickel; max. 0.08% C)
- propylene glycol, liquid: 0 kg; source Volvo Truck Corporation 2004; pedigree (1,1,1,1,1)
  (same comment as for sheet rolling, steel)
  properties: heating value, net 27.09 MJ, wet mass 1 kg, dry mass 1 kg, carbon content, fossil 0.473684
- diesel, burned in building machine: 20.1 MJ; source MAN Nutzfahrzeuge AG 2000; lognormal variance with pedigree 0.342, pedigree (1,1,5,5,1)
  Literature value. Diesel is used for engine testing and the operation of fork-lifters. The latter is modeled as building machine. Energy expenditures for stationary combustion processes are available from environmental reports of a German lorry manufacturer MAN Nutzfahrzeuge AG (2000) and MAN Nutzfahrzeuge AG (2002). The data is available for various manufacturing sites performing different tasks in the manufacturing chain. The total value used in this study comprises stamping processes, metal part and wiring harness manufacturing, engine production and testing as well as the final assembly.
  Additional references:
  MAN Nutzfahrzeuge AG (2002) Umwelterklärung 2002. MAN Nutzfahrzeuge AG, München.
  EcoSpold01Location=GLO
  properties: heating value, net 1 MJ
- lime, hydrated, packed: 0 kg; source MAN Nutzfahrzeuge AG 2000; pedigree (1,1,1,1,1)
  Literature value. Data represent MAN production sites in Germany and comprises: final truck assembly, engine manufacturing, manufacturing of metal parts. Data available from environmental reports of the company. For Ca(OH)2, 50% H2O is assumed.
  Additional references:
  MAN Nutzfahrzeuge AG (2002) Umwelterklärung 2002. MAN Nutzfahrzeuge AG, München
  EcoSpold01Location=CH
  Uncertainty: 2, 50% H2O is assumed.
  properties: dry mass 0.997 kg, water content 0.00300903, wet mass 1 kg
- flat glass, uncoated: 0 kg; source Volvo Truck Corporation 2004; pedigree (1,1,1,1,1)
  (same comment as for sheet rolling, steel)
  properties: wet mass 1 kg, dry mass 1 kg
- nitric acid, without water, in 50% solution state: 0 kg; source MAN Nutzfahrzeuge AG 2000; pedigree (1,1,1,1,1)
  (same comment as for lubricating oil)
  properties: dry mass 1 kg, wet mass 1 kg
- pig iron: 0 kg; source Volvo Truck Corporation 2004; pedigree (1,1,1,1,1)
  Estimated value. Based on the material composition of a Volvo FH as available from product declaration.
  EcoSpold01Location=GLO
  properties: carbon content, fossil 0.045, wet mass 1 kg, dry mass 1 kg
  note on carbon content, fossil: Pig iron is the iron produced in the blast furnace. It is an alloy of 94% Fe and more than 2% C (world average 4.5%). (ecoinvent v2.2 report 10_partII)
- electronics, for control units: 30 kg; source Volvo Truck Corporation 2004; lognormal variance with pedigree 0.052, pedigree (1,1,5,5,1)
  (same comment as for sheet rolling, steel)
  properties: dry mass 1 kg, carbon content, fossil 0.337146, carbon content, non-fossil 0.00013442, wet mass 1 kg
  note on carbon content, fossil: The control unit has a composition of 46% steel (housing), 32% plastics, 14% printed wiring boards and 8% cables (various types).;
- sodium hydroxide, without water, in 50% solution state: 0.381 kg; source MAN Nutzfahrzeuge AG 2000; lognormal variance with pedigree 0.052, pedigree (1,1,5,5,1)
  (same comment as for lubricating oil)
  properties: dry mass 1 kg, wet mass 1 kg, heating value, net 3.03 MJ
- copper, cathode: 30 kg; source Volvo Truck Corporation 2004; lognormal variance with pedigree 0.162, pedigree (1,1,5,5,1)
  Estimated value. Based on the material composition of a Volovo FH as available from product declaration.
  EcoSpold01Location=RER
  properties: dry mass 1 kg, wet mass 1 kg
- polyethylene, high density, granulate: 230 kg; source Volvo Truck Corporation 2004; lognormal variance with pedigree 0.162, pedigree (1,1,5,5,1)
  (same comment as for sulfuric acid)
  properties: wet mass 1 kg, dry mass 1 kg, carbon content, fossil 0.857143, heating value, net 42.47 MJ
  note on carbon content, fossil: Polyethylene is formed out of a huge amount of ethylene monomers (C2H4) (ecoinvent v2.2 report 11_II). MW=28 g/mol
- diesel: 167 kg; source MAN Nutzfahrzeuge AG 2000; lognormal variance with pedigree 0.342, pedigree (1,1,5,5,1)
  EcoSpold01Location=RER
  Literature value. Diesel is used for engine testing and the operation of fork-lifters. The latter is modeled as building machine. Energy expenditures for stationary combustion processes are available from environmental reports of a German lorry manufacturer MAN Nutzfahrzeuge AG (2000) and MAN Nutzfahrzeuge AG (2002). The data is available for various manufacturing sites performing different tasks in the manufacturing chain. The total value used in this study comprises stamping processes, metal part and wiring harness manufacturing, engine production and testing as well as the final assembly.
  Additional references:
  MAN Nutzfahrzeuge AG (2002) Umwelterklärung 2002. MAN Nutzfahrzeuge AG, München.
  properties: dry mass 1 kg, wet mass 1 kg, heating value, net 42.8 MJ, carbon content, fossil 0.865
  note on carbon content, fossil: C-content of diesel is 86.5% (ecoinvent v2.2 report 6_IV, Tab 3.14)
- pitch: 0 kg; source Volvo Truck Corporation 2004; pedigree (1,1,1,1,1)
  (same comment as for alkyd paint, white, without solvent, in 60% solution state)
  properties: dry mass 1 kg, carbon content, fossil 0.83, wet mass 1 kg, heating value, net 28 MJ
- lead: 73.62 kg; source Volvo Truck Corporation 2004; lognormal variance with pedigree 0.052, pedigree (1,1,5,5,1)
  (same comment as for sulfuric acid)
  properties: dry mass 1 kg, wet mass 1 kg
- brass: 0 kg; source Volvo Truck Corporation 2004; pedigree (1,1,1,1,1)
  Estimated value. Based on the material composition of a Volovo FH as available from product declaration.
  EcoSpold01Location=CH
  properties: wet mass 1 kg, dry mass 1 kg
- hydrochloric acid, without water, in 30% solution state: 0 kg; source MAN Nutzfahrzeuge AG 2000; pedigree (1,1,1,1,1)
  (same comment as for acetic acid, without water, in 98% solution state)
  properties: heating value, net 3.32 MJ, wet mass 1 kg, dry mass 1 kg
- reinforcing steel: 2260 kg; source Volvo Truck Corporation 2004; lognormal variance with pedigree 0.052, pedigree (1,1,5,5,1)
  (same comment as for sheet rolling, steel)
  properties: carbon content, fossil 0.004, wet mass 1 kg, dry mass 1 kg
- sulfuric acid: 3.22766, 24.6723 kg (2 entries); source Volvo Truck Corporation 2004; lognormal variance with pedigree 0.052, pedigree (1,1,5,5,1)
  (same comment as for sulfuric acid)
- waste polyurethane foam: -0.0169796, -21.647 kg (2 entries); lognormal variance with pedigree 0.0566, pedigree (4,5,5,1,1)
  (same comment as for waste polyurethane foam)
  production volume 155981 kg
- polyurethane, rigid foam: 71.6195, 145.02 kg (2 entries); lognormal variance with pedigree 0.0432, pedigree (3,3,5,1,1)
  Calculated value.
- wastewater, average: -4.96813, -0.537459, -10.3944 m3 (3 entries); source MAN Nutzfahrzeuge AG 2000; lognormal variance with pedigree 0.052, pedigree (1,1,5,5,1)
  (same comment as for wastewater, average)
  production volume 114480 m3
- lubricating oil: 10.8054, 51.2946 kg (2 entries); source MAN Nutzfahrzeuge AG 2000; lognormal variance with pedigree 0.162, pedigree (1,1,5,5,1)
  (same comment as for lubricating oil)
- alkyd paint, white, without solvent, in 60% solution state: 6.96, 33.04 kg (2 entries); source Volvo Truck Corporation 2004; lognormal variance with pedigree 0.082, pedigree (1,1,5,5,1)
  (same comment as for alkyd paint, white, without solvent, in 60% solution state)
- propylene glycol, liquid: 7.27303, 14.727 kg (2 entries); source Volvo Truck Corporation 2004; lognormal variance with pedigree 0.052, pedigree (1,1,5,5,1)
  (same comment as for sheet rolling, steel)
- lime, hydrated, packed: 0.00260923, 0.307391 kg (2 entries); source MAN Nutzfahrzeuge AG 2000; lognormal variance with pedigree 0.2106, pedigree (5,5,5,5,5)
  (same comment as for lime, hydrated, packed)
- flat glass, uncoated: 7.68429, 37.3157 kg (2 entries); source Volvo Truck Corporation 2004; lognormal variance with pedigree 0.082, pedigree (1,1,5,5,1)
  (same comment as for sheet rolling, steel)
- nitric acid, without water, in 50% solution state: 0.00316635, 0.00787412, 0.00377286, 0.024041, 0.00315463, 0.0129762, 0.00342096, 0.00213101, 0.0102401, 0.0277228 kg (10 entries); source MAN Nutzfahrzeuge AG 2000; lognormal variance with pedigree 0.052, pedigree (1,1,5,5,1)
  (same comment as for lubricating oil)
- pig iron: 138.176, 1491.82 kg (2 entries); source Volvo Truck Corporation 2004; lognormal variance with pedigree 0.082, pedigree (1,1,5,5,1)
  (same comment as for pig iron)
- pitch: 1.51768, 0.0261017, 1.18136, 0.075596, 0.457991, 0.0529534, 0.00997859, 6.67834 kg (8 entries); source Volvo Truck Corporation 2004; lognormal variance with pedigree 0.052, pedigree (1,1,5,5,1)
  (same comment as for alkyd paint, white, without solvent, in 60% solution state)
- brass: 0.1, 19.9 kg (2 entries); source Volvo Truck Corporation 2004; lognormal variance with pedigree 0.162, pedigree (1,1,5,5,1)
  (same comment as for brass)
- hydrochloric acid, without water, in 30% solution state: 0.0345344, 0.154466 kg (2 entries); source MAN Nutzfahrzeuge AG 2000; lognormal variance with pedigree 0.052, pedigree (1,1,5,5,1)
  (same comment as for acetic acid, without water, in 98% solution state)

## Inputs from nature
- Water, well, in ground [natural resource, in water]: 69.5 m3; name water_well_in_ground_input; source MAN Nutzfahrzeuge AG 2002; lognormal variance with pedigree 0.052, pedigree (1,1,5,5,1)
  Calculated value. About 95% of the consumed tap water and groundwater are used in the final assembly of vehicles (own calculations based on MAN Nutzfahrzeuge AG (2002)).

## Emissions to nature
- TOC, Total Organic Carbon [water, unspecified]: 0.0551 kg; source Frischknecht R. 2003; lognormal variance with pedigree 0.162, pedigree (1,1,5,5,1)
  Calculated value according to ecoinvent quality guidelines Frischknecht et al. (2003).
- Sulfur dioxide [air, unspecified]: 0.12 kg; source MAN Nutzfahrzeuge AG 2000; lognormal variance with pedigree 0.162, pedigree (1,1,5,5,1)
  Calculated value. Based on the diesel consumption for engine testing, direct environmental emissions to air are calculated, employing the emission profile of a lorry 28t empty. Is assumed that diesel is used for engine testing and the operation of fork-lifters. The latter is modeled as building machine.Energy expenditures for stationary combustion processes are available from environmental reports of a German lorry manufacturer MAN Nutzfahrzeuge AG (2000) and MAN Nutzfahrzeuge AG (2002).
  Additional references:
  MAN Nutzfahrzeuge AG (2002) Umwelterklärung 2002. MAN Nutzfahrzeuge AG, München.
- Copper [air, unspecified]: 0.000293 kg; source MAN Nutzfahrzeuge AG 2000; lognormal variance with pedigree 0.692, pedigree (1,1,5,5,1)
  (same comment as for Sulfur dioxide)
- Zinc [air, unspecified]: 0.000173 kg; source MAN Nutzfahrzeuge AG 2000; lognormal variance with pedigree 0.692, pedigree (1,1,5,5,1)
  (same comment as for Sulfur dioxide)
- COD, Chemical Oxygen Demand [water, unspecified]: 0.126 kg; source MAN Nutzfahrzeuge AG 2002; lognormal variance with pedigree 0.162, pedigree (1,1,5,5,1)
  Literature value. For automotive stamping, a Chemical Oxygen Demand (COD) is reported MAN Nutzfahrzeuge AG (2002) with 12800 kg/year resulting in a specific COD of 0.126 kg/vehicle.
- Carbon monoxide, fossil [air, unspecified]: 0.973 kg; source MAN Nutzfahrzeuge AG 2000; lognormal variance with pedigree 0.162, pedigree (1,1,5,5,1)
  (same comment as for Sulfur dioxide)
- Lead [air, unspecified]: 1.9e-8 kg; source MAN Nutzfahrzeuge AG 2000; lognormal variance with pedigree 0.692, pedigree (1,1,5,5,1)
  (same comment as for Sulfur dioxide)
- Nitrogen oxides [air, unspecified]: 6 kg; source MAN Nutzfahrzeuge AG 2000; lognormal variance with pedigree 0.162, pedigree (1,1,5,5,1)
  (same comment as for Sulfur dioxide)
- NMVOC, non-methane volatile organic compounds, unspecified origin [air, unspecified]: 7.87 kg; source MAN Nutzfahrzeuge AG 2000; lognormal variance with pedigree 0.162, pedigree (1,1,5,5,1)
  (same comment as for Sulfur dioxide)
- Chromium [air, unspecified]: 0.000293 kg; source MAN Nutzfahrzeuge AG 2000; lognormal variance with pedigree 0.692, pedigree (1,1,5,5,1)
  (same comment as for Sulfur dioxide)
- Particulates, > 2.5 um, and < 10um [air, unspecified]: 0.0212 kg; source MAN Nutzfahrzeuge AG 2000; lognormal variance with pedigree 0.162, pedigree (1,1,5,5,1)
  (same comment as for Sulfur dioxide)
- Mercury [air, unspecified]: 3.45e-9 kg; source MAN Nutzfahrzeuge AG 2000; lognormal variance with pedigree 0.692, pedigree (1,1,5,5,1)
  (same comment as for Sulfur dioxide)
- BOD5, Biological Oxygen Demand [water, unspecified]: 0.126 kg; source Frischknecht R. 2003; lognormal variance with pedigree 0.162, pedigree (1,1,5,5,1)
  Calculated value according to ecoinvent quality guidelines Frischknecht et al. (2003).
- Cadmium [air, unspecified]: 1.73e-6 kg; source MAN Nutzfahrzeuge AG 2000; lognormal variance with pedigree 0.692, pedigree (1,1,5,5,1)
  (same comment as for Sulfur dioxide)
- Particulates, < 2.5 um [air, unspecified]: 0.254 kg; source MAN Nutzfahrzeuge AG 2000; lognormal variance with pedigree 0.162, pedigree (1,1,5,5,1)
  (same comment as for Sulfur dioxide)
- Toluene [air, unspecified]: 0.00551 kg; source MAN Nutzfahrzeuge AG 2000; lognormal variance with pedigree 0.162, pedigree (1,1,5,5,1)
  (same comment as for Sulfur dioxide)
- Water [water, unspecified]: 54.935 m3; name water_to_water_unspecified; = (tap_water_input/1000)*(1-fraction_TW_to_air)+water_well_in_ground_input*(1-fraction_PW_to_air)-2.18-15.9; lognormal variance with pedigree 0.130025, pedigree (4,4,5,2,4)
  Calculated value based on literature values and expert opinion. See comments in the parametres' comment field.
  property fraction, origin: fresh water 1; name fraction_origin_fresh_water_Ww
  property fraction, origin: salt water 0; name fraction_origin_salt_water_Ww
  property fraction, origin: unspecified 0; name fraction_origin_unspecified_Ww
- Benzene [air, unspecified]: 0.0131 kg; source MAN Nutzfahrzeuge AG 2000; lognormal variance with pedigree 0.162, pedigree (1,1,5,5,1)
  (same comment as for Sulfur dioxide)
- Water [air, unspecified]: 12.885 m3; name water_to_air_unspecified; = (tap_water_input/1000)*fraction_TW_to_air+water_well_in_ground_input*fraction_PW_to_air; lognormal variance with pedigree 0.130025, pedigree (4,4,5,2,4)
  (same comment as for Water)
  property fraction, origin: fresh water 1; name fraction_origin_fresh_water
  property fraction, origin: salt water 0; name fraction_origin_salt_water
  property fraction, origin: unspecified 0; name fraction_origin_unspecified
- DOC, Dissolved Organic Carbon [water, unspecified]: 0.0551 kg; source Frischknecht R. 2003; lognormal variance with pedigree 0.162, pedigree (1,1,5,5,1)
  Calculated value according to ecoinvent quality guidelines Frischknecht et al. (2003).
- Nickel [air, unspecified]: 1.21e-5 kg; source MAN Nutzfahrzeuge AG 2000; lognormal variance with pedigree 0.692, pedigree (1,1,5,5,1)
  (same comment as for Sulfur dioxide)
- Particulates, > 10 um [air, unspecified]: 0.0109 kg; source MAN Nutzfahrzeuge AG 2000; lognormal variance with pedigree 0.162, pedigree (1,1,5,5,1)
  (same comment as for Sulfur dioxide)
- Selenium [air, unspecified]: 1.73e-6 kg; source MAN Nutzfahrzeuge AG 2000; lognormal variance with pedigree 0.692, pedigree (1,1,5,5,1)
  (same comment as for Sulfur dioxide)
- Carbon dioxide, fossil [air, unspecified]: 633 kg; source MAN Nutzfahrzeuge AG 2000; lognormal variance with pedigree 0.162, pedigree (1,1,5,5,1)
  (same comment as for Sulfur dioxide)
- Methane, fossil [air, unspecified]: 0.0165 kg; source MAN Nutzfahrzeuge AG 2000; lognormal variance with pedigree 0.162, pedigree (1,1,5,5,1)
  (same comment as for Sulfur dioxide)
- Xylene [air, unspecified]: 0.00551 kg; source MAN Nutzfahrzeuge AG 2000; lognormal variance with pedigree 0.162, pedigree (1,1,5,5,1)
  (same comment as for Sulfur dioxide)
- Dinitrogen monoxide [air, unspecified]: 0.0223 kg; source MAN Nutzfahrzeuge AG 2000; lognormal variance with pedigree 0.162, pedigree (1,1,5,5,1)
  (same comment as for Sulfur dioxide)
- Ammonia [air, unspecified]: 0.0223 kg; source MAN Nutzfahrzeuge AG 2000; lognormal variance with pedigree 0.162, pedigree (1,1,5,5,1)
  (same comment as for Sulfur dioxide)

## Sampling procedure
Manufacturing data is taken from an environmental report of one production site. Additional data was generated via oral communcation.

## Extrapolations
This dataset has been extrapolated from year 2002 to the year of the calculation (2021). The uncertainty has been adjusted accordingly.
