# photovoltaic cell production, single-Si wafer

Dataset: EcoSpold 2, unit process
Geography: RoW
Time period: 2004-01-01 to 2021-12-31
Technology level: current
Classification: EcoSpold01Categories: photovoltaic/production of components
Classification: ISIC rev.4 ecoinvent: 2610:Manufacture of electronic components and boards
Synonyms: single crystalline; monocrystalline; silicon
Tags: ConvertedDataset
Scenario: Business-as-Usual
System model: Allocation, cut-off by classification
Share of production covered: 6 %
Generated by: Mariska J. de Wild-Scholten
Published in: Jungbluth, N. 2007
Database: ecoinvent
isCopyrightProtected: true
accessRestrictedTo: 1

## General comment
Production of photovoltaic cells (156*156 mm2). Some inputs and emissions aggregated to protect sensitive data. Wafer thickness 270-300 um. with an efficiency of 15.4% and 1.5Wp
[This dataset was already contained in the ecoinvent database version 2. It was not individually updated during the transfer to ecoinvent version 3. Life Cycle Impact Assessment results may still have changed, as they are affected by changes in the supply chain, i.e. in other datasets. This dataset was generated following the ecoinvent quality guidelines for version 2. It may have been subject to central changes described in the ecoinvent version 3 change report (http://www.ecoinvent.org/database/ecoinvent-version-3/reports-of-changes/), and the results of the central updates were reviewed extensively. The changes added e.g. consistent water flows and other information throughout the database. The documentation of this dataset can be found in the ecoinvent reports of version 2, which are still available via the ecoinvent website. The change report linked above covers all central changes that were made during the conversion process.]

## Included activities end
Cleaning, damage etching, texture etching, covering of backside, phosphor dotation, phosphor glass etching, printing of contacts, cleaning and quality testing.

## Geography
Data for production in Europe.

## Technology
Average production technology of photovoltaic cells from wafers.

## Time period
Data investigated in 2004 and recalculated for the cell size in 2005.

## Parameters
- fraction, cooling water, once-through system, to air: 0.004 dimensionless; name fraction_CW_OT_to_air; lognormal variance with pedigree 0.0413, pedigree (2,3,1,3,1)
  Calculated based on literature value (Scown, C.D., 2011, Water Footprint of U.S. Transportation Fuels and supplying information of the article) (Vionnet, S., Quantis Water Database - Technical Report, 2012).
- fraction, cooling water, recirculating system, to air: 0.771 dimensionless; name fraction_CW_R_to_air; lognormal variance with pedigree 0.0413, pedigree (2,3,1,3,1)
  (same comment as for fraction, cooling water, once-through system, to air)
- fraction, water, completely softened, to air: 0.15 dimensionless; name fraction_WCS_to_air; lognormal variance with pedigree 0.092025, pedigree (4,4,3,2,4)
- fraction, process water, to air: 0.15 dimensionless; name fraction_PW_to_air; lognormal variance with pedigree 0.092025, pedigree (4,4,3,2,4)
- fraction, cooling water, to air: 0.3875 dimensionless; name fraction_CW_to_air; = (0.5*fraction_CW_OT_to_air)+(0.5*fraction_CW_R_to_air); lognormal variance with pedigree 0.092025, pedigree (4,4,3,2,4)
  Calculated value based on literature value (see comments of the other parametres present in this dataset) and expert opinion. In the case when no industry/literature data are available about the type of cooling or directly fraction, cooling water, to air specific for the process a default assumption is applied. It is assumed that the once-through cooling system is used in 50% of all cases and recirculating system is used in another 50% of all cases.
- fraction, cooling water, cooling pond system, to air: 0.032 dimensionless; name fraction_CW_CP_to_air; lognormal variance with pedigree 0.0413, pedigree (2,3,1,3,1)
  (same comment as for fraction, cooling water, once-through system, to air)

## Reference product
- photovoltaic cell, single-Si wafer: 1 m2; By-product classification allocatable product; CPC 47150: Diodes, transistors and similar semi-conductor devices; photosensitive semi-conductor devices; light emitting […]
  EcoSpold01Location=RER
  production volume 1.37028e6 m2
    1.5 W/0.024336 m2. Total worldwide production of photovoltaic cells was 243 MW in 2000 (from Tab 7.8 ecoinvent v2 report 6_XII). Distribution among single, multi and ribbon-Si of that was considered 56%, 3% and 41%. This assumption is based in the distribution observed in Fig 2.2, and Tab 12.6
  property price 63.1464 EUR2005
    Calculated based on inputs: The price of the product has been calculated as a sum of the values of the material and energy inputs for this product. This value is therefore a rough estimation. It may underestimate the real price since there are additional expenses when producing any product. These expences can include for example labour costs, treatment of waste materials and profit for the producer. Please consider carefully whether this level of data quality is acceptable for your application.
  property carbon content, fossil 0.0126329
    C content was calculated as the addition of C content in the components
  property carbon content 0.0126329
    carbon content on a dry matter basis (reserved; not for manual entry)
  properties: dry mass 0.75 kg, carbon content, non-fossil 0, wet mass 0.75 kg, water in wet mass 0 kg, water content 0, carbon allocation 0.00947465 kg

## Inputs from technosphere
- polystyrene, expandable: 0.00040722 kg; lognormal variance with pedigree 0.0421, pedigree (1,2,5,5,1)
  EcoSpold01Location=RER
  De Wild 2007, packaging
  Uncertainty: de Wild 2007, packaging
  properties: heating value, net 38.67 MJ, carbon content, fossil 0.923077, dry mass 1 kg, wet mass 1 kg
  note on carbon content, fossil: Chemical formula of polystyrene is (C8H8)n (ecoinvent v2.2 report 11_II)
- phosphoric acid, fertiliser grade, without water, in 70% solution state: 0.0076744 kg; lognormal variance with pedigree 0.0421, pedigree (1,2,5,5,1)
  De Wild 2007, for emitter formation. I.e. Ferro FX99-014: hazardous components 1-5% P2O5, 40-90% organic chemicals.
  EcoSpold01Location=GLO
  Uncertainty: de Wild 2007, for emitter formation. I.e. Ferro FX99-014: hazardous components 1-5% P2O5, 40-90% organic chemicals.
  properties: dry mass 1 kg, wet mass 1 kg
- photovoltaic cell factory: 4e-7 unit; lognormal variance with pedigree 0.3421, pedigree (1,2,5,5,1)
  Estimation with company data
  EcoSpold01Location=DE
  Uncertainty: estimation with company data
- argon, liquid: 0.025682 kg; lognormal variance with pedigree 0.0421, pedigree (1,2,5,5,1)
  De Wild 2007, company data
  EcoSpold01Location=RER
  Uncertainty: de Wild 2007, company data
  properties: dry mass 1 kg, wet mass 1 kg
- acetic acid, without water, in 98% solution state: 0.0028271 kg; lognormal variance with pedigree 0.0421, pedigree (1,2,5,5,1)
  De Wild 2007, for cleaning
  EcoSpold01Location=RER
  Uncertainty: de Wild 2007, for cleaning
  properties: heating value, net 14.6 MJ, dry mass 1 kg, carbon content, fossil 0.400016, wet mass 1 kg
  note on heating value, net: Based on literature, page 10, Althaus H.-J., Chudacoff M., Hischier R., Jungbluth N., Osses M. and Primas A. (2007) Life Cycle Inventories of Chemicals. Final report ecoinvent data v2.0 No. 8. EMPA, Swiss Centre for Life Cycle Inventories, Dübendorf, CH, Online-Version under: www.ecoinvent.org.
- metallization paste, front side: 0.0073964 kg; lognormal variance with pedigree 0.0421, pedigree (1,2,5,5,1)
  De Wild 2007, for electric contacts
  EcoSpold01Location=RER
  Uncertainty: de Wild 2007, for electric contacts
  properties: dry mass 1 kg, carbon content, fossil 0.0761136, wet mass 1 kg, heating value, net 2.31 MJ
- metallization paste, back side: 0.004931 kg; lognormal variance with pedigree 0.0421, pedigree (1,2,5,5,1)
  EcoSpold01Location=RER
  De Wild 2007, for electric contacts
  Uncertainty: de Wild 2007, for electric contacts
  properties: dry mass 1 kg, heating value, net 4.8 MJ, wet mass 1 kg, carbon content, fossil 0.15857
- sodium silicate, spray powder, 80%: 0.074786 kg; lognormal variance with pedigree 0.0421, pedigree (1,2,5,5,1)
  EcoSpold01Location=RER
  De Wild 2007
  Uncertainty: de Wild 2007
  properties: wet mass 1 kg, dry mass 1 kg
- waste, from silicon wafer production, inorganic: -0.27572 kg; lognormal variance with pedigree 0.0421, pedigree (1,2,5,5,1)
  De Wild 2007, company data
  EcoSpold01Location=CH
  Uncertainty: de Wild 2007, company data
  production volume 377813 kg
    Calculated from the production volume of photovoltaic cell, single-Si wafer in proportion to the respective output amounts.
  properties: dry mass 0.906 kg, wet mass 1 kg, carbon content, fossil 0.0347572, water content 0.103753
- single-Si wafer, photovoltaic: 1.06 m2; lognormal variance with pedigree 0.0421, pedigree (1,2,5,5,1)
  De Wild 2007, 6% losses
  EcoSpold01Location=RER
  Uncertainty: de Wild 2007, 6% losses
  properties: wet mass 0.629 kg, dry mass 0.629 kg
- water, completely softened: 0 kg; name water_softened_input; pedigree (1,1,1,1,1)
  EcoSpold01Location=RER
  De Wild 2007, company data
  Uncertainty: de Wild 2007, company data
  properties: wet mass 1 kg
- calcium chloride: 0.021573 kg; lognormal variance with pedigree 0.0421, pedigree (1,2,5,5,1)
  De Wild 2007
  EcoSpold01Location=CH
  Uncertainty: de Wild 2007
  properties: wet mass 1 kg, dry mass 1 kg
- nitrogen, liquid: 1.8532 kg; lognormal variance with pedigree 0.0421, pedigree (1,2,5,5,1)
  De Wild 2007, diffusion and damage etching
  EcoSpold01Location=RER
  Uncertainty: de Wild 2007, diffusion and damage etching
  properties: dry mass 1 kg, wet mass 1 kg
- phosphorus oxychloride: 0.001595 kg; lognormal variance with pedigree 0.0421, pedigree (1,2,5,5,1)
  De Wild 2007, POCl3 for emitter formation
  Uncertainty: de Wild 2007, POCl3 for emitter formation
- titanium dioxide: 1.4177e-6 kg; lognormal variance with pedigree 0.0421, pedigree (1,2,5,5,1)
  De Wild 2007, tetraisopropyltitanate (TPT, a titanium precursor) for titanium dioxide antireflection coating deposition
  EcoSpold01Location=RER
  Uncertainty: de Wild 2007, tetraisopropyltitanate (TPT, a titanium precursor) for titanium dioxide antireflection coating deposition
  properties: wet mass 1 kg, dry mass 1 kg
- solvent, organic: 0.0014341 kg; lognormal variance with pedigree 0.0421, pedigree (1,2,5,5,1)
  De Wild 2007, for cleaning
  EcoSpold01Location=GLO
  Uncertainty: de Wild 2007, for cleaning
  properties: carbon content, fossil 0.63072, wet mass 1 kg, dry mass 1 kg, heating value, net 19.11 MJ
  note on carbon content, fossil: Mixture of 15 of the most often used solvents (list in ecoinvent v2.2 report 11-III, pg 293). C content was calculated as an unweighted average of C content of the different solvents
- isopropanol: 0.078895 kg; lognormal variance with pedigree 0.0421, pedigree (1,2,5,5,1)
  De Wild 2007, for cleaning
  EcoSpold01Location=RER
  Uncertainty: de Wild 2007, for cleaning
  properties: dry mass 1 kg, heating value, net 34.3 MJ, carbon content, fossil 0.6, wet mass 1 kg
- tetrafluoroethylene: 0.0031558 kg; lognormal variance with pedigree 0.0421, pedigree (1,2,5,5,1)
  De Wild 2007, aggregate value for different fluorinated source gases
  EcoSpold01Location=RER
  Uncertainty: de Wild 2007, aggregate value for different fluorinated source gases
  properties: carbon content, fossil 0.24, wet mass 1 kg, dry mass 1 kg, heating value, net 7.27 MJ
- electricity, medium voltage: 0 kWh; pedigree (1,1,1,1,1)
  EcoSpold01Location=UCTE
  De Wild 2007, company data
  Uncertainty: de Wild 2007, company data
- wastewater from PV cell production: -0.21734 m3; lognormal variance with pedigree 0.0421, pedigree (1,2,5,5,1)
  EcoSpold01Location=CH
  De Wild 2007, company data, mix of neutral, alkaline and acid solution and organic waste
  Uncertainty: de Wild 2007, company data, mix of neutral, alkaline and acid solution and organic waste
  production volume 297816 m3
    (same comment as for waste, from silicon wafer production, inorganic)
  properties: water content 449.836, dry mass 2.2181 kg, carbon content, fossil 0.121726, wet mass 1000 kg
  note on carbon content, fossil: TOC = 0.27 kg/m3 (Tab 7.3, ecoinvent v2.2 report 6_XII). TOC was considered as Total Carbon.
- silicone product: 0.0012122 kg; lognormal variance with pedigree 0.0421, pedigree (1,2,5,5,1)
  EcoSpold01Location=RER
  De Wild 2007, silane (SiH4) for silicon nitride deposition
  Uncertainty: de Wild 2007, silane (SiH4) for silicon nitride deposition
  properties: wet mass 1 kg, heating value, net 9.83 MJ, carbon content, fossil 0.324324, dry mass 1 kg
  note on carbon content, fossil: The term silicones is used for compounds in which silicon atoms are linked via oxygen atoms, each silicon atom bearing one or several organic groups. In industrially important silicones, these groups are usually methyl or phenyl (ecoinvent v2.2 report 8_part71 & Ullmann). The chemical formula was considered to be [Si(CH3)2O]n (Ullmann).
- nitric acid, without water, in 50% solution state: 0 kg; pedigree (1,1,1,1,1)
  EcoSpold01Location=RER
  De Wild 2007, for etching phosphor glass
  Uncertainty: de Wild 2007, for etching phosphor glass
  properties: wet mass 1 kg, dry mass 1 kg
- metallization paste, back side, aluminium: 0.07191 kg; lognormal variance with pedigree 0.0421, pedigree (1,2,5,5,1)
  (same comment as for metallization paste, back side)
  properties: dry mass 1 kg, carbon content, fossil 0.107828, wet mass 1 kg, heating value, net 3.27 MJ
- hydrochloric acid, without water, in 30% solution state: 0.045611 kg; lognormal variance with pedigree 0.0421, pedigree (1,2,5,5,1)
  EcoSpold01Location=RER
  De Wild 2007, for surface etching
  Uncertainty: de Wild 2007, for surface etching
  properties: wet mass 1 kg, dry mass 1 kg, heating value, net 3.32 MJ
- ethanol, without water, in 99.7% solution state, from ethylene: 0.00064103 kg; lognormal variance with pedigree 0.0421, pedigree (1,2,5,5,1)
  EcoSpold01Location=RER
  De Wild 2007, for cleaning
  Uncertainty: de Wild 2007, for cleaning
  properties: dry mass 1 kg, carbon content, fossil 0.521739, heating value, net 31.58 MJ, wet mass 1 kg
- heat, district or industrial, natural gas: 0 MJ; pedigree (1,1,1,1,1)
  EcoSpold01Location=RER
  De Wild 2007, company data
  Uncertainty: de Wild 2007, company data
  properties: heating value, net 1 MJ
- oxygen, liquid: 0.10191 kg; lognormal variance with pedigree 0.0421, pedigree (1,2,5,5,1)
  De Wild 2007, diffusion
  EcoSpold01Location=RER
  Uncertainty: de Wild 2007, diffusion
  properties: wet mass 1 kg, dry mass 1 kg
- hydrogen fluoride: 0.037722 kg; lognormal variance with pedigree 0.0421, pedigree (1,2,5,5,1)
  De Wild 2007, for etching phosphor glass
  EcoSpold01Location=GLO
  Uncertainty: de Wild 2007, for etching phosphor glass
  properties: dry mass 1 kg, wet mass 1 kg, heating value, net 6.06 MJ
- ammonia, anhydrous, liquid: 0 kg; pedigree (1,1,1,1,1)
  EcoSpold01Location=RER
  De Wild 2007, for de-oxidation
  Uncertainty: de Wild 2007, for de-oxidation
  properties: wet mass 1 kg, dry mass 1 kg
- heat, district or industrial, other than natural gas: 0 MJ; pedigree (1,1,1,1,1)
  De Wild 2007, company data
  EcoSpold01Location=RER
  Uncertainty: de Wild 2007, company data
  properties: heating value, net 1 MJ
- sodium hydroxide, without water, in 50% solution state: 0.15697 kg; lognormal variance with pedigree 0.0421, pedigree (1,2,5,5,1)
  EcoSpold01Location=RER
  De Wild 2007, for etching and cleaning
  Uncertainty: de Wild 2007, for etching and cleaning
  properties: wet mass 1 kg, dry mass 1 kg, heating value, net 3.03 MJ
- water, completely softened: 58.7565, 78.4935 kg (2 entries); lognormal variance with pedigree 0.0421, pedigree (1,2,5,5,1)
  EcoSpold01Location=RER
  De Wild 2007, company data
  Uncertainty: de Wild 2007, company data
- electricity, medium voltage: 0.381219, 0.0731013, 1.22722, 17.8488, 2.5158, 8.19685 kWh (6 entries); lognormal variance with pedigree 0.0421, pedigree (1,2,5,5,1)
  EcoSpold01Location=UCTE
  De Wild 2007, company data
  Uncertainty: de Wild 2007, company data
- nitric acid, without water, in 50% solution state: 0.00513761, 0.00125364, 0.00311756, 0.00951842, 0.00149377, 0.000843719, 0.001249, 0.00405429 kg (8 entries); lognormal variance with pedigree 0.0421, pedigree (1,2,5,5,1)
  (same comment as for nitric acid, without water, in 50% solution state)
- heat, district or industrial, natural gas: 0.0651135, 4.22483 MJ (2 entries); lognormal variance with pedigree 0.0421, pedigree (1,2,5,5,1)
  EcoSpold01Location=RER
  De Wild 2007, company data
  Uncertainty: de Wild 2007, company data
- ammonia, anhydrous, liquid: 0.00141258, 0.000121428, 0.000188911, 0.0003743, 0.000366715, 3.84357e-5, 0.000171822, 0.0040648 kg (8 entries); lognormal variance with pedigree 0.0421, pedigree (1,2,5,5,1)
  (same comment as for ammonia, anhydrous, liquid)
- heat, district or industrial, other than natural gas: 0.000448269, 1.10545 MJ (2 entries); lognormal variance with pedigree 0.0421, pedigree (1,2,5,5,1)
  De Wild 2007, company data
  EcoSpold01Location=RER
  Uncertainty: de Wild 2007, company data

## Inputs from nature
- Water, cooling, unspecified natural origin [natural resource, in water]: 0.99852 m3; name water_cooling_UNO_input; lognormal variance with pedigree 0.0421, pedigree (1,2,5,5,1)
  De Wild 2007, company data
  Uncertainty: de Wild 2007, company data

## Emissions to nature
- Ethane, hexafluoro-, HFC-116 [air, urban air close to ground]: 0.00011861 kg; lognormal variance with pedigree 0.0821, pedigree (1,2,5,5,1)
  De Wild 2007, calculated as 50% of CO2-eq for FC-gases
  Uncertainty: de Wild 2007, calculated as 50% of CO2-eq for FC-gases
- Methane, tetrafluoro-, R-14 [air, urban air close to ground]: 0.00024763 kg; lognormal variance with pedigree 0.0821, pedigree (1,2,5,5,1)
  (same comment as for Ethane, hexafluoro-, HFC-116)
- Hydrogen chloride [air, urban air close to ground]: 0.00026627 kg; lognormal variance with pedigree 0.0821, pedigree (1,2,5,5,1)
  De Wild 2007, company data
  Uncertainty: de Wild 2007, company data
- Silicon [air, urban air close to ground]: 7.2732e-5 kg; lognormal variance with pedigree 0.6921, pedigree (1,2,5,5,1)
  De Wild 2007, company data
  Uncertainty: de Wild 2007, company data
- NMVOC, non-methane volatile organic compounds, unspecified origin [air, urban air close to ground]: 0.19354 kg; lognormal variance with pedigree 0.0821, pedigree (1,2,5,5,1)
  De Wild 2007, company data
  Uncertainty: de Wild 2007, company data
- Particulates, < 2.5 um [air, urban air close to ground]: 0.0026627 kg; lognormal variance with pedigree 0.3421, pedigree (1,2,5,5,1)
  De Wild 2007, company data
  Uncertainty: de Wild 2007, company data
- Sodium [air, urban air close to ground]: 4.8488e-5 kg; lognormal variance with pedigree 0.6921, pedigree (1,2,5,5,1)
  De Wild 2007, company data
  Uncertainty: de Wild 2007, company data
- Water [air, unspecified]: 0.407514 m3; name water_to_air_unspecified; = (water_softened_input/1000)*fraction_WCS_to_air+water_cooling_UNO_input*fraction_CW_to_air; lognormal variance with pedigree 0.130025, pedigree (4,4,5,2,4)
  Calculated value based on literature values and expert opinion. See comments in the parametres' comment field.
  property fraction, origin: salt water 0; name fraction_origin_salt_water
  property fraction, origin: unspecified 0.94948; name fraction_origin_unspecified
  property fraction, origin: fresh water 0.0505197; name fraction_origin_fresh_water
- Silver [air, urban air close to ground]: 0.00077252 kg; lognormal variance with pedigree 0.6921, pedigree (1,2,5,5,1)
  De Wild 2007, company data
  Uncertainty: de Wild 2007, company data
- Hydrogen fluoride [air, urban air close to ground]: 4.8488e-6 kg; lognormal variance with pedigree 0.0821, pedigree (1,2,5,5,1)
  De Wild 2007, company data
  Uncertainty: de Wild 2007, company data
- Lead [air, urban air close to ground]: 0.00077252 kg; lognormal variance with pedigree 0.6921, pedigree (1,2,5,5,1)
  De Wild 2007, company data
  Uncertainty: de Wild 2007, company data
- Aluminium [air, urban air close to ground]: 0.00077252 kg; lognormal variance with pedigree 0.6921, pedigree (1,2,5,5,1)
  De Wild 2007, company data
  Uncertainty: de Wild 2007, company data
- Nitrogen oxides [air, urban air close to ground]: 5e-5 kg; lognormal variance with pedigree 0.096, pedigree (3,4,5,5,1)
  Hagedorn 1992, due to nitric acid use
  Uncertainty: Hagedorn 1992, due to nitric acid use
- Water [water, unspecified]: 0.510916 m3; name water_to_water_unspecified; = (water_softened_input/1000)*(1-fraction_WCS_to_air)+water_cooling_UNO_input*(1-fraction_CW_to_air)-0.21734; lognormal variance with pedigree 0.130025, pedigree (4,4,5,2,4)
  (same comment as for Water)
  property dry mass 0 kg; name DM
  property fraction, origin: unspecified 0.839806; name fraction_origin_unspecified_Ww
  property fraction, origin: salt water 0; name fraction_origin_salt_water_Ww
  property wet mass 1000 kg; name WM
  property carbon content, fossil 0; name C_content_fossil
  property fraction, origin: fresh water 0.160194; name fraction_origin_fresh_water_Ww
  property carbon content, non-fossil 0; name C_content_non_fossil
  property water in wet mass 1000 kg; name WWM
- Tin [air, urban air close to ground]: 0.00077252 kg; lognormal variance with pedigree 0.6921, pedigree (1,2,5,5,1)
  De Wild 2007, company data
  Uncertainty: de Wild 2007, company data

## Sampling procedure
Data collected from 5 specific processes and companies (4 multi-Si + 1 single-Si processing company).

## Extrapolations
Data 2005 calculated from data 2004 by multiplying amounts of materials by solar cell area factor of 156*156/(125*125) = 1.56; energy scaled linearly with cell side length. This dataset has been copied from an original dataset covering the geography RER. The uncertainty has been adjusted accordingly.

## Review by Roberto Dones 2007-08-23
Passed.
none
