# treatment of wastewater from lorry production, capacity 4.7E10l/year

Dataset: EcoSpold 2, unit process
Geography: RoW
Time period: 1994-01-01 to 2021-12-31
Technology level: current
Classification: ISIC rev.4 ecoinvent: 3700:Sewerage
Classification: EcoSpold01Categories: waste management/wastewater treatment
Tags: Treatment; ConvertedDataset
Scenario: Business-as-Usual
System model: Allocation, cut-off by classification
Generated by: Gabor Doka (obsolete)
Published in: Doka G. 2008
Database: ecoinvent
isCopyrightProtected: true
accessRestrictedTo: 1

## General comment
Wastewater purified in a large municipal wastewater treatment plant (capacity class 1), with an average capacity size of 233000 per-captia-equivalents PCE.
Wastewater contains (in kg/m3): Stot.: 0.000114 (GSD=224.1%); Cl: 0.000114 (GSD=224.1%); Ni: 0.00027 (GSD=224.1%); Pb: 0.000044 (GSD=224.1%); Zn: 0.000484 (GSD=224.1%);
[This dataset was already contained in the ecoinvent database version 2. It was not individually updated during the transfer to ecoinvent version 3. Life Cycle Impact Assessment results may still have changed, as they are affected by changes in the supply chain, i.e. in other datasets. This dataset was generated following the ecoinvent quality guidelines for version 2. It may have been subject to central changes described in the ecoinvent version 3 change report (http://www.ecoinvent.org/database/ecoinvent-version-3/reports-of-changes/), and the results of the central updates were reviewed extensively. The changes added e.g. consistent water flows and other information throughout the database. The documentation of this dataset can be found in the ecoinvent reports of version 2, which are still available via the ecoinvent website. The change report linked above covers all central changes that were made during the conversion process.]

## Included activities end
Infrastructure materials for municipal wastewater treatment plant, transports, dismantling. Land use burdens.

## Geography
Specific to the technology mix encountered in Switzerland in 2000. Well applicable to modern treatment practices in Europe, North America or Japan.

## Technology
Three stage wastewater treatment (mechanical, biological, chemical) including sludge digestion (fermentation) according to the average technology in Switzerland

## Parameters
- fraction, process water, to air: 0.1 dimensionless; name fraction_PW_to_air; lognormal variance with pedigree 0.092025, pedigree (4,4,3,2,4)

## Reference product
- wastewater from lorry production: -1 m3; CPC 39920: Sewage sludge; By-product classification Waste
  EcoSpold01Location=CH
  production volume 3.96633 m3
    This is a placeholder value that does not reflect real-world production volumes. This dataset does not currently require a real-world production volume to work in the database framework, and no actual data were collected yet. This has no negative effect on the results of the ecoinvent database.
  property price 0 EUR2005
    Waste products are assigned a price of zero as they are assumed to require further treatment.
  property carbon content 0
    carbon content on a dry matter basis (reserved; not for manual entry)
  properties: water in wet mass 999.663 kg, water content 2962.17, carbon content, fossil 0, carbon content, non-fossil 0, dry mass 0.337476 kg, wet mass 1000 kg, carbon allocation 0 kg

## Inputs from technosphere
- process-specific burdens, slag landfill: 0 kg; pedigree (1,1,1,1,1)
  EcoSpold01Location=CH
  burden from sludge incineration. Uncertainty calculated from wastewater composition and treatment model
- slag landfill: 1.6581e-13 unit; lognormal variance with pedigree 0.072, pedigree (1,1,5,5,1)
  burden from sludge incineration. Uncertainty calculated from wastewater composition and treatment model
  EcoSpold01Location=CH
- heat, district or industrial, other than natural gas: 0 MJ; pedigree (1,1,1,1,1)
  (same comment as for process-specific burdens, slag landfill)
  properties: heating value, net 1 MJ
- heat, district or industrial, natural gas: 0 MJ; pedigree (1,1,1,1,1)
  direct wastewater treatment plant burden. Uncertainty calculated from wastewater composition and treatment model
  EcoSpold01Location=RER
  properties: heating value, net 1 MJ
- iron (III) chloride, without water, in 40% solution state: 2.6404e-5 kg; lognormal variance with pedigree 0.672, pedigree (1,1,5,5,1)
  direct wastewater treatment plant burden plus burden from sludge incineration. Uncertainty calculated from wastewater composition and treatment model
  EcoSpold01Location=CH
  properties: wet mass 1 kg, dry mass 1 kg
- sewer grid, 4.7E10l/year, 583 km: 1.2376e-7 km; lognormal variance with pedigree 0.042, pedigree (1,1,5,5,1)
  EcoSpold01Location=CH
  uncertainty heeded in exchanges of the module
- liquid manure spreading, by vacuum tanker: 1.9807e-6 m3; lognormal variance with pedigree 0.052, pedigree (1,1,5,5,1)
  EcoSpold01Location=CH
  burden from sludge spreading. Uncertainty calculated from wastewater composition and treatment model
- wastewater treatment facility, capacity 4.7E10l/year: 6.0643e-10 unit; lognormal variance with pedigree 0.042, pedigree (1,1,5,5,1)
  EcoSpold01Location=CH
  uncertainty heeded in exchanges of the module
- chemical, inorganic: 1.4593e-7 kg; lognormal variance with pedigree 0.672, pedigree (1,1,5,5,1)
  burden from sludge incineration. Uncertainty calculated from wastewater composition and treatment model
  EcoSpold01Location=GLO
  properties: carbon content, fossil 0.003, wet mass 1 kg, dry mass 1 kg
  note on carbon content, fossil: This dataset is an unweighted average of 20 inorganic substances (listed in Tab 88.1, ecoinvent v2.2 report 8, part II), being part of the top100 chemicals included in this database. The C-content has also been calculated as an unweighted average of the C content of the substances composing this dataset.
- municipal waste incineration facility: 3.9267e-13 unit; lognormal variance with pedigree 0.142, pedigree (1,1,5,5,1)
  (same comment as for slag landfill)
- hydrochloric acid, without water, in 30% solution state: 8.756e-8 kg; lognormal variance with pedigree 0.672, pedigree (1,1,5,5,1)
  EcoSpold01Location=RER
  burden from sludge incineration. Uncertainty calculated from wastewater composition and treatment model
  properties: heating value, net 3.32 MJ, dry mass 1 kg, wet mass 1 kg
- electricity, low voltage: 0 kWh; pedigree (1,1,1,1,1)
  EcoSpold01Location=CH
  direct wastewater treatment plant burden. Uncertainty calculated from wastewater composition and treatment model
- residual material landfill: 7.0412e-13 unit; lognormal variance with pedigree 0.072, pedigree (1,1,5,5,1)
  (same comment as for slag landfill)
- process-specific burdens, residual material landfill: 0 kg; pedigree (1,1,1,1,1)
  (same comment as for process-specific burdens, slag landfill)
- waste cement, hydrated: 0 kg; pedigree (1,1,1,1,1)
  (same comment as for slag landfill)
  production volume 0 kg
    Calculated from the production volume of wastewater from lorry production in proportion to the respective output amounts.
  properties: wet mass 1 kg, dry mass 1 kg
- waste graphical paper: -0.0155 kg; lognormal variance with pedigree 0.042, pedigree (1,1,5,5,1)
  direct wastewater treatment plant burden. Uncertainty calculated from wastewater composition and treatment model
  EcoSpold01Location=CH
  production volume 0.062 kg
    (same comment as for waste cement, hydrated)
  properties: heating value, net 14.12 MJ, water content 0.126126, carbon content, non-fossil 0.454955, wet mass 1 kg, dry mass 0.888 kg
  note on heating value, net: Value taken from the general comment of the treatment dataset.
- process-specific burdens, municipal waste incineration: 0 kg; pedigree (1,1,1,1,1)
  (same comment as for slag landfill)
- cement, unspecified: 0 kg; pedigree (1,1,1,1,1)
  (same comment as for slag landfill)
  properties: dry mass 1 kg, wet mass 1 kg
- waste plastic, mixture: 0 kg; pedigree (1,1,1,1,1)
  (same comment as for waste graphical paper)
  production volume 0 kg
    (same comment as for waste cement, hydrated)
  properties: carbon content, fossil 0.747344, water content 0.180638, wet mass 1 kg, dry mass 0.847 kg, heating value, net 30.79 MJ
  note on carbon content, fossil: C content in 1 kg DM was calculated using data in Tab A.2, ecoinvent v2.2 report 13_I
- heat, central or small-scale, other than natural gas: 0 MJ; pedigree (1,1,1,1,1)
  (same comment as for electricity, low voltage)
  properties: heating value, net 1 MJ
- electricity, high voltage: 0 kWh; pedigree (1,1,1,1,1)
  (same comment as for slag landfill)
- sodium hydroxide, without water, in 50% solution state: 1.0008e-6 kg; lognormal variance with pedigree 0.452, pedigree (1,1,5,5,1)
  burden from sludge incineration. Uncertainty calculated from wastewater composition and treatment model
  EcoSpold01Location=RER
  properties: heating value, net 3.03 MJ, dry mass 1 kg, wet mass 1 kg
- process-specific burdens, slag landfill: 2.63831e-5, 6.68849e-5 kg (2 entries); lognormal variance with pedigree 0.072, pedigree (1,1,5,5,1)
  (same comment as for process-specific burdens, slag landfill)
- heat, district or industrial, other than natural gas: 5.21204e-7, 3.14728e-5, 0.00128531 MJ (3 entries); lognormal variance with pedigree 0.142, pedigree (1,1,5,5,1)
  (same comment as for process-specific burdens, slag landfill)
- heat, district or industrial, natural gas: 0.000206786, 0.00495499, 0.0134171 MJ (3 entries); lognormal variance with pedigree 0.042, pedigree (1,1,5,5,1)
  (same comment as for heat, district or industrial, natural gas)
- electricity, low voltage: 0.000294577, 5.36369e-5, 0.00121079, 0.00423022, 0.000863621, 0.0132593, 0.00214513, 0.0061597 kWh (8 entries); lognormal variance with pedigree 0.042, pedigree (1,1,5,5,1)
  (same comment as for electricity, low voltage)
- process-specific burdens, residual material landfill: 9.56059e-5, 0.000242374 kg (2 entries); lognormal variance with pedigree 0.072, pedigree (1,1,5,5,1)
  (same comment as for process-specific burdens, slag landfill)
- waste cement, hydrated: -9.56059e-5, -0.000242374 kg (2 entries); lognormal variance with pedigree 0.082, pedigree (1,1,5,5,1)
  (same comment as for slag landfill)
  production volume 0.00134054 kg
- process-specific burdens, municipal waste incineration: 0.000444311, 0.00112639 kg (2 entries); lognormal variance with pedigree 0.142, pedigree (1,1,5,5,1)
  (same comment as for slag landfill)
- cement, unspecified: 1.95209e-5, 4.06171e-6, 2.97492e-7, 8.47951e-7, 1.91767e-5, 5.64426e-7, 6.19907e-6, 7.50018e-7, 8.37718e-5 kg (9 entries); lognormal variance with pedigree 0.082, pedigree (1,1,5,5,1)
  (same comment as for slag landfill)
- waste plastic, mixture: -0.00172425, -0.000115208, -8.71297e-6, -4.75849e-5, -1.92238e-5, -4.51863e-5, -0.00146914, -0.0120707 kg (8 entries); lognormal variance with pedigree 0.042, pedigree (1,1,5,5,1)
  (same comment as for waste graphical paper)
  production volume 0.0614782 kg
- heat, central or small-scale, other than natural gas: 0.000182639, 0.0132979 MJ (2 entries); lognormal variance with pedigree 0.042, pedigree (1,1,5,5,1)
  (same comment as for electricity, low voltage)
- electricity, high voltage: 2.28205e-6, 4.37491e-7, 1.0077e-5, 3.3024e-5, 7.41765e-6, 0.000106811, 1.69393e-5, 4.88312e-5 kWh (8 entries); lognormal variance with pedigree 0.582, pedigree (1,1,5,5,1)
  (same comment as for slag landfill)

## Emissions to nature
- Sulfate [water, ground-, long-term]: 6.8621e-6 kg; lognormal variance with pedigree 0.712, pedigree (1,1,5,5,1)
  emission from sludge incineration. Uncertainty calculated from wastewater composition and treatment model
- Sulfur dioxide [air, urban air close to ground]: 2.1978e-6 kg; lognormal variance with pedigree 0.712, pedigree (1,1,5,5,1)
  direct digester gas emission plus emission from sludge incineration. Uncertainty calculated from wastewater composition and treatment model
- Zinc, ion [water, ground-, long-term]: 3.7192e-6 kg; lognormal variance with pedigree 5.512, pedigree (1,1,5,5,1)
  (same comment as for Sulfate)
- Chloride [water, surface water]: 0.000114 kg; lognormal variance with pedigree 0.672, pedigree (1,1,5,5,1)
  sewer overload discharge plus direct wastewater treatment plant emission plus emission from sludge incineration. Uncertainty calculated from wastewater composition and treatment model
- Methane, fossil [air, urban air close to ground]: 6.2827e-9 kg; lognormal variance with pedigree 0.192, pedigree (1,1,5,5,1)
  (same comment as for Sulfate)
- Sulfate [water, surface water]: 0.00033444 kg; lognormal variance with pedigree 0.682, pedigree (1,1,5,5,1)
  (same comment as for Chloride)
- Nickel, ion [water, ground-, long-term]: 7.1379e-5 kg; lognormal variance with pedigree 0.712, pedigree (1,1,5,5,1)
  (same comment as for Sulfate)
- Zinc [air, urban air close to ground]: 3.919e-9 kg; lognormal variance with pedigree 0.762, pedigree (1,1,5,5,1)
  (same comment as for Sulfur dioxide)
- Lead [water, ground-, long-term]: 2.0017e-6 kg; lognormal variance with pedigree 6.922, pedigree (1,1,5,5,1)
  (same comment as for Sulfate)
- Lead [soil, agricultural]: 1.1069e-5 kg; lognormal variance with pedigree 0.722, pedigree (1,1,5,5,1)
  emission from sludge spreading. Uncertainty calculated from wastewater composition and treatment model
- Zinc, ion [water, surface water]: 0.00014965 kg; lognormal variance with pedigree 0.652, pedigree (1,1,5,5,1)
  (same comment as for Chloride)
- Nickel, ion [water, surface water]: 0.00016378 kg; lognormal variance with pedigree 0.672, pedigree (1,1,5,5,1)
  (same comment as for Chloride)
- Lead [water, surface water]: 4.8364e-6 kg; lognormal variance with pedigree 0.612, pedigree (1,1,5,5,1)
  (same comment as for Chloride)
- Carbon monoxide, fossil [air, urban air close to ground]: 2.1943e-7 kg; lognormal variance with pedigree 0.792, pedigree (1,1,5,5,1)
  (same comment as for Sulfate)
- Water [air, unspecified]: 0.1 m3; name water_to_air_unspecified; lognormal variance with pedigree 0.0827, pedigree (2,2,5,5,1)
  Calculated value based on water balance.
  property fraction, origin: salt water 0; name fraction_origin_salt_water
  property fraction, origin: fresh water 0; name fraction_origin_fresh_water
  property fraction, origin: unspecified 1; name fraction_origin_unspecified
- Zinc [soil, agricultural]: 9.4507e-5 kg; lognormal variance with pedigree 0.712, pedigree (1,1,5,5,1)
  (same comment as for Lead)
- Lead [air, urban air close to ground]: 1.0443e-9 kg; lognormal variance with pedigree 0.752, pedigree (1,1,5,5,1)
  (same comment as for Sulfur dioxide)
- Water [water, unspecified]: 0.9 m3; name water_to_water_unspecified; lognormal variance with pedigree 0.0827, pedigree (2,2,5,5,1)
  Calculated value based on water balance.
  property fraction, origin: unspecified 0; name fraction_origin_unspecified_Ww
  property fraction, origin: salt water 0; name fraction_origin_salt_water_Ww
  property fraction, origin: fresh water 1; name fraction_origin_fresh_water_Ww
  property wet mass 1000 kg; name WM
  property water in wet mass 1000 kg; name WWM
  property carbon content, fossil 0; name C_content_fossil
  property dry mass 0 kg; name DM
  property carbon content, non-fossil 0; name C_content_non_fossil
- Nickel [air, urban air close to ground]: 3.2903e-12 kg; lognormal variance with pedigree 0.812, pedigree (1,1,5,5,1)
  (same comment as for Sulfur dioxide)
- Sulfur [soil, agricultural]: 1.0779e-6 kg; lognormal variance with pedigree 0.722, pedigree (1,1,5,5,1)
  (same comment as for Lead)
- Nickel [soil, agricultural]: 3.0035e-5 kg; lognormal variance with pedigree 0.712, pedigree (1,1,5,5,1)
  (same comment as for Lead)

## Extrapolations
wastewater compositions from literature and/or estimates This dataset has been copied from an original dataset covering the geography CH. The uncertainty has been adjusted accordingly.

## Review by Niels Jungbluth 2009-01-22
passed.
