# benzyl alcohol production

Dataset: EcoSpold 2, unit process
Geography: RoW
Time period: 1998-01-01 to 2021-12-31
Technology level: current
Classification: ISIC rev.4 ecoinvent: 2011:Manufacture of basic chemicals
Synonyms: Benzoyl alcohol; Phenylcarbinol; Benzenemethanol; Phenylmethanol; 100-51-6
Scenario: Business-as-Usual
System model: Allocation, cut-off by classification
Share of production covered: 100 %
Generated by: Jürgen Sutter
Published in: Sutter, J. 2007
Database: ecoinvent
isCopyrightProtected: true
accessRestrictedTo: 1

## General comment
This dataset represents the production of 1 kg of benzyl alcohol via the hydrolysis of benzyl chloride. Benzyl alcohol is a colorless liquid with a faint aromatic odor and a mildly irritating effect on the mucous membranes. By virtue of its good solvent properties, benzyl alcohol is an important solvent for surface-coating materials and resins. It dissolves cellulose esters and ethers, alkyd resins, acrylic resins, and fats; it is also used as an ingredient in the inks for ball-point pens. It is added in small amounts to surface-coating materials to improve their flow and gloss. In the textile industry, it is used as an auxiliary in the dyeing of wool, polyamides, and polyesters. Because it has only a relatively faint odor, it is used as a solvent and diluting agent in the manufacture of perfumes and flavors. In color photography it is increasingly important as a development accelerator. In pharmacy it is used as a local anesthetic and, because of its microbicidal effect, as an ingredient of ointments and other preparations. Benzyl alcohol is a starting material for the preparation of numerous benzyl esters that are used as
odorants, flavors, stabilizers for volatile perfumes, and plasticizers. Benzyl alcohol is also used in the extractive distillation of m- and p-xylenes and m- and p-cresols.
Two production processes are of substantial industrial importance for benzyl alcohol: the hydrolysis of benzyl chloride and the hydrogenation of benzaldehyde. In this dataset, the production of benzyl alcohol by means of the hydrolysis of benzyl chloride is considered. The data are taken from a database which reports data from several US production plants for the years 1998 to 2004 (Overcash 1998-2004) and are representative for US production. The infrastructure is included with a default value.
References:
Sutter, J. (2007) Life Cycle Inventories of Petrochemical Solvents. ecoinvent report No. 22. Swiss Centre for Life Cycle Inventories, Dübendorf, 2007.
Overcash, M., Chemical life cycle database, Chemical and Biomolecular Engineering, North Carolina State University, Raleigh, NC 27695-7905. 1998 - 2004.

## Included activities start
From the reception of benzyl chloride at the factory gate.

## Included activities end
This activity ends with 1 kg of benzyl alcohol. The dataset includes the input materials, energy uses, infrastructure and emissions.

## Geography
The inventory is modelled for Europe. The inventory is assumed to be representative of the global production.

## Technology
Benzyl alcohol can be produced in many ways. At present there are only two processes of substantial industrial importance: the hydrolysis of benzyl chloride and the hydrogenation of benzaldehyde. Other processes, like the oxidation of toluene, the hydrogenation of benzoic acid esters, the electrochemical reduction of benzoic acid, the hydrolysis of benzylsulfonic acid, and the decarboxylation of benzyl formate, have no importance in the industrial production of benzyl alcohol. The hydrolysis of benzyl chloride is a reversible reaction which leads to the almost quantitative formation of benzyl alcohol only in the presence of alkaline saponifying agents that combine with the hydrogen chloride as it is formed. It is therefore carried out by heating benzyl chloride with stoichiometric excesses of aqueous solutions of oxides, hydroxides, or carbonates of the alkali or alkaline earth metals.
To 610 parts of boiling 10 % soda solution 126.5 parts of benzyl chloride is added with stirring. The reaction mixture is refluxed and stirred until carbon dioxide no longer escapes; this takes an average of five to six hours. An alkali-resistant steel reactor with brick walls is used. The stirrer and heating coil are made of an alloy with a high nickel content. After the reaction mixture has cooled, the upper layer, consisting of crude benzyl alcohol, is removed. The sodium chloride solution below still contains some soda. Dissolved benzyl alcohol can be obtained from it by adding salt or by extracting with benzene or toluene. The crude benzyl alcohol is carefully fractionated at a reduced pressure in an efficient column. The yield is 85 parts of benzyl alcohol and 10 parts of dibenzyl ether.
Reference:
Brühne, F., Wright: Benzyl alcohol. In: Ullmann's Encyclopedia of Industrial Chemistry, Seventh Edition, 2004 Electronic Release (ed. Fiedler E., Grossmann G., Kersebohm D., Weiss G. and Witte C.). 7 th Electronic Release Edition. Wiley InterScience, New York, Online-Version under: http://www.mrw.interscience.wiley.com/ueic/articles/

## Time period
Time of publications.

## Parameters
- fraction, water, deionised, to air: 0.205 dimensionless; name fraction_WDI_to_air; = fraction_PW_to_air; lognormal variance with pedigree 0.092025, pedigree (4,4,3,2,4)
  Calculated value. See comment in the other parametres present in this dataset. Deionised water is considered to be always used as process water, thus process water fractions to air are applied to all deionised water input flows to calculate the amount of water consumed in the processes.
- fraction, cooling water, cooling pond system, to air: 0.032 dimensionless; name fraction_CW_CP_to_air; lognormal variance with pedigree 0.0413, pedigree (2,3,1,3,1)
  Calculated based on literature value (Scown, C.D., 2011, Water Footprint of U.S. Transportation Fuels and supplying information of the article) (Vionnet, S., Quantis Water Database - Technical Report, 2012).
- fraction, cooling water, to air: 0.3875 dimensionless; name fraction_CW_to_air; = (0.5*fraction_CW_OT_to_air)+(0.5*fraction_CW_R_to_air); lognormal variance with pedigree 0.092025, pedigree (4,4,3,2,4)
  Calculated value based on literature value (see comments of the other parametres present in this dataset) and expert opinion. In the case when no industry/literature data are available about the type of cooling or directly fraction, cooling water, to air specific for the process a default assumption is applied. It is assumed that the once-through cooling system is used in 50% of all cases and recirculating system is used in another 50% of all cases.
- fraction, process water, to air: 0.205 dimensionless; name fraction_PW_to_air; lognormal variance with pedigree 0.092025, pedigree (4,4,3,2,4)
  Literature value (Statistics Canada, 2007 & Shaffer, K.H., 2008, Consumptive water use in the Great Lakes Basin, USGS) (Vionnet, S., Quantis Water Database - Technical Report, 2012).
- fraction, cooling water, recirculating system, to air: 0.771 dimensionless; name fraction_CW_R_to_air; lognormal variance with pedigree 0.0413, pedigree (2,3,1,3,1)
  (same comment as for fraction, cooling water, cooling pond system, to air)
- fraction, cooling water, once-through system, to air: 0.004 dimensionless; name fraction_CW_OT_to_air; lognormal variance with pedigree 0.0413, pedigree (2,3,1,3,1)
  (same comment as for fraction, cooling water, cooling pond system, to air)

## Reference product
- benzyl alcohol: 1 kg; name RP; CPC 34139: Other alcohols, phenols, phenol-alcohols, and their halogenated, sulphonated, nitrated or nitrosated derivativ[…]; By-product classification allocatable product; CAS 100-51-6
  Benzyl alcohol is a colorless liquid with a faint aromatic odor and a mildly irritating effect on the mucous membranes.
  By virtue of its good solvent properties, benzyl alcohol is an important solvent for surface-coating materials and resins. It dissolves cellulose esters and ethers, alkyd resins, acrylic resins, and fats; it is also used as an ingredient in the inks for ball-point pens. It is added in small amounts to surface-coating materials to improve their flow and gloss. In the textile industry, it is used as an auxiliary in the dyeing of wool, polyamides, and polyesters. Because it has only a relatively faint odor, it is used as a solvent and diluting agent in the manufacture of perfumes and flavors. In color photography it is increasingly important as a development accelerator. In pharmacy it is used as a local anesthetic and, because of its microbicidal effect, as an ingredient of ointments and other preparations.
  Benzyl alcohol is a starting material for the preparation of numerous benzyl esters that are used as odorants, flavors, stabilizers for volatile perfumes, and plasticizers. Benzyl alcohol is also used in the extractive distillation of m- and p-xylenes and m- and p-cresols.
  production volume 4.74713e7 kg; name RP_PV
    Estimated value. The global production volume is estimated based on information from Cefic (European Chemical Industry Council) and the American Chemistry Council.
    According to Cefic (2016) the Global sales of chemicals in the year 2015 was 3 534 billion euros. The reported share of sales per regions are: EU28 14.7%; Other Europe (Switzerland, Norway, Turkey, Russia and Ukraine) 2.7%; NAFTA (US, Canada and Mexico) 16.5%; Latin America 3.8%; China 39.9%; Japan 3.9%; Republic of Korea 3.2%; India 2.2%; Rest of Asia 11.9%; Rest of the World 1.3%. Cefic also reports the US total sales, 518.7 billion euros of the global 3 534 billion euros (14.7%). The same share is reported from the American Chemistry Council (2016), according to this source the USA sales account for 15% of global sales for the year 2016.
    According to Ullmann's Encyclopedia of Industrial Chemistry the benzyl alcohol production capacity for Western Europe in year 1983 was 10000000 kg. Since no data were found for the Global production this value was scaled accordingly.
    Reference(s):
    Cefic 2016. Facts and figures 2016 of the European chemical industry. Accessible at: http://www.cefic.org/Facts-and-Figures/Chemicals-Industry-Profile/
    American Chemistry Council 2016. Outlook: U.S. Chemical Industry Continues to Outpace Industrial Output; Accounts for More Than One-Half of Construction Spending by Manufacturing Sector. Accessible at: https://www.americanchemistry.com/Media/PressReleasesTranscripts/ACC-news-releases/US-Chemical-Industry-Continues-to-Outpace-Industrial-Output.html
    Brühne, F. and Wright, E. 2000. Benzyl Alcohol. Ullmann's Encyclopedia of Industrial Chemistry.
  property price 1.53 EUR2005
    Calculated value based on data from United Nations Commodity Trade Statistics Database (comtrade.un.org). UN comtrade category: 290621 Benzyl alcohol. Year 2005. Using exchange rate of 1EURO = 1.209 USD. Average of price of import into 5 main markets (EU, US, JP, IN and CN).
  property heating value, net 32.52 MJ
    LHV is calculated based on the elemental composition of the substance. Based on the CAS number of the substance (000100-51-6), the chemical formula of the substance is found to be: C7H8O, (PubChem 2020).
    Reference: Kim, S., Chen, J., Cheng, T., Gindulyte, A., He, J., He, S., Li, Q., Shoemaker, B. A., Thiessen, P. A., Yu, B., Zaslavsky, L., Zhang, J., & Bolton, E. E. (2019). PubChem 2019 update: improved access to chemical data. Nucleic acids research, 47(D1), D1102–D1109. https://doi.org/10.1093/nar/gky1033
  property carbon content 0.777778
    carbon content on a dry matter basis (reserved; not for manual entry)
  properties: wet mass 1 kg, carbon content, fossil 0.777778, dry mass 1 kg, carbon content, non-fossil 0, water content 0, water in wet mass 0 kg, carbon allocation 0.777778 kg

## Inputs from technosphere
- soda ash, light, crystalline, heptahydrate: 0.813 kg; lognormal variance with pedigree 0.0421, pedigree (1,2,5,5,1)
  Literature value.
  Uncertainty: O
  properties: wet mass 1 kg, dry mass 1 kg, carbon content, fossil 0.0517241, heating value, net 3.43 MJ
- chemical factory, organics: 4e-10 unit; lognormal variance with pedigree 0.3498, pedigree (2,3,5,4,3)
  Calculated based on literature data published by the industry. For this activity, no information was readily available concerning infrastructure and land-use. Therefore, the infrastructure is estimated based on data from two chemical factories, the BASF site of Ludwigshafen and the chemical factory in Gendorf (which are both located in Germany), which produce a wide range of chemical substances. Based on this data, the following assumptions are made: the built area amounts to about 4.2 ha, the plant has an average output of 50'000 t/a and a lifespan of fifty years. The estimated infrastructure amount is therefore 4.00 E-10 units per kg of produced chemical.
  References:
  Althaus H.-J., Chudacoff M., Hischier R., Jungbluth N., Osses M. and Primas A. (2007) Life Cycle Inventories of Chemicals. ecoinvent report No. 8, v2.0. EMPA Dübendorf, Swiss Centre for Life Cycle Inventories, Dübendorf, CH.
  Gendorf (2000) Umwelterklärung 2000, Werk Gendorf. Werk Gendorf, Burgkirchen.
- heat, district or industrial, other than natural gas: 0 MJ; pedigree (1,1,1,1,1)
  Literature value.
  Uncertainty: O
  properties: heating value, net 1 MJ
- water, deionised: 1.509 kg; name water_deionised_input; lognormal variance with pedigree 0.0421, pedigree (1,2,5,5,1)
  Literature value.
  Uncertainty: O
  properties: wet mass 1 kg
- benzyl chloride: 1.181 kg; lognormal variance with pedigree 0.0421, pedigree (1,2,5,5,1)
  Literature value.
  Uncertainty: O
  properties: heating value, net 26.83 MJ, wet mass 1 kg, dry mass 1 kg, carbon content, fossil 0.666667
- heat, district or industrial, natural gas: 0 MJ; pedigree (1,1,1,1,1)
  Literature value.
  Uncertainty: O
  properties: heating value, net 1 MJ
- sodium chloride, powder: 0.143 kg; lognormal variance with pedigree 0.0421, pedigree (1,2,5,5,1)
  Literature value.
  Uncertainty: O
  properties: wet mass 1 kg, dry mass 1 kg
- electricity, medium voltage: 0 kWh; pedigree (1,1,1,1,1)
  Literature value.
  Uncertainty: O
- heat, district or industrial, other than natural gas: 0.000703523, 1.73491 MJ (2 entries); lognormal variance with pedigree 0.0421, pedigree (1,2,5,5,1)
  Literature value.
  Uncertainty: O
- heat, district or industrial, natural gas: 0.0471972, 3.06234 MJ (2 entries); lognormal variance with pedigree 0.0421, pedigree (1,2,5,5,1)
  Literature value.
  Uncertainty: O
- electricity, medium voltage: 0.0014535, 0.000278718, 0.00467909, 0.0680532, 0.00959214, 0.0312526 kWh (6 entries); lognormal variance with pedigree 0.0421, pedigree (1,2,5,5,1)
  Literature value.
  Uncertainty: O

## Inputs from nature
- Water, cooling, unspecified natural origin [natural resource, in water]: 0.036472 m3; name water_cooling_UNO_input; lognormal variance with pedigree 0.0421, pedigree (1,2,5,5,1)
  Literature value.
  Uncertainty: O

## Emissions to nature
- COD, Chemical Oxygen Demand [water, unspecified]: 0.0241465 kg; lognormal variance with pedigree 0.218, pedigree (4,5,5,5,5)
  Calculated value. The BOD, COD, TOC and BOD5 are calculated based on the amount and type of emissions released to water in the same activity.
- Carbon dioxide, fossil [air, urban air close to ground]: 0.204 kg; lognormal variance with pedigree 0.0421, pedigree (1,2,5,5,1)
  Literature value. It is assumed that the manufacturing plants are located in an urban/industrial area and consequently the emissions are categorised as emanating in a high population density area.
  Uncertainty: O
- Sodium, ion [water, surface water]: 0.33889 kg; lognormal variance with pedigree 0.6921, pedigree (1,2,5,5,1)
  Literature value. It is assumed that the manufacturing plants are located in an urban/industrial area and consequently the emissions are categorised as emanating in a high population density area.
  The emissions into water are assumed to be emitted into rivers.
  Uncertainty: O
- TOC, Total Organic Carbon [water, unspecified]: 0.00776771 kg; lognormal variance with pedigree 0.218, pedigree (4,5,5,5,5)
  (same comment as for COD, Chemical Oxygen Demand)
- Benzyl alcohol [water, surface water]: 0.01 kg; lognormal variance with pedigree 0.0421, pedigree (1,2,5,5,1)
  (same comment as for Sodium, ion)
- BOD5, Biological Oxygen Demand [water, unspecified]: 0.0241465 kg; lognormal variance with pedigree 0.218, pedigree (4,5,5,5,5)
  (same comment as for COD, Chemical Oxygen Demand)
- Chloride [water, surface water]: 0.41419 kg; lognormal variance with pedigree 0.3421, pedigree (1,2,5,5,1)
  (same comment as for Sodium, ion)
- Water [water, unspecified]: 0.0235388 m3; = (water_deionised_input/1000)*(1-fraction_WDI_to_air)+water_cooling_UNO_input*(1-fraction_CW_to_air); lognormal variance with pedigree 0.0827, pedigree (2,2,5,5,1)
  Calculated as a fraction of the input of water. For more details, refer to the mathematical relation and the parameters.
  property fraction, origin: fresh water 0.0509651; name fraction_origin_fresh_water_Ww
  property fraction, origin: unspecified 0.949035; name fraction_origin_unspecified_Ww
  property dry mass 0 kg; name DM
  property carbon content, fossil 0; name C_content_fossil
  property wet mass 1000 kg; name WM
  property water in wet mass 1000 kg; name WWM
  property fraction, origin: salt water 0; name fraction_origin_salt_water_Ww
  property carbon content, non-fossil 0; name C_content_non_fossil
- DOC, Dissolved Organic Carbon [water, unspecified]: 0.00776771 kg; lognormal variance with pedigree 0.218, pedigree (4,5,5,5,5)
  (same comment as for COD, Chemical Oxygen Demand)
- Carbonate [water, surface water]: 0.25292 kg; lognormal variance with pedigree 0.3421, pedigree (1,2,5,5,1)
  (same comment as for Sodium, ion)
- Water [air, unspecified]: 0.0144422 m3; = (water_deionised_input/1000*fraction_WDI_to_air)+(water_cooling_UNO_input*fraction_CW_to_air); lognormal variance with pedigree 0.0827, pedigree (2,2,5,5,1)
  (same comment as for Water)
  property fraction, origin: unspecified 0.978581; name fraction_origin_unspecified
  property fraction, origin: salt water 0; name fraction_origin_salt_water
  property fraction, origin: fresh water 0.0214195; name fraction_origin_fresh_water

## Sampling procedure
Literature data.

## Extrapolations
This dataset has been copied from an original dataset covering the geography RER. The uncertainty has been adjusted accordingly.

## Review by Gregor Wernet 2017-08-04
This dataset was additionally reviewed in a separate review process by Eric Johnson of Atlantic Consulting as well as Emilia Moreno Ruiz and Gregor Wernet of ecoinvent.
