# titanium sponge production, from titanium tetrachloride

Dataset: EcoSpold 2, unit process
Geography: RoW
Time period: 2020-01-01 to 2024-12-31
Technology level: current
Classification: ISIC rev.4 ecoinvent: 2420:Manufacture of basic precious and other non-ferrous metals
Scenario: Business-as-Usual
System model: Allocation, cut-off by classification
Generated by: Gao Feng
Published in: Gao Feng 2018
Database: ecoinvent
isCopyrightProtected: true
accessRestrictedTo: 1

## General comment
This dataset refers to the average global production of 1 kg of titanium sponge from titanium tetrachloride (TiCl4+ 2Mg -> Ti + 2MgCl2), which is produced from the chlorination and refining process (first step of the Kroll process) followed by reduction with magnesium and a vacuum distillation (second step of the Kroll process) and is based on the Gao et al (2018) publication.
This dataset has been approximated from the respective dataset from the geography CN. The data is assumed to be representative also of the global situation, since the Kroll process is the most common method for the production of titanium sponge.
Reference:
Gao, F., Nie, Z., Yang, D., Sun, B., Liu, Y., Gong, X., & Wang, Z. (2018). Environmental impacts analysis of titanium sponge production using Kroll process in China. Journal of Cleaner Production, 174, 771-779. doi:https://doi.org/10.1016/j.jclepro.2017.09.240.

## Included activities start
The activity starts with the processing of high-purity titanium tetrachloride (TiCl4).

## Included activities end
The activity ends with the production of titanium sponge with an average purity of 99.9%. MgCl2 is produced as byproduct and is sent to an electrolysis process (modelled in a separate activity) in order to recover the magnesium and chlorine. The magnesium is refined and recycled back to the distillation and reduction process for producing titanium sponge, while the chlorine is recycled back to the chlorination process for the production of TiCl4.

## Allocation
No allocation is applied.

## Geography
The dataset has been approximated from the respective dataset from CN. The data is assumed to be representative also of the global situation, since the Kroll process is the most common method for the production of titanium sponge.

## Technology
After the production of high-purity TiCl4, it enters the reduction and distillation process, where it is firstly reduced by adding magnesium and then vacuum-distilled, producing the so-called titanium sponge and magnesium chloride as a byproduct based on the following stoichiometric equation: TiCl4 + 2Mg -> Ti + 2MgCl2. The magnesium chloride is then separated via the electrolysis process (modelled in a separate activity) and produces magnesium and chlorine. After refining, the magnesium is recycled and serves again as input to the reduction and distillation process, while chlorine (after it is filtrated and purified) is recycled and sent back to the chlorination process as an input.

## Time period
Data are considered representative of current production practices. The data are assumed to be valid on average for 5 years after the publication of that article.

## Reference product
- titanium sponge: 1 kg; name RP_amount; By-product classification allocatable product; CPC 41601: Tungsten, molybdenum, tantalum, magnesium, cobalt, cadmium, titanium, zirconium, beryllium, gallium, hafnium, […]; CAS 7440-32-6
  production volume 6.6e7 kg; name PVRP
    The production volume is expressed in kg. The global annual production (2019) of titanium sponge is 200000000 kg. Source: https://pubs.usgs.gov/periodicals/mcs2021/mcs2021-titanium.pdf
  property price 10.134 EUR2005; name RP_amount_price_EUR2005
    Assumed equal to 90% of price of titanium.
  property carbon content 0
    carbon content on a dry matter basis (reserved; not for manual entry)
  properties: wet mass 1 kg, dry mass 1 kg, carbon content, fossil 0, water in wet mass 0 kg, titanium content 0.99, water content 0, carbon content, non-fossil 0, carbon allocation 0 kg

## By-products
- magnesium chloride, from titanium sponge production: 0 kg; CPC 342: Basic inorganic chemicals n.e.c.; By-product classification Recyclable; CAS 7786-30-3; pedigree (1,1,1,1,1)
  Calculated based on the stoichiometric reaction and assumed losses. Based on the reaction TiCl4 + 2Mg -> Ti + 2MgCl2, 3.978 kg of MgCl2 is produced as byproduct.
  Table 2 in Gao et al. (2018) reports that 0.093 kg of "other residue" is produced during the reduction and distillation step. It is assumed that this flow represents MgCl2 that is lost. Therefore, the amount of magnesium chloride that is sent to the electrolysis step is 3.885 kg per kg of titanium sponge.
  Reference:
  Gao, F., Nie, Z., Yang, D., Sun, B., Liu, Y., Gong, X., & Wang, Z. (2018). Environmental impacts analysis of titanium sponge production using Kroll process in China. Journal of Cleaner Production, 174, 771-779. doi:https://doi.org/10.1016/j.jclepro.2017.09.240
  production volume 0 kg; = PVRP*ABS(recycled_MgCl2/RP_amount)
    Calculated from production volume of reference product using the relative outputs.
  property price 0.0935471 EUR2005; name recycled_MgCl2_price_EUR2005
    Price calculated based on prices from wholesalers on alibaba.com (accessed on 2021-09-03). The average price based on 5 sellers is 139 $/Ton (assumed to be metric ton). This price was converted to EUR based on the annual exchange rates published by the European Central Bank (https://sdw.ecb.europa.eu/quickview.do?SERIES_KEY=120.EXR.A.USD.EUR.SP00.A), and then adjusted for inflation relative to 2005 by using the Harmonised Index of Consumer Prices (HICP) of the euro area, published by eurostat (https://ec.europa.eu/eurostat/databrowser/view/PRC_HICP_AIND/default/table).
  property carbon content 0
    carbon content on a dry matter basis (reserved; not for manual entry)
  properties: chlorine content 0.7447, water content 0, dry mass 1 kg, carbon content, fossil 0, water in wet mass 0 kg, magnesium content 0.255299, wet mass 1 kg, carbon content, non-fossil 0, carbon allocation 0 kg

## Inputs from technosphere
- inert waste: 0 kg; name lost_MgCl2; pedigree (1,1,1,1,1)
  Proxy considered for the output ''other residue'' that comes out of the process as a byproduct.
  Stoichiometrically (based on the equationTiCl4 + 2Mg =Ti + 2MgCl2), approximately 1.0155 kg of Mg is required and 3.978 kg of MgCl2 is produced as a byproduct. However, due to electrolysis of the MgCl2 (MgCl2 = Mg + Cl2) 96% of the magnesium is recycled back to the reduction process and 45% of the chlorine is recycled back to the chlorination and refining process (see the titanium tetrachloride production dataset).
  The non-recovered amounts of Cl (1.62 kg per kg of Ti sponge) and Mg (0.41 kg per kg of Ti sponge) need to be supplied externally. This means that in the end, these non-recovered amounts (1.62 + 0.041 = 1.661 kg) are lost.
  Gao et al. (2018) report that 9.30E+01 kg of "other residue" is produced by the reduction and distillation process (per metric ton of titanium sponge). It is assumed that this residue represents magnesium chloride that is lost in this step. Therefore, the amount of waste is 0.093 kg, meaning that the rest of the MgCl2 (3.885 kg) is sent to the electrolysis step, where the other losses occur.
  Reference:
  Gao, F., Nie, Z., Yang, D., Sun, B., Liu, Y., Gong, X., & Wang, Z. (2018). Environmental impacts analysis of titanium sponge production using Kroll process in China. Journal of Cleaner Production, 174, 771-779. doi:https://doi.org/10.1016/j.jclepro.2017.09.240.
  production volume 0 kg
    Calculated from production volume of reference product using the relative outputs.
  property price 0 EUR2005; name lost_MgCl2_price_EUR2005
  properties: dry mass 1 kg, wet mass 1 kg
- titanium tetrachloride: 3.96263 kg; lognormal variance with pedigree 0.0052, pedigree (3,3,1,5,1)
  The amount of TiCl4 required is based on the stoichiometric equation: TiCl4 + 2Mg -> Ti + 2MgCl2 (reduction and distillation process), which means that for the production of 1 kg of Ti sponge, 3.9626 kg of TiCl4 are needed. An activity link has been set in order to ensure supply from producing activities of the same geography.
  properties: dry mass 1 kg, wet mass 1 kg
- magnesium: 0.041 kg; name Mg_make_up; lognormal variance with pedigree 0.0052, pedigree (3,3,1,5,1)
  The stoichiometric amount of Mg is based on the following equation: TiCl4 + 2Mg -> Ti + 2MgCl2. Approximately 1.0155 kg of Mg are required as an input for the production of 1 kg of Ti and 3.978 kg of MgCl2 is produced as byproduct.
  However, in the Kroll process for titanium sponge production, approximately 96% of magnesium is recovered through the MgCl2 electrolysis process (MgCl2 -> Mg + Cl2) and reused as input to the reduction and distillation process, meaning that only 4% of the stoichiometric input needs to be added from an external source.
  The amount of 41 kg Mg represents the amount of non-recovered magnesium that must be added per metric ton of Ti sponge, as reported in Table 2 in Gao et al. (2018). The rest of the Mg required for the reaction is obtained by the recycling of MgCl2.
  Reference:
  Gao, F., Nie, Z., Yang, D., Sun, B., Liu, Y., Gong, X., & Wang, Z. (2018). Environmental impacts analysis of titanium sponge production using Kroll process in China. Journal of Cleaner Production, 174, 771-779. doi:https://doi.org/10.1016/j.jclepro.2017.09.240
  properties: dry mass 1 kg, wet mass 1 kg
- electricity, medium voltage: 0 kWh; pedigree (1,1,1,1,1)
  The original amount of electricity required in the reduction and distillation process is 4.85E+03 kWh and represents the amount required for the production of 1 metric ton of titanium sponge (Table 2 in Gao et al. (2018)). This value was scaled to represent the production of 1 kg of titanium sponge.
  Reference:
  Gao, F., Nie, Z., Yang, D., Sun, B., Liu, Y., Gong, X., & Wang, Z. (2018). Environmental impacts analysis of titanium sponge production using Kroll process in China. Journal of Cleaner Production, 174, 771-779. doi:https://doi.org/10.1016/j.jclepro.2017.09.240.
- chemical factory, organics: 4e-10 unit; lognormal variance with pedigree 0.3126, pedigree (3,3,1,5,3)
  This infrastructural input has been included for compliance with the ecoinvent Guidelines and was not originally present in the publication on which this dataset is based (Gao et al. 2018). The chemical factory is assumed to have an average output of 50'000 t/a and a lifespan of 50 years.
  Reference:
  Gao, F., Nie, Z., Yang, D., Sun, B., Liu, Y., Gong, X., & Wang, Z. (2018). Environmental impacts analysis of titanium sponge production using Kroll process in China. Journal of Cleaner Production, 174, 771-779. doi:https://doi.org/10.1016/j.jclepro.2017.09.240.
- magnesium, for reuse in titanium sponge production: 0.9745 kg; = 1.0155 - Mg_make_up; lognormal variance with pedigree 0.0052, pedigree (3,3,1,5,1)
  Calculated amount, which corresponds to the magnesium that is recovered from the electrolysis of magnesium chloride which is produced as byproduct.
  The stoichiometric amount of Mg is based on the following equation: TiCl4 + 2Mg -> Ti + 2MgCl2. Approximately 1.0155 kg of Mg are required as an input for the production of 1 kg of Ti and 3.978 kg of MgCl2 is produced as byproduct.
  However, in the Kroll process for titanium sponge production, approximately 96% of magnesium is recovered through the MgCl2 electrolysis process (MgCl2 -> Mg + Cl2) and reused as input to the reduction and distillation process, while the remaining Mg (0.041 kg) is obtained from an external source.
  Reference:
  Gao, F., Nie, Z., Yang, D., Sun, B., Liu, Y., Gong, X., & Wang, Z. (2018). Environmental impacts analysis of titanium sponge production using Kroll process in China. Journal of Cleaner Production, 174, 771-779. doi:https://doi.org/10.1016/j.jclepro.2017.09.240
  properties: wet mass 1 kg, magnesium content 1, dry mass 1 kg
- magnesium chloride, from titanium sponge production: -3.885 kg; lognormal variance with pedigree 0.0052, pedigree (3,3,1,5,1)
  (same comment as for magnesium chloride, from titanium sponge production)
  production volume 7.77e8 kg
  properties: chlorine content 0.7447, dry mass 1 kg, magnesium content 0.255299, wet mass 1 kg
- inert waste: -0.00079414, -0.0922059 kg (2 entries); lognormal variance with pedigree 0.0052, pedigree (3,3,1,5,1)
  (same comment as for inert waste)
  production volume 6.138e6 kg
- electricity, medium voltage: 0.00181336, 0.0669164, 0.00617612, 0.0188133, 0.00532733, 0.00108094, 0.00140823, 0.0035067, 0.0144424, 0.0517501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 kWh (45 entries); lognormal variance with pedigree 0.0052, pedigree (3,3,1,5,1)
  (same comment as for electricity, medium voltage)

## Sampling procedure
The individual exchanges have been taken from Table 2 of Gao et al. (2018).

The individual emissions reported in Gao et al. (2018) (As, Cd, Cr, Hg, Ni, Pb, V, Zn, CO2, SO2, NOx, CO, CH4, N2O, NMVOC) are all assumed to be related to energy production. Therefore they are not considered here because they are modelled in the ecoinvent dataset for electricity production.

Infrastructure has been included for compliance with the ecoinvent guidelines and was not originally contained in the abovementioned source.

An activity link has been set to the Ti tetrachloride, to ensure that the Ti tetrachloride is supplied from the producing activity of the same geography.

Furthermore, due to the electrolysis process, Mg and Cl2 are produced from the MgCl2 byproduct, which is produced during the production of Ti sponge. These 2 products are recycled and fed back to the respective production processes (Mg is fed back to the reduction process and Cl2 to the chlorination and refining process, i.e., the titanium tetrachloride production dataset). In Gao et al. (2018), only the added amounts (non-recycled amounts) have been reported (0.041 kg for Mg and 1.62 kg for Cl2 per kg of produced Ti sponge) This lost 1.661 kg of Mg and Cl2 is assumed to be lost partly in this process in the form of MgCl2, for which inert waste is used as proxy. The amount (0.093 kg) is based on the "other residue" reported in Table 2 in Gao et al. (2018). The other losses of Mg and Cl are assumed to occur in the magnesium chloride electrolysis step.

Reference:
Gao, F., Nie, Z., Yang, D., Sun, B., Liu, Y., Gong, X., & Wang, Z. (2018). Environmental impacts analysis of titanium sponge production using Kroll process in China. Journal of Cleaner Production, 174, 771-779. doi:https://doi.org/10.1016/j.jclepro.2017.09.240.

## Extrapolations
This dataset has been extrapolated from the respective dataset from CN. The uncertainty has been adjusted accordingly. According to the authors of the publication used as a source for this dataset, data were collected from titanium sponge manufacturing companies in the province of Sichuan and Shaanxi through surveys, but considering at the same time average national production statistics. Therefore, the data are assumed to represent the average production of titanium metal in China through the Kroll process. The data is assumed to be representative also of the global situation, since the Kroll process is the most common method for the production of titanium sponge.
