# treatment of waste polyvinylchloride, sanitary landfill

Dataset: EcoSpold 2, unit process
Geography: RoW
Time period: 1994-01-01 to 2021-12-31
Technology level: current
Classification: ISIC rev.4 ecoinvent: 3821:Treatment and disposal of non-hazardous waste
Classification: EcoSpold01Categories: waste management/sanitary landfill
Synonyms: PVC
Tags: ConvertedDataset; Treatment
Scenario: Business-as-Usual
System model: Allocation, cut-off by classification
Generated by: Gabor Doka (obsolete)
Published in: Doka G. 2007
Database: ecoinvent
isCopyrightProtected: true
accessRestrictedTo: 1

## General comment
Inventoried waste contains 100% PVC; .
waste composition (wet, in ppm): upper heating value 21.67 MJ/kg; lower heating value 21.51 MJ/kg; H2O 2000; O 16911; H 54921; C 440610; S 1057; N 1057; P n.a.; B n.a.; Cl 475290; Br 73.839; F 15.506; I n.a.; Ag n.a.; As 2.0042; Ba 196.73; Cd 2.7546; Co 33.322; Cr 43.106; Cu 28.223; Hg 0.89569; Mn 84.301; Mo n.a.; Ni 21.729; Pb 16.002; Sb 45.323; Se 2.2152; Sn 391.41; V 303.95; Zn 59.775; Be 0.52742; Sc n.a.; Sr 93.353; Ti 1054.8; Tl 0.42194; W n.a.; Si n.a.; Fe 3930; Ca n.a.; Al 210.97; K n.a.; Mg n.a.; Na 1545.9;
Share of carbon in waste that is biogenic 0%.
Overall degradability of waste during 100 years: 1%.
[This dataset was already contained in the ecoinvent database version 2. It was not individually updated during the transfer to ecoinvent version 3. Life Cycle Impact Assessment results may still have changed, as they are affected by changes in the supply chain, i.e. in other datasets. This dataset was generated following the ecoinvent quality guidelines for version 2. It may have been subject to central changes described in the ecoinvent version 3 change report (http://www.ecoinvent.org/database/ecoinvent-version-3/reports-of-changes/), and the results of the central updates were reviewed extensively. The changes added e.g. consistent water flows and other information throughout the database. The documentation of this dataset can be found in the ecoinvent reports of version 2, which are still available via the ecoinvent website. The change report linked above covers all central changes that were made during the conversion process.]

## Included activities end
Waste-specific short-term emissions to air via landfill gas incineration and landfill leachate. Burdens from treatment of short-term leachate (0-100a) in wastewater treatment plant (including WWTP sludge disposal in municipal incinerator). Long-term emissions from landfill to groundwater (after base lining failure).

## Geography
Technology encountered in Switzerland in 2000. Landfill includes base seal, leachate collection system, treatment of leachate in municipal wastewater treatment plant.

## Technology
Swiss municipal sanitary landfill for biogenic or untreated municipal waste ('reactive organic landfill'). Landfill gas and leachate collection system. Recultivation and monitoring for 150 years after closure.

## Reference product
- waste polyvinylchloride: -1 kg; name waste_pvc_RP; CPC 39270: Waste, parings and scrap of plastics; By-product classification Waste; CAS 9002-86-2
  EcoSpold01Location=CH
  production volume 1.19259e10 kg; name waste_pvc_RP_PV; = (0.9/0.1)*1325100000
    Estimated. Based on literature (UNSTATS, http://unstats.un.org/unsd/environment/wastetreatment.htm, accessed 20140620) it is estimated, that 90% of waste polyvinylchloride is landfilled.
  property carbon content, fossil 0.440882
    C content in 1 kg DM was calculated using data in Tab A.1, ecoinvent v2.2 report 13_I
  property heating value, net 21.51 MJ
    Value taken from the general comment of the treatment dataset.
  property price 0 EUR2005; name waste_pvc_RP_price_EUR2005
    Waste products are assigned a price of zero as they are assumed to require further treatment.
  property carbon content 0.440882
    carbon content on a dry matter basis (reserved; not for manual entry)
  properties: water in wet mass 0.002 kg, water content 0.00200401, dry mass 0.998 kg, carbon content, non-fossil 0, wet mass 1 kg, carbon allocation 0.44 kg

## Inputs from technosphere
- process-specific burdens, sanitary landfill: 1 kg; lognormal variance with pedigree 0.042, pedigree (1,1,5,5,1)
  demands per kilogram waste. uncertainty is heeded in the module
  EcoSpold01Location=CH
- ammonia, anhydrous, liquid: 0 kg; pedigree (1,1,1,1,1)
  EcoSpold01Location=CH
  burden from incineration of sludge from wastewater treatment of the short-term leachate (0-100a). uncertainty is calculated from uncertainties in waste composition and transfer coefficients in incinerator and uncertainty of waste decomposition and short-term leaching in sanitary landfill
  properties: dry mass 1 kg, wet mass 1 kg
- iron (III) chloride, without water, in 40% solution state: 9.79e-9 kg; lognormal variance with pedigree 0.602, pedigree (1,1,5,5,1)
  burden from incineration of sludge from wastewater treatment of the short-term leachate (0-100a). uncertainty is calculated from uncertainties in waste composition and transfer coefficients in incinerator and uncertainty of waste decomposition and short-term leaching in sanitary landfill
  EcoSpold01Location=CH
  properties: dry mass 1 kg, wet mass 1 kg
- heat, district or industrial, natural gas: 0 MJ; pedigree (1,1,1,1,1)
  EcoSpold01Location=RER
  burden from incineration of sludge from wastewater treatment of the short-term leachate (0-100a). uncertainty is calculated from uncertainties in waste composition and transfer coefficients in incinerator and uncertainty of waste decomposition and short-term leaching in sanitary landfill
  properties: heating value, net 1 MJ
- sodium hydroxide, without water, in 50% solution state: 1.85e-9 kg; lognormal variance with pedigree 0.672, pedigree (1,1,5,5,1)
  (same comment as for heat, district or industrial, natural gas)
  properties: dry mass 1 kg, heating value, net 3.03 MJ, wet mass 1 kg
- process-specific burdens, municipal waste incineration: 0 kg; pedigree (1,1,1,1,1)
  EcoSpold01Location=CH
  Burden from incineration of sludge from wastewater treatment of the short-term leachate (0-100a).
- hydrochloric acid, without water, in 30% solution state: 3.81e-11 kg; lognormal variance with pedigree 0.512, pedigree (1,1,5,5,1)
  burden from incineration of sludge from wastewater treatment of the short-term leachate (0-100a). uncertainty is calculated from uncertainties in waste composition and transfer coefficients in incinerator and uncertainty of waste decomposition and short-term leaching in sanitary landfill
  EcoSpold01Location=RER
  properties: heating value, net 3.32 MJ, dry mass 1 kg, wet mass 1 kg
- waste cement, hydrated: 0 kg; name waste_cement_ByP
  (same comment as for ammonia, anhydrous, liquid)
  production volume 0 kg
    Calculated from the production volume of waste polyvinylchloride, 0.2% water in proportion to the respective output amounts.
  property price 0 EUR2005; name waste_cement_ByP_price_EUR2005
  properties: wet mass 1 kg, dry mass 1 kg
- heat, central or small-scale, other than natural gas: 0 MJ; pedigree (1,1,1,1,1)
  burden from wastewater treatment of the short-term leachate (0-100a). Uncertainty calculated from unertainty of the waste composition of this waste, uncertainty in waste decomposition and short-term leaching in sanitary landfill
  EcoSpold01Location=CH
  Uncertainty: . Uncertainty calculated from unertainty of the waste composition of this waste, uncertainty in waste decomposition and short-term leaching in sanitary landfill
  properties: heating value, net 1 MJ
- waste plastic, mixture: 0 kg; name waste_plastic_ByP
  burden from wastewater treatment of the short-term leachate (0-100a). Uncertainty calculated from unertainty of the waste composition of this waste, uncertainty in waste decomposition and short-term leaching in sanitary landfill
  EcoSpold01Location=CH
  production volume 0 kg
    (same comment as for waste cement, hydrated)
  property price 0 EUR2005; name waste_plastic_ByP_price_EUR2005
  properties: dry mass 0.847 kg, water content 0.180638, heating value, net 30.79 MJ, wet mass 1 kg, carbon content, fossil 0.747344
  note on heating value, net: Value taken from the general comment of the treatment dataset.
  note on carbon content, fossil: C content in 1 kg DM was calculated using data in Tab A.2, ecoinvent v2.2 report 13_I
- electricity, low voltage: 0 kWh; pedigree (1,1,1,1,1)
  (same comment as for heat, central or small-scale, other than natural gas)
- wastewater treatment facility, capacity 5E9l/year: 1.42e-11 unit; lognormal variance with pedigree 0.2106, pedigree (5,5,5,5,5)
  (same comment as for heat, central or small-scale, other than natural gas)
- waste graphical paper: 0 kg; name waste_paper_ByP
  EcoSpold01Location=CH
  burden from wastewater treatment of the short-term leachate (0-100a). Uncertainty calculated from unertainty of the waste composition of this waste, uncertainty in waste decomposition and short-term leaching in sanitary landfill
  production volume 0 kg
    (same comment as for waste cement, hydrated)
  property price 0 EUR2005; name waste_paper_ByP_price_EUR2005
  properties: dry mass 0.888 kg, heating value, net 14.12 MJ, wet mass 1 kg, carbon content, non-fossil 0.454955, water content 0.126126
- chemical, inorganic: 6.35e-11 kg; lognormal variance with pedigree 0.512, pedigree (1,1,5,5,1)
  burden from incineration of sludge from wastewater treatment of the short-term leachate (0-100a). uncertainty is calculated from uncertainties in waste composition and transfer coefficients in incinerator and uncertainty of waste decomposition and short-term leaching in sanitary landfill
  EcoSpold01Location=GLO
  properties: wet mass 1 kg, carbon content, fossil 0.003, dry mass 1 kg
  note on carbon content, fossil: This dataset is an unweighted average of 20 inorganic substances (listed in Tab 88.1, ecoinvent v2.2 report 8, part II), being part of the top100 chemicals included in this database. The C-content has also been calculated as an unweighted average of the C content of the substances composing this dataset.
- quicklime, milled, packed: 3.35e-10 kg; lognormal variance with pedigree 0.682, pedigree (1,1,5,5,1)
  (same comment as for iron (III) chloride, without water, in 40% solution state)
  properties: water content 0.010101, wet mass 1 kg, dry mass 0.99 kg
- residual material landfill: 1.28e-15 unit; lognormal variance with pedigree 0.492, pedigree (1,1,5,5,1)
  (same comment as for iron (III) chloride, without water, in 40% solution state)
- slag landfill: 7.28e-15 unit; lognormal variance with pedigree 0.592, pedigree (1,1,5,5,1)
  (same comment as for iron (III) chloride, without water, in 40% solution state)
- process-specific burdens, residual material landfill: 0 kg; pedigree (1,1,1,1,1)
  (same comment as for ammonia, anhydrous, liquid)
- municipal waste incineration facility: 2.06e-14 unit; lognormal variance with pedigree 0.692, pedigree (1,1,5,5,1)
  (same comment as for process-specific burdens, municipal waste incineration)
- sewer grid, 5E9l/year, 110 km: 5.45e-10 km; lognormal variance with pedigree 0.2106, pedigree (5,5,5,5,5)
  (same comment as for heat, central or small-scale, other than natural gas)
- chromium oxide, flakes: 2.17e-11 kg; lognormal variance with pedigree 1.13, pedigree (5,5,5,5,5)
  EcoSpold01Location=RER
  burden from incineration of sludge from wastewater treatment of the short-term leachate (0-100a). Proxy for vanadium pentoxide V2O5 in SCR catalyst, uncertainty calculated from uncertainty in average DeNOx input, uncertainty in the share of thermal NOx, uncertainty of nitrogen content in average municipal waste and the unertainty in nitrogen content in *this* waste and uncertainty of waste decomposition and short-term leaching in sanitary landfill
  Uncertainty: . Proxy for vanadium pentoxide V2O5 in SCR catalyst, uncertainty calculated from uncertainty in average DeNOx input, uncertainty in the share of thermal NOx, uncertainty of nitrogen content in average municipal waste and the unertainty in nitrogen content in *this* waste and uncertainty of waste decomposition and short-term leaching in sanitary landfill
  properties: wet mass 1 kg, dry mass 1 kg
- process-specific burdens, slag landfill: 0 kg; pedigree (1,1,1,1,1)
  (same comment as for ammonia, anhydrous, liquid)
- chemical, organic: 8.72e-9 kg; lognormal variance with pedigree 1.822, pedigree (1,1,5,5,1)
  EcoSpold01Location=GLO
  burden from incineration of sludge from wastewater treatment of the short-term leachate (0-100a). uncertainty is calculated from uncertainties in waste composition and transfer coefficients in incinerator and uncertainty of waste decomposition and short-term leaching in sanitary landfill
  properties: carbon content, fossil 0.628, wet mass 1 kg, heating value, net 19.03 MJ, dry mass 1 kg
  note on carbon content, fossil: This dataset is an unweighted average of 20 organic substances (listed in Tab 88.1, ecoinvent v2.2 report 8, part II), being part of the top100 chemicals included in this database. The C-content has also been calculated as an unweighted average of the C content of the substances composing this dataset.
- heat, district or industrial, other than natural gas: 0 MJ; pedigree (1,1,1,1,1)
  (same comment as for iron (III) chloride, without water, in 40% solution state)
  properties: heating value, net 1 MJ
- electricity, high voltage: 0 kWh; pedigree (1,1,1,1,1)
  (same comment as for ammonia, anhydrous, liquid)
- cement, unspecified: 0 kg; pedigree (1,1,1,1,1)
  (same comment as for iron (III) chloride, without water, in 40% solution state)
  properties: wet mass 1 kg, dry mass 1 kg
- titanium dioxide: 1.06e-9 kg; lognormal variance with pedigree 1.022, pedigree (1,1,5,5,1)
  (same comment as for heat, district or industrial, natural gas)
  properties: wet mass 1 kg, dry mass 1 kg
- sanitary landfill facility: 5.56e-10 unit; lognormal variance with pedigree 0.042, pedigree (1,1,5,5,1)
  demands per kilogram waste. uncertainty is heeded in the module
  EcoSpold01Location=CH
- ammonia, anhydrous, liquid: 7.77664e-9, 6.68496e-10, 1.04001e-9, 2.06062e-9, 2.01887e-9, 2.11599e-10, 9.45925e-10, 2.23778e-8 kg (8 entries); lognormal variance with pedigree 0.762, pedigree (1,1,5,5,1)
  (same comment as for ammonia, anhydrous, liquid)
- heat, district or industrial, natural gas: 5.87605e-7, 1.40802e-5, 3.81262e-5 MJ (3 entries); lognormal variance with pedigree 0.762, pedigree (1,1,5,5,1)
  (same comment as for heat, district or industrial, natural gas)
- process-specific burdens, municipal waste incineration: 2.33654e-5, 5.92346e-5 kg (2 entries); lognormal variance with pedigree 0.692, pedigree (1,1,5,5,1)
  (same comment as for process-specific burdens, municipal waste incineration)
- waste cement, hydrated: -1.73119e-7, -4.38881e-7 kg (2 entries)
  (same comment as for ammonia, anhydrous, liquid)
  production volume 7298.65 kg
- heat, central or small-scale, other than natural gas: 4.86494e-7, 3.54215e-5 MJ (2 entries); lognormal variance with pedigree 0.2106, pedigree (5,5,5,5,5)
  (same comment as for heat, central or small-scale, other than natural gas)
- waste plastic, mixture: -4.31618e-6, -2.88391e-7, -2.18105e-8, -1.19116e-7, -4.81214e-8, -1.13112e-7, -3.67759e-6, -3.02157e-5 kg (8 entries)
  (same comment as for waste plastic, mixture)
  production volume 462725 kg
- electricity, low voltage: 2.8396e-6, 5.17037e-7, 1.16715e-5, 4.07775e-5, 8.32494e-6, 0.000127814, 2.06781e-5, 5.93769e-5 kWh (8 entries); lognormal variance with pedigree 0.5, pedigree (5,5,5,5,5)
  (same comment as for heat, central or small-scale, other than natural gas)
- waste graphical paper: -1.69726e-6, -2.59179e-7, -2.26629e-8, -9.36524e-7, -9.13189e-8, -1.69041e-7, -4.09465e-6, -3.15294e-5 kg (8 entries)
  (same comment as for waste graphical paper)
  production volume 462725 kg
- process-specific burdens, residual material landfill: 1.73119e-7, 4.38881e-7 kg (2 entries); lognormal variance with pedigree 0.492, pedigree (1,1,5,5,1)
  (same comment as for ammonia, anhydrous, liquid)
- process-specific burdens, slag landfill: 1.15979e-6, 2.94021e-6 kg (2 entries); lognormal variance with pedigree 0.592, pedigree (1,1,5,5,1)
  (same comment as for ammonia, anhydrous, liquid)
- heat, district or industrial, other than natural gas: 2.80499e-8, 6.9172e-5 MJ (2 entries); lognormal variance with pedigree 0.692, pedigree (1,1,5,5,1)
  (same comment as for iron (III) chloride, without water, in 40% solution state)
- electricity, high voltage: 1.40855e-7, 2.70034e-8, 6.21985e-7, 4.57842e-7, 6.59274e-6, 1.04555e-6, 3.01402e-6 kWh (7 entries); lognormal variance with pedigree 1.072, pedigree (1,1,5,5,1)
  (same comment as for ammonia, anhydrous, liquid)
- cement, unspecified: 3.5377e-8, 7.36089e-9, 5.39135e-10, 1.53671e-9, 3.47532e-8, 1.02289e-9, 1.12343e-8, 1.35923e-9, 1.51817e-7 kg (9 entries); lognormal variance with pedigree 0.502, pedigree (1,1,5,5,1)
  (same comment as for iron (III) chloride, without water, in 40% solution state)

## Emissions to nature
- Chromium VI [water, surface water]: 2.57e-9 kg; lognormal variance with pedigree 2.062, pedigree (1,1,5,5,1)
  Emissions from short-term leachate treatment and incineration of resulting sludge. Uncertainty calculated depending on waste input and uncertainty of transfer coefficents in landfill, wastewater treatment and incineration model.
- COD, Chemical Oxygen Demand [water, ground-, long-term]: 0.122 kg; lognormal variance with pedigree 0.532, pedigree (1,1,5,5,1)
  Emissions from long-term leachate (>100a) directly from MSW landfill and indirectly via incineration of treatement sludge from leachate treatement. Uncertainty calculated depending on waste input and uncertainty of long-term transfer coefficents in landfill.
- Thallium [air, urban air close to ground]: 1.21e-13 kg; lognormal variance with pedigree 2.482, pedigree (1,1,5,5,1)
  (same comment as for Chromium VI)
- Carbon monoxide, fossil [air, urban air close to ground]: 2.38e-7 kg; lognormal variance with pedigree 0.932, pedigree (1,1,5,5,1)
  (same comment as for Chromium VI)
- Antimony [air, urban air close to ground]: 2.35e-12 kg; lognormal variance with pedigree 2.402, pedigree (1,1,5,5,1)
  (same comment as for Chromium VI)
- Mercury [water, surface water]: 1.94e-10 kg; lognormal variance with pedigree 2.332, pedigree (1,1,5,5,1)
  (same comment as for Chromium VI)
- Nitrite [water, ground-, long-term]: 2.29e-5 kg; lognormal variance with pedigree 0.692, pedigree (1,1,5,5,1)
  (same comment as for COD, Chemical Oxygen Demand)
- Chloride [water, ground-, long-term]: 0.463 kg; lognormal variance with pedigree 0.062, pedigree (1,1,5,5,1)
  (same comment as for COD, Chemical Oxygen Demand)
- Lead [water, surface water]: 1.04e-10 kg; lognormal variance with pedigree 2.282, pedigree (1,1,5,5,1)
  (same comment as for Chromium VI)
- Thallium [air, non-urban air or from high stacks]: 6.13e-14 kg; lognormal variance with pedigree 3.532, pedigree (1,1,5,5,1)
  burden from direct release or incineration of landfill biogas. Uncertainty calculated from unertainty of the waste composition of this waste, uncertainty in waste decomposition and short-term leaching in sanitary landfill
- Strontium [water, ground-, long-term]: 9.33e-5 kg; lognormal variance with pedigree 1.012, pedigree (1,1,5,5,1)
  (same comment as for COD, Chemical Oxygen Demand)
- Chromium [air, non-urban air or from high stacks]: 1.23e-12 kg; lognormal variance with pedigree 3.122, pedigree (1,1,5,5,1)
  (same comment as for Thallium)
- Nitrate [water, ground-, long-term]: 4.42e-5 kg; lognormal variance with pedigree 0.692, pedigree (1,1,5,5,1)
  (same comment as for COD, Chemical Oxygen Demand)
- Fluoride [water, surface water]: 1.14e-8 kg; lognormal variance with pedigree 1.942, pedigree (1,1,5,5,1)
  Emissions from short-term leachate treatment. Uncertainty calculated depending on waste input and uncertainty of transfer coefficents in landfill and wastewater treatment.
- Mercury [air, non-urban air or from high stacks]: 2.45e-10 kg; lognormal variance with pedigree 2.442, pedigree (1,1,5,5,1)
  (same comment as for Thallium)
- Mercury [air, urban air close to ground]: 1.04e-15 kg; lognormal variance with pedigree 2.382, pedigree (1,1,5,5,1)
  (same comment as for Chromium VI)
- Cadmium, ion [water, ground-, long-term]: 2.75e-6 kg; lognormal variance with pedigree 1.482, pedigree (1,1,5,5,1)
  (same comment as for COD, Chemical Oxygen Demand)
- Tin, ion [water, ground-, long-term]: 0.000391 kg; lognormal variance with pedigree 0.822, pedigree (1,1,5,5,1)
  (same comment as for COD, Chemical Oxygen Demand)
- Nitrogen, organic bound [water, ground-, long-term]: 0.000687 kg; lognormal variance with pedigree 0.692, pedigree (1,1,5,5,1)
  (same comment as for COD, Chemical Oxygen Demand)
- Cobalt [air, urban air close to ground]: 1.67e-15 kg; lognormal variance with pedigree 1.772, pedigree (1,1,5,5,1)
  (same comment as for Chromium VI)
- Methane, fossil [air, non-urban air or from high stacks]: 0.00169 kg; lognormal variance with pedigree 0.472, pedigree (1,1,5,5,1)
  (same comment as for Thallium)
- Arsenic [air, urban air close to ground]: 1.01e-12 kg; lognormal variance with pedigree 2.142, pedigree (1,1,5,5,1)
  (same comment as for Chromium VI)
- Particulates, < 2.5 um [air, non-urban air or from high stacks]: 2.1e-7 kg; lognormal variance with pedigree 0.732, pedigree (1,1,5,5,1)
  (same comment as for Thallium)
- Zinc, ion [water, ground-, long-term]: 4.94e-5 kg; lognormal variance with pedigree 1.082, pedigree (1,1,5,5,1)
  (same comment as for COD, Chemical Oxygen Demand)
- Beryllium [air, non-urban air or from high stacks]: 7.67e-14 kg; lognormal variance with pedigree 3.502, pedigree (1,1,5,5,1)
  (same comment as for Thallium)
- Chromium, ion [water, surface water]: 7.71e-12 kg; lognormal variance with pedigree 2.092, pedigree (1,1,5,5,1)
  (same comment as for Chromium VI)
- Manganese [air, non-urban air or from high stacks]: 2.41e-10 kg; lognormal variance with pedigree 2.452, pedigree (1,1,5,5,1)
  (same comment as for Thallium)
- Cobalt [air, non-urban air or from high stacks]: 2.68e-11 kg; lognormal variance with pedigree 2.742, pedigree (1,1,5,5,1)
  (same comment as for Thallium)
- Zinc, ion [water, surface water]: 8.76e-9 kg; lognormal variance with pedigree 1.822, pedigree (1,1,5,5,1)
  (same comment as for Chromium VI)
- Antimony [water, surface water]: 3.24e-8 kg; lognormal variance with pedigree 1.762, pedigree (1,1,5,5,1)
  (same comment as for Chromium VI)
- Vanadium, ion [water, ground-, long-term]: 8.85e-5 kg; lognormal variance with pedigree 1.232, pedigree (1,1,5,5,1)
  (same comment as for COD, Chemical Oxygen Demand)
- Aluminium [air, urban air close to ground]: 1.55e-10 kg; lognormal variance with pedigree 1.682, pedigree (1,1,5,5,1)
  (same comment as for Chromium VI)
- Strontium [air, urban air close to ground]: 2.67e-12 kg; lognormal variance with pedigree 1.792, pedigree (1,1,5,5,1)
  (same comment as for Chromium VI)
- Arsenic [air, non-urban air or from high stacks]: 5.05e-11 kg; lognormal variance with pedigree 2.662, pedigree (1,1,5,5,1)
  (same comment as for Thallium)
- Chromium VI [water, ground-, long-term]: 1.95e-7 kg; lognormal variance with pedigree 8.392, pedigree (1,1,5,5,1)
  (same comment as for COD, Chemical Oxygen Demand)
- Beryllium [air, urban air close to ground]: 1.51e-13 kg; lognormal variance with pedigree 2.462, pedigree (1,1,5,5,1)
  (same comment as for Chromium VI)
- Beryllium [water, surface water]: 1.56e-10 kg; lognormal variance with pedigree 2.412, pedigree (1,1,5,5,1)
  (same comment as for Chromium VI)
- Zinc [air, urban air close to ground]: 3.2e-13 kg; lognormal variance with pedigree 1.892, pedigree (1,1,5,5,1)
  (same comment as for Chromium VI)
- TOC, Total Organic Carbon [water, surface water]: 2.05e-5 kg; lognormal variance with pedigree 0.882, pedigree (1,1,5,5,1)
  (same comment as for Chromium VI)
- TOC, Total Organic Carbon [water, ground-, long-term]: 0.112 kg; lognormal variance with pedigree 0.532, pedigree (1,1,5,5,1)
  (same comment as for COD, Chemical Oxygen Demand)
- Cobalt [water, ground-, long-term]: 3.33e-5 kg; lognormal variance with pedigree 1.152, pedigree (1,1,5,5,1)
  (same comment as for COD, Chemical Oxygen Demand)
- Titanium, ion [water, ground-, long-term]: 0.00105 kg; lognormal variance with pedigree 0.692, pedigree (1,1,5,5,1)
  (same comment as for COD, Chemical Oxygen Demand)
- Titanium, ion [water, surface water]: 2.68e-7 kg; lognormal variance with pedigree 1.432, pedigree (1,1,5,5,1)
  (same comment as for Chromium VI)
- Carbon dioxide, fossil [air, urban air close to ground]: 0.000368 kg; lognormal variance with pedigree 0.882, pedigree (1,1,5,5,1)
  (same comment as for Chromium VI)
- Lead [water, ground-, long-term]: 1.6e-5 kg; lognormal variance with pedigree 1.252, pedigree (1,1,5,5,1)
  (same comment as for COD, Chemical Oxygen Demand)
- Hydrogen chloride [air, non-urban air or from high stacks]: 0.000173 kg; lognormal variance with pedigree 0.852, pedigree (1,1,5,5,1)
  (same comment as for Thallium)
- Cyanide [air, urban air close to ground]: 6.62e-10 kg; lognormal variance with pedigree 0.782, pedigree (1,1,5,5,1)
  (same comment as for Chromium VI)
- Manganese [water, surface water]: 4.9e-7 kg; lognormal variance with pedigree 1.382, pedigree (1,1,5,5,1)
  (same comment as for Chromium VI)
- Sodium, ion [water, ground-, long-term]: 0.00148 kg; lognormal variance with pedigree 0.642, pedigree (1,1,5,5,1)
  (same comment as for COD, Chemical Oxygen Demand)
- Tin [air, urban air close to ground]: 1.78e-11 kg; lognormal variance with pedigree 1.882, pedigree (1,1,5,5,1)
  (same comment as for Chromium VI)
- Nitrogen [water, surface water]: 3.47e-7 kg; lognormal variance with pedigree 0.642, pedigree (1,1,5,5,1)
  (same comment as for Chromium VI)
- Manganese [water, ground-, long-term]: 8.19e-5 kg; lognormal variance with pedigree 1.022, pedigree (1,1,5,5,1)
  (same comment as for COD, Chemical Oxygen Demand)
- Nitrate [water, surface water]: 4.66e-5 kg; lognormal variance with pedigree 0.632, pedigree (1,1,5,5,1)
  (same comment as for Chromium VI)
- Sulfate [water, ground-, long-term]: 0.00294 kg; lognormal variance with pedigree 0.692, pedigree (1,1,5,5,1)
  (same comment as for COD, Chemical Oxygen Demand)
- Carbon dioxide, fossil [air, non-urban air or from high stacks]: 0.011 kg; lognormal variance with pedigree 0.432, pedigree (1,1,5,5,1)
  (same comment as for Thallium)
- Thallium [water, ground-, long-term]: 4.22e-7 kg; lognormal variance with pedigree 1.722, pedigree (1,1,5,5,1)
  (same comment as for COD, Chemical Oxygen Demand)
- Bromine [water, surface water]: 1.86e-6 kg; lognormal variance with pedigree 1.302, pedigree (1,1,5,5,1)
  (same comment as for Fluoride)
- Ammonium, ion [water, ground-, long-term]: 0.00042 kg; lognormal variance with pedigree 0.692, pedigree (1,1,5,5,1)
  (same comment as for COD, Chemical Oxygen Demand)
- Zinc [air, non-urban air or from high stacks]: 6.29e-12 kg; lognormal variance with pedigree 2.912, pedigree (1,1,5,5,1)
  (same comment as for Thallium)
- Barium [water, ground-, long-term]: 0.000196 kg; lognormal variance with pedigree 0.902, pedigree (1,1,5,5,1)
  (same comment as for COD, Chemical Oxygen Demand)
- Selenium [water, ground-, long-term]: 6.25e-7 kg; lognormal variance with pedigree 1.912, pedigree (1,1,5,5,1)
  (same comment as for COD, Chemical Oxygen Demand)
- Lead [air, urban air close to ground]: 3.12e-14 kg; lognormal variance with pedigree 2.342, pedigree (1,1,5,5,1)
  (same comment as for Chromium VI)
- Iron [air, urban air close to ground]: 8.88e-12 kg; lognormal variance with pedigree 1.502, pedigree (1,1,5,5,1)
  (same comment as for Chromium VI)
- Beryllium [water, ground-, long-term]: 5.27e-7 kg; lognormal variance with pedigree 1.692, pedigree (1,1,5,5,1)
  (same comment as for COD, Chemical Oxygen Demand)
- Chloride [water, surface water]: 0.012 kg; lognormal variance with pedigree 0.312, pedigree (1,1,5,5,1)
  (same comment as for Fluoride)
- Lead [air, non-urban air or from high stacks]: 3.14e-13 kg; lognormal variance with pedigree 3.302, pedigree (1,1,5,5,1)
  (same comment as for Thallium)
- Nickel [air, non-urban air or from high stacks]: 3.16e-12 kg; lognormal variance with pedigree 3.012, pedigree (1,1,5,5,1)
  (same comment as for Thallium)
- Nickel [air, urban air close to ground]: 0 kg; pedigree (1,1,1,1,1)
  (same comment as for Chromium VI)
- Titanium [air, non-urban air or from high stacks]: 1.32e-10 kg; lognormal variance with pedigree 2.522, pedigree (1,1,5,5,1)
  (same comment as for Thallium)
- Selenium [water, surface water]: 1.56e-9 kg; lognormal variance with pedigree 2.152, pedigree (1,1,5,5,1)
  (same comment as for Chromium VI)
- Antimony [water, ground-, long-term]: 4.56e-6 kg; lognormal variance with pedigree 2.432, pedigree (1,1,5,5,1)
  (same comment as for COD, Chemical Oxygen Demand)
- Nickel, ion [water, ground-, long-term]: 2.17e-5 kg; lognormal variance with pedigree 1.212, pedigree (1,1,5,5,1)
  (same comment as for COD, Chemical Oxygen Demand)
- Hydrogen fluoride [air, non-urban air or from high stacks]: 6.18e-8 kg; lognormal variance with pedigree 1.732, pedigree (1,1,5,5,1)
  (same comment as for Thallium)
- Sulfate [water, surface water]: 1.2e-5 kg; lognormal variance with pedigree 1.182, pedigree (1,1,5,5,1)
  (same comment as for Fluoride)
- Bromine [water, ground-, long-term]: 7.2e-5 kg; lognormal variance with pedigree 1.042, pedigree (1,1,5,5,1)
  (same comment as for COD, Chemical Oxygen Demand)
- Cobalt [water, surface water]: 5.44e-8 kg; lognormal variance with pedigree 1.652, pedigree (1,1,5,5,1)
  (same comment as for Chromium VI)
- BOD5, Biological Oxygen Demand [water, surface water]: 2.55e-5 kg; lognormal variance with pedigree 0.882, pedigree (1,1,5,5,1)
  (same comment as for Chromium VI)
- Strontium [air, non-urban air or from high stacks]: 1.36e-11 kg; lognormal variance with pedigree 2.822, pedigree (1,1,5,5,1)
  (same comment as for Thallium)
- Copper [air, non-urban air or from high stacks]: 3.95e-13 kg; lognormal variance with pedigree 3.272, pedigree (1,1,5,5,1)
  (same comment as for Thallium)
- Tin [air, non-urban air or from high stacks]: 5.77e-12 kg; lognormal variance with pedigree 2.912, pedigree (1,1,5,5,1)
  (same comment as for Thallium)
- Sodium [air, non-urban air or from high stacks]: 1.6e-8 kg; lognormal variance with pedigree 1.902, pedigree (1,1,5,5,1)
  (same comment as for Thallium)
- Aluminium [water, surface water]: 6.33e-9 kg; lognormal variance with pedigree 1.652, pedigree (1,1,5,5,1)
  (same comment as for Chromium VI)
- Nitrogen oxides [air, non-urban air or from high stacks]: 6.81e-9 kg; lognormal variance with pedigree 1.332, pedigree (1,1,5,5,1)
  (same comment as for Thallium)
- Iron [air, non-urban air or from high stacks]: 1.35e-10 kg; lognormal variance with pedigree 2.512, pedigree (1,1,5,5,1)
  (same comment as for Thallium)
- Selenium [air, non-urban air or from high stacks]: 5.84e-13 kg; lognormal variance with pedigree 3.242, pedigree (1,1,5,5,1)
  (same comment as for Thallium)
- Thallium [water, surface water]: 1.25e-10 kg; lognormal variance with pedigree 2.452, pedigree (1,1,5,5,1)
  (same comment as for Chromium VI)
- BOD5, Biological Oxygen Demand [water, ground-, long-term]: 0.029 kg; lognormal variance with pedigree 0.532, pedigree (1,1,5,5,1)
  (same comment as for COD, Chemical Oxygen Demand)
- Ammonia [air, urban air close to ground]: 2.36e-8 kg; lognormal variance with pedigree 0.672, pedigree (1,1,5,5,1)
  (same comment as for Chromium VI)
- Sodium, ion [water, surface water]: 6.4e-5 kg; lognormal variance with pedigree 0.852, pedigree (1,1,5,5,1)
  (same comment as for Fluoride)
- Nitrite [water, surface water]: 2.69e-7 kg; lognormal variance with pedigree 0.962, pedigree (1,1,5,5,1)
  (same comment as for Chromium VI)
- Fluoride [water, ground-, long-term]: 1.54e-5 kg; lognormal variance with pedigree 1.252, pedigree (1,1,5,5,1)
  (same comment as for COD, Chemical Oxygen Demand)
- Barium [air, non-urban air or from high stacks]: 5.63e-10 kg; lognormal variance with pedigree 2.342, pedigree (1,1,5,5,1)
  (same comment as for Thallium)
- Ammonium, ion [water, surface water]: 1.28e-5 kg; lognormal variance with pedigree 0.702, pedigree (1,1,5,5,1)
  (same comment as for Chromium VI)
- Hydrogen sulfide [water, ground-, long-term]: 7.67e-5 kg; lognormal variance with pedigree 0.692, pedigree (1,1,5,5,1)
  (same comment as for COD, Chemical Oxygen Demand)
- Manganese [air, urban air close to ground]: 2.59e-15 kg; lognormal variance with pedigree 1.512, pedigree (1,1,5,5,1)
  (same comment as for Chromium VI)
- Iron, ion [water, surface water]: 2.74e-7 kg; lognormal variance with pedigree 1.432, pedigree (1,1,5,5,1)
  (same comment as for Chromium VI)
- Selenium [air, urban air close to ground]: 0 kg; pedigree (1,1,1,1,1)
  (same comment as for Chromium VI)
- COD, Chemical Oxygen Demand [water, surface water]: 8.09e-5 kg; lognormal variance with pedigree 0.882, pedigree (1,1,5,5,1)
  (same comment as for Chromium VI)
- Copper, ion [water, surface water]: 3.59e-10 kg; lognormal variance with pedigree 2.222, pedigree (1,1,5,5,1)
  (same comment as for Chromium VI)
- Barium [water, surface water]: 1.35e-7 kg; lognormal variance with pedigree 1.292, pedigree (1,1,5,5,1)
  (same comment as for Chromium VI)
- Nickel, ion [water, surface water]: 7.66e-9 kg; lognormal variance with pedigree 1.932, pedigree (1,1,5,5,1)
  (same comment as for Chromium VI)
- Cadmium [air, urban air close to ground]: 1.33e-13 kg; lognormal variance with pedigree 2.112, pedigree (1,1,5,5,1)
  (same comment as for Chromium VI)
- Arsenic, ion [water, surface water]: 3.17e-9 kg; lognormal variance with pedigree 2.102, pedigree (1,1,5,5,1)
  (same comment as for Chromium VI)
- Cadmium [air, non-urban air or from high stacks]: 3.23e-11 kg; lognormal variance with pedigree 2.722, pedigree (1,1,5,5,1)
  (same comment as for Thallium)
- Tin, ion [water, surface water]: 9.65e-9 kg; lognormal variance with pedigree 1.852, pedigree (1,1,5,5,1)
  (same comment as for Chromium VI)
- Cadmium, ion [water, surface water]: 2.46e-9 kg; lognormal variance with pedigree 2.062, pedigree (1,1,5,5,1)
  (same comment as for Chromium VI)
- Arsenic, ion [water, ground-, long-term]: 2e-6 kg; lognormal variance with pedigree 1.522, pedigree (1,1,5,5,1)
  (same comment as for COD, Chemical Oxygen Demand)
- Nitrogen oxides [air, urban air close to ground]: 2.3e-7 kg; lognormal variance with pedigree 0.662, pedigree (1,1,5,5,1)
  (same comment as for Chromium VI)
- Vanadium [air, non-urban air or from high stacks]: 8.01e-11 kg; lognormal variance with pedigree 2.582, pedigree (1,1,5,5,1)
  (same comment as for Thallium)
- Barium [air, urban air close to ground]: 2.12e-9 kg; lognormal variance with pedigree 1.302, pedigree (1,1,5,5,1)
  (same comment as for Chromium VI)
- Bromine [air, non-urban air or from high stacks]: 2.61e-8 kg; lognormal variance with pedigree 1.832, pedigree (1,1,5,5,1)
  (same comment as for Thallium)
- Copper [air, urban air close to ground]: 7.56e-15 kg; lognormal variance with pedigree 2.292, pedigree (1,1,5,5,1)
  (same comment as for Chromium VI)
- Iron, ion [water, ground-, long-term]: 0.000275 kg; lognormal variance with pedigree 2.292, pedigree (1,1,5,5,1)
  (same comment as for COD, Chemical Oxygen Demand)
- NMVOC, non-methane volatile organic compounds, unspecified origin [air, urban air close to ground]: 3.28e-9 kg; lognormal variance with pedigree 1.042, pedigree (1,1,5,5,1)
  (same comment as for Chromium VI)
- Methane, fossil [air, urban air close to ground]: 7.21e-7 kg; lognormal variance with pedigree 0.932, pedigree (1,1,5,5,1)
  (same comment as for Chromium VI)
- Sulfur dioxide [air, non-urban air or from high stacks]: 1.38e-6 kg; lognormal variance with pedigree 1.402, pedigree (1,1,5,5,1)
  (same comment as for Thallium)
- Aluminium [air, non-urban air or from high stacks]: 2.64e-11 kg; lognormal variance with pedigree 2.722, pedigree (1,1,5,5,1)
  (same comment as for Thallium)
- Antimony [air, non-urban air or from high stacks]: 1.19e-11 kg; lognormal variance with pedigree 2.842, pedigree (1,1,5,5,1)
  (same comment as for Thallium)
- Carbon monoxide, fossil [air, non-urban air or from high stacks]: 6.25e-7 kg; lognormal variance with pedigree 1.082, pedigree (1,1,5,5,1)
  (same comment as for Thallium)
- Dinitrogen monoxide [air, urban air close to ground]: 6.5e-8 kg; lognormal variance with pedigree 0.602, pedigree (1,1,5,5,1)
  (same comment as for Chromium VI)
- Strontium [water, surface water]: 2.76e-8 kg; lognormal variance with pedigree 1.732, pedigree (1,1,5,5,1)
  (same comment as for Chromium VI)
- Vanadium [air, urban air close to ground]: 1.58e-11 kg; lognormal variance with pedigree 1.552, pedigree (1,1,5,5,1)
  (same comment as for Chromium VI)
- Chromium [air, urban air close to ground]: 0 kg; pedigree (1,1,1,1,1)
  (same comment as for Chromium VI)
- Titanium [air, urban air close to ground]: 2.6e-10 kg; lognormal variance with pedigree 1.482, pedigree (1,1,5,5,1)
  (same comment as for Chromium VI)
- NMVOC, non-methane volatile organic compounds, unspecified origin [air, non-urban air or from high stacks]: 1.18e-8 kg; lognormal variance with pedigree 0.472, pedigree (1,1,5,5,1)
  (same comment as for Thallium)
- Mercury [water, ground-, long-term]: 8.95e-7 kg; lognormal variance with pedigree 1.622, pedigree (1,1,5,5,1)
  (same comment as for COD, Chemical Oxygen Demand)
- Copper, ion [water, ground-, long-term]: 2.82e-5 kg; lognormal variance with pedigree 1.172, pedigree (1,1,5,5,1)
  (same comment as for COD, Chemical Oxygen Demand)
- DOC, Dissolved Organic Carbon [water, ground-, long-term]: 0.112 kg; lognormal variance with pedigree 0.532, pedigree (1,1,5,5,1)
  (same comment as for COD, Chemical Oxygen Demand)
- DOC, Dissolved Organic Carbon [water, surface water]: 1.97e-5 kg; lognormal variance with pedigree 0.882, pedigree (1,1,5,5,1)
  (same comment as for Chromium VI)
- Vanadium, ion [water, surface water]: 1.63e-7 kg; lognormal variance with pedigree 1.502, pedigree (1,1,5,5,1)
  (same comment as for Chromium VI)
- Aluminium [water, ground-, long-term]: 0.000211 kg; lognormal variance with pedigree 0.902, pedigree (1,1,5,5,1)
  (same comment as for COD, Chemical Oxygen Demand)

## Sampling procedure
Landfill model based on observed leachate concentrations in literature. Extrapolated to 60'000 years heeding chemical characteristics. Initial waste composition from various literature sources.

## Extrapolations
This dataset has been copied from an original dataset covering the geography CH. The uncertainty has been adjusted accordingly.

## Review by Niels Jungbluth 2003-07-21
Passed. Calculation for standard deviation 95 of, i.e., infrastructure,
land occupation, transport services or other services can differ from
standard Pedigree approach used in this project and figures obtained by
this procedure.
