# nutrient supply from filter cake, from sugarcane juice filtration

Dataset: EcoSpold 2, unit process
Geography: GLO
Time period: 2016-01-01 to 2021-12-31
Technology level: current
Classification: ISIC rev.4 ecoinvent: 0161:Support activities for crop production
Scenario: Business-as-Usual
System model: Allocation, cut-off by classification
Generated by: Avraam Symeonidis
Database: ecoinvent
isCopyrightProtected: true
accessRestrictedTo: 1

## General comment
This inventory describes the supply of nutrients from ''filter cake, from sugarcane juice filtration'' for fertiliser use.
No machinery expenditures or emissions to the environment are considered related to the actual application of this substance on soil during its agricultural use. The purpose of this activity is to connect the chemical production of ''filter cake, from sugarcane juice filtration'' with its generic uses as fertilizer. The product ''filter cake, from sugarcane juice filtration'' is connected to the generic market for 'organic nitrogen fertiliser, as N' and 'organic phosphorus fertiliser, as P2O5' and 'organic potassium fertiliser, as K2O' through this supplying activity. In the agricultural context, ''filter cake, from sugarcane juice filtration'' can be used directly as a fertilizer input to crop production, eventually with other chemicals; alternatively, a generic input of 'organic nitrogen fertiliser, as N' and 'organic phosphorus fertiliser, as P2O5' and 'organic potassium fertiliser, as K2O' can be used instead, and this will represent the regional consumption mix for his type of nutrient. A way in between is allowed by using the generic input 'organic nitrogen fertiliser, as N' and 'organic phosphorus fertiliser, as P2O5' and 'organic potassium fertiliser, as K2O' and link to the activity providing it from a specific chemical.
In all cases, emissions associated to the application of the fertilizer have to be calculated in the crop production activity.

## Technology
Inventory based on composition of ''filter cake, from sugarcane juice filtration''.

## Reference product
- organic phosphorus fertiliser, as P2O5: 0 kg; name phosphate_fertiliser_output; By-product classification allocatable product; CPC 34659: Fertilizers n.e.c.
  Nutrient content as phosphorus (P2O5) on a dry matter basis is 1.94% DM as reported in literature. Reference: Prado, Renato & Caione, Gustavo & Naudi Silva Campos, Cid. (2013). Filter Cake and Vinasse as Fertilizers Contributing to Conservation Agriculture. Applied and Environmental Soil Science. 2013. 10.1155/2013/581984.
  production volume 746900 kg; = 1.1E10*0.01*phosphate_fertiliser_output
    Calculated from production volume of reference product using the relative outputs.
  property oxygen content 0.563579
    Oxygen content (on a dry matter basis) of organic phosphorus fertiliser, as P2O5 is calculated from the molecular formula of the substance (Phosphorus).
  property price 0.241 EUR2005; name phosphate_fertiliser_outpu_price_EUR2005
    Set equal to the price of the corresponding inorganic fertiliser
  property phosphorus content 0.436421
    Phosphorus content (on a dry matter basis) of organic phosphorus fertiliser, as P2O5 is calculated from the molecular formula of the substance (Phosphorus).
  property carbon content, fossil 0
    Carbon content, fossil is calculated based on the chemical formula of the substance.
  property carbon content 0
    carbon content on a dry matter basis (reserved; not for manual entry)
  property true value 0.00163639; name phosphate_fertiliser_output_true_value
    allocation property applied in "true value" allocation // value calculated from revenue
  properties: carbon content, non-fossil 0, dry mass 1 kg, wet mass 1 kg, water in wet mass 0 kg, water content 0, carbon allocation 0 kg
- organic nitrogen fertiliser, as N: 1 kg; name nitrogen_fertiliser_output; CPC 34659: Fertilizers n.e.c.; By-product classification allocatable product
  Nutrient content as Nitrogen (N) on a dry matter basis is 1.4% DM as reported in literature. Reference: Prado, Renato & Caione, Gustavo & Naudi Silva Campos, Cid. (2013). Filter Cake and Vinasse as Fertilizers Contributing to Conservation Agriculture. Applied and Environmental Soil Science. 2013. 10.1155/2013/581984.
  production volume 539000 kg; = 1.1E10* 0.01*nitrogen_fertiliser_output
    Calculated from production volume of reference product using the relative outputs.
  property nitrogen content 1
    Nitrogen content (on a dry matter basis) of organic nitrogen fertiliser, as N is calculated from the molecular formula of the substance (Nitrogen).
  property price 0.473 EUR2005; name nitrogen_fertiliser_output_price_EUR2005
    Set equal to the price of the corresponding inorganic fertiliser
  property carbon content, fossil 0
    Carbon content, fossil is calculated based on the chemical formula of the substance.
  property carbon content 0
    carbon content on a dry matter basis (reserved; not for manual entry)
  property true value 0.0023177; name nitrogen_fertiliser_output_true_value
    allocation property applied in "true value" allocation // value calculated from revenue
  properties: carbon content, non-fossil 0, water content 0, dry mass 1 kg, wet mass 1 kg, water in wet mass 0 kg, carbon allocation 0 kg

## By-products
- organic potassium fertiliser, as K2O: 0 kg; name potassium_fertiliser_output; By-product classification allocatable product; CPC 34659: Fertilizers n.e.c.
  Nutrient content as potassium (K2O) on a dry matter basis is 0.39% DM as reported in literature. Reference: Prado, Renato & Caione, Gustavo & Naudi Silva Campos, Cid. (2013). Filter Cake and Vinasse as Fertilizers Contributing to Conservation Agriculture. Applied and Environmental Soil Science. 2013. 10.1155/2013/581984.
  production volume 150150 kg; = 1.1E10*0.01*potassium_fertiliser_output
    Calculated from production volume of reference product using the relative outputs.
  property carbon content, fossil 0
    Carbon content, fossil is calculated based on the chemical formula of the substance.
  property potassium content 0.830148
    Potassium content (on a dry matter basis) of organic potassium fertiliser, as K2O is calculated from the molecular formula of the substance (Potassium).
  property oxygen content 0.169852
    Oxygen content (on a dry matter basis) of organic potassium fertiliser, as K2O is calculated from the molecular formula of the substance (Potassium).
  property price 0.188 EUR2005; name potassium_fertiliser_outpu_price_EUR2005
    Set equal to the price of the corresponding inorganic fertiliser
  property carbon content 0
    carbon content on a dry matter basis (reserved; not for manual entry)
  property true value 0.00025662; name potassium_fertiliser_output_true_value
    allocation property applied in "true value" allocation // value calculated from revenue
  properties: dry mass 1 kg, wet mass 1 kg, carbon content, non-fossil 0, water content 0, water in wet mass 0 kg, carbon allocation 0 kg

## Inputs from technosphere
- filter cake, from sugarcane juice filtration: 112.333 kg
  Application of filter cake on land for nutrient supply.
  properties: carbon content, non-fossil 0.6514, dry mass 0.35 kg, wet mass 1 kg, water content 1.85714
