# electricity, from municipal waste incineration to generic market for electricity, medium voltage

Dataset: EcoSpold 2, unit process
Geography: DE
Time period: 2012-01-01 to 2021-12-31
Technology level: current
Classification: ISIC rev.4 ecoinvent: 3510:Electric power generation, transmission and distribution
Synonyms: WTE; waste-to-energy
Scenario: Business-as-Usual
System model: Allocation, cut-off by classification
Generated by: Karin Treyer
Published in: Doka G. 2013
Database: ecoinvent
isCopyrightProtected: true
accessRestrictedTo: 1

## General comment
This dataset changes the names of the (internally used) electricity product of waste incineration and connects it with the external grid and the respective average energy markets (grid electricity).

## Time period
The Annual Production volume is valid for the year 2012.

## Reference product
- electricity, medium voltage: 1 kWh; = E_el_prod_MSWI; source Doka G. 2013; CPC 17100: Electrical energy; By-product classification allocatable product
  Net electricity from municipal waste incineration fed in to public power grid
  production volume 1.1504e10 kWh
    Literature value/statistics. Net grid-connected electricity produced from treatment of waste in 2012. Taken from the IEA electricity information 2014, table 1.3. Includes electricity production from industrial waste and municipal waste.
    IEA. 2014. Electricity Information 2014. ISBN 978-92-64-21692-1. International Energy Agency (IEA), Paris Cedex (FR).
  property price 0.1 EUR2005
    Calculated to be between the price of electricity, high voltage and electricity, low voltage.

## Inputs from technosphere
- electricity, for reuse in municipal waste incineration only: 1 kWh; name E_el_prod_MSWI; source Doka G. 2013; lognormal variance with pedigree 0.002, pedigree (1,1,3,1,1)
  electricity produced in municipal waste incineration (internal)

## Extrapolations
This dataset has been extrapolated from year 2015 to the year of the calculation (2021). The uncertainty has been adjusted accordingly.

## Review by Carl Vadenbo 2015-05-29
The update of the whole electricity sector for the ecoinvent v3.2 database consist of hundreds of datasets. All these datasets have passed through a streamlined review processes where the underlying modelling of production volumes, technology shares and efficiencies was reviewed in detail prior to the datasets being submitted to the database.
