# molybdenite mine operation

Dataset: EcoSpold 2, unit process
Geography: GLO
Time period: 1994-01-01 to 2021-12-31
Technology level: current
Classification: ISIC rev.4 ecoinvent: 0729:Mining of other non-ferrous metal ores
Synonyms: Molybdenite; Molybdänit
Tags: ConvertedDataset
Scenario: Business-as-Usual
System model: Allocation, cut-off by classification
Share of production covered: 40 %
Generated by: [System]
Published in: Althaus H.-J. 2004
Database: ecoinvent
isCopyrightProtected: true
accessRestrictedTo: 1

## General comment
This dataset represents the joint production of 1 kg of copper concentrate and 0.0213 kg of molybdenite, the latter being the main product. This dataset is based entirely on the related dataset “copper mine operation, RER 2003”. However, the attribution of the ecological burden is different, since copper concentrate now is the by-product. Beside of the different resource demanded and the consequently different output of molybdenite – relating to the higher Mo content (0.041% in crude ore) – no other differences with respect to the “copper mine operation, RER 2003” exist. This dataset is designed solely as part of the molybdenum production mix.
[This dataset was already contained in the ecoinvent database version 2. It was not individually updated during the transfer to ecoinvent version 3. Life Cycle Impact Assessment results may still have changed, as they are affected by changes in the supply chain, i.e. in other datasets. This dataset was generated following the ecoinvent quality guidelines for version 2. It may have been subject to central changes described in the ecoinvent version 3 change report (http://www.ecoinvent.org/database/ecoinvent-version-3/reports-of-changes/), and the results of the central updates were reviewed extensively. The changes added e.g. consistent water flows and other information throughout the database. The documentation of this dataset can be found in the ecoinvent reports of version 2, which are still available via the ecoinvent website. The change report linked above covers all central changes that were made during the conversion process.]

## Included activities start
Mining process starting from molybdenite ore, in ground.

## Included activities end
This activity ends with the neutralisation of the leaching solution, at plant.

The dataset includes: The grounding of the ore, the gravity concentration of the ore, a Flotation step, the disposal of overburden & tailings, and the Production infrastructure used directly for exploitation.

The dataset doesn't include: Handling of acid rock drainage; Non production infrastructure (such as buildings and land-use for the operation); Acid emissions to water due to use of sulphuric acid; and Activator and depressants (other than sodium cyanate) emissions to water

## Technology
Mining. Sulphidic copper ores are mined only 30% underground, the major part is mined in large open cut operations. The ore mined in 1900 in the U.S. had a high content of 3.4% and was mined entirely underground. Open pit mining permits the use of very large equipment. Resulting economies of scale enable the exploitation of lower grade disseminated (porphyry) ores – the ores now mainly mined. The major emissions are due to mineral born pollutants in the effluents. Open cut mining generates large quantities of dust, which contains elevated contents of metals and sulphur. Rain percolates through overburden and accounts to metal emissions to groundwater. Overburden is deposed close to the mine. No overburden is refilled.
Beneficiation. After mining, the ore is first ground. In a next step it is subjected to gravity concentration to separate the metal-bearing particles from the unwanted minerals. After this first concentration step, flotation is carried out to remove the gangue from the sulphidic minerals. For neutralisation lime is added. In the flotation several organic chemicals ( such as collectors (xanthate or aerofloat) and frothing reagent (eg. Methyl Isobutyl Carbinol)) are used as collector, frother, activator, depressor and flocculant. Sometimes cyanide is used as depressant for pyrite. Tailings usually are led to tailings heaps or ponds. As a result, copper concentrates containing around 30% Cu are produced. Molybdenite concentrate are further ground and purified. It leaves the process as co-product with a concentration of 90 – 95 % Molybdenum disulphide. The concentrated ore is fed to the metallurgy, which is assumed to be on-site. Ore handling and processing produce large amounts of dust, containing PM10 and several metals from the ore itself. Flotation produces effluents containing several organic agents used. Some of these chemicals evaporate and account for VOC emissions to air. Namely xanthates decompose hydrolytically to release carbon disulphide. Tailings effluent contains additional sulphuric acid from acid rock drainage.
Tailings are deposed as piles and in ponds. In the sulphidic tailings occurs acid rock drainage (ARD) over a long period of time.
Reserves and resources: Molybdenum and Copper are coexisting in porphyry deposits of the copper-molybdenum type, as molybdenite (MoS2) and chalcopyrite (CuFeS2). About half of the world-wide produced molybdenum is a co-product of the primary copper industry while for another substantial part copper is the co-product. Hence almost all of the molybdenum is produced in a process similar to the copper primary production. Molybdenum secondary production – mainly from spent petroleum catalysts – is not remarkable, and no secondary production is considered in this study. It's estimated that 30% of the molybdenum is re-used in the form of the molybdenum content steel alloys which are recycled to the foundries. Secondary production of copper from scrap plays an important role. The resources of primary copper are limited, a continuous depletion within 60 years is estimated.
Land-based resources of copper are estimated to be 1.6 billion tons , and resources in deep-sea nodules are estimated to be 700 million tons. A detailed overview over the global refinery production and a statistic on US use and production of copper is available in the online version of the USGS “Mineral Commodity Summary”. The world-wide mine estimated reserves by country are listed in Tab. 1.
Exploitable reserves of recoverable copper were estimated at about 100 million tons in 1935; new discoveries raised this to 212 million tons in 1960. Reserves grew again sharply to 340 million metric tons (MMT) in 1984, but since then they have declined slowly to 321 MMT in 1990 and 310 MMT in 1994. Estimates vary according to prices and assumptions. Total potential resources have increased somewhat over the same period, from 500 MMT to around 590 MMT. As a matter of interest, cumulative global production of copper between 1970 and 1996 was 216 MMT. With the actual mine production of around 13.5 MMT/a, the reserves would last 36 years and the reserve base 70 years.
Reserves of molybdenite in the market economy countries have been estimated in a survey evaluating identified ore bodies, i.e., those which have been explored as well as those which have been exploited. The results indicate the following amounts of recoverable molybdenum: United States, 4100 kt; Chile, 1770 kt; Canada, 928 kt; Mexico, 306 kt; Peru, 288 kt; other countries, 356 kt. Ore bodies producing primarily molybdenum contain 55 % of the reserves identified; only 29 % of these ore bodies were being exploited at the time of the survey (January 1985). Operations producing molybdenum as a byproduct contained the remaining 45 % of reserves and 67 % of them were producing molybdenite. The estimated total recoverable molybdenum from primary and byproduct reserves is listed in Tab. 2.
References:
Krauss et al. (1999), Sebenik et al. (1997), USGS (2003), Ayres et al. (2002).

## Parameters
- fraction, process water, to air: 0.15 dimensionless; name fraction_PW_to_air; lognormal variance with pedigree 0.092025, pedigree (4,4,3,2,4)
  Literature value. In case when no industry/process specific data are available, default evaporation fraction value is used. This value is 15% and is based on literature (Statistics Canada, 2007 & Shaffer, K.H., 2008, Consumptive water use in the Great Lakes Basin, USGS & Shiklomanov, 2003, World Water Resources at the Beginning of the 21st Century) and has been approved by an expert.

## Reference product
- copper concentrate, sulfide ore: 1 kg; source Krauss U. 1999; By-product classification allocatable product; CPC 14290: Other non-ferrous metal ores and concentrates (other than uranium or thorium ores and concentrates)
  Estimation.
  production volume 6.13382e9 kg
    52000 t Mo in Molybdenite
    Concentrate per kg Cu (3.15); Cu/Mo ratio in ore (0.36/0.041); share of Mo from this ore type (42.1%), total Mo production (186000000 kg)
  property price 0.8402 EUR2005
    Price calculated as:
    Price = (Cu content * Cu price) + (Au content * Au price) + (Ag content * Ag price) + (Te content * Te price) + (Se content * Se price) Treatment costs [TC] Refining costs [RC] Delivery costs Penalties.
    Equation source: Devlin (2015)
    Price data were taken from USGS (2020) and represent 5-year market averages (2015-2019). TC and RC data were taken from Díaz-Borrego et al. (2019) and represent 3-year market averages (2015-2017). Metal content values were taken from the literature (see Turner & Hischier 2019). Penalties and Delivery costs were assumed to be zero. Prices converted to EUR2005 (USD2019/EUR2005 exchange rate: 0.62; Official Data Foundation [2020] and Macrotrends [2020]).
    References:
    Devlin, D. (2015). Mineral product pricing study [Online]. Available from: https://www.imf.org/external/spanish/np/seminars/2015/andean/pdf/sesion5-devlin-en.pdf [Accessed 28/07/2020]
    Díaz-Borrego et al. (2019; https://doi.org/10.1155/2019/8523748)
    Turner, D. & Hischier, R. (2019). Life cycle inventories of copper production (pyrometallurgy) and anode slime processing. Empa: St Gallen, Switzerland.
    Official Data Foundation (2020). Inflation Calculator [Online]. Available from: https://www.officialdata.org/us/inflation/2005?endYear=2019&amount=1 [Accessed 28/07/2020]
    USGS (2020). Mineral Commodity Summaries 2020 [Online]. Available from: https://pubs.usgs.gov/periodicals/mcs2020/mcs2020.pdf [Accessed 28/07/2020]
    Macrotrends (2020). Euro Dollar Exchange Rate (EUR USD) - Historical Chart [Online]. Available from: https://www.macrotrends.net/2548/euro-dollar-exchange-rate-historical-chart [Accessed 28/07/2020]
  property copper content 0; name copper_conc_Cu_content
    copper content on a dry matter basis
  property silver content 0; name copper_conc_Ag_content
    silver content on a dry matter basis
  property zinc content 0; name copper_conc_Zn_content
    zinc content on a dry matter basis
  property carbon content 0
    carbon content on a dry matter basis (reserved; not for manual entry)
  property true value 0.8402
    allocation property applied in "true value" allocation // value calculated from revenue
  properties: wet mass 1 kg, dry mass 1 kg, water content 0, water in wet mass 0 kg, carbon content, non-fossil 0, carbon content, fossil 0, carbon allocation 0 kg
- molybdenite: 0 kg; source Krauss U. 1999; By-product classification allocatable product; CPC 4160: Other non-ferrous metals and articles thereof (including waste and scrap of some metals); cermets and articles […]; CAS 1317-33-5
  Molybdenite concentrate is the purified product of the flotation of molybdenite ore and consists of 90 - 95 % Molybdenum disulphide.
  Molybdenum disulphide is a black crystalline solid that occurs in two forms: hexagonal, which is found in the mineral molybdenite (CAS 1309-56-4) and rhombohedral. The solid is diamagnetic and a semiconductor. Lubricant-grade molybdenum disulphide consists of 99 % MoS2.
  Molybdenum disulphide is the raw material for molybdenum trioxide, which is the starting point of most applications of molybdenum. In addition to being the major compound for adding molybdenum to steel, it is also the starting compound for all other molybdenum products including ammonium dimolybdate, pure molybdenum trioxide, sodium molybdate, molybdenum metal, and finally ferromolybdenum.
  Estimation.
  Further references: Sebenik R. F., Burkin A. R. and Dorfler R. R. (1997) Molybdenum and Molybdenum Compounds. In: Ullmann's encyclopedia of industrial chemistry (ed. Anonymous). 5th edition on CD-ROM Edition. Wiley & Sons, London.
  production volume 1.3065e8 kg
    52000 t Mo in Molybdenite
    Total Mo production (186000000 kg) according to USGS; share of Mo from this ore type (42.1%); Mo concentrate = MoS2 per kg Mo (1.66846)
  property price 5.84156 EUR2005
    Price calculated as:
    Price = (Mo content * Mo price) + (Re content * Re price) Treatment costs [TC] Refining costs [RC] Delivery costs Penalties.
    Equation source: Devlin (2015)
    Price data were taken from USGS (2020) and represent 5-year market averages (2015-2019). TC and RC data were taken from Díaz-Borrego et al. (2019) and represent 3-year market averages (2015-2017) for copper, which was used as a proxy here. Metal content values were taken from the literature (see Turner & Hischier 2019). Penalties and Delivery costs were assumed to be zero. Prices converted to EUR2005 (USD2019/EUR2005 exchange rate: 0.62; Official Data Foundation [2020] and Macrotrends [2020]).
    References:
    Devlin, D. (2015). Mineral product pricing study [Online]. Available from: https://www.imf.org/external/spanish/np/seminars/2015/andean/pdf/sesion5-devlin-en.pdf [Accessed 28/07/2020]
    Díaz-Borrego et al. (2019; https://doi.org/10.1155/2019/8523748)
    Turner, D. & Hischier, R. (2019). Life cycle inventories of copper production (pyrometallurgy) and anode slime processing. Empa: St Gallen, Switzerland.
    Official Data Foundation (2020). Inflation Calculator [Online]. Available from: https://www.officialdata.org/us/inflation/2005?endYear=2019&amount=1 [Accessed 28/07/2020]
    USGS (2020). Mineral Commodity Summaries 2020 [Online]. Available from: https://pubs.usgs.gov/periodicals/mcs2020/mcs2020.pdf [Accessed 28/07/2020]
    Macrotrends (2020). Euro Dollar Exchange Rate (EUR USD) - Historical Chart [Online]. Available from: https://www.macrotrends.net/2548/euro-dollar-exchange-rate-historical-chart [Accessed 28/07/2020]
  property carbon content 0
    carbon content on a dry matter basis (reserved; not for manual entry)
  property true value 0.124425
    allocation property applied in "true value" allocation // value calculated from revenue
  properties: carbon content, fossil 0, wet mass 1 kg, water in wet mass 0 kg, dry mass 1 kg, water content 0, carbon content, non-fossil 0, carbon allocation 0 kg

## Inputs from technosphere
- mine infrastructure, underground, non-ferrous metal: 1.36749e-10 unit; lognormal variance with pedigree 0.446, pedigree (5,5,5,1,3)
  Modelled, based on “ISIC 0729” – pdf-document on the dedicated talk page of ecoinvent (www.ecoinvent.org/documentation).
  See part 'Exploitation of Molybdenite in ecoinvent'.
- electricity, medium voltage: 0.255206 kWh; source Krauss U. 1999; lognormal variance with pedigree 0.0412, pedigree (2,3,5,1,1)
  (same comment as for mine infrastructure, underground, non-ferrous metal)
- electricity, high voltage: 0.382374 kWh; source Krauss U. 1999; lognormal variance with pedigree 0.0412, pedigree (2,3,5,1,1)
  (same comment as for mine infrastructure, underground, non-ferrous metal)
- conveyor belt: 2.36915e-6 m; lognormal variance with pedigree 0.446, pedigree (5,5,5,1,3)
  (same comment as for mine infrastructure, underground, non-ferrous metal)
- diesel, burned in building machine: 0.00246496 MJ; source Krauss U. 1999; lognormal variance with pedigree 0.0407, pedigree (2,2,5,1,1)
  (same comment as for mine infrastructure, underground, non-ferrous metal)
  properties: heating value, net 1 MJ
- sulfidic tailings, from copper mine operation: 0 kg; source Krauss U. 1999; pedigree (1,1,1,1,1)
  (same comment as for mine infrastructure, underground, non-ferrous metal)
  production volume 0 kg
    Calculated from the production volume of molybdenite in proportion to the respective output amounts.
  properties: dry mass 0.7 kg, iron content 0.014771, carbon content, fossil 0.0087785, sodium content 0.0015148, calcium content 0.0045119, potassium content 0.0026178, oxygen content 0.88899, wet mass 1 kg, aluminium content 0.015758, magnesium content 0.0022944, water content 0.428571, silicon content 0.055278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
- blasting: 0.0312693 kg; source Krauss U. 1999; lognormal variance with pedigree 0.0407, pedigree (2,2,5,1,1)
  (same comment as for mine infrastructure, underground, non-ferrous metal)
- lime, packed: 0 kg; source Krauss U. 1999; pedigree (1,1,1,1,1)
  (same comment as for mine infrastructure, underground, non-ferrous metal)
  properties: wet mass 1 kg, water content 0.00200401, dry mass 0.998 kg, carbon content, fossil 0.117492
  note on carbon content, fossil: Table 3.1, ecoinvent v2.2 report 7, part VII, pg 3. MW CaCO3=100, MW MgCO3=84
- sodium cyanide: 0 kg; source IPPC 2002; pedigree (1,1,1,1,1)
  (same comment as for mine infrastructure, underground, non-ferrous metal)
  properties: dry mass 1 kg, heating value, net 7.43 MJ, wet mass 1 kg, carbon content, fossil 0.244898
- steel, chromium steel 18/8, hot rolled: 0.023256 kg; source Krauss U. 1999; lognormal variance with pedigree 0.05, pedigree (1,1,5,1,1)
  (same comment as for mine infrastructure, underground, non-ferrous metal)
  properties: dry mass 1 kg, wet mass 1 kg, carbon content, fossil 0.0008
  note on carbon content, fossil: Stainless steel model is the grade 304 steel (18/8 stainless, 18% chromium 8% nickel; max. 0.08% C)
- aluminium hydroxide factory: 2.63046e-10 unit; lognormal variance with pedigree 0.3601, pedigree (3,2,5,1,3)
  (same comment as for mine infrastructure, underground, non-ferrous metal)
- chemical, inorganic: 0.0240399 kg; source IPPC 2002; lognormal variance with pedigree 0.16, pedigree (1,1,5,1,1)
  (same comment as for mine infrastructure, underground, non-ferrous metal)
  properties: dry mass 1 kg, wet mass 1 kg, carbon content, fossil 0.003
  note on carbon content, fossil: This dataset is an unweighted average of 20 inorganic substances (listed in Tab 88.1, ecoinvent v2.2 report 8, part II), being part of the top100 chemicals included in this database. The C-content has also been calculated as an unweighted average of the C content of the substances composing this dataset.
- chemical, organic: 0.00706391 kg; source IPPC 2002; lognormal variance with pedigree 0.16, pedigree (1,1,5,1,1)
  (same comment as for mine infrastructure, underground, non-ferrous metal)
  properties: carbon content, fossil 0.628, dry mass 1 kg, wet mass 1 kg, heating value, net 19.03 MJ
  note on carbon content, fossil: This dataset is an unweighted average of 20 organic substances (listed in Tab 88.1, ecoinvent v2.2 report 8, part II), being part of the top100 chemicals included in this database. The C-content has also been calculated as an unweighted average of the C content of the substances composing this dataset.
- mine infrastructure, open cast, non-ferrous metal: 3.12693e-10 unit; lognormal variance with pedigree 0.446, pedigree (5,5,5,1,3)
  (same comment as for mine infrastructure, underground, non-ferrous metal)
- sulfidic tailings, from copper mine operation: -9.36618, -9.12155, -2.61065, -5.20732, -3.91423, -22.3321, -3.21176, -4.43845, -3.08245, -4.08897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 kg (11 entries); source Krauss U. 1999; lognormal variance with pedigree 0.0407, pedigree (2,2,5,1,1)
  (same comment as for mine infrastructure, underground, non-ferrous metal)
  production volume 5.95594e11 kg
- lime, packed: 0.0123243, 0.000313776, 0.0246413 kg (3 entries); source Krauss U. 1999; lognormal variance with pedigree 0.04, pedigree (1,1,5,1,1)
  (same comment as for mine infrastructure, underground, non-ferrous metal)
- sodium cyanide: 0.000362817, 0.000734658 kg (2 entries); source IPPC 2002; lognormal variance with pedigree 0.16, pedigree (1,1,5,1,1)
  (same comment as for mine infrastructure, underground, non-ferrous metal)

## Inputs from nature
- Occupation, mineral extraction site [natural resource, land]: 0.00162879 m2*year; source Martens P. N. 2002; lognormal variance with pedigree 0.0807, pedigree (2,2,5,1,1)
  (same comment as for mine infrastructure, underground, non-ferrous metal)
- Copper, in ground [natural resource, in ground]: 0.31008 kg; source Krauss U. 1999; lognormal variance with pedigree 0.0407, pedigree (2,2,5,1,1)
  0.97% Cu in sulfide; 0.36% Cu and 410 ppm Mo in ore; Modelled, based on “ISIC 0729” – pdf-document on the dedicated talk page of ecoinvent (www.ecoinvent.org/documentation).
  See part 'Exploitation of Molybdenite in ecoinvent'.
- Molybdenum, in ground [natural resource, in ground]: 0.0353631 kg; lognormal variance with pedigree 0.0407, pedigree (2,2,5,1,1)
  0.11% Mo in sulfide; 0.36% Cu and 410 ppm Mo in ore; Modelled, based on “ISIC 0729” – pdf-document on the dedicated talk page of ecoinvent (www.ecoinvent.org/documentation).
  See part 'Exploitation of Molybdenite in ecoinvent'.
- Water, river [natural resource, in water]: 0.0312693 m3; name water_river_input; source Krauss U. 1999; lognormal variance with pedigree 0.0407, pedigree (2,2,5,1,1)
  Modelled, based on “ISIC 0729” – pdf-document on the dedicated talk page of ecoinvent (www.ecoinvent.org/documentation).
  See part 'Exploitation of Molybdenite in ecoinvent'.
  Modelled, based on “ISIC 0729” – pdf-document on the dedicated talk page of ecoinvent (www.ecoinvent.org/documentation).
  See part 'Exploitation of Molybdenite in ecoinvent'.
- Transformation, to mineral extraction site [natural resource, land]: 5.44382e-5 m2; source Martens P. N. 2002; lognormal variance with pedigree 0.1607, pedigree (2,2,5,1,1)
  (same comment as for mine infrastructure, underground, non-ferrous metal)
- Transformation, from unspecified [natural resource, land]: 5.44382e-5 m2; source Martens P. N. 2002; lognormal variance with pedigree 0.1607, pedigree (2,2,5,1,1)
  (same comment as for mine infrastructure, underground, non-ferrous metal)

## Emissions to nature
- Manganese [air, non-urban air or from high stacks]: 1.36749e-5 kg; source NPI 2001; lognormal variance with pedigree 0.1001, pedigree (3,2,5,1,3)
  (same comment as for mine infrastructure, underground, non-ferrous metal)
- Cadmium [air, non-urban air or from high stacks]: 1.58524e-9 kg; source NPI 2001; lognormal variance with pedigree 0.1001, pedigree (3,2,5,1,3)
  (same comment as for mine infrastructure, underground, non-ferrous metal)
- Manganese [water, surface water]: 7.71717e-7 kg; source IPPC 2002; lognormal variance with pedigree 1.37, pedigree (1,1,5,1,1)
  (same comment as for mine infrastructure, underground, non-ferrous metal)
- Selenium [air, non-urban air or from high stacks]: 7.19456e-10 kg; source NPI 2001; lognormal variance with pedigree 0.1001, pedigree (3,2,5,1,3)
  (same comment as for mine infrastructure, underground, non-ferrous metal)
- Arsenic [air, non-urban air or from high stacks]: 2.16011e-8 kg; source NPI 2001; lognormal variance with pedigree 0.1001, pedigree (3,2,5,1,3)
  (same comment as for mine infrastructure, underground, non-ferrous metal)
- Mercury [water, surface water]: 1.17587e-9 kg; source IPPC 2002; lognormal variance with pedigree 1.37, pedigree (1,1,5,1,1)
  (same comment as for mine infrastructure, underground, non-ferrous metal)
- Arsenic, ion [water, surface water]: 9.23273e-8 kg; source IPPC 2002; lognormal variance with pedigree 1.37, pedigree (1,1,5,1,1)
  (same comment as for mine infrastructure, underground, non-ferrous metal)
- Cobalt [air, non-urban air or from high stacks]: 2.87434e-7 kg; source NPI 2001; lognormal variance with pedigree 0.1001, pedigree (3,2,5,1,3)
  (same comment as for mine infrastructure, underground, non-ferrous metal)
- Zinc, ion [water, surface water]: 2.36915e-6 kg; source IPPC 2002; lognormal variance with pedigree 1.37, pedigree (1,1,5,1,1)
  (same comment as for mine infrastructure, underground, non-ferrous metal)
- Antimony [air, non-urban air or from high stacks]: 2.87434e-9 kg; source NPI 2001; lognormal variance with pedigree 0.1001, pedigree (3,2,5,1,3)
  (same comment as for mine infrastructure, underground, non-ferrous metal)
- Zinc [air, non-urban air or from high stacks]: 2.73498e-6 kg; source NPI 2001; lognormal variance with pedigree 0.1001, pedigree (3,2,5,1,3)
  (same comment as for mine infrastructure, underground, non-ferrous metal)
- Dissolved solids [water, surface water]: 0.000162008 kg; source IPPC 2002; lognormal variance with pedigree 1.37, pedigree (1,1,5,1,1)
  (same comment as for mine infrastructure, underground, non-ferrous metal)
- Particulates, < 2.5 um [air, non-urban air or from high stacks]: 0.0073165 kg; source NPI 2001; lognormal variance with pedigree 0.3721, pedigree (3,2,5,1,5)
  (same comment as for mine infrastructure, underground, non-ferrous metal)
- Iron, ion [water, surface water]: 9.05852e-6 kg; source IPPC 2002; lognormal variance with pedigree 1.37, pedigree (1,1,5,1,1)
  (same comment as for mine infrastructure, underground, non-ferrous metal)
- Chromium [air, non-urban air or from high stacks]: 1.43717e-6 kg; source NPI 2001; lognormal variance with pedigree 0.1001, pedigree (3,2,5,1,3)
  (same comment as for mine infrastructure, underground, non-ferrous metal)
- Lead [water, surface water]: 8.71012e-8 kg; source IPPC 2002; lognormal variance with pedigree 1.37, pedigree (1,1,5,1,1)
  (same comment as for mine infrastructure, underground, non-ferrous metal)
- BOD5, Biological Oxygen Demand [water, surface water]: 0.000325758 kg; lognormal variance with pedigree 1.37, pedigree (1,1,5,1,1)
  (same comment as for mine infrastructure, underground, non-ferrous metal)
- Sulfate [water, surface water]: 0.0737747 kg; source IPPC 2002; lognormal variance with pedigree 1.37, pedigree (1,1,5,1,1)
  (same comment as for mine infrastructure, underground, non-ferrous metal)
- Copper [air, non-urban air or from high stacks]: 7.19456e-7 kg; source NPI 2001; lognormal variance with pedigree 0.1001, pedigree (3,2,5,1,3)
  (same comment as for mine infrastructure, underground, non-ferrous metal)
- Lead [air, non-urban air or from high stacks]: 2.01204e-7 kg; source IPPC 2001; lognormal variance with pedigree 0.1001, pedigree (3,2,5,1,3)
  (same comment as for mine infrastructure, underground, non-ferrous metal)
- Nitrogen, organic bound [water, surface water]: 0.000711617 kg; source IPPC 2002; lognormal variance with pedigree 1.37, pedigree (1,1,5,1,1)
  (same comment as for mine infrastructure, underground, non-ferrous metal)
- Cobalt [water, surface water]: 2.44754e-8 kg; source IPPC 2002; lognormal variance with pedigree 1.37, pedigree (1,1,5,1,1)
  (same comment as for mine infrastructure, underground, non-ferrous metal)
- Cadmium, ion [water, surface water]: 9.92954e-9 kg; source IPPC 2002; lognormal variance with pedigree 1.37, pedigree (1,1,5,1,1)
  (same comment as for mine infrastructure, underground, non-ferrous metal)
- Water [air, unspecified]: 0.0046904 m3; name water_to_air_unspecified; = (water_river_input*fraction_PW_to_air); lognormal variance with pedigree 0.0807, pedigree (2,2,5,1,1)
  Calculated value based on literature values and expert opinion. See comments in the parametres' comment field.
  property fraction, origin: fresh water 1; name fraction_origin_fresh_water
  property fraction, origin: unspecified 0; name fraction_origin_unspecified
  property fraction, origin: salt water 0; name fraction_origin_salt_water
- Water [water, unspecified]: 0.0265789 m3; name water_to_water_unspecified; = water_river_input*(1-fraction_PW_to_air); lognormal variance with pedigree 0.0807, pedigree (2,2,5,1,1)
  (same comment as for Water)
  property fraction, origin: fresh water 1; name fraction_origin_fresh_water_Ww
  property fraction, origin: unspecified 0; name fraction_origin_unspecified_Ww
  property carbon content, non-fossil 0; name C_content_non_fossil
  property water in wet mass 1000 kg; name WWM
  property dry mass 0 kg; name DM
  property fraction, origin: salt water 0; name fraction_origin_salt_water_Ww
  property carbon content, fossil 0; name C_content_fossil
  property wet mass 1000 kg; name WM
- Calcium, ion [water, surface water]: 0.0214269 kg; source IPPC 2002; lognormal variance with pedigree 1.37, pedigree (1,1,5,1,1)
  (same comment as for mine infrastructure, underground, non-ferrous metal)
- Boron [air, non-urban air or from high stacks]: 1.43717e-7 kg; source NPI 2001; lognormal variance with pedigree 0.1001, pedigree (3,2,5,1,3)
  (same comment as for mine infrastructure, underground, non-ferrous metal)
- Nickel [air, non-urban air or from high stacks]: 1.14974e-6 kg; source NPI 2001; lognormal variance with pedigree 0.1001, pedigree (3,2,5,1,3)
  (same comment as for mine infrastructure, underground, non-ferrous metal)
- Aluminium [water, surface water]: 2.70014e-6 kg; source IPPC 2002; lognormal variance with pedigree 1.37, pedigree (1,1,5,1,1)
  (same comment as for mine infrastructure, underground, non-ferrous metal)
- DOC, Dissolved Organic Carbon [water, surface water]: 0.000127168 kg; lognormal variance with pedigree 1.37, pedigree (1,1,5,1,1)
  (same comment as for mine infrastructure, underground, non-ferrous metal)
- Beryllium [air, non-urban air or from high stacks]: 3.74535e-8 kg; source NPI 2001; lognormal variance with pedigree 0.1001, pedigree (3,2,5,1,3)
  (same comment as for mine infrastructure, underground, non-ferrous metal)
- COD, Chemical Oxygen Demand [water, surface water]: 0.000325758 kg; lognormal variance with pedigree 1.37, pedigree (1,1,5,1,1)
  (same comment as for mine infrastructure, underground, non-ferrous metal)
- Chromium, ion [water, surface water]: 1.70718e-8 kg; source IPPC 2002; lognormal variance with pedigree 1.37, pedigree (1,1,5,1,1)
  (same comment as for mine infrastructure, underground, non-ferrous metal)
- Copper, ion [water, surface water]: 2.47367e-7 kg; source IPPC 2002; lognormal variance with pedigree 1.37, pedigree (1,1,5,1,1)
  (same comment as for mine infrastructure, underground, non-ferrous metal)
- Particulates, > 10 um [air, non-urban air or from high stacks]: 0.000707262 kg; source NPI 2001; lognormal variance with pedigree 0.3721, pedigree (3,2,5,1,5)
  (same comment as for mine infrastructure, underground, non-ferrous metal)
- Particulates, > 2.5 um, and < 10um [air, non-urban air or from high stacks]: 0.0063671 kg; source NPI 2001; lognormal variance with pedigree 0.5521, pedigree (3,2,5,1,5)
  (same comment as for mine infrastructure, underground, non-ferrous metal)
- Cyanide [water, surface water]: 0.000121071 kg; source IPPC 2001; lognormal variance with pedigree 0.1682, pedigree (4,2,5,3,4)
  (same comment as for mine infrastructure, underground, non-ferrous metal)
- TOC, Total Organic Carbon [water, surface water]: 0.000127168 kg; lognormal variance with pedigree 1.37, pedigree (1,1,5,1,1)
  (same comment as for mine infrastructure, underground, non-ferrous metal)
- Fluorine [air, non-urban air or from high stacks]: 1.36749e-5 kg; source NPI 2001; lognormal variance with pedigree 0.1001, pedigree (3,2,5,1,3)
  (same comment as for mine infrastructure, underground, non-ferrous metal)
- Nickel, ion [water, surface water]: 7.61264e-7 kg; source IPPC 2002; lognormal variance with pedigree 1.37, pedigree (1,1,5,1,1)
  (same comment as for mine infrastructure, underground, non-ferrous metal)
- Carbon dioxide, fossil [air, non-urban air or from high stacks]: 0.0117587 kg; source NPI 2001; lognormal variance with pedigree 0.3326, pedigree (5,3,5,5,5)
  (same comment as for mine infrastructure, underground, non-ferrous metal)
- Carbon disulfide [air, non-urban air or from high stacks]: 0.00312693 kg; source NPI 2001; lognormal variance with pedigree 0.2501, pedigree (4,2,5,5,4)
  (same comment as for mine infrastructure, underground, non-ferrous metal)
- Mercury [air, non-urban air or from high stacks]: 7.19456e-10 kg; source IPPC 2001; lognormal variance with pedigree 0.1001, pedigree (3,2,5,1,3)
  (same comment as for mine infrastructure, underground, non-ferrous metal)

## Sampling procedure
literature

## Extrapolations
see Geography and Technology
