# treatment of waste reinforcement steel, sorting plant

Dataset: EcoSpold 2, unit process
Geography: RoW
Time period: 1994-01-01 to 2021-12-31
Technology level: current
Classification: ISIC rev.4 ecoinvent: 3830:Materials recovery
Classification: EcoSpold01Categories: waste management/building demolition
Tags: ConvertedDataset; Treatment
Scenario: Business-as-Usual
System model: Allocation, cut-off by classification
Generated by: Gabor Doka (obsolete)
Published in: Doka G. 2007
Database: ecoinvent
isCopyrightProtected: true
accessRestrictedTo: 1

## General comment
The waste contains 1kg steel (GSD=100%) Waste density is 7900 kg/m3.
[This dataset was already contained in the ecoinvent database version 2. It was not individually updated during the transfer to ecoinvent version 3. Life Cycle Impact Assessment results may still have changed, as they are affected by changes in the supply chain, i.e. in other datasets. This dataset was generated following the ecoinvent quality guidelines for version 2. It may have been subject to central changes described in the ecoinvent version 3 change report (http://www.ecoinvent.org/database/ecoinvent-version-3/reports-of-changes/), and the results of the central updates were reviewed extensively. The changes added e.g. consistent water flows and other information throughout the database. The documentation of this dataset can be found in the ecoinvent reports of version 2, which are still available via the ecoinvent website. The change report linked above covers all central changes that were made during the conversion process.]

## Included activities end
energy for dismantling, machines for handling in sorting plant, electricity demand for sorting plant, transport to dismantling facilities,

## Geography
Specific to the technology mix encountered in Switzerland in late 1990ies

## Technology
Building demolition with skid-steer loaders. Dry sorting plant for building wastes with pre-sorting of mixed waste, crushing and manual sorting.

## Reference product
- waste reinforcement steel: -1 kg; name RP; By-product classification Waste; CPC 39310: Slag, dross, scalings and other waste from the manufacture of iron or steel; CAS 7439-89-6
  EcoSpold01Location=CH
  production volume 8.09126e9 kg; name RP_PV; = 2.50E+13*0.15*0.5*0.18*0.8*0.03
    Estimated value. Word production of concrete amounts to 25 billion tonnes (WBCSD 2009). The waste generation is estimated to be 15% (taken from the estimated value for gypsum (WRAP, n.d). 50% of total waste is assumed to be concrete not reinforced and 50% concrete reinforced. It is further assumed that 80% of reinforced concrete is reinforced with steel. For the dataset “building construction, multi-storey”, reinforcement concrete is modelled with an input of 0.0927m3 of concrete (2380kg/m3) and 7.17 kg input of reinforcement steel, hence it is estimated that 3% of waste reinforced concrete is reinforcement steel. From previous version of ecoinvent, 41% of waste goes to landfill, 41% goes directly to recycling, and 18% is first sorted and then sent to disposal or recycled.
    References:
    WBCSD (2009) Recycling concrete. The Cement Sustainability Initiative. Retrieved from: <http://www.wbcsdcement.org/index.php/en/publications>, accessed 3 May 2016
    WRAP (n.d.) International practice in plasterboard recycling: Canada. Retrieved from: http://www.wrap.org.uk/sites/files/wrap/Case%20study%20-%20Plasterboard%20recycling%20in%20Canada.pdf, accessed 3 May 2016
  property price 0 EUR2005; name RP_price_EUR2005
    Waste products are assigned a price of zero as they are assumed to require further treatment.
  property carbon content 0
    carbon content on a dry matter basis (reserved; not for manual entry)
  properties: wet mass 1 kg, water in wet mass 0 kg, carbon content, non-fossil 0, carbon content, fossil 0, water content 0, dry mass 1 kg, carbon allocation 0 kg

## Inputs from technosphere
- sorting facility, for construction waste: 1e-10 unit; lognormal variance with pedigree 0.042, pedigree (1,1,5,5,1)
  EcoSpold01Location=CH
  Uncertainty heeded in exchanges, 1kg = 1kg
- electricity, low voltage: 0 kWh; pedigree (1,1,1,1,1)
  demand in sorting plant. Uncertainty from range in literature
  EcoSpold01Location=CH
- excavation, hydraulic digger: 0.000141 m3; lognormal variance with pedigree 0.052, pedigree (1,1,5,5,1)
  EcoSpold01Location=RER
  handling in sorting plant. Uncertainty from range in literature
- diesel, burned in building machine: 0.626 MJ; lognormal variance with pedigree 0.112, pedigree (1,1,5,5,1)
  EcoSpold01Location=GLO
  energy for demolition. Uncertainty from range in (DAFSTB 1996)
  properties: heating value, net 1 MJ
- electricity, low voltage: 3.86269e-5, 7.03322e-6, 0.000158767, 0.000554694, 0.000113244, 0.00173865, 0.000281283, 0.000807701 kWh (8 entries); lognormal variance with pedigree 0.052, pedigree (1,1,5,5,1)
  demand in sorting plant. Uncertainty from range in literature
  EcoSpold01Location=CH

## Sampling procedure
waste-specific calculation based on literature data

## Extrapolations
none This dataset has been copied from an original dataset covering the geography CH. The uncertainty has been adjusted accordingly.

## Review by Niels Jungbluth 2003-05-22
Passed. Calculation for standard deviation 95 of infrastructure, land occupation, transport services and other services can differ from standard Pedigree approach used in this project and figures obtained by this procedure.
