# palm fruit bunch production

Dataset: EcoSpold 2, unit process
Geography: CO
Time period: 2001-01-01 to 2021-01-01
Technology level: current
Classification: EcoSpold01Categories: agricultural production/plant production
Classification: ISIC rev.4 ecoinvent: 0126:Growing of oleaginous fruits
Scenario: Business-as-Usual
System model: Allocation, cut-off by classification
Share of production covered: 8 %
Generated by: Simon Gmünder
Database: ecoinvent
isCopyrightProtected: true
accessRestrictedTo: 1

## General comment
This dataset represents the production of palm fresh fruit bunches in Colombia. All the exchanges are calculated per kg of fresh fruit bunch (wet mass) and are based on field data from the main industrial oil palm cultivation area in Colombia. In Colombia, the average life span of oil palms is 25 years, with an average annual productivity of 18.3 tons per hectare. The inventory includes the use of mineral and organic fertilizers, pesticides, irrigation, machinery and the field emissions from the fertilizer and pesticide application. Further, also the emissions related to land use changes are considered.
This activity was adapted to include the country specific average land use change (LUC) emissions according 2nd edition of the Quantis-modified tool developed by Blonk Consultants "WFLDB-adapted-Blonk 2014 direct-land-use-change-assessment-tool_2015-05-18a.xlsx", tab. "Country known & land use unknown". The size of the emission depends on (i) the relative crop expansion in the country during the last 20 years and (ii) the corresponding, country specific land transformations. The current results are based on the average FAOSTAT data (harvested area) of 2009-2011 and 1989-1991. The weighted average is used which takes into account relative difference in crop expansion into primary forest, secondary forest, grassland, perennial and annual land.

## Included activities start
From preparing the land and planting of oil palms.

## Included activities end
This dataset ends with the harvesting of palm fresh fruit bunches and includes the land preparation (incl. land use change emissions) and the crop management (fertilizers, application of empty fruit bunches, pesticides, and machinery).

## Geography
The inventory is modeled for Colombia based on field data from the main oil palm cultivation areas in the North (9"276 ha, representing 8.7% of the total oil palm plantations in Northern Colombia), the Center (5"850 ha, representing 6.7% of the total oil palm plantations in Central Colombia) and the East (12"445.40 ha, representing 10.3 % of the total oil palm plantations in East Colombia). Overall, the dataset represents 27"571 ha of oil palm cultivation in Colombia out of totally 336"956 ha (8%).

## Parameters
- land transformation from arable land: 0.0197018 m2/kg; name T_f_a; = T_t*Sh_a
  Calculated value. The amount of land transformed from arable land [m2 / kg crop].
- Annualization time: 20 year; name t
  Estimated value: The applied time period is 20 years. This is in line with PAS 2050 (BSI 2008) and recommended as a reasonable time period for the consideration of emissions from land use changes (Brandâo & i Canals 2012).
  Brandão, M. and L. i Canals (2012). "Global characterisation factors to assess land use impacts on biotic production." The International Journal of Life Cycle Assessment: 1-10.
- total nitrogen: 106.97 kg/ha; name Ntot; = (urea*0.4664616327339393+ammonium_nitrate*0.349978511603734+nitrogen_fertiliser+EFB*0.0045752)*yield_agriculture*1000
  Calculated value: Total nitrogen in mineral and organic fertilizers (kg N/ha). The total nitrogen applied has been calculated based on the molecular composition of the applied fertilizers.
  Nitrogen content of empty fruit bunches (wet mass) from Schuchardt et al. (2002).
  2002, Schuchardt F., Daronko D., Guritno P., Composting of empty oil palm fruit bunch (EFB) with simultaneous evaporation of oil mill waste water (POME), International Oil Palm Conference, Bali, 0 - Undefined
- lifespan of plantation: 25 year; name lifespan; lognormal variance with pedigree 0.0481, pedigree (4,2,1,1,1)
  Estimation: Experts from Cenipalma estimated a typical lifespan of 25 years for Colombian oil palm plantations.
- Factor for land use (management) practice: 1 dimensionless; name Fmg
  Literature Value: Taken from (IPCC 2006), page 5.17, table 5.5, perennial/tree crop,, tropical moist/wet.
  IPCC (2006). IPCC Guidelines for National Greenhouse Gas Inventories. Hayama, Japan, Institute for Global Environmental Strategies.
- gain/loss of soil organic carbon associated with crop cultivation: forest: 0 dimensionless; name Delta_SOC_f; = (SOCref_f-(SOCref_f*Fmg*Fi*Ft))/UnitConversion(1, 'ha', 'm2')*T_f_pf*0
  Assumption: No soil carbon stock change has been assumed from land transformed from natural ecosystems to oil palm plantations.
- carbon dioxide from/to peat soil: 0 dimensionless; name CO2_soil_peat; = C_soil_peat*C_2_CO2*T_f_peat
  Calculated value.
- cadmium content: 5.3e-8 dimensionless; name Palm_fruit_bunch_Cd_content; = (0.1)*(10^-6)*DM; lognormal variance with pedigree 0.262, pedigree (5,5,3,5,5)
  Literature Value: Heavy-metal content of plant material (approximation: generic mean) from the report "01_crop production_direct field emissions and natural resources_v1.0.pdf", Tab. A.1 - pdf-document on the dedicated talk page of ecoinvent (www.ecoinvent.org/documentation)
  Uncertainty: S
- carbon dioxide from/to mineral soil: -0.000372042 dimensionless; name CO2_soil_mineral; = C_soil_mineral*C_2_CO2
  Calculated value: Transformation of the gain/loss in SOC to CO2 using the mol ratio 44/12.
- chromium content: 2.915e-7 dimensionless; name Palm_fruit_bunch_Cr_content; = 0.55*(10^-6)*DM; lognormal variance with pedigree 0.262, pedigree (5,5,3,5,5)
  (same comment as for cadmium content)
- land transformation from grassland: 0.119808 m2/kg; name T_f_g; = T_t*Sh_g
  Calculated value. The amount of land transformed from grassland [m2 / kg crop].
- lead content: 2.862e-7 dimensionless; name Palm_fruit_bunch_Pb_content; = 0.54*(10^-6)*DM; lognormal variance with pedigree 0.262, pedigree (5,5,3,5,5)
  (same comment as for cadmium content)
- carbon from/to peat soil: 0 dimensionless; name C_soil_peat
- above ground biomass growth: 93182 kg/ha; name G_AGB
  Literature value: Taken from EU-Commission (2010), Table 12, page 20, oil palm.
  EU-Commission (2010).Commission Decision of [date] on guidelines for the calculation of land carbon stocks for the purpose of Annex V of Directive 2009/28/EC. Brussel, EC.
- land transformation from shrubland: 0.146432 m2/kg; name T_f_sh; = T_t*Sh_sh
  Calculated value. The amount of land transformed from shrubland [m2 / kg crop].
- Factor for input practice: 1 dimensionless; name Fi
  Literature Value: Taken from (IPCC 2006), page 5.17, table 5.5, Medium input practice.
  IPCC (2006). IPCC Guidelines for National Greenhouse Gas Inventories. Hayama, Japan, Institute for Global Environmental Strategies.
- reference soil organic carbon: native shrubland: 57400 kg/ha; name SOCref_sh
  Literature value: Taken from (Brandão & i Canals 2012), table 3, native ecosystem, tropical moist.
  Brandão, M. and L. i Canals (2012). "Global characterisation factors to assess land use impacts on biotic production." The International Journal of Life Cycle Assessment: 1-10.
- Share on primary forest: 0.002 dimensionless; name Sh_pf
  Calculated value: According to FAO, the Colombian oil palm cultivation area expanded from 1990 to 2009 by 54.2% (FAOstat). According to Fedepalma, the expansion of oil palm plantation since 1990 caused a conversion of shrubland (50.7%), grassland (41.5%), arable land (6.8%), peatland (0.6%) and primary forest (0.4%). Thus, the average transformation impact can be calculated as: 27.5 % on shurbland, 22.5 % on grassland, 3.7% on arable land, 0.3% on primary forest, 0.2% on peat land and 45.8% were already palm oil plantations.
- gain/loss of soil organic carbon associated with crop cultivation: grassland: 0 dimensionless; name Delta_SOC_g; = (SOCref_f-(SOCref_g*Fmg*Fi*Ft))/UnitConversion(1, 'ha', 'm2')*T_f_g*0
  (same comment as for gain/loss of soil organic carbon associated with crop cultivation: for)
- empty fruit bunch: 0.213 kg; name EFB; lognormal variance with pedigree 0, pedigree (1,1,1,1,1)
  Calculated value: In Colombia, the empty palm fruit bunch is applied directly on the field. According to the mass balances of the palm oil mills, 21.3% of the input mass (fresh fruit bunches) leaves the oil mill factory as empty fruit bunches (data from Colombian Oil industry).
  The emissions from field application of empty palm fruit bunches are considered.
- precipitation, annual: 1800 mm/year; name precipitation; lognormal variance with pedigree 0.3006, pedigree (2,1,1,1,1)
  Estimation: Total annual precipitation (mm). The annual rainfall differs among the main oil palm cultivation areas in Colombia and is assumed to be 1800mm per year (estimation approved by Cenipalma).
  Uncertainty: S
- nickel content: 5.512e-7 dimensionless; name Palm_fruit_bunch_Ni_content; = 1.04*(10^-6)*DM; lognormal variance with pedigree 0.262, pedigree (5,5,3,5,5)
  (same comment as for cadmium content)
- rooting depth: 1 m; name L; lognormal variance with pedigree 0.0487, pedigree (1,5,1,3,2)
  Literature value: Plant rooting depth. Derived from Table 2.15 "Crops and their rooting depth as assumed for calculations" from the ecoinvent report "01_crop production_direct field emissions and natural resources_v1.0.pdf" - pdf-document on the dedicated talk page of ecoinvent (www.ecoinvent.org/documentation).
  Uncertainty: S
- Share on grassland: 0.225 dimensionless; name Sh_g
  (same comment as for Share on primary forest)
- land transformation from plantation: 0.243876 dimensionless; name T_f_pl; = T_t*Sh_pl
  Calculated value. The amount of land transformed from plantations [m2 / kg crop].
- land transformation to: 0.532481 m2/kg; name T_t; = UnitConversion(1, 'ha', 'm2')/(yield_agriculture*1000)
  Calculated value: m2 per hectare divided by yield.
- land transformation from peat land: 0.00159744 m2/kg; name T_f_peat; = T_t*Sh_peat
  Calculated value. The amount of land transformed from peat land [m2 / kg crop].
- fraction, irrigation water to surface water: 0.2 dimensionless; name fraction_IW_to_surface_water; lognormal variance with pedigree 0.0886, pedigree (4,3,1,1,4)
  Literature value (Döll, 2011) cross referenced with expert opinion.
- Share on agriculture: 0.037 dimensionless; name Sh_a
  (same comment as for Share on primary forest)
- LUC_crop_specific: 1 dimensionless
  This parameter allows to switch between a "crop specific" and a "country specific" approach when calculating the LUC of a crop. By default, the chosen approach is "crop specific", so the value of the parameter is 1. If you want to apply a "country specific" approach, turn the parameter to 0.
- Share on peat land: 0.003 dimensionless; name Sh_peat
  (same comment as for Share on primary forest)
- reference soil organic carbon: native grassland: 57400 kg/ha; name SOCref_g
  (same comment as for reference soil organic carbon: native shrubland)
- zinc_content: 4.85e-6 dimensionless; name Palm_fruit_bunch_Zn_content; = 4.85*10^-6; lognormal variance with pedigree 0.1426, pedigree (5,5,3,5,2)
  Literature Value: The Oil Palm. 4th Edition. Edited by R. H. V. Corley and P. B. Tinker. Oxford: Blackwell Publishing (2003), pp. 284, POUND;115.00. ISBN 0-632-05212-0. DOI: 10.1017/S001447970422244X
  Uncertainty: S
- copper content: 4.69e-6 dimensionless; name Palm_fruit_bunch_Cu_content; = 4.69*10^-6; lognormal variance with pedigree 0.1426, pedigree (5,5,3,5,2)
  (same comment as for zinc_content)
- carbon from/to mineral soil: -0.00136415 dimensionless; name C_soil_mineral; = (Delta_SOC_f+ Delta_SOC_a+ Delta_SOC_g+ Delta_SOC_sh)/t
  Calculated value: Annualization of carbon stock change of mineral soils [kg C per kg crop].
- gain/loss of soil organic carbon associated with crop cultivation: arable land: -0.0272831 dimensionless; name Delta_SOC_a; = (SOCref_f-(SOCref_a*Fmg*Fi*Ft))/UnitConversion(1, 'ha', 'm2')*T_f_a
  Calculated value: The loss of SOC [kg C / kg crop] resulting from the cultivation on former arable land over a time period of 20 years according to IPCC Tier1 method.
- reference soil organic carbon: native forest: 57400 kg/ha; name SOCref_f
  (same comment as for reference soil organic carbon: native shrubland)
- stoechiometric relation_carbon to carbon dioxide: 0.272727 dimensionless; name C_2_CO2; = 12/44
  Calculated value: Based on the mol ration of C to CO2, i.e. 12/44.
- Share on shrublands: 0.275 dimensionless; name Sh_sh
  (same comment as for Share on primary forest)
- carbon accumulated in growth of AGB and BGB: 0.0865811 dimensionless; name Cacc; = (G_AGB+G_BGB)*0.47/UnitConversion(1, 'ha', 'm2')/t*(T_t-T_f_pl); lognormal variance with pedigree 0.0131202, pedigree (1,1,1,1,1)
  Calculated value: Average biomass carbon stock [kg C/kg crop] of oil palm plantations calculated from the biomass stock (AGB/BGB), the carbon fraction (0.47) and the yield of the newly establish palm oil plantations.
- Factor for tillage practice: 1.22 dimensionless; name Ft
  Literature Value: Taken from (IPCC 2006), page 5.17, table 5.5, No-tillage.
  IPCC (2006). IPCC Guidelines for National Greenhouse Gas Inventories. Hayama, Japan, Institute for Global Environmental Strategies.
- fraction, irrigation water, to ground water: 0.8 dimensionless; name fraction_IW_to_ground_water; lognormal variance with pedigree 0.0886, pedigree (4,3,1,1,4)
  Literature value (Döll, 2011) cross referenced with expert opinion.
- fraction, irrigation water, to air: 0.4395 dimensionless; name fraction_IW_to_air; lognormal variance with pedigree 0.0409, pedigree (2,2,2,1,1)
  Literature value (Siebert, 2010) (Vionnet, S., Quantis Water Database - Technical Report, 2012).
- carbon dioxide accumulated in growth of AGB and BGB: 0.023613 dimensionless; name CO2_acc; = Cacc*C_2_CO2; lognormal variance with pedigree 0.0904493, pedigree (1,1,1,1,1)
  Calculated Value.
- annual yield, agriculture: 18.78 metric ton/(ha*year); name yield_agriculture; lognormal variance with pedigree 0.0018, pedigree (2,3,1,1,1)
  Measured value (field data): The palm fresh fruit bunch yield in Colombia ranges from 12.6 to 27.7 ton/ha/year and is in average 18.78 ton/ha/year.
  Uncertainty: S
- below ground biomass growth: 34477 kg/ha; name G_BGB
  (same comment as for above ground biomass growth)
- Share on plantations: 0.458 dimensionless; name Sh_pl; = 1- Sh_a- Sh_g- Sh_peat- Sh_sh- Sh_pf
  (same comment as for Share on primary forest)
- potential net primary production measured in kg carbon per m2: 0.694 kg/(m2*year); name NPP0_C
  Literature value: Taken from Schmidt et al. (2011). Reflect the annual productivity per m2 by means of the potential net primary production measured in kg C per m2.
- dry mass: 0.53 kg; name DM; lognormal variance with pedigree 0.1426, pedigree (5,5,3,5,2)
  (same comment as for zinc_content)
- gain/loss of soil organic carbon associated with crop cultivation: shrubland: 0 dimensionless; name Delta_SOC_sh; = (SOCref_f-(SOCref_g*Fmg*Fi*Ft))/UnitConversion(1, 'ha', 'm2')*T_f_g*0
  (same comment as for gain/loss of soil organic carbon associated with crop cultivation: for)
- reference soil organic carbon: arable land: 58400 kg/ha; name SOCref_a
  (same comment as for reference soil organic carbon: native shrubland)
- land transformation from primary forest: 0.00106496 m2/kg; name T_f_pf; = T_t*Sh_pf
  Calculated value. The amount of land transformed from primary forest [m2 / kg crop].

## Reference product
- palm fruit bunch: 1 kg; name palm_fruit_bunch; CPC 01491: Palm nuts and kernels; By-product classification allocatable product
  Fresh fruit bunches from Colombian oil palm plantations with a moisture content of 47%.
  production volume 3.83778e9 kg
    Literature Value: Productionvolume of the Colombian oil palm agroindustry in 2009 [kg FFB/year]
  property price 0.15 EUR2005; name palm_fruit_bunch_price_EUR2005
    Bunch price: Calculated based in information: Kernel = 45% Bunch (in mass) [http://www.fao.org/docrep/005/y4355e/y4355e03.htm]. Kernel price: Calculated value based on data from United Nations Commodity Trade Statistics Database (comtrade.un.org). UN comtrade category: 120710 Palm nuts and kernels. Year 2005. Using exchange rate of 1EURO = 1.209 USD. Average of price of import into 3 main markets (EU, US and CN).
  property copper content 4.69e-6; = Palm_fruit_bunch_Cu_content
    Literature Value: The Oil Palm. 4th Edition. Edited by R. H. V. Corley and P. B. Tinker. Oxford: Blackwell Publishing (2003), pp. 284, POUND;115.00. ISBN 0-632-05212-0. DOI: 10.1017/S001447970422244X
  property heating value, net 0 MJ
    Literature Value: Carbon content on a fresh matter basis [kg C /kg FFB]
  property heating value, gross 16 MJ
    Literature Value: gross (upper) heating (calorific) value of fresh palm fruit [MJ/kg FFB]
  property nickel content 5.512e-7; = Palm_fruit_bunch_Ni_content
    Literature Value: Heavy-metal content of plant material (approximation: generic mean) from the report "01_crop production_direct field emissions and natural resources_v1.0.pdf", Tab. A.1 - pdf-document on the dedicated talk page of ecoinvent (www.ecoinvent.org/documentation)
  property water content 0.886792; = (1- DM)/ DM
  property chromium content 2.915e-7; = Palm_fruit_bunch_Cr_content
    (same comment as for palm fruit bunch)
  property carbon content, non-fossil 0.313
    Literature Value: Carbon content on a fresh matter basis [kg C /kg FFB]
  property cadmium content 5.3e-8; = Palm_fruit_bunch_Cd_content
    (same comment as for palm fruit bunch)
  property zinc content 4.85e-6; = Palm_fruit_bunch_Zn_content
    (same comment as for palm fruit bunch)
  property dry mass 0.53 kg; = DM
  property lead content 2.862e-7; = Palm_fruit_bunch_Pb_content
    (same comment as for palm fruit bunch)
  property carbon content 0.313
    carbon content on a dry matter basis (reserved; not for manual entry)
  properties: nitrogen content 0.006, wet mass 1 kg, carbon allocation 0.16589 kg

## Inputs from technosphere
- potassium sulfate: 0.00888731 kg; name potassium_suflate; = (180.44*0.5 / yield_agriculture/1000)*1.84996390504905; lognormal variance with pedigree 0.0098, pedigree (2,3,4,1,1)
  The exchange has been updated from "potassium sulfate, as K2O" into "potassium sulfate" and therefore its amount has been scaled (multiplied) from 0.0048 kg by 1.85 kg of "potassium sulfate" per kg of "potassium sulfate, as K2O". Original comment of the exchange is: Measured value (field data): Per hectare 180.44 kg of potassium chloride (K2O-content of 50%) is applied every year.
  Uncertainty: S
  property nickel content 1.6e-6; name potassium_suflate_Ni_content
  property chromium content 4e-6; name potassium_suflate_Cr_content
  property copper content 4e-6; name potassium_suflate_Cu_content
  property lead content 6.6e-6; name potassium_suflate_Pb_content
  property zinc content 6.4e-5; name potassium_suflate_Zn_content
  property cadmium content 1e-7; name potassium_suflate_Cd_content
  properties: wet mass 1 kg, dry mass 1 kg
  note on nickel content: Heavy-metal content of mineral fertilizer from the report "01_crop production_direct field emissions and natural resources_v1.0.pdf", Tab. A.2 - pdf-document on the dedicated talk page of ecoinvent
- cyclic N-compound: 3.19489e-7 kg; name cyclic_n; = 0.006/yield_agriculture/1000; lognormal variance with pedigree 0.0098, pedigree (2,3,4,1,1)
  Measured value (field data): Per hecatre 0.006 kg of cyclic N-compounds is applied every year.
  Uncertainty: S
  properties: wet mass 1 kg, dry mass 1 kg, carbon content, fossil 0.641962
  note on carbon content, fossil: Calculated as an unweigthed average of the C content of the cyclic N-compounds where information was avaliable in Sutter, 2010, following the classification in Tab 2.25 in Sutter 2010: Difenoconazole (C19H17Cl2N3O3), Fenpropidin (C19H31N), Fenpropimorph (C20H33NO), Flusilazole (C16H15F2N3Si), Metconazole (C17H22ClN3O), Penconazole (C13H15Cl2N3), Propiconazole (C15H17Cl2N3O2), Tebuconazole (C16H22ClN3O)
- phthalimide-compound: 2.66241e-7 kg; name phthalimide; = 0.005/yield_agriculture/1000; lognormal variance with pedigree 0.0098, pedigree (2,3,4,1,1)
  Measured value (field data): Per hecatre 0.005 kg of phtalamide-compounds is applied every year.
  Uncertainty: S
  properties: wet mass 1 kg, carbon content, fossil 0.361204, dry mass 1 kg
  note on carbon content, fossil: C content of Captan (C9H8Cl3NO2S) was assumed to be C content of phtalamide-compounds. Tab 10.3, ecoinvent v2.2 report 15a for classification
- urea: 0.00476008 kg; = (90.65*0.46/ yield_agriculture/1000)*2.14379903903132; lognormal variance with pedigree 0.0098, pedigree (2,3,4,1,1)
  The exchange has been updated from "urea, as N" into "urea" and therefore its amount has been scaled (multiplied) from 0.0022 kg by 2.1438 kg of "urea" per kg of "urea, as N". Original comment of the exchange is: Measured value (field data): Per hectare 90.65 kg of Urea (N-content of 46%) is applied every year.
  Uncertainty: S
  property chromium content 4.35e-6; name Cr_content_urea
  property lead content 2.39e-6; name Pb_content_urea
  property nickel content 4.35e-6; name Ni_content_urea
  property cadmium content 1.1e-7; name Cd_content_urea
  property copper content 1.3e-5; name Cu_content_urea
  property zinc content 9.57e-5; name Zn_content_urea
  properties: wet mass 1 kg, carbon content, fossil 0.2, dry mass 1 kg
- irrigation: 0.00603834 m3; = 113.4/yield_agriculture/1000; lognormal variance with pedigree 0.0098, pedigree (2,3,4,1,1)
  Proxy: Per hecatre 113.4 m3 water is apllied every year.
  Uncertainty: S
  properties: dry mass 0.11 kg, water content 9089.91, wet mass 1000 kg
- [thio]carbamate-compound: 1.59744e-8 kg; name thiocarbamate; = 0.0003/yield_agriculture/1000; lognormal variance with pedigree 0.0098, pedigree (2,3,4,1,1)
  Measured value (field data): Per hecatre 0.0003 kg of [thio]carbamate-compounds is applied every year.
  Uncertainty: S
  properties: dry mass 1 kg, wet mass 1 kg, carbon content, fossil 0.626349
  note on carbon content, fossil: Approximated as an unweighted average of the C-content of the [thio]carbamate-compounds (Tab 2.25 Sutter, 2010) carbofuran,orbencarb, prosulfocarb
- packaging, for pesticides: 0.00115179 kg; lognormal variance with pedigree 0.0592, pedigree (4,3,4,5,4)
  Total amount of active substance/s of pesticides needed for the production of palm fruit bunch is calculated to be circa 5.76E-04 kg. Pesticide/s used in this dataset is/are: "[sulfonyl]urea-compound", "[thio]carbamate-compound", "acetamide-anillide-compound, unspecified", "benzimidazole-compound", "bipyridylium-compound", "boric oxide", "cyclic N-compound", "dithiocarbamate-compound", "ethoxylated alcohol (AE11)", "glyphosate", "organophosphorus-compound, unspecified", "pesticide, unspecified", "phthalimide-compound", "pyrethroid-compound", "triazine-compound, unspecified". The total amount of active substance/s is doubled in order to account for the packaging of the dilluted product of pesticide/s that is/are applied. Therefore, 1.15E-03 kg of packaging for pesticides is justified with this exchange.
  properties: price 0.0642 EUR2005, wet mass 1 kg, carbon content, fossil 0.85714, dry mass 1 kg, heating value, net 25.97 MJ
- boric oxide: 0.000379659 kg; name boric_oxide; = 7.13/yield_agriculture/1000; lognormal variance with pedigree 0.0098, pedigree (2,3,4,1,1)
  Measured value (field data): Per hectare 7.13 kg of boric oxide is applied every year.
  Uncertainty: S
  property cadmium content 5e-8; name boric_oxide_Cd_content
  property copper content 6.1e-7; name boric_oxide_Cu_content
  property zinc content 5.96e-6; name boric_oxide_Zn_content
  property chromium content 4.17e-6; name boric_oxide_Cr_content
  property nickel content 1.05e-6; name boric_oxide_Ni_content
  property lead content 1e-8; name boric_oxide_Pb_content
  properties: wet mass 1 kg, dry mass 1 kg
- transport, tractor and trailer, agricultural: 0.00659495 metric ton*km; = 5.4/0.0436/yield_agriculture/1000; lognormal variance with pedigree 0.1306, pedigree (2,4,4,1,1)
  Proxy: Per hectare 5.4 kg diesel is consumed by small tractors per year (based on field values). The values used for the processes are extrapolated from the diesel use of the datasets (transport, tractor and trailer: 0.0436 kg diesel per tkm).
  Uncertainty: S
- [sulfonyl]urea-compound: 7.24175e-6 kg; name sulfonyl; = 0.136/yield_agriculture/1000; lognormal variance with pedigree 0.0098, pedigree (2,3,4,1,1)
  Measured value (field data): Per hecatre 0.136 kg of [sulfonyl]urea-compounds is applied every year.
  Uncertainty: S
  properties: wet mass 1 kg, carbon content, fossil 0.540853, dry mass 1 kg
  note on carbon content, fossil: Approximated as an unweighted average of the C-content of the [sulfonyl]urea-compounds (Tab 2.25 Sutter, 2010) chlorotoluron, Diuron, Linuron and Isoproturon.
- glyphosate: 0.000109159 kg; name Glyphosate; = 2.05/(1000*yield_agriculture); lognormal variance with pedigree 0.0098, pedigree (2,3,4,1,1)
  Measured value (field data): Per hecatre 2.05 kg glyphosate is applied every year.
  Uncertainty: S
  properties: wet mass 1 kg, carbon content, fossil 0.214286, dry mass 1 kg
- inorganic nitrogen fertiliser, as N: 0.0012524 kg; name nitrogen_fertiliser; = 23.52/yield_agriculture/1000; lognormal variance with pedigree 0.0098, pedigree (2,3,4,1,1)
  Measured value (field data): Per hectare 23.52 kg of nitrogen fertilizer is applied every year.
  Uncertainty: S
  property nickel content 1.717e-5; name Ni_content_n_fertilizer
  property zinc content 0.000121; name Zn_content_n_fertilizer
  property lead content 5.37e-6; name Pb_content_n_fertilizer
  property cadmium content 2.1e-7; name Cd_content_n_fertilizer
  property chromium content 7.81e-6; name Cr_content_n_fertilizer
  property copper content 2.225e-5; name Cu_content_n_fertilizer
  properties: wet mass 1 kg, dry mass 1 kg
- pyrethroid-compound: 2.66241e-8 kg; name pyrethroid; = 0.0005/yield_agriculture/1000; lognormal variance with pedigree 0.0098, pedigree (2,3,4,1,1)
  Measured value (field data): Per hecatre 0.0005 kg of pyretroid-compounds is applied every year.
  Uncertainty: S
  properties: wet mass 1 kg, carbon content, fossil 0.623, dry mass 1 kg
  note on carbon content, fossil: C content of pyrethroid-compounds was calculated as an unweigthed average of C content of the substances: cypermethrin, alpha-cypermethrin,beta-cyfluthrin, lambdacyhalothrin. Those substances are classified as pyrethroid-compounds in Tab 2.25, Sutter 2010
- inorganic phosphorus fertiliser, as P2O5: 0.00262833 kg; name phosphate_fertilizer; = 49.36/yield_agriculture/1000; lognormal variance with pedigree 0.0098, pedigree (2,3,4,1,1)
  Measured value (field data): Per hectare 49.36 kg of P2O5 is applied every year.
  Uncertainty: S
  property zinc content 0.000751; name phosphate_fertilizer_Zn_content
  property nickel content 0.0001; name phosphate_fertilizer_Ni_content
  property copper content 0.000118; name phosphate_fertilizer_Cu_content
  property chromium content 0.000589; name phosphate_fertilizer_Cr_content
  property cadmium content 5.13e-5; name phosphate_fertilizer_Cd_content
  property lead content 4.94e-5; name phosphate_fertilizer_Pb_content
  properties: dry mass 1 kg, wet mass 1 kg
  note on zinc content: Literature value: Heavy-metal content of mineral fertilizer from the report "01_crop production_direct field emissions and natural resources_v1.0.pdf", Tab. A.2 - pdf-document on the dedicated talk page of ecoinvent.
- bipyridylium-compound: 3.72737e-6 kg; name bipyridylium; = 0.07/yield_agriculture/1000; lognormal variance with pedigree 0.0098, pedigree (2,3,4,1,1)
  Measured value (field data): Per hecatre 0.07 kg of bipyridylium-compounds is applied every year.
  Uncertainty: S
  properties: carbon content, fossil 0.418929, dry mass 1 kg, wet mass 1 kg
  note on carbon content, fossil: C content was calculated after C content of Diquat (C12H12Br2N2). The herbicide Diquat is classified as a bipyridylium-compound in Tab 10.3 in ecoinvent v2.2 report 15a
- land use change, perennial crop: 2.49e-5 ha; = (2.490E-5*LUC_crop_specific+0.0000*(1-LUC_crop_specific))
  Calculated value. Land use change (LUC) combines land transformation areas calculated with the adapted "Direct Land Use Change Assessment Tool" version 2014 developed by Blonk Consultants and the carbon losses from soil organic carbon (SOC) and vegetation (VEG) as calculated in ecoinvent v3. See "WFLDB-Guidelines.pdf", available at https://ecoquery.ecoinvent.org/File/Reports.
- benzimidazole-compound: 5.83067e-6 kg; name benzimidazole; = 0.1095/yield_agriculture/1000; lognormal variance with pedigree 0.0098, pedigree (2,3,4,1,1)
  Measured value (field data): Per hecatre 0.1095 kg of benzimidazole-compounds is applied every year.
  Uncertainty: S
  properties: carbon content, fossil 0.529668, dry mass 1 kg, wet mass 1 kg
  note on carbon content, fossil: C content estimated as an average of that of the pesticides Carbendazim, prochloraz and ethofumesate (Sutter 2010)
- ethoxylated alcohol (AE11): 1.00639e-5 kg; name ethoxylated_alcohol; = 0.189/yield_agriculture/1000; lognormal variance with pedigree 0.0098, pedigree (2,3,4,1,1)
  Measured value (field data): Per hecatre 0.189 kg of Ethoxylated alcohols is applied every year.
  Uncertainty: S
  properties: carbon content, non-fossil 0.240572, dry mass 1 kg, wet mass 1 kg, carbon content, fossil 0.378041, heating value, net 18.74 MJ
- transport, freight, lorry 16-32 metric ton, EURO3: 0.00682183 metric ton*km; = 3.6/0.0281/yield_agriculture/1000; lognormal variance with pedigree 0.1306, pedigree (2,4,4,1,1)
  Proxy: Per hectare 3.6 kg diesel is consumed by small tractors per year (based on field values). The values used for the processes are extrapolated from the diesel use of the datasets (transport, lorry >16t, fleet average: 0.0281 kg diesel per tkm).
  Uncertainty: S
- organophosphorus-compound, unspecified: 2.83813e-5 kg; name organophosphorus; = 0.533/yield_agriculture/1000; lognormal variance with pedigree 0.0098, pedigree (2,3,4,1,1)
  Measured value (field data): Per hecatre 0.533 kg of organophosphorus-compounds is applied every year.
  Uncertainty: S
  properties: carbon content, fossil 0.260898, dry mass 1 kg, wet mass 1 kg
  note on carbon content, fossil: C content was calculated as an unweighted average of glyphosate, parathion, and fosetyl-Al. Those substances are classified as organo-phosphorous compounds in Tab 2.25, Sutter 2010
- transport, passenger car, large size, petrol, EURO 3: 0.00143118 km; = 1.02/0.03795/yield_agriculture/1000; lognormal variance with pedigree 0.128, pedigree (1,1,4,1,1)
  Proxy: Per hectare 1.2 kg diesel is consumed by small tractors per year (based on field values). The values used for the processes are extrapolated from the diesel use of the datasets (transport, passenger car, petrol, EURO3: 0.03795 kg diesel per tkm).
- potassium chloride: 0.00876156 kg; name potassium_chloride; = (173.25*0.6 / yield_agriculture/1000)*1.58289736294535; lognormal variance with pedigree 0.0098, pedigree (2,3,4,1,1)
  The exchange has been updated from "potassium chloride, as K2O" into "potassium chloride" and therefore its amount has been scaled (multiplied) from 0.0055 kg by 1.5829 kg of "potassium chloride" per kg of "potassium chloride, as K2O". Original comment of the exchange is: Measured value (field data): Per hectare 173.25 kg of potassium chloride (K2O-content of 60%) is applied every year.
  Uncertainty: S
  property zinc content 7.67e-5; name Zn_content_potassium_chloride
  property cadmium content 1e-7; name Cd_content_potassium_chloride
  property chromium content 3.33e-6; name Cr_content_potassium_chloride
  property copper content 8.33e-6; name Cu_content_potassium_chloride
  property nickel content 3.5e-6; name Ni_content_potassium_chloride
  property lead content 9.17e-6; name Pb_content_potassium_chloride
  properties: wet mass 1 kg, dry mass 1 kg
- dolomite: 0.00128009 kg; = 24.04/yield_agriculture/1000; lognormal variance with pedigree 0.0098, pedigree (2,3,4,1,1)
  Measured value (field data): Per hectare 24.04 kg of dolomite is applied every year.
  Uncertainty: S
  property nickel content 1.55e-5; name dolomite_Ni_content
  property lead content 7.17e-6; name dolomite_Pb_content
  property chromium content 0.000589; name dolomite_Cr_content
  property zinc content 4.52e-5; name dolomite_Zn_content
  property copper content 2.12e-5; name dolomite_Cu_content
  property cadmium content 2.11e-6; name dolomite_Cd_content
  properties: dry mass 1 kg, heating value, net 3.95 MJ, wet mass 1 kg, carbon content, fossil 0.130435
  note on nickel content: Literature value: Heavy-metal content of dolomite [kg/kg wet weight] from Chen et al. (2006).
  note on chromium content: Literature Value: Heavy-metal content of mineral fertilizer(approximation:average phosphate fertilizer) from the report "01_crop production_direct field emissions and natural resources_v1.0.pdf", Tab. A.1 - pdf-document on the dedicated talk page of ecoinvent (www.ecoinvent.org/documentation)
- dithiocarbamate-compound: 8.99894e-6 kg; name dithiocarbamate; = 0.169/yield_agriculture/1000; lognormal variance with pedigree 0.0098, pedigree (2,3,4,1,1)
  Measured value (field data): Per hecatre 0.169 kg of dithiocarbamate-compounds is applied every year.
  Uncertainty: S
  properties: wet mass 1 kg, carbon content, fossil 0.179339, dry mass 1 kg
  note on carbon content, fossil: Approximated as an unweighted average of the C-content of the dithiocarbamate-compounds (Tab 2.25 Sutter, 2010) Maneb and Mancozeb
- acetamide-anillide-compound, unspecified: 3.40788e-6 kg; name acetamide; = 0.064/yield_agriculture/1000; lognormal variance with pedigree 0.0098, pedigree (2,3,4,1,1)
  Measured value (field data): Per hecatre 0.064 kg of acetamide-anillide-compounds is applied every year.
  Uncertainty: S
  properties: wet mass 1 kg, carbon content, fossil 0.659175, dry mass 1 kg
  note on carbon content, fossil: Approximated as an unweighted average of the C-content of the acetamide-anillide-compound (Tab 2.25 Sutter, 2010) alachor, metolachlor, propachlor and teflubenzuron
- magnesium oxide: 0.000856763 kg; name magnesium_oxide; = 16.09/yield_agriculture/1000; lognormal variance with pedigree 0.0098, pedigree (2,3,4,1,1)
  Measured value (field data): Per hectare 16.09 kg of magnesium oxide is applied every year.
  Uncertainty: S
  property copper content 6.1e-7; name magnesium_oxide_Cu_content
  property lead content 1e-8; name magnesium_oxide_Pb_content
  property chromium content 4.17e-6; name magnesium_oxide_Cr_content
  property cadmium content 5e-8; name magnesium_oxide_Cd_content
  property nickel content 1.05e-6; name magnesium_oxide_Ni_content
  property zinc content 5.96e-6; name magnesium_oxide_Zn_content
  properties: wet mass 1 kg, dry mass 1 kg
  note on copper content: Estimation: The heavy-metal content of magnesium oxide fertilizers is approximated from the heavy-metal content of Kieserit based on the report "Schwermetalle in Düngemittel" from Dittrich et al. (2008).
- pesticide, unspecified: 1.84239e-5 kg; name pesticides_unspecified; = 0.346/yield_agriculture/1000; lognormal variance with pedigree 0.0098, pedigree (2,3,4,1,1)
  Measured value (field data): Per hecatre 0.346 kg of unspecified pesticides are applied every year.
  Uncertainty: S
  properties: dry mass 1 kg, carbon content, fossil 0.486978, wet mass 1 kg
  note on carbon content, fossil: Mean of C content in all pesticides whose formula has been documented in Sutter 2010
- packaging, for fertilisers: 0.0396517 kg; lognormal variance with pedigree 0.0592, pedigree (4,3,4,5,4)
  Total amount of active substance/s of fertilisers needed for the production of "palm fruit bunch" is calculated to be circa 1.98E-02 kg. Fertiliser/s used in this dataset is/are: "ammonium nitrate, as N", "dolomite", "magnesium oxide", "nitrogen fertiliser, as N", "phosphate fertiliser, as P2O5", "potassium chloride, as K2O", "potassium sulfate, as K2O", "urea, as N". The total amount of active substance/s is doubled in order to account for the packaging of the dilluted product of fertiliser/s that is/are applied. Therefore, 3.97E-02 kg of packaging for fertilisers is justified with this exchange.
  properties: heating value, net 25.01 MJ, wet mass 1 kg, dry mass 1 kg, carbon content, fossil 0.825301, price 0.0642 EUR2005
  note on carbon content, fossil: Considering a chemical formula (C2H4)n for polyethylene, carbon content-fossil is calculated to be 0.856286 kg of Carbon per kg of dry mass.
- ammonium nitrate: 0.00356784 kg; name ammonium_nitrate; = (67*0.35/ yield_agriculture/1000 )*2.85731828339295; lognormal variance with pedigree 0.0098, pedigree (2,3,4,1,1)
  The exchange has been updated from "ammonium nitrate, as N" into "ammonium nitrate" and therefore its amount has been scaled (multiplied) from 0.0012 kg by 2.8573 kg of "ammonium nitrate" per kg of "ammonium nitrate, as N". Original comment of the exchange is: Measured value (field data): Per hectare 67 kg of Urea (N-content of 35%) is applied every year.
  Uncertainty: S
  property lead content 6.91e-6; name ammonium_nitrate_Pb_content
  property chromium content 1.46e-5; name ammonium_nitrate_Cr_content
  property zinc content 0.000182; name ammonium_nitrate_Zn_content
  property nickel content 4.73e-5; name ammonium_nitrate_Ni_content
  property cadmium content 1.8e-7; name ammonium_nitrate_Cd_content
  property copper content 2.55e-5; name ammonium_nitrate_Cu_content
  properties: wet mass 1 kg, dry mass 1 kg
- triazine-compound, unspecified: 3.72737e-7 kg; name triazine; = 0.007/(1000*yield_agriculture); lognormal variance with pedigree 0.0098, pedigree (2,3,4,1,1)
  Measured value (field data): Per hecatre 0.007 kg of triazine-compounds is applied every year.
  Uncertainty: S
  properties: carbon content, fossil 0.475616, wet mass 1 kg, dry mass 1 kg
  note on carbon content, fossil: An unweighted average of the C content in Atrazine, Cyanazine, metamitron, simazine, and terbuthylazine. Those substances are classified as triazine-compounds in Tab 2.25, Sutter 2010

## Inputs from nature
- Transformation, from wetland, inland (non-use) [natural resource, land]: 7.98722e-5 m2; = T_f_peat/t; lognormal variance with pedigree 0.0161, pedigree (1,2,4,1,1)
  Calculated value: Based on the field visits of palm oil plantations in Colombia, 27.5 % of the plantations are established on shurbland, 22.5 % on grassland, 3.7% on arable land, 0.3% on peat land, 0.2% on primary forest and 45.8% were already palm oil plantations. Palm oil plantations are considered as intensively used forests (tree cover > 15%, even-aged stands and average stand age <30 years.
  Uncertainty: S
- Transformation, to forest, intensive [natural resource, land]: 0.0266241 m2; = T_t/t; lognormal variance with pedigree 0.0161, pedigree (1,2,4,1,1)
  Calculated value: Palm oil plantations are considered as intensively used forests (tree cover > 15%, even-aged stands and average stand age <30 years. The amount of transformed land is calculated by dividing of the area (1 ha) by the lifetime capacity (lifetime [years] times the average productivity [ton/ha/year]).
  Uncertainty: S
- Transformation, from arable land, unspecified use [natural resource, land]: 0.0143504 m2; = (T_f_g+T_f_pf+T_f_a+T_f_sh)/t; lognormal variance with pedigree 0.128, pedigree (1,1,4,1,1)
  Calculated value: Based on the field visits of palm oil plantations in Colombia, 27.5 % of the plantations are established on shurbland, 22.5 % on grassland, 3.7% on arable land, 0.3% on peat land, 0.2% on primary forest and 45.8% were already palm oil plantations. Palm oil plantations are considered as intensively used forests (tree cover > 15%, even-aged stands and average stand age <30 years.
- Carbon dioxide, in air [natural resource, in air]: 1.14767 kg; = 0.313*44/12; lognormal variance with pedigree 0.0286, pedigree (4,3,4,5,1)
  Calculated value: calculations according to chapter "Emissions of heavy metals to agricultural soil, surface water and ground water" in "01_crop production_direct field emissions and natural resources_v1.0.pdf" - pdf-document on the dedicated talk page of ecoinvent (www.ecoinvent.org/documentation)
  Uncertainty: c
- Energy, gross calorific value, in biomass [natural resource, biotic]: 16.006 MJ
- Transformation, from forest, intensive [natural resource, land]: 0.0121938 m2; = T_f_pl/t; lognormal variance with pedigree 0.128, pedigree (1,1,4,1,1)
  (same comment as for Transformation, from arable land, unspecified use)
- Occupation, forest, intensive [natural resource, land]: 0.532481 m2*year; = T_t; lognormal variance with pedigree 0.0101, pedigree (1,2,4,1,1)
  Calculated value: Palm oil plantations are considered as intensivly used forests (tree cover > 15%, even-aged stands and average stand agae <30 years. The amount of transformed land is calculated by deviding of the area (1 ha) by the average annual productivity [ton/ha/year].
  Uncertainty: S
  property Slope length 100 m; name slope_lentgh
  property P to surface water 0.175 kg/ha; name Prol
  property clay content 0.49; name clay_content
  property Slope Factor 0.296642; name LS
  property Organic Nitrogen content of soil 6181.82 kg/ha; name Norg; = (Corg*5000*1300)/11*0.85
  property Crop factor 0.2; name crop_factor
  property Slope 0.01; name S
  property Tillage factor 0.25; name tillage_factor
  property P to groundwater 0.07 kg/ha; name Pgwl
  property organic carbon content 0.0123077; name Corg; = 48*(1/3000)*(1/1.3)
  property Erosivity factor 11861.9 metric ton/ha; name R; = 587.8-1.219*precipitation+0.004105*(precipitation+irrigation*yield_agriculture*1000/10)^2
  property Practice factor 1; name Practice_factor
  property Erodibility factor 0.046; name erodibility_factor

## Emissions to nature
- Water [water, surface water]: 0.000676897 m3; name water_to_water_surface; = irrigation*(1-fraction_IW_to_air)*fraction_IW_to_surface_water; lognormal variance with pedigree 0.0966, pedigree (4,3,4,1,4)
  Calculated value. See the parameters and their comments to understand the calculation.
  property fraction, origin: salt water 0; name fraction_origin_salt_water_Wsw
  property fraction, origin: fresh water 1; name fraction_origin_fresh_water_Wsw
- Paraquat [soil, agricultural]: 3.72737e-6 kg; = bipyridylium; source Nemecek T. 2012; lognormal variance with pedigree 0.268, pedigree (4,5,5,5,5)
  Calculated value: calculations according to chapter "Emissions of Pesticides to Agricultural Soil" in "01_crop production_direct field emissions and natural resources_v1.0.pdf" - pdf-document on the dedicated talk page of ecoinvent (www.ecoinvent.org/documentation)
  Uncertainty: S
- Chromium [soil, agricultural]: 2.15335e-6 kg; = (ammonium_nitrate*0.349978511603734*ammonium_nitrate_Cr_content+Cr_content_n_fertilizer*nitrogen_fertiliser+Cr_content_potassium_chloride*potassium_chloride*0.6317529003518383+potassium_suflate*0.540551087116204*potassium_suflate_Cr_content+dolomite*dolomite_Cr_content+Cr_content_urea*urea*0.466461632733939+magnesium_oxide*magnesium_oxide_Cr_content+boric_oxide*boric_oxide_Cr_content+EFB*2.926E-07+phosphate_fertilizer_Cr_content*phosphate_fertilizer)-Palm_fruit_bunch_Cr_content*palm_fruit_bunch; source Nemecek T. 2012; lognormal variance with pedigree 0.268, pedigree (4,5,5,5,5)
  Calculated value: calculations according to chapter "Emissions of heavy metals to agricultural soil, surface water and ground water" in "01_crop production_direct field emissions and natural resources_v1.0.pdf" - pdf-document on the dedicated talk page of ecoinvent (www.ecoinvent.org/documentation)
  Uncertainty: S
- Azoxystrobin [soil, agricultural]: 8.72204e-7 kg; = cyclic_n+0.03* pesticides_unspecified; source Nemecek T. 2012; lognormal variance with pedigree 0.268, pedigree (4,5,5,5,5)
  (same comment as for Paraquat)
- Water [air, unspecified]: 0.00265385 m3; name water_to_air_unspecified; = irrigation*fraction_IW_to_air; lognormal variance with pedigree 0.0487, pedigree (2,2,4,1,1)
  Calculated value based on literature values and expert opinion. See comments in the parametres" comment field.
  property fraction, origin: fresh water 1; name fraction_origin_fresh_water
  property fraction, origin: salt water 0; name fraction_origin_salt_water
  property fraction, origin: unspecified 0; name fraction_origin_unspecified
- Ammonia [air, non-urban air or from high stacks]: 0.0006046 kg; name ammonia; = ammonium_nitrate*0.349978511603734*0.02+ nitrogen_fertiliser*0.02+urea*0.466461632733939*0.15+ EFB* 0.8* 1.3/1000; source Nemecek T. 2012; lognormal variance with pedigree 0.048, pedigree (1,1,4,1,1)
  Calculated value: according to the "AGRAMMON model" described in "01_crop production_direct field emissions and natural resources_v1.0.pdf" - pdf-document on the dedicated talk page of ecoinvent (www.ecoinvent.org/documentation)
- Metam-sodium [soil, agricultural]: 8.99894e-6 kg; = dithiocarbamate; source Nemecek T. 2012; lognormal variance with pedigree 0.268, pedigree (4,5,5,5,5)
  (same comment as for Paraquat)
- Metsulfuron-methyl [soil, agricultural]: 7.24175e-6 kg; = sulfonyl; source Nemecek T. 2012; lognormal variance with pedigree 0.268, pedigree (4,5,5,5,5)
  (same comment as for Paraquat)
- Diquat [soil, agricultural]: 2.66241e-7 kg; = phthalimide; source Nemecek T. 2012; lognormal variance with pedigree 0.268, pedigree (4,5,5,5,5)
  (same comment as for Paraquat)
- Nickel [soil, agricultural]: -3.20951e-8 kg; = (ammonium_nitrate*0.349978511603734*ammonium_nitrate_Ni_content+Ni_content_n_fertilizer*nitrogen_fertiliser+Ni_content_potassium_chloride*potassium_chloride*0.6317529003518383+potassium_suflate*0.540551087116204*potassium_suflate_Ni_content+dolomite*dolomite_Ni_content+Ni_content_urea*urea*0.466461632733939+magnesium_oxide*magnesium_oxide_Ni_content+boric_oxide*boric_oxide_Ni_content+EFB*5.5328E-07+phosphate_fertilizer_Ni_content*phosphate_fertilizer)-Palm_fruit_bunch_Ni_content*palm_fruit_bunch; source Nemecek T. 2012
  Calculated value: calculations according to chapter "Emissions of heavy metals to agricultural soil, surface water and ground water" in "01_crop production_direct field emissions and natural resources_v1.0.pdf" - pdf-document on the dedicated talk page of ecoinvent (www.ecoinvent.org/documentation)
- Metalaxil [soil, agricultural]: 3.40788e-6 kg; = acetamide; source Nemecek T. 2012; lognormal variance with pedigree 0.268, pedigree (4,5,5,5,5)
  (same comment as for Paraquat)
- Phosphorus [water, surface water]: 0.000172377 kg; = (R*erodibility_factor*LS* Crop_factor* tillage_factor* practice_factor)*0.2*2*1*12/12/yield_agriculture/1000; source Faist Emmenegger M. 2009; lognormal variance with pedigree 0.2166, pedigree (4,5,5,4,5)
  Calculated value: calculated according to the "Phosphorous emissions trough water erosion to surface water" approach in the SQCB background report. Fraction of phosphorus loss which effectively reaches the surface water system is 0.2. The enrichment factor is 2 and phosphorous concentration in the soil is 1 kg P / t soil.
  Uncertainty: S
- Water [water, ground-]: 0.00270759 m3; name water_to_water_ground; = irrigation*(1-fraction_IW_to_air)*fraction_IW_to_ground_water; lognormal variance with pedigree 0.0966, pedigree (4,3,4,1,4)
  Calculated value. See the parameters and their comments to understand the calculation.
  property fraction, origin: unspecified 0; name fraction_origin_unspecified_Wgw
  property fraction, origin: salt water 0; name fraction_origin_salt_water_Wgw
  property fraction, origin: fresh water 1; name fraction_origin_fresh_water_Wgw
- Carbendazim [soil, agricultural]: 5.83067e-6 kg; = benzimidazole; source Nemecek T. 2012; lognormal variance with pedigree 0.268, pedigree (4,5,5,5,5)
  (same comment as for Paraquat)
- Zinc [soil, unspecified]: -1.42641e-6 kg; = (ammonium_nitrate*0.349978511603734*ammonium_nitrate_Zn_content+Zn_content_n_fertilizer*nitrogen_fertiliser+Zn_content_potassium_chloride*potassium_chloride*0.6317529003518383+potassium_suflate*0.540551087116204*potassium_suflate_Zn_content+dolomite*dolomite_Zn_content+Zn_content_urea*urea*0.466461632733939+magnesium_oxide*magnesium_oxide_Zn_content+boric_oxide*boric_oxide_Zn_content+EFB*2.8728E-07+phosphate_fertilizer_Zn_content*phosphate_fertilizer)-Palm_fruit_bunch_Zn_content*palm_fruit_bunch; source Nemecek T. 2012
  (same comment as for Nickel)
- Dinitrogen monoxide [air, non-urban air or from high stacks]: 1.29681e-5 kg; name dinitrogen_monoxide; = 44/28*(0.01*Ntot* 0.0026+0.01*14/17*ammonia*1000* yield_agriculture+0.0075*14/62*Nitrate*1000* yield_agriculture)/(1000* yield_agriculture); source Nemecek T. 2012
  (same comment as for Nickel)
- Glyphosate [soil, agricultural]: 0.000109159 kg; = Glyphosate; source Nemecek T. 2012; lognormal variance with pedigree 0.268, pedigree (4,5,5,5,5)
  (same comment as for Paraquat)
- Carbofuran [soil, agricultural]: 1.59744e-8 kg; = thiocarbamate; source Nemecek T. 2012; lognormal variance with pedigree 0.268, pedigree (4,5,5,5,5)
  (same comment as for Paraquat)
- Thiram [soil, agricultural]: 1.64281e-5 kg; = pyrethroid+ triazine+0.87* pesticides_unspecified; source Nemecek T. 2012; lognormal variance with pedigree 0.268, pedigree (4,5,5,5,5)
  (same comment as for Paraquat)
- Cadmium [soil, agricultural]: 9.76936e-8 kg; = (ammonium_nitrate*0.349978511603734*ammonium_nitrate_Cd_content+Cd_content_n_fertilizer*nitrogen_fertiliser+Cd_content_potassium_chloride*potassium_chloride*0.6317529003518383+potassium_suflate*0.540551087116204*potassium_suflate_Cd_content+dolomite*dolomite_Cd_content+Cd_content_urea*urea*0.466461632733939+magnesium_oxide*magnesium_oxide_Cd_content+boric_oxide*boric_oxide_Cd_content+EFB*5.32E-08+phosphate_fertilizer_Cd_content*phosphate_fertilizer)-Palm_fruit_bunch_Cd_content*palm_fruit_bunch; source Nemecek T. 2012; lognormal variance with pedigree 0.268, pedigree (4,5,5,5,5)
  (same comment as for Chromium)
- Lead [soil, agricultural]: 6.92704e-8 kg; = (ammonium_nitrate*0.349978511603734*ammonium_nitrate_Pb_content+Pb_content_n_fertilizer*nitrogen_fertiliser+Pb_content_potassium_chloride*potassium_chloride*0.6317529003518383+potassium_suflate*0.540551087116204*potassium_suflate_Pb_content+dolomite*dolomite_Pb_content+Pb_content_urea*urea*0.466461632733939+magnesium_oxide*magnesium_oxide_Pb_content+boric_oxide*boric_oxide_Pb_content+EFB*5.32E-07+phosphate_fertilizer_Pb_content*phosphate_fertilizer)-Palm_fruit_bunch_Pb_content*palm_fruit_bunch; source Nemecek T. 2012; lognormal variance with pedigree 0.268, pedigree (4,5,5,5,5)
  Calculated value: calculations according to chapter "Emissions of heavy metals to agricultural soil, surface water and ground water" in "01_crop production_direct field emissions and natural resources_v1.0.pdf" - pdf-document on the dedicated talk page of ecoinvent (www.ecoinvent.org/documentation)
  Literature Value: Heavy-metal content of empty fruit bunches (wet mass) from Schuchardt et al. (2002).
  2002, Schuchardt F., Daronko D., Guritno P., Composting of empty oil palm fruit bunch (EFB) with simultaneous evaporation of oil mill waste water (POME), International Oil Palm Conference, Bali
  Uncertainty: S
- Phosphate [water, ground-]: 1.14226e-5 kg; = (Pgwl*1*95/31)/(yield_agriculture*1000); source Faist Emmenegger M. 2009; lognormal variance with pedigree 0.2166, pedigree (4,5,5,4,5)
  Calculated value: calculated according to the "Phosphate leaching to ground water" approach described in "01_crop production_direct field emissions and natural resources_v1.0.pdf" -Chapter 2.3.1- pdf-document on the dedicated talk page of ecoinvent (www.ecoinvent.org/documentation). Molecular weight for PO4: 95 and for P 31.
  Uncertainty: S
- Copper [soil, agricultural]: -2.61165e-6 kg; = (ammonium_nitrate*0.349978511603734*ammonium_nitrate_Cu_content+Cu_content_n_fertilizer*nitrogen_fertiliser+Cu_content_potassium_chloride*potassium_chloride*0.6317529003518383+potassium_suflate*0.540551087116204*potassium_suflate_Cu_content+dolomite*dolomite_Cu_content+Cu_content_urea*urea*0.466461632733939+magnesium_oxide*magnesium_oxide_Cu_content+boric_oxide*boric_oxide_Cu_content+EFB*7.448E-06+phosphate_fertilizer_Cu_content*phosphate_fertilizer)-Palm_fruit_bunch_Cu_content*palm_fruit_bunch; source Nemecek T. 2012
  Calculated value: calculations according to chapter "Emissions of heavy metals to agricultural soil, surface water and ground water" in "01_crop production_direct field emissions and natural resources_v1.0.pdf" - pdf-document on the dedicated talk page of ecoinvent (www.ecoinvent.org/documentation)
  Heavy-metal content of empty fruit bunches (wet mass) from Schuchardt et al. (2002).
  2002, Schuchardt F., Daronko D., Guritno P., Composting of empty oil palm fruit bunch (EFB) with simultaneous evaporation of oil mill waste water (POME), International Oil Palm Conference, Bali,
- Nitrogen oxides [air, non-urban air or from high stacks]: 2.72329e-6 kg; = 0.21*dinitrogen_monoxide; source Nemecek T. 2012
  Calculated value: Field emissions from fertilizer application see chapter "Emissions of NOx to the air" in "01_crop production_direct field emissions and natural resources_v1.0.pdf" - pdf-document on the dedicated talk page of ecoinvent (www.ecoinvent.org/documentation). Field emissions from pre-harvest burning based on the emission factor from IPCC (2.5g NO /kg burned DM).
- Nitrate [water, ground-]: 0.00184538 kg; = (21.37+( precipitation+(irrigation)*yield_agriculture*1000/10)/( clay_content*100*L)*(0.0037* Ntot+0.0000601* Norg-0.00362* 0.006*1000* yield_agriculture))/(1000* yield_agriculture); source Nemecek T. 2012
  Calculated value: Modelled with the "SQCB-NO3 model" described in "01_crop production_direct field emissions and natural resources_v1.0.pdf" - pdf-document on the dedicated talk page of ecoinvent (www.ecoinvent.org/documentation).
- Malathion [soil, agricultural]: 2.83813e-5 kg; = organophosphorus; source Nemecek T. 2012; lognormal variance with pedigree 0.268, pedigree (4,5,5,5,5)
  (same comment as for Paraquat)

## Sampling procedure
Field data. The main oil palm cultivation areas are located in East (121"135 ha), North (106"635 ha) and Central (87’525 ha) Colombia, while the plantations in the West (21"661 ha) are decreasing due to pests. Out of the total area under oil palm cultivation, 10 plantations (27"571 ha, 8% of the total area) were randomly selected for the LCI data collection. The average LCI values from the 10 plantations were used (weighted average by size of the plantation) and further validated/complemented by literature data.

## Extrapolations
This dataset has been extrapolated from year 2011 to the year of the calculation (2021). The uncertainty has been adjusted accordingly.

## Review by Bo Weidema 2012-09-19
corrected an input of a production mix to a specific input

## Review by Christian Bauer 2012-07-19
parameters need to be checked for correctness of units

## Review by Emilia Moreno Ruiz 2013-02-04
correction in the ammonia flow
