# maintenance, electric bicycle

Dataset: EcoSpold 2, unit process
Geography: RoW
Time period: 2007-01-01 to 2021-12-31
Technology level: current
Classification: EcoSpold01Categories: transport systems/road
Classification: ISIC rev.4 ecoinvent: 4540:Sale, maintenance and repair of motorcycles and related parts and accessori
Tags: ConvertedDataset
Scenario: Business-as-Usual
System model: Allocation, cut-off by classification
Generated by: Marianne Leuenberger
Published in: M. Leuenberger 2010
Database: ecoinvent
isCopyrightProtected: true
accessRestrictedTo: 1

## General comment
The data set reflects the replacement of parts for the maintenance of an e-bike of 24kg with a LiIo battery. Battery replacemnet: 2.75 times. Life expectancy battery: 4'000 km.
[This dataset was already contained in the ecoinvent database version 2. It was not individually updated during the transfer to ecoinvent version 3. Life Cycle Impact Assessment results may still have changed, as they are affected by changes in the supply chain, i.e. in other datasets. This dataset was generated following the ecoinvent quality guidelines for version 2. It may have been subject to central changes described in the ecoinvent version 3 change report (http://www.ecoinvent.org/database/ecoinvent-version-3/reports-of-changes/), and the results of the central updates were reviewed extensively. The changes added e.g. consistent water flows and other information throughout the database. The documentation of this dataset can be found in the ecoinvent reports of version 2, which are still available via the ecoinvent website. The change report linked above covers all central changes that were made during the conversion process.]

## Included activities end
This data sets includes the maintenance of an electric bicycle throughout its life cycle.

## Geography
Data cover maintenance in Switzerland

## Technology
Maintenance of an electric bicycle

## Parameters
- fraction, tap water, to air: 0.15 dimensionless; name fraction_TW_to_air; lognormal variance with pedigree 0.092025, pedigree (4,4,3,2,4)
- fraction, process water, to air: 0.15 dimensionless; name fraction_PW_to_air; lognormal variance with pedigree 0.092025, pedigree (4,4,3,2,4)

## Reference product
- maintenance, electric bicycle: 1 unit; CPC 87141: Maintenance and repair services of motor vehicles; By-product classification allocatable product
  EcoSpold01Location=CH
  production volume 3.96633 unit
    This is a placeholder value that does not reflect real-world production volumes. This dataset does not currently require a real-world production volume to work in the database framework, and no actual data were collected yet. This has no negative effect on the results of the ecoinvent database.
  property price 233.639 EUR2005
    Calculated based on inputs: The price of the product has been calculated as a sum of the values of the material and energy inputs for this product. This value is therefore a rough estimation. It may underestimate the real price since there are additional expenses when producing any product. These expences can include for example labour costs, treatment of waste materials and profit for the producer. Please consider carefully whether this level of data quality is acceptable for your application.

## Inputs from technosphere
- chromium steel removed by turning, average, conventional: 0.22825 kg; lognormal variance with pedigree 0.0981, pedigree (4,2,4,5,4)
  EcoSpold01Location=RER
  Assumption
  Uncertainty: Assumption
  properties: dry mass 1 kg, carbon content, fossil 0.0008, wet mass 1 kg
- polyurethane, flexible foam: 0.03 kg; lognormal variance with pedigree 0.0287, pedigree (2,2,4,5,3)
  EcoSpold01Location=RER
  Estimation: saddle once replaced, Scooter: no replacement
  Uncertainty: Estimation: saddle once replaced, Scooter: no replacement
  properties: dry mass 1 kg, carbon content, fossil 0.633827, wet mass 1 kg, heating value, net 30.67 MJ
  note on carbon content, fossil: Polyurethanes (PUR) is the collective name for an extensive group of polymers with very different compositions and correspondingly varied property profiles, though their molecule chain contains all a urethane group (-NH-CO-O-). All PURs are built on a common principle : they are produced by the diisocyanate polyaddition process, that links polyols and (di)isocyanates. In this dataset, an example of typical polyurethane mixture is described (Ullmann, Polyurethanes, Dieterich et al. & ecoinvent v2 report 11_II). C content was calculated as an addition of C contents in its components.
- waste rubber, unspecified: 0 kg; pedigree (1,1,1,1,1)
  50% of tyres to municipal incineration
  EcoSpold01Location=CH
  Uncertainty: 50% of tyres to municipal incineration
  production volume 0 kg
    Calculated from the production volume of maintenance, electric bicycle in proportion to the respective output amounts.
  properties: wet mass 1 kg, dry mass 1 kg, carbon content, fossil 0.853, heating value, net 27.19 MJ
  note on heating value, net: Value taken from the general comment of the treatment dataset.
- polyethylene, high density, granulate: 0.97875 kg; lognormal variance with pedigree 0.0287, pedigree (2,2,4,5,3)
  Estimation: Bicycle: 50% of plastic parts once replaced, Scooter 15% replaced
  EcoSpold01Location=RER
  Uncertainty: Estimation: Bicycle: 50% of plastic parts once replaced, Scooter 15% replaced
  properties: heating value, net 42.47 MJ, dry mass 1 kg, carbon content, fossil 0.857143, wet mass 1 kg
  note on carbon content, fossil: Polyethylene is formed out of a huge amount of ethylene monomers (C2H4) (ecoinvent v2.2 report 11_II). MW=28 g/mol
- waste plastic, mixture: 0 kg; pedigree (1,1,1,1,1)
  EcoSpold01Location=CH
  Plastics to municipal incineration
  Uncertainty: plastics to municipal incineration
  production volume 0 kg
    (same comment as for waste rubber, unspecified)
  properties: water content 0.180638, dry mass 0.847 kg, wet mass 1 kg, carbon content, fossil 0.747344, heating value, net 30.79 MJ
  note on carbon content, fossil: C content in 1 kg DM was calculated using data in Tab A.2, ecoinvent v2.2 report 13_I
- battery, Li-ion, rechargeable, prismatic: 7.15 kg; lognormal variance with pedigree 0.0287, pedigree (2,2,4,5,3)
  EcoSpold01Location=GLO
  Personal communication: 2.75 batteries per 15000km bicycles, 2 batteries 50000 scooter
  Uncertainty: Personal communication: 2.75 batteries per 15000km bicycles, 2 batteries 50000 scooter
  properties: wet mass 1 kg, dry mass 1 kg, carbon content, fossil 0.328011
  note on carbon content, fossil: Calculated as the addition of C contents in the product composition
- synthetic rubber: 1.6875 kg; lognormal variance with pedigree 0.0287, pedigree (2,2,4,5,3)
  EcoSpold01Location=RER
  Estimation: 3.75 (bike)/3 (scooter) tyre-sets use in life-time
  Uncertainty: Estimation: 3.75 (bike)/3 (scooter) tyre-sets use in life-time
  properties: dry mass 1 kg, carbon content, fossil 0.871949, wet mass 1 kg, heating value, net 26.42 MJ
  note on carbon content, fossil: EPDM (Ethylene-propene-diene terpolymer) rubber is a terpolymer of ethylene, propene, and a diene with the residual unsaturated portion of the diene in the side chain (ecoinvent v2.2 report 7-part XX & Ullmann). Chemical formula (deduced from Evidences of Solvent-Induced Miscibility in Polychloroprene-co-Ethylene-Propene Diene Terpolymer Blends, Dubey et al., Journal of Applied Polymer Science, 2009, 111:1884–1891): C20H35
- section bar extrusion, aluminium: 0.37662 kg; lognormal variance with pedigree 0.0981, pedigree (4,2,4,5,4)
  EcoSpold01Location=RER
  Assumption for pipe drawing
  Uncertainty: Assumption for pipe drawing
- steel, low-alloyed, hot rolled: 0.22825 kg; lognormal variance with pedigree 0.0287, pedigree (2,2,4,5,3)
  EcoSpold01Location=RER
  Estimation: 5% of steel parts replaced, Scooter: 10%
  Uncertainty: Estimation: 5% of steel parts replaced, Scooter: 10%
  properties: wet mass 1 kg, carbon content, fossil 0.005, dry mass 1 kg
  note on carbon content, fossil: Low alloyed steel composition given in Tab. 3.2 ecoinvent v2.2 report 10_partII. Steel assumed to have a C content of 0.5%
- used Li-ion battery: -7.15 kg; lognormal variance with pedigree 0.0361, pedigree (4,2,4,5,3)
  All LiIo batteries into battery recycling
  EcoSpold01Location=GLO
  Uncertainty: all LiIo batteries into battery recycling
  production volume 21.45 kg
    (same comment as for waste rubber, unspecified)
  properties: carbon content, fossil 0.328011, dry mass 1 kg, wet mass 1 kg
- aluminium alloy, AlMg3: 0.37662 kg; lognormal variance with pedigree 0.0287, pedigree (2,2,4,5,3)
  Estimation:5% of aluminium parts replaced
  EcoSpold01Location=RER
  Uncertainty: Estimation:5% of aluminium parts replaced
  properties: wet mass 1 kg, dry mass 1 kg
- tap water: 0 kg; name tap_water_input; pedigree (1,1,1,1,1)
  EcoSpold01Location=RER
  Assumption based on: Cherry, C.R. 2007, 1488 liters waste water for all production phases (incl. Battery manufacturing --> 50%)
  Uncertainty: Assumption based on: Cherry, C.R. 2007, 1488 liters waste water for all production phases (incl. Battery manufacturing --> 50%)
  properties: carbon content, fossil 0.00178991, dry mass 0.000337476 kg, water content 2962.17, wet mass 1 kg
  note on carbon content, fossil: Bicarbonate content is 2.93 mol/m3. CO2 content is 0.1 mol/m3 (ecoinvent v2.2 report 8, Tab 93.1).
- injection moulding: 0.97875 kg; lognormal variance with pedigree 0.0981, pedigree (4,2,4,5,4)
  EcoSpold01Location=RER
  Assumption
  Uncertainty: Assumption
- waste rubber, unspecified: -0.421875, -0.421875 kg (2 entries); lognormal variance with pedigree 0.0361, pedigree (4,2,4,5,3)
  (same comment as for waste rubber, unspecified)
  production volume 2.53125 kg
- waste plastic, mixture: -0.112221, -0.00749816, -0.000567074, -0.00309701, -0.00125116, -0.0029409, -0.0956173, -0.785608 kg (8 entries); lognormal variance with pedigree 0.0361, pedigree (4,2,4,5,3)
  (same comment as for waste plastic, mixture)
  production volume 3.0264 kg
- tap water: 0.000695205, 8.3684e-5, 0.000138302, 0.0297383, 0.00348742, 9.07243e-5, 0.000258064, 0.0399083 kg (8 entries); lognormal variance with pedigree 0.0112, pedigree (2,3,4,5,1)
  (same comment as for tap water)

## Emissions to nature
- Water [water, unspecified]: 6.324e-5 m3; name water_to_water_unspecified; lognormal variance with pedigree 0.0507, pedigree (2,2,4,5,1)
  Calculated value based on literature values and expert opinion. See comments in the parametres' comment field.
  property fraction, origin: unspecified 0; name fraction_origin_unspecified_Ww
  property dry mass 0 kg; name DM
  property carbon content, non-fossil 0; name C_content_non_fossil
  property wet mass 1000 kg; name WM
  property water in wet mass 1000 kg; name WWM
  property fraction, origin: salt water 0; name fraction_origin_salt_water_Ww
  property carbon content, fossil 0; name C_content_fossil
  property fraction, origin: fresh water 1; name fraction_origin_fresh_water_Ww
- Water [air, unspecified]: 1.116e-5 m3; name water_to_air_unspecified; lognormal variance with pedigree 0.0507, pedigree (2,2,4,5,1)
  (same comment as for Water)
  property fraction, origin: fresh water 1; name fraction_origin_fresh_water
  property fraction, origin: unspecified 0; name fraction_origin_unspecified
  property fraction, origin: salt water 0; name fraction_origin_salt_water

## Sampling procedure
Literature

## Extrapolations
none This dataset has been copied from an original dataset covering the geography CH. The uncertainty has been adjusted accordingly.

## Review by Christian Bauer 2010-03-25
passed
C:\Dokumente und Einstellungen\Marianne\Eigene Dateien\Projekte\277_Mobitool\Ecoinvent\Review\Upload 1\corrections\[Ecospold_Maintenance_ebikes-v1.2.xls]X-Process
