# alkyd paint production, white, water-based, product in 60% solution state

Dataset: EcoSpold 2, unit process
Geography: RER
Time period: 1995-01-01 to 2021-12-31
Technology level: current
Classification: ISIC rev.4 ecoinvent: 2022:Manufacture of paints, varnishes and similar coatings, printing ink and mas
Synonyms: oil based paint
Scenario: Business-as-Usual
System model: Allocation, cut-off by classification
Generated by: Hans-Jörg Althaus
Published in: Althaus H.-J. 2007
Database: ecoinvent
isCopyrightProtected: true
accessRestrictedTo: 1

## General comment
This dataset represents the production of 1 kg of a 'typical' water-reducible alkyd paint. Alkyd paints can be made from many different resins. This dataset stands for one specific long oil alkyd as used in architectural paints of white colour and should not be used for other alkyds if its contribution to the overall result is important. The data quality is not sufficient to allow for e.g. a comparative assessment of different paints. The paint is produced by physical mixing the water-reducible alkyd resin with the pigments and auxiliary products. The raw materials needed are calculated from a typical composition of a solvent-borne white paint.
References:
Althaus H.-J., Chudacoff M., Hischier R., Jungbluth N., Osses M. and Primas A. (2007) Life Cycle Inventories of Chemicals. ecoinvent report No. 8, v2.0. EMPA Dübendorf, Swiss Centre for Life Cycle Inventories, Dübendorf, CH.
Gendorf (2016) Umwelterklärung 2015, Werk Gendorf Industriepark, www.gendorf.de.

## Included activities start
From reception of raw materials at the factory gate.

## Included activities end
This activity ends with the production of water-reducible alkyd paint. The dataset doesn't include packaging.

## Geography
The data in this dataset are not geography-specific. Some values are based on data from a large chemical factory located in Germany. These are assumed to be valid for this geography.

## Technology
The dataset models the commonly used process for water-reducible alkyd resin production. Paint production is done by physical mixing of resin, water and pigments.
Reference:
Althaus H.-J., Chudacoff M., Hischier R., Jungbluth N., Osses M. and Primas A. (2007) Life Cycle Inventories of Chemicals. ecoinvent report No. 8, v2.0. EMPA Dübendorf, Swiss Centre for Life Cycle Inventories, Dübendorf, CH.

## Time period
The data in this dataset come from different years, but overall form the most realistic picture of the production. Some values are based on data published by the Gendorf factory that were collected between 2011 and 2015. The time period has been adjusted accordingly. For more details, see the comments of the exchanges.

## Reference product
- alkyd paint, white, without water, in 60% solution state: 1 kg; name RP; CPC 35110: Paints and varnishes and related products; By-product classification allocatable product
  Alkyd paint (also known as oil based paint) is applied where a glossy, durable finish is required, which is resistant to withstand external influences such as dirt and stains. It is therefore popular for indoor and outdoor applications. Alkyd paint can be cleaned easily and repeatedly without fading in color.
  production volume 0.696 kg; name RP_PV
    This is a placeholder value that does not reflect real-world production volumes. This dataset does not currently require a real-world production volume to work in the database framework, and no actual data were collected yet. This has no negative effect on the results of the ecoinvent database. The placeholder value of this activity was estimated by scaling the global production volume (which is also a placeholder value) according to the sales of chemicals products reported by Cefic (European Chemical Industry Council), and the American Chemistry Council.
    According to Cefic (2016) the global sales of chemicals in the year 2015 was 3 534 billion euros. The reported share of sales per region are: EU28 14.7%; Other Europe (Switzerland, Norway, Turkey, Russia and Ukraine) 2.7%; NAFTA (US, Canada and Mexico) 16.5%; Latin America 3.8%; China 39.9%; Japan 3.9%; Republic of Korea 3.2%; India 2.2%; Rest of Asia 11.9%; Rest of the World 1.3%. Cefic also reports the US total sales, which amount to 518.7 billion euros out of the global 3 534 billion euros (14.7%). The same share is reported by the American Chemistry Council (2016), according to which the USA sales account for 15% of global sales for the year 2016.
    References:
    Cefic 2016. Facts and figures 2016 of the European chemical industry. Accessible at: http://www.cefic.org/Facts-and-Figures/Chemicals-Industry-Profile/
    American Chemistry Council 2016. Outlook: U.S. Chemical Industry Continues to Outpace Industrial Output; Accounts for More Than One-Half of Construction Spending by Manufacturing Sector. Accessible at: https://www.americanchemistry.com/Media/PressReleasesTranscripts/ACC-news-releases/US-Chemical-Industry-Continues-to-Outpace-Industrial-Output.html
  property price 3.37 EUR2005
    From UN trade database. http://data.un.org/ Import data from the largest economies of the world are used (Brazil, India, USA, China, Japan and EU-27). Commodities: 'Acrylic or vinyl polymer paint or varnish, non-aqueou', 'Polyester based paints, varnishes, non-aqueous medium' and 'Polymer based paint, varnish in non-aqueous medium ne'.
  property carbon content, non-fossil 0.161654
    C content was calculated as an addition of C content in the raw materials.
  property carbon content, fossil 0.414587
    C content was calculated as an addition of C content in the raw materials.
  property heating value, net 17.46 MJ
    LHV is calculated based on the Carbon content of the product. More details can be found on the respective documentation.
  property carbon content 0.576241
    carbon content on a dry matter basis (reserved; not for manual entry)
  properties: wet mass 1 kg, water content 0, water in wet mass 0 kg, dry mass 1 kg, carbon allocation 0.576241 kg

## Inputs from technosphere
- chemical, organic: 0.03367 kg; lognormal variance with pedigree 0.114025, pedigree (4,5,5,2,3)
  properties: wet mass 1 kg, dry mass 1 kg, carbon content, fossil 0.628, heating value, net 19.03 MJ
  note on carbon content, fossil: This dataset is an unweighted average of 20 organic substances (listed in Tab 88.1, ecoinvent v2.2 report 8, part II), being part of the top100 chemicals included in this database. The C-content has also been calculated as an unweighted average of the C content of the substances composing this dataset.
- phthalic anhydride: 0.1322 kg; lognormal variance with pedigree 0.114025, pedigree (4,5,5,2,3)
  properties: wet mass 1 kg, dry mass 1 kg, carbon content, fossil 0.648649, heating value, net 22.93 MJ
- waste paint: 0 kg; name BP_waste_paint; pedigree (1,1,1,1,1)
  production volume 0 kg
    Calculated from the production volume of alkyd paint, white, without water, in 60% solution state in proportion to the respective output amounts.
  property price 0 EUR2005; name BP_waste_paint_price_EUR2005
  properties: heating value, net 19.7 MJ, wet mass 1 kg, carbon content, fossil 0.65, dry mass 1 kg
  note on carbon content, fossil: Tab A.5, ecoinvent v2.2 report 13_I. C content has been calculated after data in the tables, and then referred to 1 kg DM
- pentaerythritol: 0.1391 kg; lognormal variance with pedigree 0.114025, pedigree (4,5,5,2,3)
  properties: dry mass 1 kg, heating value, net 24.05 MJ, carbon content, fossil 0.441176, wet mass 1 kg
- nitrogen, liquid: 0.019 kg; lognormal variance with pedigree 0.010025, pedigree (2,3,2,2,3)
  Calculated based on literature data published by the industry. This value is a 5-year average of data (2011 - 2015) published by the Gendorf factory (Gendorf, 2016, Umwelterklärung, www.gendorf.de), (Gendorf, 2015, Umwelterklärung, www.gendorf.de), (Gendorf, 2014, Umwelterklärung, www.gendorf.de). The amount of nitrogen used per kg of chemical substance produced is calculated using literature data published by the Gendorf factory based in Germany, which produces a wide range of chemical substances. The factory produced 1657400 tonnes of chemical substances in the year 2015 (Gendorf, 2016, Umwelterklärung, www.gendorf.de) and 740000 tonnes of intermediate products. The reported amount of nitrogen used in 2015 was 33512400 Nm3 (Gendorf, 2016, Umwelterklärung, www.gendorf.de). One Nm3 of nitrogen is equal to 1.2506 kg. The resulting amount of nitrogen - the 5-year average (2011 - 2015, weighted by production volume) is 0.019 kg/kg. Nitrogen is mainly used during the production of chemicals for 'blanketing', which is the process of applying gas to the vapour space of a container or vessel in order to control its composition.
  properties: wet mass 1 kg, dry mass 1 kg
- heat, district or industrial, other than natural gas: 3.139 MJ; lognormal variance with pedigree 0.0301, pedigree (3,4,4,3,3)
  properties: heating value, net 1 MJ
- heat, district or industrial, natural gas: 5.624 MJ; lognormal variance with pedigree 0.0301, pedigree (3,4,4,3,3)
  properties: heating value, net 1 MJ
- white spirit: 0.04372 kg; lognormal variance with pedigree 0.114025, pedigree (4,5,5,2,3)
  properties: wet mass 1 kg, carbon content, fossil 0.863404, dry mass 1 kg, heating value, net 45 MJ
  note on carbon content, fossil: The most common variety of white spirit is a mixture of saturated aliphatic and alicyclic C7-C12 hydrocarbons with a content of 15-20% (by weight) of aromatic C7-C12 hydrocarbons (ecoinvent v2.2 report 8-part 94). The average composition was assumed as being 82.5% C9.5 saturated aliphatic and alicyclic hydrocarbons (average formula C9.5H20), and 17.5% C9.5 aromatic hydrocarbons (average formula C9.5H9.5).
- electricity, medium voltage: 0.16697 kWh; lognormal variance with pedigree 0.0301, pedigree (3,4,4,3,3)
- titanium dioxide: 0.5051 kg; lognormal variance with pedigree 0.114025, pedigree (4,5,5,2,3)
  properties: wet mass 1 kg, dry mass 1 kg
- chemical factory, organics: 4e-10 unit; lognormal variance with pedigree 0.309425, pedigree (2,3,2,2,3)
  Calculated based on literature data published by the industry. For this activity, no information was readily available concerning infrastructure and land-use. Therefore, the infrastructure is estimated based on data from two chemical factories, the BASF site of Ludwigshafen and the chemical factory in Gendorf (which are both located in Germany), which produce a wide range of chemical substances. Based on this data, the following assumptions are made: the built area amounts to about 4.2 ha, the plant has an average output of 50'000 t/a and a lifespan of fifty years. The estimated infrastructure amount is therefore 4.00 E-10 units per kg of produced chemical.
  References:
  Althaus H.-J., Chudacoff M., Hischier R., Jungbluth N., Osses M. and Primas A. (2007) Life Cycle Inventories of Chemicals. ecoinvent report No. 8, v2.0. EMPA Dübendorf, Swiss Centre for Life Cycle Inventories, Dübendorf, CH.
  Gendorf (2000) Umwelterklärung 2000, Werk Gendorf. Werk Gendorf, Burgkirchen.
- soybean oil, crude: 0.229 kg; lognormal variance with pedigree 0.114025, pedigree (4,5,5,2,3)
  properties: heating value, net 38.4 MJ, wet mass 1 kg, dry mass 1 kg, carbon content, non-fossil 0.768
  note on heating value, net: Values is approximated from HHV from "vegetable oil, crude". Source: Radovanovic,M.; Zivanovic,T.; Stojiljkovic,D.; Jovanovic,V.; Jerinic,N.; Knezevic,S. et.al. Utilization of sunflower husk as a fuel for industrial boilers - 20 years experience. Proc. 5th Eur. Conf. on Industrial Furnaces&Boilers 2000,vol.2,p.221-233. Available at: https://phyllis.nl/Biomass/View/2152
- waste paint: -0.0167796, -5.03528e-5 kg (2 entries); lognormal variance with pedigree 0.39, pedigree (5,5,5,5,5)
  production volume 0.0117137 kg

## Emissions to nature
- Nitrogen [air, unspecified]: 0.019 kg; lognormal variance with pedigree 0.010025, pedigree (2,3,2,2,3)
  Calculated value. The amount of nitrogen released to air is equal to the amount of nitrogen entering the activity.

## Sampling procedure
A 'typical' water-reducible white alkyd paint is chosen and its raw material consumption is calculated. Energy data are estimated. Some values are calculated based on data from a large chemical factory located in Germany. For more details, see the comments of the exchanges.

## Extrapolations
This dataset has been extrapolated from year 2020 to the year of the calculation (2021). The uncertainty has been adjusted accordingly.

## Review by Emilia Moreno Ruiz 2017-08-09
This dataset was additionally reviewed in a separate review process by Eric Johnson of Atlantic Consulting as well as Emilia Moreno Ruiz and Gregor Wernet of ecoinvent.
