# building operation, luxury hotel

Dataset: EcoSpold 2, unit process
Geography: BR
Time period: 2017-01-01 to 2021-12-31
Technology level: current
Classification: ISIC rev.4 ecoinvent: 5510:Short term accommodation activities
Synonyms: 5 star hotel; luxury hotel
Tags: single enterprise data
Scenario: Business-as-Usual
System model: Allocation, cut-off by classification
Generated by: Marina Santa Rosa Rocha
Published in: Filimonau, V 2018
Database: ecoinvent
isCopyrightProtected: true
accessRestrictedTo: 1

## General comment
This dataset represents the operation of a tourist accommodation facility classed as a luxury hotel (comfort category 5stars), located in Campinas, SP, Brazil. It was first opened in 1999 as a brand new resort complex. The complex has capacity to host 1000 people and offers rooms of the following types (total number of rooms is given in brackets): suites with one double bed (453) and suites with two double beds (47). These rooms are distributed among 5 different buildings that are surronded by 7 pools, a gym, a spa, kids area and four conference areas. The laundry is outsourced. The hotel occupies a total area of 58618,2 m2. The average annual occupancy of the hotel is estimated to be 58%, based on Rio de Janeiro's average occupancy for luxury hotels (Source: Anuário Estatístico da Taxa de Ocupação Hoteleira da Cidade do Rio de Janeiro. ABIH-RJ, 2016) which is equal to 211700 guest nights per year.

## Included activities start
This dataset is modelled to represent the service of operating the hotel. It includes: energy and water consumption, furniture and in-room textiles (such as bed linen, bed mattrasses and curtains), electric and electronic equipment used in guest rooms and on hostel premises (including bulbs), cleaning and in-room consumables. Activities include hotel operations and infrastructure based on 1 guest night stay and the lifeframe of the hotel building of 75 years. The case study hotel uses services of an outsourced laundry. To account for its impacts, a separate laundry dataset has been added. The input to the laundry dataset is based on the number of linen pieces sent to laundry by the hotel. The transportation of linen to/from laundry facility was excluded due to data availability. Although the case study hotel has restaurants on site, the inputs of food items have been excluded due to data availability. The energy and water consumption attributed to restaurant operations have been included. Any waste generated in restaurant operations has been included.

## Included activities end
Activities end with guest departure from hotel premises. Due to data availability, the following processes have been excluded: room equipment (lamp, telephone, DVD player, iron, digital clock, in-room safe, door lock), bathroom equipment (showers, mirrors) and kitchen equipment (blender, water filter, iron, deep fryer). Parking is also an outsourced service and, due to unavailable data, it was excluded from this dataset.

## Geography
The hotel is based in Campinas, SP, Brazil

## Technology
Technology in use is considered current.

## Time period
The survey was done in the year 2017 with the data provided covering the operational year 2016-2017.

## Parameters
- occupancy rate/year: 0.58 dimensionless; name occupancy_y
  The average annual occupancy of the hotel is estimated to be 58%, based on Rio de Janeiro's average occupancy for luxury hotels (Source: Anuário Estatístico da Taxa de Ocupação Hoteleira da Cidade do Rio de Janeiro. ABIH-RJ, 2016)

## Reference product
- building operation, luxury hotel: 1 guest night; name RP; By-product classification allocatable product; CPC 631: Accommodation services for visitors
  production volume 5.88526e7 guest night; name RP_PV; = ((lifetime_guests*occupancy_y)/lifetime)*278
    Annual production volume is estimated based on the number of hotel guests in the case study hotel (data from hotel survey) multiplied by the number of luxury hotels in Brazil. The case study hotel reported the annual production volume of 211.700 guest nights (maximum capacity of 1000 guests per night considering an occupancy rate of 58%). In 2017 it was estimate that there were 10314 hotels in Brazil (Source: JLL, FOHB and ABR. Lodging Industry in Numbers - Brazil 2017. Available from: http://www.jll.com.br/brazil/pt-br/relatorios/175/hotelaria-em-numeros-2017) Accessed 27 March 2018). A study from the Brazilian Institute of Geography and Statistics (IBGE, 2012) reported that 46,9% of tourism accomodations in all statesmain urban areas are hotels and 5,8% of these hotels are consider luxury hotels. (Source: IBGE, 2012. Pesquisa de Serviços de Hospedagem 2011- Municípios das Capitais, Regiões Metropolitanas das Capitais e Regiões Integradas Available from: ftp://ftp.ibge.gov.br/Comercio_e_Servicos/Pesquisa_Servicos_de_Hospedagem/2011/psh2011.pdf. Accessed 27 March 2018). These percentages are used as a proxy to calculate the total amount of luxury hotels in Brazil: 10314*0,469*0,058 = 278 luxury hotels. Assuming the annual production is fairly equal across all luxury Brazilian hotels, the annual production volume for the whole destination can be estimated as 211700*278 = 58852600.
  property price 27.2505 EUR2005; name RP_price_EUR2005
    Calculated based on inputs: The price of the product has been calculated as a sum of the values of the material and energy inputs for this product. This value is therefore a rough estimation. It may underestimate the real price since there are additional expenses when producing any product. These expences can include for example labour costs, treatment of waste materials and profit for the producer. Please consider carefully whether this level of data quality is acceptable for your application.

## Inputs from technosphere
- furniture, wooden: 0.0291611 kg; name furniture_w; = (547*25)*(lifetime/15)/(lifetime_guests*occupancy_y)+(37*47)*(lifetime/15)/(lifetime_guests*occupancy_y)+(23*1369)*(lifetime/15)/(lifetime_guests*occupancy_y)+(7*2600)*(lifetime/15)/(lifetime_guests*occupancy_y)+(55*500)*(lifetime/15)/(lifetime_guests*occupancy_y); lognormal variance with pedigree 0.303425, pedigree (2,4,2,2,2)
  Estimated value. The amount of exchange is calculated as: amount of input product * (lifetime of the hotel/lifetime of the product) / (number of guests during the lifetime of the hotel * hotel occupancy rate). Assumed average service life of all pieces of furniture is 15 years. This represents service life of an average piece of furniture. Source: European Commission 2013. BACKGROUND REPORT. Revision of Ecolabel and Green Public Procurement criteria for the product group Wooden Furniture. September 2013. Available from: http://susproc.jrc.ec.europa.eu/furniture/docs/Background_report_Furniture_September_2013.pdf Accessed 19 March 2018.
  This exchange represents the following: Double bed (unit) is assumed to have a weight of 25 kg, no headboard, Furniture re-use Network, 2009. Average weights. Available from: http://democracy.york.gov.uk/documents/s2116/Annex%20C%20REcycling%20Report%20frnweights2005.pdf Accessed 13 January 2018. Sofas (unit) Sofa is assumed to have a weight of 37 kg, two seater, Furniture re-use Network, 2009. Average weights. Available from: http://democracy.york.gov.uk/documents/s2116/Annex%20C%20REcycling%20Report%20frnweights2005.pdf Accessed 13 January 2018. Tables/Desks (unit) Table is assumed to have a weight of 23 kg, medium, Furniture re-use Network, 2009. Average weights. Available from: http://democracy.york.gov.uk/documents/s2116/Annex%20C%20REcycling%20Report%20frnweights2005.pdf Accessed 13 January 2018. Chairs (unit) Chair is assumed to have a weight of 7 kg, Furniture re-use Network, 2009. Average weights. Available from: http://democracy.york.gov.uk/documents/s2116/Annex%20C%20REcycling%20Report%20frnweights2005.pdf Accessed 13 January 2018. Wardrobe (unit) is assumed to have a weight of 55 kg (double wardrobe), Furniture re-use Network, 2009. Average weights. Available from: http://democracy.york.gov.uk/documents/s2116/Annex%20C%20REcycling%20Report%20frnweights2005.pdf Accessed 13 January 2018
  property lifetime 15 year; name furniture_w_lifetime
  note on lifetime: Source: JRC (2013) Wooden Furniture. BACKGROUND REPORT. Revision of Ecolabel and Green Public Procurement criteria for the product group. Retrieved from: http://susproc.jrc.ec.europa.eu/furniture/docs/Background_report_Furniture_September_2013.pdf, accessed 9Feb2018
- heat, district or industrial, natural gas: 4.02078 MJ; = 47311,9875*4300*0,004184*(lifetime)/(lifetime_guests*occupancy_y); lognormal variance with pedigree 0.303425, pedigree (2,4,2,2,2)
  Calculated value with conversion made from m3 to kcal to MJ of natural canalized gas. Assuming 1 m3 of natural gas is equal to 4300 kcal (Source: http://www.investidorpetrobras.com.br/pt/destaques-operacionais/formulas-de-conversao). The amount of exchange is calculated as: amount of input product * (lifetime of the hotel) / (number of guests during the lifetime of the hotel * hotel occupancy rate).
  properties: heating value, net 1 MJ
- textile, knit cotton: 0.0207841 kg; name cotton; = (4000*1,1/4)*(lifetime/0,25)/(lifetime_guests*occupancy_y); lognormal variance with pedigree 0.303425, pedigree (2,4,2,2,2)
  Calculated value from the total number of linen units used by the hotel. The amount of exchange is calculated as: amount of input product * (lifetime of the hotel/lifetime of the product) / (number of guests during the lifetime of the hotel * hotel occupancy rate). It is assumed that, on average, 4 linen units make 1 kg in weight. Source: Filimonau et al. 2011. Reviewing the carbon footprint analysis of hotels: Life Cycle Energy Analysis (LCEA) as a holistic method for carbon impact appraisal of tourist accommodation. Journal of Cleaner Production, 19, 1917-1930. Assumed average service life is 0.25 years. Source: TRSA 2015. Hospitality Textile Life, Loss and Replacement. Available from: http://www.laundrycompliance.com/wp-content/uploads/2016/02/trsa-hospitality-hotel-linen-loss.pdf Accessed 16 March 2018. The amount accounts for 10% fabric loss in the cotton textile manufacturing process. Source: Baydar, G., Ciliz, N., and Mammadov, A., 2015. Life cycle assessment of cotton textile products in Turkey. Journal of Cleaner Production, 104(A), 213-223.
  properties: carbon content, non-fossil 0.46, wet mass 1 kg, dry mass 1 kg
- mattress: 0.00103354 unit; = (547*2)*(lifetime/5)/(lifetime_guests*occupancy_y); lognormal variance with pedigree 0.303425, pedigree (2,4,2,2,2)
  Calculated value. The amount of exchange is calculated as: amount of input product * (lifetime of the hotel/lifetime of the product) / (number of guests during the lifetime of the hotel * hotel occupancy rate). Average service life of a mattress is assumed to be equal to 5 years. Source: Traveller 2017. How often do hotels change their mattresses? Available from: http://www.traveller.com.au/everyone-asks-how-often-do-hotels-change-their-mattresses-guv2kt Accessed 16 March 2018.
  property wet mass 20.128 kg; name mat_WM
  properties: dry mass 20.1278 kg, carbon content, fossil 5.18548, carbon content, non-fossil 0.29026
  note on carbon content, fossil: Calculated value. The value of the mattress fossil carbon content is the sum of all fossil carbon content of input materials to the mattress manufacture extracted from Lanoe et al (2013).
  note on carbon content, non-fossil: Calculated value. The value of the mattress non fossil carbon content is the sum of all non fossil carbon content of input materials to the mattress manufacture extracted from Lanoe et al (2013).
- electricity, low voltage: 8.06798 kWh; = 1705547,742*(lifetime)/(lifetime_guests*occupancy_y)+(2/3.6*cotton); lognormal variance with pedigree 0.303425, pedigree (2,4,2,2,2)
  Calculated data. The amount of exchange is calculated as: amount of input product * (lifetime of the hotel) / (number of guests during the lifetime of the hotel * hotel occupancy rate). The amount also includes electricity requirements to produce cotton textile products from raw cotton. It is estimated that 2 MJ of electricity is required to produce 1 kg of cotton textile product. This accounts for 10% fabric loss in the cotton textile manufacturing process. Source: Baydar, G., Ciliz, N., and Mammadov, A., 2015. Life cycle assessment of cotton textile products in Turkey. Journal of Cleaner Production, 104(A), 213-223.
- soap: 0.125 kg; = (19162,5+7300)*(lifetime)/(lifetime_guests*occupancy_y); lognormal variance with pedigree 0.303425, pedigree (2,4,2,2,2)
  Calculated value. The amount of exchange is calculated as: amount of input product * (lifetime of the hotel) / (number of guests during the lifetime of the hotel * hotel occupancy rate). In terms of outputs assumed to have gone to wastewater. Represents here soap, shampoo, shower gel and body lotion.
  properties: heating value, net 17.93 MJ, dry mass 0.87 kg, water content 0.149425, wet mass 1 kg, carbon content, non-fossil 0.692237
- wastewater, average: -0.209561 m3; name wastewater; = (44364*(lifetime)/(lifetime_guests*occupancy_y) )*-1; lognormal variance with pedigree 0.004025, pedigree (2,4,2,2,2)
  Calculated value based on sewage generation data from the hotel survey provided in m3. The water balance is positive because the hotel has many water reuse initiatives. The amount of exchange is calculated as: amount of input product * (lifetime of the hotel) / (number of guests during the lifetime of the hotel * hotel occupancy rate).
  production volume 1.23332e7 m3; = wastewater*RP_PV/RP
    Calculated from production volume of reference product using the relative outputs.
  property price 0 EUR2005; name wastewater_price_EUR2005
  properties: wet mass 1000 kg, water content 2882.2, dry mass 0.346837 kg, carbon content, non-fossil 0.194039
  note on carbon content, non-fossil: 0.0673 kg TOC/m3 (Tab A.17, ecoinvent v2.2 report 13_I). TOC was considered as Total Carbon.
- hair dryer: 0.000787278 unit; = 500*(lifetime/3)/(lifetime_guests*occupancy_y); lognormal variance with pedigree 0.303425, pedigree (2,4,2,2,2)
  Calculated value. The amount of exchange is calculated as: amount of input product * (lifetime of the hotel) / (number of guests during the lifetime of the hotel * hotel occupancy rate). Assumed average service life of a hair dryer is 3 years. Source: Ashby 2009. Materials and the Environment: Eco-Informed Material Choice. Elsevier, Burlington, USA
  properties: lifetime 3 year, dry mass 0.89 kg, wet mass 0.89 kg, carbon content, fossil 0.411805
- waste textile, soiled: -0.0207841 kg; name waste_text; = (cotton)*-1; lognormal variance with pedigree 0.004025, pedigree (2,4,2,2,2)
  The amount of waste material is assumed to be equal to the amount of respective input material, textile, knit cotton.
  production volume 1.2232e6 kg; = waste_text*RP_PV/RP
    Calculated from production volume of reference product using the relative outputs.
  property price 0 EUR2005; name waste_text_price_EUR2005
  properties: wet mass 1 kg, heating value, net 14.45 MJ, carbon content, non-fossil 0.570519, dry mass 0.75 kg, water content 0.333333
  note on heating value, net: Value taken from the general comment of the treatment dataset.
- water, completely softened: 0.00710137 kg; = 1740*0.864*(lifetime)/(lifetime_guests*occupancy_y); lognormal variance with pedigree 0.0454, pedigree (2,4,2,5,4)
  Calculated value. From the dataset for "cleaning consumables production" GLO 2011-2013, on average cleaning products contain 86% of water. Based on the literature source Golsteijn (2015) the dataset used to represent the water flow is "water, completely softened, at plant", version 2 dataset which corresponds to ecoinvent version 3 dataset "water, completely softened, from decarbonised waterm at user". The amount of water needed is therefore calculated based on the vale of 86% calculated based on Golsteijn (2015) and the amount of cleaning consumable which are expressed as 100% active substance.
  Laura Golsteijn, 2015, A compilation of life cycle studies for six household detergent product categories in Europe: the basis for product-specific A.I.S.E. Charter Advanced Sustainability Profiles
  properties: wet mass 1 kg
- nylon 6: 0.00236183 kg; name nylon; = (5*1000)*(lifetime/10)/(lifetime_guests*occupancy_y); lognormal variance with pedigree 0.303425, pedigree (2,4,2,2,2)
  Calculated value. Represents here curtains made of nylon. The amount of exchange is calculated as: amount of input product * (lifetime of the hotel/lifetime of the product) / (number of guests during the lifetime of the hotel * hotel occupancy rate). An average curtain is assumed to have a weight of 5 kg. Source: Furniture re-use Network, 2009. Average weights. Available from: http://democracy.york.gov.uk/documents/s2116/Annex%20C%20REcycling%20Report%20frnweights2005.pdf Accessed 13 January 2018. Average service life of a curtain is assumed to be equal to average service life of a carpet which is 10 years. Source: Greenspec 2018. Whole life costing: carpets. Available from: http://www.greenspec.co.uk/building-design/carpets/ Accessed 16 March 2018. In terms of outputs assumed to have gone to waste polyethylene.
  properties: carbon content, fossil 0.637168, dry mass 1 kg, wet mass 1 kg, heating value, net 30.9 MJ
  note on carbon content, fossil: It is a chain of caprolactam molecules, originating from aminocarboxylic acids - here caproic acid or caprolactam. The structure of nylon 6 is -(NH-(CH2)5-CO)n-, C6H11NO (ecoinvent v2.2 report 11_II). MW=113 g/mol
  note on heating value, net: Assumed equal to Nylon-66. Reference: Walters, R. N., Hackett, S. M. and Lyon, R. E. (2000) ‘Heats of combustion of high temperature polymers’, Fire and Materials, 24(5), pp. 245–252. doi: 10.1002/1099-1018(200009/10)24:5<245::AID-FAM744>3.0.CO;2-7.
- washing, drying and finishing laundry: 1.72414 kg; = (4000/4)*365*(lifetime)/(lifetime_guests*occupancy_y); lognormal variance with pedigree 0.0454, pedigree (2,4,2,5,4)
  Calculated value from the total number of linen unitsper guests per night. The amount of exchange is calculated as: amount of input product per year * (lifetime of the hotel) / (number of guests during the lifetime of the hotel * hotel occupancy rate). It is assumed that, on average, 4 linen units make 1 kg in weight. Source: Filimonau et al. 2011. Reviewing the carbon footprint analysis of hotels: Life Cycle Energy Analysis (LCEA) as a holistic method for carbon impact appraisal of tourist accommodation. Journal of Cleaner Production, 19, 1917-1930.
- television: 0.000236183 unit; = 500*(lifetime/10)/(lifetime_guests*occupancy_y); lognormal variance with pedigree 0.303425, pedigree (2,4,2,2,2)
  Calculated value. The amount of exchange is calculated as: amount of input product * (lifetime of the hotel/lifetime of the product) / (number of guests during the lifetime of the hotel * hotel occupancy rate). Average service life of a television is assumed to be equal to 10 years. Source: Feng and Ma 2009. The energy consumption and environmental impacts of a color TV set in China. Journal of Cleaner Production, 17,13-25.
  properties: lifetime 10 year
  note on lifetime: As proposed by Dodbiba et al. 2008. Source: 2008, Dodbiba, G., Takahashi, K., Sadaki, J., Fujita, T., The recycling of plastic wastes from discarded TV sets: comparing energy recovery with mechanical recycling in the context of life cycle assessment, Journal of Cleaner Production, 16, 458-470, 0 - Undefined
- compact fluorescent lamp: 0.0101988 unit; = (950*2,5)*(lifetime/1,1)/(lifetime_guests*occupancy_y); lognormal variance with pedigree 0.303425, pedigree (2,4,2,2,2)
  Estimated value. Approximated from luxury hotel PE. Given the capacity is 2.5, then the number of bulbs in use = 950*2.5. This represented the amount of input product. The amount of exchange is calculated as: amount of input product * (lifetime of the hotel/lifetime of the product) / (number of guests during the lifetime of the hotel * hotel occupancy rate). Average service life of a bulb is assumed to be equal to 1.1 year. Source: Elijošiutė et al. 2012. Life Cycle Assessment of Compact Fluorescent and Incandescent Lamps: Comparative Analysis. Environmental Research, Engineering and Management, 3(61), 65-72.
  properties: carbon content, fossil 0.009542, wet mass 0.075 kg, dry mass 0.075 kg, lifetime 1 year
  note on lifetime: Calculated from Elijosiute et al. 2012 who estimate the life time of a bulb to be eqaul to 10000 hours which equates to circa 1 year.
- cookstove: 1.88947e-6 unit; = 6*(lifetime/15)/(lifetime_guests*occupancy_y); lognormal variance with pedigree 0.303425, pedigree (2,4,2,2,2)
  Calculated value. The amount of exchange is calculated as: amount of input product * (lifetime of the hotel/lifetime of the product) / (number of guests during the lifetime of the hotel * hotel occupancy rate). Assumed average service life of a cookstove is 15 years. Source: Jungbluth 1997. Life-Cycle-Assessment for Stoves and Ovens. UNS Working Paper No. 16, August 1997.
  properties: carbon content, fossil 3.22, wet mass 57.9 kg, dry mass 57.9 kg, lifetime 15 year
- microwave oven: 3.54275e-6 unit; = 6*(lifetime/8)/(lifetime_guests*occupancy_y); lognormal variance with pedigree 0.303425, pedigree (2,4,2,2,2)
  Calculated value. The amount of exchange is calculated as: amount of input product * (lifetime of the hotel/lifetime of the product) / (number of guests during the lifetime of the hotel * hotel occupancy rate). Assumed average service life of a microwave oven is 8 years. Source: Gallego-Schmid et al. 2018. Environmental assessment of microwaves and the effect of European energy efficiency and waste management legislation. Science of the Total Environment, 618, 487-499.
  properties: lifetime 8 year
  note on lifetime: Source: Gallego-Schmid et al. 2018, 2018, Gallego-Schmid, A., Mendoza, J.M.F., Azapagic, A., Environmental assessment of microwaves and the effect of European energy efficiency and waste management legislation. , Science of the Total Environment, 618, 487-499, 1 - Article
- refrigerator: 0.000241852 unit; = 512*(lifetime/10)/(lifetime_guests*occupancy_y); lognormal variance with pedigree 0.303425, pedigree (2,4,2,2,2)
  Calculated value. The amount of exchange is calculated as: amount of input product * (lifetime of the hotel/lifetime of the product) / (number of guests during the lifetime of the hotel * hotel occupancy rate). Assumed average service life of a refrigerator is 10 years. Source: Xiao et al. 2015. A life-cycle assessment of household refrigerators in China. Journal of Cleaner Production, 95, 301-310
  properties: lifetime 10 year
  note on lifetime: Source: Xiao, R. et al. 2015, 2015, Xiao, R., Zhang, Y., Liu, X., and Yuan, Z., A life-cycle assessment of household refrigerators in China, Journal of Cleaner Production, 95, 301-310, 1 - Article
- coffee maker: 5.6684e-6 unit; = 6*(lifetime/5)/(lifetime_guests*occupancy_y); lognormal variance with pedigree 0.303425, pedigree (2,4,2,2,2)
  Calculated value. The amount of exchange is calculated as: amount of input product * (lifetime of the hotel/lifetime of the product) / (number of guests during the lifetime of the hotel * hotel occupancy rate). Assumed average service life of a coffee maker is 5 years. Source: Ashby 2009. Materials and the Environment: Eco-Informed Material Choice. Elsevier, Burlington, USA
  properties: carbon content, fossil 0.857611, wet mass 1.9 kg, lifetime 5 year, dry mass 1.9 kg
- vacuum cleaner: 1.18092e-5 unit; = 8*2,5*(lifetime/8)/(lifetime_guests*occupancy_y); lognormal variance with pedigree 0.303425, pedigree (2,4,2,2,2)
  Estimated value. No data on the number of vacuum cleaners in use was provided by the case study hotel. Hence, data from the luxury hotel, Peru, was used as a reference proxy. The Peruvian luxury hotel accounts for 8 vaccum cleaners. As the difference in area between the two hotels is 2.5, it is estimated that the Brazilian luxury hotel accounts for 2.5*8 = 20. The amount of exchange is calculated as: amount of input product * (lifetime of the hotel/lifetime of the product) / (number of guests during the lifetime of the hotel * hotel occupancy rate). Assumed average service life of a vacuum cleaner is 8 years. Source: Gallego-Schmid et al. 2016. Life cycle environmental impacts of vacuum cleaners and the effects of European regulation. Science of the Total Environment, 559, 192-203.
  properties: lifetime 8 year, dry mass 4.45 kg, wet mass 4.45 kg, carbon content, fossil 2.59
- cleaning consumables, without water, in 13.6% solution state: 0.00111781 kg; name clean; = 1740*0.136*(lifetime)/(lifetime_guests*occupancy_y); lognormal variance with pedigree 0.303425, pedigree (2,4,2,2,2)
  Calculated value. The amount of exchange is calculated as: amount of input product * (lifetime of the hotel) / (number of guests during the lifetime of the hotel * hotel occupancy rate). Combined of all instances of use across the hotel operations. Represents the following cleaning luquids: window cleaner, bleach, washing up liquid, insect killer, pine disinfector, odour eliminator. In terms of outputs assumed to have gone to wastewater. As the product "cleaning consumables" is expressed as 100% active substance, the amount of cleaning consumables is multiplied by the average concentration of active substance. According to Golsteijn (2015) the average water content of cleaning consumables is 86.4%, the necessary water input is accounted for with the flow "water, compeltely softened, from decarbonised water, at user". For more information on how the cleaning consumables dataset was created please refer to the relevant dataset in ecoinvent.
  2015, Laura Golsteijn, A compilation of life cycle studies for six household detergent product categories in Europe: the basis for product-specific A.I.S.E. Charter Advanced Sustainability Profiles
  property wet mass 1 kg; name clean_WM
  property carbon content, fossil 0; name clean_C_content_fossil
  property carbon content, non-fossil 0; name clean_C_content_non_fossil
  properties: heating value, net 12.22 MJ, dry mass 1 kg
- municipal solid waste: -3.44828 kg; name msw; = (730000*(lifetime)/(lifetime_guests*occupancy_y) )*-1; lognormal variance with pedigree 0.0454, pedigree (3,4,2,4,4)
  Calculated value based on waste (unsorted) generation data from the hotel survey provided in tons. The amount of exchange is calculated as: amount of input product * (lifetime of the hotel) / (number of guests during the lifetime of the hotel * hotel occupancy rate).
  production volume 2.0294e8 kg; = msw*RP_PV/RP
    Calculated from primary data collection with the hostel.
  property price 0 EUR2005; name msw_price_EUR2005
  properties: dry mass 0.771 kg, water content 0.297017, carbon content, fossil 0.171549, heating value, net 11.74 MJ, carbon content, non-fossil 0.261655, wet mass 1 kg
  note on carbon content, fossil: MSW composition in tab 4.1, ecoinvent v2.2 report 13_I. C content referred to 1 kg DM
- tissue paper: 0.431034 kg; = (9125000*0.01)*(lifetime)/(lifetime_guests*occupancy_y); lognormal variance with pedigree 0.303425, pedigree (2,4,2,2,2)
  Calculated value. The amount of exchange is calculated as: amount of input product * (lifetime of the hotel) / (number of guests during the lifetime of the hotel * hotel occupancy rate). Conversion from meters to kg has been made assuming a roll of 25 meters weights 250 g, so 1 kg of tissue paper is equal to 100 meters. Source: Sainsburys 2018. Andrex Toilet Paper. Available from: https://www.sainsburys.co.uk/webapp/wcs/stores/servlet/gb/groceries/andrex-toilet-tissue--classic-white-16x241-sheets?langId=44&storeId=10151&krypto=6KE3AoChB8jlwzzYGlgparsN%2BBruZBOjUaSVm%2BCnwAT0LLJPLAalDm9DhCtUDzK5uFGmUkJJ%2FMIaDVx%2BGRGKIHdBUxaNbCTzmIQiBcpr497qZYrRt4Kvvy%2BLLO40d8j3%2BY4eQ%2Fk%2BK4BXsq0FOjWLrDLelOp5CVxrDysmNwGM26k%3D&ddkey=https%3Agb%2Fgroceries%2Fandrex-toilet-tissue--classic-white-16x241-sheets Accessed 16 January 2018. In terms of outputs, assumed to have gone to wastewater.
  properties: heating value, net 10.22 MJ, wet mass 1 kg, carbon content, fossil 2.22e-5, carbon content, non-fossil 0.36169, dry mass 0.945 kg, water content 0.0582011
- waste polyethylene: -0.00236183 kg; name waste_polyeth; = (nylon)*-1; lognormal variance with pedigree 0.004025, pedigree (2,4,2,2,2)
  Calculated value. Represents here waste nylon 6.
  production volume 139000 kg; = waste_polyeth*RP_PV/RP
    Calculated from production volume of reference product using the relative outputs.
  property price 0 EUR2005; name waste_polyeth_price_EUR2005
  properties: carbon content, fossil 0.825301, wet mass 1 kg, water content 0.00401606, heating value, net 42.47 MJ, dry mass 0.996 kg
  note on carbon content, fossil: C content in 1 kg DM was calculated using data in Tab A.1, ecoinvent v2.2 report 13_I
- computer, laptop: 5.43626e-5 unit; lognormal variance with pedigree 0.303425, pedigree (2,4,2,2,2)
  Estimated value. The amount of exchange was estimated from the Peru luxury hotel operation dataset.
  properties: carbon content, fossil 0.257799, dry mass 3.15 kg, carbon content, non-fossil 1.2662e-5, wet mass 3.15 kg
- building, luxury hotel: 6.29822e-8 unit; = 1/(lifetime_guests*occupancy_y); lognormal variance with pedigree 0.303425, pedigree (2,4,2,2,2)
  Calculated value. The amount of infrastructure required is calculated based on the lifetime capacity (see properties).;activityLink introduced to establish a direct link to the corresponding regional supply of this product
  property lifetime 75 year; name lifetime
  property lifetime capacity 2.7375e7 guest night; name lifetime_guests; = 1000*365*lifetime
  note on lifetime: Estimated value. The lifetime of a hotel building is assumed to be equal to 75 years which is an average of the 50-100 years' estimates available in the literature. Source: Filimonau et al. 2011. Reviewing the carbon footprint analysis of hotels: Life Cycle Energy Analysis (LCEA) as a holistic method for carbon impact appraisal of tourist accommodation. Journal of Cleaner Production, 19, 1917-1930.
  note on lifetime capacity: The total capacity of the hotel is 1000 guests/day. The lifetime capacity is calculated accordingly.
- tap water: 579.424 kg; name tap_water; = 122664*1000*(lifetime)/(lifetime_guests*occupancy_y); lognormal variance with pedigree 0.303425, pedigree (2,4,2,2,2)
  Calculated value based on consumption data from the hotel survey provided in m3. Assuming 1 m3 of water is equal to1000 kg of water. The amount of exchange is calculated as: amount of input product * (lifetime of the hotel) / (number of guests during the lifetime of the hotel * hotel occupancy rate).
  properties: wet mass 1 kg, water content 2962.17, carbon content, fossil 0.00178991, dry mass 0.000337476 kg
  note on carbon content, fossil: Bicarbonate content is 2.93 mol/m3. CO2 content is 0.1 mol/m3 (ecoinvent v2.2 report 8, Tab 93.1).
- dishwasher: 2.26736e-6 unit; = 6*(lifetime/12,5)/(lifetime_guests*occupancy_y); lognormal variance with pedigree 0.303425, pedigree (2,4,2,2,2)
  Calculated value. The amount of exchange is calculated as: amount of input product * (lifetime of the hotel/lifetime of the product) / (number of guests during the lifetime of the hotel * hotel occupancy rate). Assumed average service life of a dishwasher is 12.5 years. Source: Fulvio and Peiró 2015. Environmental Footprint and Material Efficiency Support for Product Policy. Report on benefits and impacts/costs of options for different potential material efficiency requirements for Dishwashers. JRC Science and Policy Report, March 2015.
  properties: wet mass 50 kg, carbon content, fossil 5.28, dry mass 50 kg, lifetime 12.5 year

## Sampling procedure
Primary data from the hotel supplemented with literature-based calculations and estimates, where appropriate.

## Extrapolations
This dataset has been extrapolated from year 2018 to the year of the calculation (2021). The uncertainty has been adjusted accordingly.
