# treatment of waste plastic, mixture, sanitary landfill

Dataset: EcoSpold 2, unit process
Geography: RoW
Time period: 1994-01-01 to 2021-12-31
Technology level: current
Classification: EcoSpold01Categories: waste management/sanitary landfill
Classification: ISIC rev.4 ecoinvent: 3821:Treatment and disposal of non-hazardous waste
Tags: Treatment; ConvertedDataset
Scenario: Business-as-Usual
System model: Allocation, cut-off by classification
Generated by: Gabor Doka (obsolete)
Published in: Doka G. 2007
Database: ecoinvent
isCopyrightProtected: true
accessRestrictedTo: 1

## General comment
Inventoried waste contains 100% Mixed various plastics; .
waste composition (wet, in ppm): upper heating value 34.05 MJ/kg; lower heating value 30.79 MJ/kg; H2O 153000; O 73717; H 105910; C 633590; S 1406.7; N 6112; P n.a.; B n.a.; Cl 18131; Br 65.319; F 13.717; I n.a.; Ag n.a.; As 1.7729; Ba 174.03; Cd 75.786; Co 29.478; Cr 38.132; Cu 296.41; Hg 0.79234; Mn 74.574; Mo n.a.; Ni 19.222; Pb 435.81; Sb 40.093; Se 1.9596; Sn 24.453; V 268.88; Zn 521.69; Be 0.46656; Sc n.a.; Sr 82.582; Ti 933.13; Tl 0.37325; W n.a.; Si n.a.; Fe 3476.5; Ca n.a.; Al 186.63; K n.a.; Mg n.a.; Na 1367.5;
Share of carbon in waste that is biogenic 0%.
Overall degradability of waste during 100 years: 1%.
[This dataset was already contained in the ecoinvent database version 2. It was not individually updated during the transfer to ecoinvent version 3. Life Cycle Impact Assessment results may still have changed, as they are affected by changes in the supply chain, i.e. in other datasets. This dataset was generated following the ecoinvent quality guidelines for version 2. It may have been subject to central changes described in the ecoinvent version 3 change report (http://www.ecoinvent.org/database/ecoinvent-version-3/reports-of-changes/), and the results of the central updates were reviewed extensively. The changes added e.g. consistent water flows and other information throughout the database. The documentation of this dataset can be found in the ecoinvent reports of version 2, which are still available via the ecoinvent website. The change report linked above covers all central changes that were made during the conversion process.]

## Included activities end
Waste-specific short-term emissions to air via landfill gas incineration and landfill leachate. Burdens from treatment of short-term leachate (0-100a) in wastewater treatment plant (including WWTP sludge disposal in municipal incinerator). Long-term emissions from landfill to groundwater (after base lining failure).

## Geography
Technology encountered in Switzerland in 2000. Landfill includes base seal, leachate collection system, treatment of leachate in municipal wastewater treatment plant.

## Technology
Swiss municipal sanitary landfill for biogenic or untreated municipal waste ('reactive organic landfill'). Landfill gas and leachate collection system. Recultivation and monitoring for 150 years after closure.

## Reference product
- waste plastic, mixture: -1 kg; name RP; By-product classification Waste; CPC 39270: Waste, parings and scrap of plastics
  EcoSpold01Location=CH
  production volume 3.24308e10 kg; name RP_PV; = 600570000000*0.1*0.54
    Estimated value. From UNSTATS the amount of MSW collected in 2009 globally was of 600 570 thousands tonnes (UNSTATS 2011a). Of this approximately 10% was plastic (UNSTATS 2011b). The treatment of waste plastic was determined from UNSTATS (2011c) “Municipal waste treatment” file, as a weighted average of all countries. Based on this it assumed that 54% of waste plastic is landfilled and 19% is incinerated.
    Sources, excel files available on UNSTATS website (<http://unstats.un.org/unsd/default.htm>, accessed 22nd June 2016):
    UNSTATS (2011a) Environmental Indicators and Selected Time Series. Municipal waste collected
    UNSTATS (2011b) Environmental Indicators and Selected Time Series. Composition of Municipal Waste: latest year
    UNSTATS (2011c) Environmental Indicators: Waste. Municipal waste treatment
  property heating value, net 30.79 MJ
    Value taken from the general comment of the treatment dataset.
  property price 0 EUR2005; name RP_price_EUR2005
    Waste products are assigned a price of zero as they are assumed to require further treatment.
  property carbon content, fossil 0.747344
    C content in 1 kg DM was calculated using data in Tab A.2, ecoinvent v2.2 report 13_I
  property carbon content 0.747344
    carbon content on a dry matter basis (reserved; not for manual entry)
  properties: wet mass 1 kg, water content 0.180638, carbon content, non-fossil 0, dry mass 0.847 kg, water in wet mass 0.153 kg, carbon allocation 0.633 kg

## Inputs from technosphere
- sodium hydroxide, without water, in 50% solution state: 1.07e-8 kg; lognormal variance with pedigree 0.512, pedigree (1,1,5,5,1)
  burden from incineration of sludge from wastewater treatment of the short-term leachate (0-100a). uncertainty is calculated from uncertainties in waste composition and transfer coefficients in incinerator and uncertainty of waste decomposition and short-term leaching in sanitary landfill
  EcoSpold01Location=RER
  properties: dry mass 1 kg, heating value, net 3.03 MJ, wet mass 1 kg
- electricity, low voltage: 0 kWh; pedigree (1,1,1,1,1)
  EcoSpold01Location=CH
  burden from wastewater treatment of the short-term leachate (0-100a). Uncertainty calculated from unertainty of the waste composition of this waste, uncertainty in waste decomposition and short-term leaching in sanitary landfill
  Uncertainty: . Uncertainty calculated from unertainty of the waste composition of this waste, uncertainty in waste decomposition and short-term leaching in sanitary landfill
- chemical, inorganic: 2.88e-10 kg; lognormal variance with pedigree 0.882, pedigree (1,1,5,5,1)
  EcoSpold01Location=GLO
  burden from incineration of sludge from wastewater treatment of the short-term leachate (0-100a). uncertainty is calculated from uncertainties in waste composition and transfer coefficients in incinerator and uncertainty of waste decomposition and short-term leaching in sanitary landfill
  properties: dry mass 1 kg, carbon content, fossil 0.003, wet mass 1 kg
  note on carbon content, fossil: This dataset is an unweighted average of 20 inorganic substances (listed in Tab 88.1, ecoinvent v2.2 report 8, part II), being part of the top100 chemicals included in this database. The C-content has also been calculated as an unweighted average of the C content of the substances composing this dataset.
- cement, unspecified: 0 kg; pedigree (1,1,1,1,1)
  burden from incineration of sludge from wastewater treatment of the short-term leachate (0-100a). uncertainty is calculated from uncertainties in waste composition and transfer coefficients in incinerator and uncertainty of waste decomposition and short-term leaching in sanitary landfill
  EcoSpold01Location=CH
  properties: wet mass 1 kg, dry mass 1 kg
- municipal waste incineration facility: 3.07e-14 unit; lognormal variance with pedigree 0.662, pedigree (1,1,5,5,1)
  Burden from incineration of sludge from wastewater treatment of the short-term leachate (0-100a).
  EcoSpold01Location=CH
- process-specific burdens, sanitary landfill: 1 kg; lognormal variance with pedigree 0.042, pedigree (1,1,5,5,1)
  EcoSpold01Location=CH
  demands per kilogram waste. uncertainty is heeded in the module
- wastewater treatment facility, capacity 5E9l/year: 1.42e-11 unit; lognormal variance with pedigree 0.2106, pedigree (5,5,5,5,5)
  burden from wastewater treatment of the short-term leachate (0-100a). Uncertainty calculated from unertainty of the waste composition of this waste, uncertainty in waste decomposition and short-term leaching in sanitary landfill
  EcoSpold01Location=CH
  Uncertainty: . Uncertainty calculated from unertainty of the waste composition of this waste, uncertainty in waste decomposition and short-term leaching in sanitary landfill
- hydrochloric acid, without water, in 30% solution state: 1.73e-10 kg; lognormal variance with pedigree 0.882, pedigree (1,1,5,5,1)
  (same comment as for sodium hydroxide, without water, in 50% solution state)
  properties: heating value, net 3.32 MJ, dry mass 1 kg, wet mass 1 kg
- electricity, high voltage: 0 kWh; pedigree (1,1,1,1,1)
  (same comment as for cement, unspecified)
- titanium dioxide: 6.15e-9 kg; lognormal variance with pedigree 0.842, pedigree (1,1,5,5,1)
  (same comment as for sodium hydroxide, without water, in 50% solution state)
  properties: dry mass 1 kg, wet mass 1 kg
- process-specific burdens, slag landfill: 0 kg; pedigree (1,1,1,1,1)
  (same comment as for cement, unspecified)
- slag landfill: 6.92e-15 unit; lognormal variance with pedigree 0.562, pedigree (1,1,5,5,1)
  EcoSpold01Location=CH
  burden from incineration of sludge from wastewater treatment of the short-term leachate (0-100a). uncertainty is calculated from uncertainties in waste composition and transfer coefficients in incinerator and uncertainty of waste decomposition and short-term leaching in sanitary landfill
- sewer grid, 5E9l/year, 110 km: 5.45e-10 km; lognormal variance with pedigree 0.2106, pedigree (5,5,5,5,5)
  (same comment as for wastewater treatment facility, capacity 5E9l/year)
- heat, district or industrial, natural gas: 0 MJ; pedigree (1,1,1,1,1)
  (same comment as for sodium hydroxide, without water, in 50% solution state)
  properties: heating value, net 1 MJ
- iron (III) chloride, without water, in 40% solution state: 4.88e-8 kg; lognormal variance with pedigree 0.942, pedigree (1,1,5,5,1)
  (same comment as for cement, unspecified)
  properties: wet mass 1 kg, dry mass 1 kg
- heat, district or industrial, other than natural gas: 0 MJ; pedigree (1,1,1,1,1)
  (same comment as for cement, unspecified)
  properties: heating value, net 1 MJ
- chemical, organic: 2.05e-7 kg; lognormal variance with pedigree 1.632, pedigree (1,1,5,5,1)
  (same comment as for chemical, inorganic)
  properties: wet mass 1 kg, carbon content, fossil 0.628, dry mass 1 kg, heating value, net 19.03 MJ
  note on carbon content, fossil: This dataset is an unweighted average of 20 organic substances (listed in Tab 88.1, ecoinvent v2.2 report 8, part II), being part of the top100 chemicals included in this database. The C-content has also been calculated as an unweighted average of the C content of the substances composing this dataset.
- ammonia, anhydrous, liquid: 0 kg; pedigree (1,1,1,1,1)
  (same comment as for cement, unspecified)
  properties: dry mass 1 kg, wet mass 1 kg
- waste cement, hydrated: -8.69e-7 kg; name waste_cement
  (same comment as for cement, unspecified)
  production volume 28182.3 kg; = waste_cement*RP_PV/ABS(RP)
    Calculated from the production volume of waste plastic, mixture, 15.3% water in proportion to the respective output amounts.
  property price 0 EUR2005; name waste_cement_price_EUR2005
  properties: wet mass 1 kg, dry mass 1 kg
- quicklime, milled, packed: 1.93e-9 kg; lognormal variance with pedigree 0.512, pedigree (1,1,5,5,1)
  (same comment as for cement, unspecified)
  properties: water content 0.010101, wet mass 1 kg, dry mass 0.99 kg
- heat, central or small-scale, other than natural gas: 0 MJ; pedigree (1,1,1,1,1)
  (same comment as for electricity, low voltage)
  properties: heating value, net 1 MJ
- waste plastic, mixture: -3.88e-5 kg; name waste_plasticm
  burden from wastewater treatment of the short-term leachate (0-100a). Uncertainty calculated from unertainty of the waste composition of this waste, uncertainty in waste decomposition and short-term leaching in sanitary landfill
  EcoSpold01Location=CH
  production volume 1.25831e6 kg; = waste_plasticm*RP_PV/ABS(RP)
    (same comment as for waste cement, hydrated)
  property price 0 EUR2005; name waste_plasticm_price_EUR2005
  properties: carbon content, fossil 0.747344, heating value, net 30.79 MJ, dry mass 0.847 kg, wet mass 1 kg, water content 0.180638
  note on carbon content, fossil: C content in 1 kg DM was calculated using data in Tab A.2, ecoinvent v2.2 report 13_I
  note on heating value, net: Value taken from the general comment of the treatment dataset.
- sanitary landfill facility: 5.56e-10 unit; lognormal variance with pedigree 0.042, pedigree (1,1,5,5,1)
  EcoSpold01Location=CH
  demands per kilogram waste. uncertainty is heeded in the module
- process-specific burdens, municipal waste incineration: 0 kg; pedigree (1,1,1,1,1)
  (same comment as for municipal waste incineration facility)
- waste graphical paper: -3.88e-5 kg; name waste_gpaper
  (same comment as for waste plastic, mixture)
  production volume 1.25831e6 kg; = waste_gpaper*RP_PV/ABS(RP)
    (same comment as for waste cement, hydrated)
  property price 0 EUR2005; name waste_gpaper_price_EUR2005
  properties: wet mass 1 kg, dry mass 0.888 kg, carbon content, non-fossil 0.454955, water content 0.126126, heating value, net 14.12 MJ
- chromium oxide, flakes: 1.25e-10 kg; lognormal variance with pedigree 0.96, pedigree (5,5,5,5,5)
  burden from incineration of sludge from wastewater treatment of the short-term leachate (0-100a). Proxy for vanadium pentoxide V2O5 in SCR catalyst, uncertainty calculated from uncertainty in average DeNOx input, uncertainty in the share of thermal NOx, uncertainty of nitrogen content in average municipal waste and the unertainty in nitrogen content in *this* waste and uncertainty of waste decomposition and short-term leaching in sanitary landfill
  EcoSpold01Location=RER
  Uncertainty: . Proxy for vanadium pentoxide V2O5 in SCR catalyst, uncertainty calculated from uncertainty in average DeNOx input, uncertainty in the share of thermal NOx, uncertainty of nitrogen content in average municipal waste and the unertainty in nitrogen content in *this* waste and uncertainty of waste decomposition and short-term leaching in sanitary landfill
  properties: dry mass 1 kg, wet mass 1 kg
- process-specific burdens, residual material landfill: 0 kg; pedigree (1,1,1,1,1)
  (same comment as for slag landfill)
- residual material landfill: 1.81e-15 unit; lognormal variance with pedigree 0.452, pedigree (1,1,5,5,1)
  (same comment as for cement, unspecified)
- electricity, low voltage: 9.36442e-6, 1.70508e-6, 3.84902e-5, 0.000134476, 2.74539e-5, 0.000421506, 6.81922e-5, 0.000195813 kWh (8 entries); lognormal variance with pedigree 0.49, pedigree (5,5,5,5,5)
  (same comment as for electricity, low voltage)
- cement, unspecified: 5.02497e-8, 1.04555e-8, 7.65792e-10, 2.18276e-9, 4.93638e-8, 1.45292e-9, 1.59574e-8, 1.93066e-9, 2.15642e-7 kg (9 entries); lognormal variance with pedigree 0.462, pedigree (1,1,5,5,1)
  (same comment as for cement, unspecified)
- electricity, high voltage: 2.09508e-7, 4.01647e-8, 9.25137e-7, 6.80991e-7, 9.80601e-6, 1.55514e-6, 4.48304e-6 kWh (7 entries); lognormal variance with pedigree 1.032, pedigree (1,1,5,5,1)
  (same comment as for cement, unspecified)
- process-specific burdens, slag landfill: 1.10038e-6, 2.78962e-6 kg (2 entries); lognormal variance with pedigree 0.562, pedigree (1,1,5,5,1)
  (same comment as for cement, unspecified)
- heat, district or industrial, natural gas: 8.75031e-7, 2.09674e-5, 5.67755e-5 MJ (3 entries); lognormal variance with pedigree 0.592, pedigree (1,1,5,5,1)
  (same comment as for sodium hydroxide, without water, in 50% solution state)
- heat, district or industrial, other than natural gas: 4.17505e-8, 0.000102958 MJ (2 entries); lognormal variance with pedigree 0.662, pedigree (1,1,5,5,1)
  (same comment as for cement, unspecified)
- ammonia, anhydrous, liquid: 4.50668e-8, 3.87403e-9, 6.027e-9, 1.19416e-8, 1.16996e-8, 1.22625e-9, 5.48178e-9, 1.29683e-7 kg (8 entries); lognormal variance with pedigree 0.592, pedigree (1,1,5,5,1)
  (same comment as for cement, unspecified)
- heat, central or small-scale, other than natural gas: 5.87104e-7, 4.27469e-5 MJ (2 entries); lognormal variance with pedigree 0.23, pedigree (5,5,5,5,5)
  (same comment as for electricity, low voltage)
- process-specific burdens, municipal waste incineration: 3.47936e-5, 8.82064e-5 kg (2 entries); lognormal variance with pedigree 0.662, pedigree (1,1,5,5,1)
  (same comment as for municipal waste incineration facility)
- process-specific burdens, residual material landfill: 2.45818e-7, 6.23182e-7 kg (2 entries); lognormal variance with pedigree 0.452, pedigree (1,1,5,5,1)
  (same comment as for slag landfill)

## Emissions to nature
- Cobalt [air, non-urban air or from high stacks]: 2.37e-11 kg; lognormal variance with pedigree 2.762, pedigree (1,1,5,5,1)
  burden from direct release or incineration of landfill biogas. Uncertainty calculated from unertainty of the waste composition of this waste, uncertainty in waste decomposition and short-term leaching in sanitary landfill
- Selenium [water, surface water]: 1.38e-9 kg; lognormal variance with pedigree 2.172, pedigree (1,1,5,5,1)
  Emissions from short-term leachate treatment and incineration of resulting sludge. Uncertainty calculated depending on waste input and uncertainty of transfer coefficents in landfill, wastewater treatment and incineration model.
- DOC, Dissolved Organic Carbon [water, surface water]: 2.83e-5 kg; lognormal variance with pedigree 0.872, pedigree (1,1,5,5,1)
  (same comment as for Selenium)
- Barium [air, urban air close to ground]: 1.87e-9 kg; lognormal variance with pedigree 1.322, pedigree (1,1,5,5,1)
  (same comment as for Selenium)
- Lead [air, urban air close to ground]: 8.49e-13 kg; lognormal variance with pedigree 1.892, pedigree (1,1,5,5,1)
  (same comment as for Selenium)
- Cadmium [air, urban air close to ground]: 3.65e-12 kg; lognormal variance with pedigree 1.672, pedigree (1,1,5,5,1)
  (same comment as for Selenium)
- Bromine [water, ground-, long-term]: 6.37e-5 kg; lognormal variance with pedigree 1.062, pedigree (1,1,5,5,1)
  Emissions from long-term leachate (>100a) directly from MSW landfill and indirectly via incineration of treatement sludge from leachate treatement. Uncertainty calculated depending on waste input and uncertainty of long-term transfer coefficents in landfill.
- Beryllium [air, urban air close to ground]: 1.34e-13 kg; lognormal variance with pedigree 2.472, pedigree (1,1,5,5,1)
  (same comment as for Selenium)
- Chloride [water, ground-, long-term]: 0.0177 kg; lognormal variance with pedigree 0.342, pedigree (1,1,5,5,1)
  (same comment as for Bromine)
- Arsenic [air, non-urban air or from high stacks]: 4.46e-11 kg; lognormal variance with pedigree 2.672, pedigree (1,1,5,5,1)
  (same comment as for Cobalt)
- Tin, ion [water, surface water]: 6.03e-10 kg; lognormal variance with pedigree 2.222, pedigree (1,1,5,5,1)
  (same comment as for Selenium)
- Nickel, ion [water, surface water]: 6.78e-9 kg; lognormal variance with pedigree 1.942, pedigree (1,1,5,5,1)
  (same comment as for Selenium)
- Carbon monoxide, fossil [air, urban air close to ground]: 3.43e-7 kg; lognormal variance with pedigree 0.922, pedigree (1,1,5,5,1)
  (same comment as for Selenium)
- Sodium, ion [water, ground-, long-term]: 0.00131 kg; lognormal variance with pedigree 0.662, pedigree (1,1,5,5,1)
  (same comment as for Bromine)
- Antimony [air, non-urban air or from high stacks]: 1.06e-11 kg; lognormal variance with pedigree 2.862, pedigree (1,1,5,5,1)
  (same comment as for Cobalt)
- Copper [air, non-urban air or from high stacks]: 4.15e-12 kg; lognormal variance with pedigree 2.952, pedigree (1,1,5,5,1)
  (same comment as for Cobalt)
- Vanadium, ion [water, ground-, long-term]: 7.82e-5 kg; lognormal variance with pedigree 1.252, pedigree (1,1,5,5,1)
  (same comment as for Bromine)
- Tin, ion [water, ground-, long-term]: 2.45e-5 kg; lognormal variance with pedigree 1.192, pedigree (1,1,5,5,1)
  (same comment as for Bromine)
- Iron, ion [water, surface water]: 2.42e-7 kg; lognormal variance with pedigree 1.462, pedigree (1,1,5,5,1)
  (same comment as for Selenium)
- Iron [air, non-urban air or from high stacks]: 1.19e-10 kg; lognormal variance with pedigree 2.522, pedigree (1,1,5,5,1)
  (same comment as for Cobalt)
- TOC, Total Organic Carbon [water, ground-, long-term]: 0.161 kg; lognormal variance with pedigree 0.512, pedigree (1,1,5,5,1)
  (same comment as for Bromine)
- Sulfate [water, ground-, long-term]: 0.00391 kg; lognormal variance with pedigree 0.652, pedigree (1,1,5,5,1)
  (same comment as for Bromine)
- Aluminium [air, urban air close to ground]: 1.37e-10 kg; lognormal variance with pedigree 1.702, pedigree (1,1,5,5,1)
  (same comment as for Selenium)
- Thallium [air, urban air close to ground]: 1.07e-13 kg; lognormal variance with pedigree 2.502, pedigree (1,1,5,5,1)
  (same comment as for Selenium)
- Lead [water, surface water]: 2.82e-9 kg; lognormal variance with pedigree 1.842, pedigree (1,1,5,5,1)
  (same comment as for Selenium)
- Bromine [water, surface water]: 1.64e-6 kg; lognormal variance with pedigree 1.322, pedigree (1,1,5,5,1)
  Emissions from short-term leachate treatment. Uncertainty calculated depending on waste input and uncertainty of transfer coefficents in landfill and wastewater treatment.
- COD, Chemical Oxygen Demand [water, surface water]: 0.000116 kg; lognormal variance with pedigree 0.862, pedigree (1,1,5,5,1)
  (same comment as for Selenium)
- Mercury [air, urban air close to ground]: 0 kg; pedigree (1,1,1,1,1)
  (same comment as for Selenium)
- Chromium VI [water, surface water]: 2.28e-9 kg; lognormal variance with pedigree 2.072, pedigree (1,1,5,5,1)
  (same comment as for Selenium)
- Nitrite [water, ground-, long-term]: 0.000132 kg; lognormal variance with pedigree 0.472, pedigree (1,1,5,5,1)
  (same comment as for Bromine)
- Vanadium [air, non-urban air or from high stacks]: 7.09e-11 kg; lognormal variance with pedigree 2.602, pedigree (1,1,5,5,1)
  (same comment as for Cobalt)
- Methane, fossil [air, non-urban air or from high stacks]: 0.00243 kg; lognormal variance with pedigree 0.462, pedigree (1,1,5,5,1)
  (same comment as for Cobalt)
- Arsenic, ion [water, ground-, long-term]: 1.77e-6 kg; lognormal variance with pedigree 1.532, pedigree (1,1,5,5,1)
  (same comment as for Bromine)
- Hydrogen sulfide [water, ground-, long-term]: 0.000102 kg; lognormal variance with pedigree 0.652, pedigree (1,1,5,5,1)
  (same comment as for Bromine)
- Lead [water, ground-, long-term]: 0.000436 kg; lognormal variance with pedigree 0.812, pedigree (1,1,5,5,1)
  (same comment as for Bromine)
- Bromine [air, non-urban air or from high stacks]: 2.31e-8 kg; lognormal variance with pedigree 1.852, pedigree (1,1,5,5,1)
  (same comment as for Cobalt)
- Beryllium [air, non-urban air or from high stacks]: 6.78e-14 kg; lognormal variance with pedigree 3.512, pedigree (1,1,5,5,1)
  (same comment as for Cobalt)
- Cadmium, ion [water, ground-, long-term]: 7.57e-5 kg; lognormal variance with pedigree 1.042, pedigree (1,1,5,5,1)
  (same comment as for Bromine)
- Copper, ion [water, surface water]: 3.77e-9 kg; lognormal variance with pedigree 1.912, pedigree (1,1,5,5,1)
  (same comment as for Selenium)
- Antimony [air, urban air close to ground]: 2.08e-12 kg; lognormal variance with pedigree 2.412, pedigree (1,1,5,5,1)
  (same comment as for Selenium)
- Nickel, ion [water, ground-, long-term]: 1.92e-5 kg; lognormal variance with pedigree 1.222, pedigree (1,1,5,5,1)
  (same comment as for Bromine)
- Titanium [air, urban air close to ground]: 2.3e-10 kg; lognormal variance with pedigree 1.492, pedigree (1,1,5,5,1)
  (same comment as for Selenium)
- NMVOC, non-methane volatile organic compounds, unspecified origin [air, urban air close to ground]: 4.71e-9 kg; lognormal variance with pedigree 1.032, pedigree (1,1,5,5,1)
  (same comment as for Selenium)
- Thallium [water, surface water]: 1.1e-10 kg; lognormal variance with pedigree 2.462, pedigree (1,1,5,5,1)
  (same comment as for Selenium)
- Manganese [water, surface water]: 4.33e-7 kg; lognormal variance with pedigree 1.392, pedigree (1,1,5,5,1)
  (same comment as for Selenium)
- Sulfate [water, surface water]: 1.6e-5 kg; lognormal variance with pedigree 1.142, pedigree (1,1,5,5,1)
  (same comment as for Bromine)
- Cobalt [water, surface water]: 4.81e-8 kg; lognormal variance with pedigree 1.662, pedigree (1,1,5,5,1)
  (same comment as for Selenium)
- NMVOC, non-methane volatile organic compounds, unspecified origin [air, non-urban air or from high stacks]: 1.7e-8 kg; lognormal variance with pedigree 0.462, pedigree (1,1,5,5,1)
  (same comment as for Cobalt)
- Manganese [air, urban air close to ground]: 2.29e-15 kg; lognormal variance with pedigree 1.532, pedigree (1,1,5,5,1)
  (same comment as for Selenium)
- Vanadium, ion [water, surface water]: 1.44e-7 kg; lognormal variance with pedigree 1.522, pedigree (1,1,5,5,1)
  (same comment as for Selenium)
- Nitrogen oxides [air, urban air close to ground]: 1.33e-6 kg; lognormal variance with pedigree 0.502, pedigree (1,1,5,5,1)
  (same comment as for Selenium)
- Chromium VI [water, ground-, long-term]: 1.73e-7 kg; lognormal variance with pedigree 8.412, pedigree (1,1,5,5,1)
  (same comment as for Bromine)
- Cyanide [air, urban air close to ground]: 3.83e-9 kg; lognormal variance with pedigree 0.612, pedigree (1,1,5,5,1)
  (same comment as for Selenium)
- Strontium [water, surface water]: 2.44e-8 kg; lognormal variance with pedigree 1.752, pedigree (1,1,5,5,1)
  (same comment as for Selenium)
- DOC, Dissolved Organic Carbon [water, ground-, long-term]: 0.161 kg; lognormal variance with pedigree 0.512, pedigree (1,1,5,5,1)
  (same comment as for Bromine)
- Nitrite [water, surface water]: 1.55e-6 kg; lognormal variance with pedigree 0.732, pedigree (1,1,5,5,1)
  (same comment as for Selenium)
- Titanium, ion [water, ground-, long-term]: 0.000933 kg; lognormal variance with pedigree 0.712, pedigree (1,1,5,5,1)
  (same comment as for Bromine)
- Titanium, ion [water, surface water]: 2.37e-7 kg; lognormal variance with pedigree 1.462, pedigree (1,1,5,5,1)
  (same comment as for Selenium)
- Mercury [air, non-urban air or from high stacks]: 2.17e-10 kg; lognormal variance with pedigree 2.462, pedigree (1,1,5,5,1)
  (same comment as for Cobalt)
- Zinc, ion [water, ground-, long-term]: 0.000431 kg; lognormal variance with pedigree 0.792, pedigree (1,1,5,5,1)
  (same comment as for Bromine)
- Zinc [air, non-urban air or from high stacks]: 5.49e-11 kg; lognormal variance with pedigree 2.632, pedigree (1,1,5,5,1)
  (same comment as for Cobalt)
- Iron [air, urban air close to ground]: 7.85e-12 kg; lognormal variance with pedigree 1.512, pedigree (1,1,5,5,1)
  (same comment as for Selenium)
- TOC, Total Organic Carbon [water, surface water]: 2.94e-5 kg; lognormal variance with pedigree 0.862, pedigree (1,1,5,5,1)
  (same comment as for Selenium)
- Arsenic, ion [water, surface water]: 2.81e-9 kg; lognormal variance with pedigree 2.112, pedigree (1,1,5,5,1)
  (same comment as for Selenium)
- Aluminium [water, ground-, long-term]: 0.000187 kg; lognormal variance with pedigree 0.922, pedigree (1,1,5,5,1)
  (same comment as for Bromine)
- Manganese [water, ground-, long-term]: 7.25e-5 kg; lognormal variance with pedigree 1.032, pedigree (1,1,5,5,1)
  (same comment as for Bromine)
- Hydrogen fluoride [air, non-urban air or from high stacks]: 5.47e-8 kg; lognormal variance with pedigree 1.752, pedigree (1,1,5,5,1)
  (same comment as for Cobalt)
- Strontium [water, ground-, long-term]: 8.26e-5 kg; lognormal variance with pedigree 1.032, pedigree (1,1,5,5,1)
  (same comment as for Bromine)
- Ammonium, ion [water, ground-, long-term]: 0.00243 kg; lognormal variance with pedigree 0.472, pedigree (1,1,5,5,1)
  (same comment as for Bromine)
- Barium [water, ground-, long-term]: 0.000174 kg; lognormal variance with pedigree 0.912, pedigree (1,1,5,5,1)
  (same comment as for Bromine)
- Sodium [air, non-urban air or from high stacks]: 1.41e-8 kg; lognormal variance with pedigree 1.912, pedigree (1,1,5,5,1)
  (same comment as for Cobalt)
- Ammonium, ion [water, surface water]: 7.39e-5 kg; lognormal variance with pedigree 0.532, pedigree (1,1,5,5,1)
  (same comment as for Selenium)
- Nickel [air, non-urban air or from high stacks]: 2.79e-12 kg; lognormal variance with pedigree 3.032, pedigree (1,1,5,5,1)
  (same comment as for Cobalt)
- Fluoride [water, surface water]: 1.01e-8 kg; lognormal variance with pedigree 1.962, pedigree (1,1,5,5,1)
  (same comment as for Bromine)
- Cadmium [air, non-urban air or from high stacks]: 8.89e-10 kg; lognormal variance with pedigree 2.282, pedigree (1,1,5,5,1)
  (same comment as for Cobalt)
- Carbon monoxide, fossil [air, non-urban air or from high stacks]: 8.99e-7 kg; lognormal variance with pedigree 1.062, pedigree (1,1,5,5,1)
  (same comment as for Cobalt)
- Chromium [air, non-urban air or from high stacks]: 1.09e-12 kg; lognormal variance with pedigree 3.142, pedigree (1,1,5,5,1)
  (same comment as for Cobalt)
- Cadmium, ion [water, surface water]: 6.77e-8 kg; lognormal variance with pedigree 1.612, pedigree (1,1,5,5,1)
  (same comment as for Selenium)
- BOD5, Biological Oxygen Demand [water, surface water]: 3.66e-5 kg; lognormal variance with pedigree 0.872, pedigree (1,1,5,5,1)
  (same comment as for Selenium)
- Carbon dioxide, fossil [air, non-urban air or from high stacks]: 0.0159 kg; lognormal variance with pedigree 0.422, pedigree (1,1,5,5,1)
  (same comment as for Cobalt)
- Fluoride [water, ground-, long-term]: 1.37e-5 kg; lognormal variance with pedigree 1.272, pedigree (1,1,5,5,1)
  (same comment as for Bromine)
- Beryllium [water, surface water]: 1.38e-10 kg; lognormal variance with pedigree 2.442, pedigree (1,1,5,5,1)
  (same comment as for Selenium)
- Lead [air, non-urban air or from high stacks]: 8.56e-12 kg; lognormal variance with pedigree 2.862, pedigree (1,1,5,5,1)
  (same comment as for Cobalt)
- Cobalt [air, urban air close to ground]: 1.48e-15 kg; lognormal variance with pedigree 1.792, pedigree (1,1,5,5,1)
  (same comment as for Selenium)
- Nickel [air, urban air close to ground]: 0 kg; pedigree (1,1,1,1,1)
  (same comment as for Selenium)
- Zinc, ion [water, surface water]: 7.64e-8 kg; lognormal variance with pedigree 1.532, pedigree (1,1,5,5,1)
  (same comment as for Selenium)
- Ammonia [air, urban air close to ground]: 1.36e-7 kg; lognormal variance with pedigree 0.512, pedigree (1,1,5,5,1)
  (same comment as for Selenium)
- Sulfur dioxide [air, non-urban air or from high stacks]: 1.84e-6 kg; lognormal variance with pedigree 1.362, pedigree (1,1,5,5,1)
  (same comment as for Cobalt)
- Barium [water, surface water]: 1.2e-7 kg; lognormal variance with pedigree 1.302, pedigree (1,1,5,5,1)
  (same comment as for Selenium)
- Selenium [air, non-urban air or from high stacks]: 5.17e-13 kg; lognormal variance with pedigree 3.252, pedigree (1,1,5,5,1)
  (same comment as for Cobalt)
- Mercury [water, ground-, long-term]: 7.92e-7 kg; lognormal variance with pedigree 1.632, pedigree (1,1,5,5,1)
  (same comment as for Bromine)
- Copper, ion [water, ground-, long-term]: 0.000296 kg; lognormal variance with pedigree 0.862, pedigree (1,1,5,5,1)
  (same comment as for Bromine)
- Aluminium [air, non-urban air or from high stacks]: 2.33e-11 kg; lognormal variance with pedigree 2.742, pedigree (1,1,5,5,1)
  (same comment as for Cobalt)
- Mercury [water, surface water]: 1.72e-10 kg; lognormal variance with pedigree 2.342, pedigree (1,1,5,5,1)
  (same comment as for Selenium)
- Particulates, < 2.5 um [air, non-urban air or from high stacks]: 3.02e-7 kg; lognormal variance with pedigree 0.722, pedigree (1,1,5,5,1)
  (same comment as for Cobalt)
- Nitrogen [water, surface water]: 2e-6 kg; lognormal variance with pedigree 0.482, pedigree (1,1,5,5,1)
  (same comment as for Selenium)
- Carbon dioxide, fossil [air, urban air close to ground]: 0.00053 kg; lognormal variance with pedigree 0.862, pedigree (1,1,5,5,1)
  (same comment as for Selenium)
- Methane, fossil [air, urban air close to ground]: 1.04e-6 kg; lognormal variance with pedigree 0.912, pedigree (1,1,5,5,1)
  (same comment as for Selenium)
- Sodium, ion [water, surface water]: 5.66e-5 kg; lognormal variance with pedigree 0.862, pedigree (1,1,5,5,1)
  (same comment as for Bromine)
- Antimony [water, surface water]: 2.87e-8 kg; lognormal variance with pedigree 1.772, pedigree (1,1,5,5,1)
  (same comment as for Selenium)
- Iron, ion [water, ground-, long-term]: 0.000244 kg; lognormal variance with pedigree 2.312, pedigree (1,1,5,5,1)
  (same comment as for Bromine)
- Arsenic [air, urban air close to ground]: 8.96e-13 kg; lognormal variance with pedigree 2.152, pedigree (1,1,5,5,1)
  (same comment as for Selenium)
- Thallium [water, ground-, long-term]: 3.73e-7 kg; lognormal variance with pedigree 1.732, pedigree (1,1,5,5,1)
  (same comment as for Bromine)
- Tin [air, non-urban air or from high stacks]: 3.6e-13 kg; lognormal variance with pedigree 3.282, pedigree (1,1,5,5,1)
  (same comment as for Cobalt)
- Manganese [air, non-urban air or from high stacks]: 2.14e-10 kg; lognormal variance with pedigree 2.462, pedigree (1,1,5,5,1)
  (same comment as for Cobalt)
- Selenium [air, urban air close to ground]: 0 kg; pedigree (1,1,1,1,1)
  (same comment as for Selenium)
- Barium [air, non-urban air or from high stacks]: 4.98e-10 kg; lognormal variance with pedigree 2.352, pedigree (1,1,5,5,1)
  (same comment as for Cobalt)
- Zinc [air, urban air close to ground]: 2.79e-12 kg; lognormal variance with pedigree 1.602, pedigree (1,1,5,5,1)
  (same comment as for Selenium)
- Dinitrogen monoxide [air, urban air close to ground]: 3.76e-7 kg; lognormal variance with pedigree 0.452, pedigree (1,1,5,5,1)
  (same comment as for Selenium)
- Nitrate [water, surface water]: 0.000269 kg; lognormal variance with pedigree 0.472, pedigree (1,1,5,5,1)
  (same comment as for Selenium)
- Beryllium [water, ground-, long-term]: 4.66e-7 kg; lognormal variance with pedigree 1.702, pedigree (1,1,5,5,1)
  (same comment as for Bromine)
- Chromium, ion [water, surface water]: 6.82e-12 kg; lognormal variance with pedigree 2.102, pedigree (1,1,5,5,1)
  (same comment as for Selenium)
- Chloride [water, surface water]: 0.000457 kg; lognormal variance with pedigree 0.602, pedigree (1,1,5,5,1)
  (same comment as for Bromine)
- Thallium [air, non-urban air or from high stacks]: 5.42e-14 kg; lognormal variance with pedigree 3.542, pedigree (1,1,5,5,1)
  (same comment as for Cobalt)
- Aluminium [water, surface water]: 5.6e-9 kg; lognormal variance with pedigree 1.662, pedigree (1,1,5,5,1)
  (same comment as for Selenium)
- Strontium [air, urban air close to ground]: 2.36e-12 kg; lognormal variance with pedigree 1.802, pedigree (1,1,5,5,1)
  (same comment as for Selenium)
- Nitrogen oxides [air, non-urban air or from high stacks]: 3.94e-8 kg; lognormal variance with pedigree 1.102, pedigree (1,1,5,5,1)
  (same comment as for Cobalt)
- Selenium [water, ground-, long-term]: 5.53e-7 kg; lognormal variance with pedigree 1.922, pedigree (1,1,5,5,1)
  (same comment as for Bromine)
- COD, Chemical Oxygen Demand [water, ground-, long-term]: 0.176 kg; lognormal variance with pedigree 0.512, pedigree (1,1,5,5,1)
  (same comment as for Bromine)
- Nitrogen, organic bound [water, ground-, long-term]: 0.00397 kg; lognormal variance with pedigree 0.472, pedigree (1,1,5,5,1)
  (same comment as for Bromine)
- Nitrate [water, ground-, long-term]: 0.000256 kg; lognormal variance with pedigree 0.472, pedigree (1,1,5,5,1)
  (same comment as for Bromine)
- BOD5, Biological Oxygen Demand [water, ground-, long-term]: 0.0416 kg; lognormal variance with pedigree 0.512, pedigree (1,1,5,5,1)
  (same comment as for Bromine)
- Copper [air, urban air close to ground]: 7.94e-14 kg; lognormal variance with pedigree 1.982, pedigree (1,1,5,5,1)
  (same comment as for Selenium)
- Strontium [air, non-urban air or from high stacks]: 1.2e-11 kg; lognormal variance with pedigree 2.832, pedigree (1,1,5,5,1)
  (same comment as for Cobalt)
- Hydrogen chloride [air, non-urban air or from high stacks]: 6.58e-6 kg; lognormal variance with pedigree 1.132, pedigree (1,1,5,5,1)
  (same comment as for Cobalt)
- Cobalt [water, ground-, long-term]: 2.94e-5 kg; lognormal variance with pedigree 1.162, pedigree (1,1,5,5,1)
  (same comment as for Bromine)
- Titanium [air, non-urban air or from high stacks]: 1.17e-10 kg; lognormal variance with pedigree 2.532, pedigree (1,1,5,5,1)
  (same comment as for Cobalt)
- Chromium [air, urban air close to ground]: 0 kg; pedigree (1,1,1,1,1)
  (same comment as for Selenium)
- Tin [air, urban air close to ground]: 1.11e-12 kg; lognormal variance with pedigree 2.252, pedigree (1,1,5,5,1)
  (same comment as for Selenium)
- Antimony [water, ground-, long-term]: 4.03e-6 kg; lognormal variance with pedigree 2.442, pedigree (1,1,5,5,1)
  (same comment as for Bromine)
- Vanadium [air, urban air close to ground]: 1.4e-11 kg; lognormal variance with pedigree 1.572, pedigree (1,1,5,5,1)
  (same comment as for Selenium)

## Sampling procedure
Landfill model based on observed leachate concentrations in literature. Extrapolated to 60'000 years heeding chemical characteristics. Initial waste composition from various literature sources.

## Extrapolations
This dataset has been copied from an original dataset covering the geography CH. The uncertainty has been adjusted accordingly.

## Review by Niels Jungbluth 2003-07-21
Passed. Calculation for standard deviation 95 of, i.e., infrastructure,
land occupation, transport services or other services can differ from
standard Pedigree approach used in this project and figures obtained by
this procedure.

## Review by Emilia Moreno Ruiz 2012-11-30
Legacy link converted in Activity link
