# potato production

Dataset: EcoSpold 2, unit process
Geography: CN
Time period: 2003-01-01 to 2021-12-31
Technology level: current
Classification: ISIC rev.4 ecoinvent: 0113:Growing of vegetables and melons, roots and tubers
Tags: WFLDB
Scenario: Business-as-Usual
System model: Allocation, cut-off by classification
Generated by: Tuija Waldvogel
Published in: Nemecek T. 2015
Database: ecoinvent
isCopyrightProtected: true
accessRestrictedTo: 1

## General comment
This dataset represents the production of 1 kg of potato. The average yield from 2003 - 2013 is 15.5 t/ha. The data are representative for potato production in from northwest China, which is not representative for export. Mineral NPK fertiliser input is 160-80-80 kg/ha. Organic fertilisers applied amount to 2 m3/ha of liquid manure and 2 t/ha of solid manure. Total active ingredients (a.i.) applied as pesticides amount to 2.76 kg a.i./ha.
The dataset was modelled within the project 'World Food LCA database (WFLDB)'. The aim of this project was to provide inventories of a broad variety of agricultural products and processes and to cover for each product at least 50% of the global export market. The share of potatoes produced in China amounts to 24% of the global production (tonnage produced in 2010). The production system regarded in this dataset aimed at representing potatoes produced in China for the export market.
PEF-Quality: data quality rating (DQR) = 2.5 (i.e. good quality). This dataset refers to an average situation; for specific situations exchanges might differ substantially due to site specific parameters

## Included activities start
This activity starts with soil cultivation after the harvest of the previous crop.

## Included activities end
This activity ends with the harvest of potatoes at farm gate. The dataset includes all machine operations, corresponding infrastructure, fuel use and sheds. Machine operations are: soil cultivation, sowing, fertilisation, pesticide application, harvesting, and on-farm transport. Further, direct field emissions and land use change are included. Heavy metal uptake by the crop is considered. The inputs of seeds, fertilisers and pesticides as well as packaging of fertilisers and pesticides are considered. The dataset doesn't include emissions from manure storage because these are within the system boundary of animal production.
Statistical data from FAO used to assess land use change is incomplete for China. The original land use of 40.9% of annual cropland and 100% of perennial cropland transformed in the last 20 years is unknown. Land use change impacts may therefore be underestimated.

## Technology
Conventional production

## Parameters
- LUC_crop_specific: 1 dimensionless
  This parameter allows to switch between a 'crop specific' and a 'country specific' approach when calculating the LUC of a crop. By default, the chosen approach is 'crop specific', so the value of the parameter is 1. If you want to apply a 'country specific' approach, turn the parameter to 0.
- heavyMetalUptakeSwitch: 1 dimensionless

## Reference product
- potato: 1 kg; CPC 01510: Potatoes; By-product classification allocatable product
  Reference flow: Yield = 15543 kg/ha
  production volume 8.40095e10 kg
    Source: FAOSTAT. Average, 2009-2012
  property price 0.28 EUR2005
    Calculated value based on data from United Nations Commodity Trade Statistics Database (comtrade.un.org). UN comtrade category: 1701 Potatoes, fresh or chilled. Using exchange rate of 1EURO = 1.209 USD. Average of price of import into 5 main markets (EU, US, JP, IN and CN).
  property carbon content 0.4282
    carbon content on a dry matter basis (reserved; not for manual entry)
  properties: dry mass 0.22 kg, water in wet mass 0.78 kg, wet mass 1 kg, carbon content, fossil 0, carbon content, non-fossil 0.4282, water content 3.54545, carbon allocation 0.0942039 kg

## Inputs from technosphere
- tillage, ploughing: 6.43376e-5 ha; source Xu S. 2015; lognormal variance with pedigree 0.124177, pedigree (2,1,4,1,1)
  Literature value or expert estimation (Xu et al. 2015).
- packaging, for pesticides: 0.000355658 kg; lognormal variance with pedigree 0.0592, pedigree (4,3,4,5,4)
  Total amount of active substance/s of pesticides needed for the production of potato is calculated to be circa 1.78E-04 kg. Pesticide/s used in this dataset is/are: '[sulfonyl]urea-compound', '[thio]carbamate-compound', 'benzimidazole-compound', 'bipyridylium-compound', 'dithiocarbamate-compound', 'nitrile-compound', 'triazine-compound, unspecified'. The total amount of active substance/s is doubled in order to account for the packaging of the dilluted product of pesticide/s that is/are applied. Therefore, 3.56E-04 kg of packaging for pesticides is justified with this exchange.
  properties: heating value, net 25.97 MJ, wet mass 1 kg, carbon content, fossil 0.85714, dry mass 1 kg, price 0.0642 EUR2005
- fertilising, by broadcaster: 6.43376e-5 ha; source Xu S. 2015; lognormal variance with pedigree 0.124177, pedigree (2,1,4,1,1)
  Literature value or expert estimation (Xu et al. 2015).
- potato grading: 1 kg; source Miles Harriman 2015; lognormal variance with pedigree 0.124177, pedigree (2,1,4,1,1)
  Literature value or expert estimation (Personal written communication, Miles Harriman, Yara, 2015). This corresponds to the yield.
- harvesting, by complete harvester, ground crops: 6.43376e-5 ha; source Xu S. 2015; lognormal variance with pedigree 0.124177, pedigree (2,1,4,1,1)
  Literature value or expert estimation (Xu et al. 2015).
- potato haulm cutting: 6.43376e-5 ha; lognormal variance with pedigree 0.124177, pedigree (2,1,4,1,1)
  Estimation based on a modified MEXALCA-approach (Roches et al. 2010; Nemecek et al. 2012): See supporting documentation 'WFLDB-Documentation.pdf' chapter 'Machinery processes' for L2 data (https://ecoquery.ecoinvent.org/File/Reports).
- liquid manure spreading, by vacuum tanker: 0.000128675 m3; lognormal variance with pedigree 0.124177, pedigree (2,1,4,1,1)
  This amount corresponds to the input of liquid manure.
- potato planting: 6.43376e-5 ha; source Xu S. 2015; lognormal variance with pedigree 0.124177, pedigree (2,1,4,1,1)
  Literature value or expert estimation (Xu et al. 2015).
- packaging, for fertilisers: 0.0411761 kg; lognormal variance with pedigree 0.0592, pedigree (4,3,4,5,4)
  Total amount of active substance/s of fertilisers needed for the production of 'potato' is calculated to be circa 2.06E-02 kg. Fertiliser/s used in this dataset is/are: 'ammonium nitrate, as N', 'phosphate fertiliser, as P2O5', 'potassium chloride, as K2O', 'potassium sulfate, as K2O', 'urea, as N'. The total amount of active substance/s is doubled in order to account for the packaging of the dilluted product of fertiliser/s that is/are applied. Therefore, 4.12E-02 kg of packaging for fertilisers is justified with this exchange.
  properties: carbon content, fossil 0.825301, heating value, net 25.01 MJ, price 0.0642 EUR2005, dry mass 1 kg, wet mass 1 kg
  note on carbon content, fossil: Considering a chemical formula (C2H4)n for polyethylene, carbon content-fossil is calculated to be 0.856286 kg of Carbon per kg of dry mass.
- [sulfonyl]urea-compound: 1.73729e-7 kg; lognormal variance with pedigree 0.0138498, pedigree (2,2,4,1,1)
  Proxy: Source for total amount of pesticides: extrapolated from MEXALCA. Active ingredient is calculated based on Ecoinvent dataset 'Potatoes, table, IP, plain region, at farm/kg/CH U'. For calculations see supporting documentation 'WFLDB-Documentation.pdf' (https://ecoquery.ecoinvent.org/File/Reports).
  properties: carbon content, fossil 0.540853, wet mass 1 kg, dry mass 1 kg
- urea: 0.0198615 kg; source Miles Harriman 2015; lognormal variance with pedigree 0.124177, pedigree (2,1,4,1,1)
  The exchange has been updated from 'urea, as N' into 'urea' and therefore its amount has been scaled (multiplied) from 0.0093 kg by 2.1438 kg of 'urea' per kg of 'urea, as N'. Original comment of the exchange is: Calculated based on literature values or expert estimation: The total amount of nutrient (Personal written communication, Miles Harriman, Yara, 2015) multiplied by the share of fertiliser type (Personal written communication, Miles Harriman, Yara, 2015). See supporting documentation 'WFLDB-Documentation.pdf' chapter 'Fertiliser application' for L3 and L4 data (https://ecoquery.ecoinvent.org/File/Reports).
  Corresponds to 144.0 kg/ha
  properties: wet mass 1 kg, carbon content, fossil 0.2, dry mass 1 kg
- transport, tractor and trailer, agricultural: 0.002 metric ton*km; lognormal variance with pedigree 0.162439, pedigree (4,1,4,1,1)
  On-farm transport: Yield (in tonnes) multiplied by the average distance from field to farm. The distance was assumed to be 2 km (proxy).
- inorganic phosphorus fertiliser, as P2O5: 0.00514701 kg; source Miles Harriman 2015; lognormal variance with pedigree 0.124177, pedigree (2,1,4,1,1)
  Calculated based on literature values or expert estimation: The total amount of nutrient (Personal written communication, Miles Harriman, Yara, 2015) multiplied by the share of fertiliser type (Personal written communication, Miles Harriman, Yara, 2015). See supporting documentation 'WFLDB-Documentation.pdf' chapter 'Fertiliser application' for L3 and L4 data (https://ecoquery.ecoinvent.org/File/Reports).
  Corresponds to 80.0 kg/ha
  properties: wet mass 1 kg, dry mass 1 kg
- [thio]carbamate-compound: 1.40721e-5 kg; lognormal variance with pedigree 0.0138498, pedigree (2,2,4,1,1)
  (same comment as for [sulfonyl]urea-compound)
  properties: carbon content, fossil 0.626349, wet mass 1 kg, dry mass 1 kg
- potassium chloride: 0.00806572 kg; source Miles Harriman 2015; lognormal variance with pedigree 0.124177, pedigree (2,1,4,1,1)
  The exchange has been updated from 'potassium chloride, as K2O' into 'potassium chloride' and therefore its amount has been scaled (multiplied) from 0.0051 kg by 1.5829 kg of 'potassium chloride' per kg of 'potassium chloride, as K2O'. Original comment of the exchange is: Calculated based on literature values or expert estimation: The total amount of nutrient (Personal written communication, Miles Harriman, Yara, 2015) multiplied by the share of fertiliser type (Personal written communication, Miles Harriman, Yara, 2015). See supporting documentation 'WFLDB-Documentation.pdf' chapter 'Fertiliser application' for L3 and L4 data (https://ecoquery.ecoinvent.org/File/Reports).
  Corresponds to 79.2 kg/ha
  properties: dry mass 1 kg, wet mass 1 kg
- benzimidazole-compound: 5.69832e-5 kg; lognormal variance with pedigree 0.0138498, pedigree (2,2,4,1,1)
  (same comment as for [sulfonyl]urea-compound)
  properties: wet mass 1 kg, carbon content, fossil 0.529668, dry mass 1 kg
- potassium sulfate: 9.52179e-5 kg; source Miles Harriman 2015; lognormal variance with pedigree 0.124177, pedigree (2,1,4,1,1)
  The exchange has been updated from 'potassium sulfate, as K2O' into 'potassium sulfate' and therefore its amount has been scaled (multiplied) from 0.0001 kg by 1.85 kg of 'potassium sulfate' per kg of 'potassium sulfate, as K2O'. Original comment of the exchange is: Calculated based on literature values or expert estimation: The total amount of nutrient (Personal written communication, Miles Harriman, Yara, 2015) multiplied by the share of fertiliser type (Personal written communication, Miles Harriman, Yara, 2015). See supporting documentation 'WFLDB-Documentation.pdf' chapter 'Fertiliser application' for L3 and L4 data (https://ecoquery.ecoinvent.org/File/Reports).
  Corresponds to 0.8 kg/ha
  properties: wet mass 1 kg, dry mass 1 kg
- bipyridylium-compound: 2.77967e-5 kg; lognormal variance with pedigree 0.0138498, pedigree (2,2,4,1,1)
  (same comment as for [sulfonyl]urea-compound)
  properties: wet mass 1 kg, dry mass 1 kg, carbon content, fossil 0.418929
- manure, liquid, cattle: 0.0691299 kg; source Miles Harriman 2015; lognormal variance with pedigree 0.124177, pedigree (2,1,4,1,1)
  Calculated based on literature values: The total amount of manure (Personal written communication, Miles Harriman, Yara, 2015) multiplied by the country-share of manure per animal category (FAOSTAT 2015). See supporting documentation 'WFLDB-Documentation.pdf' chapter 'Fertiliser application' (https://ecoquery.ecoinvent.org/File/Reports).
  Corresponds to 1.07 m3/ha
  properties: dry mass 0.075 kg, wet mass 1 kg, water content 12.333, carbon content, non-fossil 0.68
- dithiocarbamate-compound: 7.40087e-5 kg; lognormal variance with pedigree 0.0138498, pedigree (2,2,4,1,1)
  (same comment as for [sulfonyl]urea-compound)
  properties: wet mass 1 kg, carbon content, fossil 0.179339, dry mass 1 kg
- manure, liquid, swine: 0.052462 kg; source Miles Harriman 2015; lognormal variance with pedigree 0.124177, pedigree (2,1,4,1,1)
  Calculated based on literature values: The total amount of manure (Personal written communication, Miles Harriman, Yara, 2015) multiplied by the country-share of manure per animal category (FAOSTAT 2015). See supporting documentation 'WFLDB-Documentation.pdf' chapter 'Fertiliser application' (https://ecoquery.ecoinvent.org/File/Reports).
  Corresponds to 0.815 m3/ha
  properties: water content 19, dry mass 0.05 kg, wet mass 1 kg, carbon content, non-fossil 0.64
- nitrile-compound: 2.18899e-6 kg; lognormal variance with pedigree 0.0138498, pedigree (2,2,4,1,1)
  (same comment as for [sulfonyl]urea-compound)
  properties: wet mass 1 kg, carbon content, fossil 0.344995, dry mass 1 kg
- poultry manure, fresh: 0.0035417 kg; source Miles Harriman 2015; lognormal variance with pedigree 0.124177, pedigree (2,1,4,1,1)
  Calculated based on literature values: The total amount of manure (Personal written communication, Miles Harriman, Yara, 2015) multiplied by the country-share of manure per animal category (FAOSTAT 2015). See supporting documentation 'WFLDB-Documentation.pdf' chapter 'Fertiliser application' (https://ecoquery.ecoinvent.org/File/Reports).
  Corresponds to 0.11 m3/ha
  properties: wet mass 1 kg, carbon content, non-fossil 0.33389, dry mass 0.38 kg, water content 1.63158
- triazine-compound, unspecified: 2.60594e-6 kg; lognormal variance with pedigree 0.0138498, pedigree (2,2,4,1,1)
  (same comment as for [sulfonyl]urea-compound)
  properties: dry mass 1 kg, carbon content, fossil 0.475616, wet mass 1 kg
- manure, solid, cattle: 0.0854951 kg; source Miles Harriman 2015; lognormal variance with pedigree 0.124177, pedigree (2,1,4,1,1)
  Calculated based on literature values: The total amount of manure (Personal written communication, Miles Harriman, Yara, 2015) multiplied by the country-share of manure per animal category (FAOSTAT 2015). See supporting documentation 'WFLDB-Documentation.pdf' chapter 'Fertiliser application' (https://ecoquery.ecoinvent.org/File/Reports).
  Corresponds to 1330.0 kg/ha
  properties: wet mass 1 kg, dry mass 0.22 kg, carbon content, non-fossil 0.441, water content 3.5454
- potato seed, Swiss integrated production, for setting: 0.160844 kg; lognormal variance with pedigree 0.124177, pedigree (2,1,4,1,1)
  Proxy: Similar crop and country used. Planting density: 2500kg/ha
  properties: dry mass 0.22 kg, water content 3.54545, wet mass 1 kg, carbon content, non-fossil 0.4282
- poultry manure, dried: 0.0431802 kg; source Miles Harriman 2015; lognormal variance with pedigree 0.124177, pedigree (2,1,4,1,1)
  Calculated based on literature values: The total amount of manure (Personal written communication, Miles Harriman, Yara, 2015) multiplied by the country-share of manure per animal category (FAOSTAT 2015). See supporting documentation 'WFLDB-Documentation.pdf' chapter 'Fertiliser application' (https://ecoquery.ecoinvent.org/File/Reports).
  Corresponds to 671.0 kg/ha
  properties: nitrogen content 0.532, dry mass 0.865 kg, wet mass 1 kg, phosphorus content 0.0167, lead content 2.92e-6, copper content 4.38e-5, nickel content 4e-5, mercury content 2e-7, potassium content 0.024, carbon content, non-fossil 0.33389, zinc content 0.000349, water content 0.156069, cadmium content 2.92e-7
- irrigation: 0.047386 m3; lognormal variance with pedigree 0.124177, pedigree (2,1,4,1,1)
  Calculated value: The total amount of water used for irrigation (calculated from evapotranspiration, Pfister et al. 2011) multiplied by the country-share of irrigation technique (Li et al. 2015). See supporting documentation 'WFLDB-Documentation.pdf' chapter 'Water use for irrigation' for L1 data (https://ecoquery.ecoinvent.org/File/Reports).
  properties: dry mass 0.11 kg, wet mass 1000 kg, water content 9089.91
- solid manure loading and spreading, by hydraulic loader and spreader: 0.128675 kg; lognormal variance with pedigree 0.124177, pedigree (2,1,4,1,1)
  This amount corresponds the input of solid manure.
- land use change, annual crop: 2.94087e-5 ha; = 2.9408737052e-05*LUC_crop_specific+8.26738724828e-06*(1-LUC_crop_specific)
  Calculated value. Land use change (LUC) combines land transformation areas calculated with the adapted 'Direct Land Use Change Assessment Tool' version 2014 developed by Blonk Consultants and the carbon losses from soil organic carbon (SOC) and vegetation (VEG) as calculated in ecoinvent v3. See 'WFLDB-Guidelines.pdf', available at https://ecoquery.ecoinvent.org/File/Reports.
- ammonium nitrate: 0.00294133 kg; source Miles Harriman 2015; lognormal variance with pedigree 0.124177, pedigree (2,1,4,1,1)
  The exchange has been updated from 'ammonium nitrate, as N' into 'ammonium nitrate' and therefore its amount has been scaled (multiplied) from 0.001 kg by 2.8573 kg of 'ammonium nitrate' per kg of 'ammonium nitrate, as N'. Original comment of the exchange is: Calculated based on literature values or expert estimation: The total amount of nutrient (Personal written communication, Miles Harriman, Yara, 2015) multiplied by the share of fertiliser type (Personal written communication, Miles Harriman, Yara, 2015). See supporting documentation 'WFLDB-Documentation.pdf' chapter 'Fertiliser application' for L3 and L4 data (https://ecoquery.ecoinvent.org/File/Reports).
  Corresponds to 16.0 kg/ha
  properties: dry mass 1 kg, wet mass 1 kg

## Inputs from nature
- Occupation, annual crop [natural resource, land]: 0.578157 m2*year; lognormal variance with pedigree 0.0200616, pedigree (2,1,4,1,1)
  Related to the duration from harvest date of previous crop to harvest date of main crop: 328 days.
- Transformation, from arable land, unspecified use [natural resource, land]: 0.643376 m2; lognormal variance with pedigree 0.0442144, pedigree (2,1,4,1,1)
  10000 m2 divided by the life time of the crop.
- Transformation, to arable land, unspecified use [natural resource, land]: 0.643376 m2; lognormal variance with pedigree 0.0442144, pedigree (2,1,4,1,1)
  10000 m2 divided by the life time of the crop.
- Carbon dioxide, in air [natural resource, in air]: 0.286984 kg; lognormal variance with pedigree 0.0138498, pedigree (2,2,4,1,1)
  CO2 uptake by biomass
- Energy, gross calorific value, in biomass [natural resource, biotic]: 3.24686 MJ; lognormal variance with pedigree 0.0138498, pedigree (2,2,4,1,1)
  Gross energy content is related to MJ/kg dry matter of product. Source: ecoinvent data.

## Emissions to nature
- Phosphorus [water, surface water]: 1.76066e-5 kg; source Prasuhn V.  2006; lognormal variance with pedigree 0.175866, pedigree (2,2,4,1,1)
  Calculated value - Prasuhn (2006) and SQCB-Erosion. See 'WFLDB-Guidelines.pdf', available at https://ecoquery.ecoinvent.org/File/Reports.
- Water [water, ground-]: 0.00296153 m3; lognormal variance with pedigree 0.124177, pedigree (2,1,4,1,1)
  Calculated value - Emission calculated from water balance. See 'WFLDB-Guidelines.pdf', available at https://ecoquery.ecoinvent.org/File/Reports.
- Lead [water, surface water]: 1.28373e-7 kg; source Freiermuth R.  2006; lognormal variance with pedigree 0.356938, pedigree (2,2,4,1,1)
  Calculated value - Freiermuth (2006). See 'WFLDB-Guidelines.pdf', available at https://ecoquery.ecoinvent.org/File/Reports.
- Nitrate [water, ground-]: 0.0137248 kg; source Faist Emmenegger M. 2009; lognormal variance with pedigree 0.175866, pedigree (2,2,4,1,1)
- Cadmium [soil, agricultural]: 2.59156e-7 kg; = 2.67155632761e-07 + ( - 8e-09)*heavyMetalUptakeSwitch; source Freiermuth R.  2006
  Comment on mathematicalRelation:
  2.67155632761e-07 from Calculated value - Freiermuth (2006). See 'WFLDB-Guidelines.pdf', available at https://ecoquery.ecoinvent.org/File/Reports.
  -8e-09 from Potatoes, heavy metals uptake model
  Heavy metal uptake can be excluded by setting the parameter heavyMetalUptakeSwitch to zero.
- Chromium [soil, agricultural]: 1.51098e-6 kg; = 1.62497587338e-06 + ( - 1.14e-07)*heavyMetalUptakeSwitch; source Freiermuth R.  2006
  Comment on mathematicalRelation:
  1.62497587338e-06 from Calculated value - Freiermuth (2006). See 'WFLDB-Guidelines.pdf', available at https://ecoquery.ecoinvent.org/File/Reports.
  -1.14e-07 from Potatoes, heavy metals uptake model
  Heavy metal uptake can be excluded by setting the parameter heavyMetalUptakeSwitch to zero.
- Copper [soil, agricultural]: 1.06534e-6 kg; = 2.35533680757e-06 + ( - 1.29e-06)*heavyMetalUptakeSwitch; source Freiermuth R.  2006
  Comment on mathematicalRelation:
  2.35533680757e-06 from Calculated value - Freiermuth (2006). See 'WFLDB-Guidelines.pdf', available at https://ecoquery.ecoinvent.org/File/Reports.
  -1.29e-06 from Potatoes, heavy metals uptake model
  Heavy metal uptake can be excluded by setting the parameter heavyMetalUptakeSwitch to zero.
- Chromium, ion [water, surface water]: 5.70192e-7 kg; source Freiermuth R.  2006; lognormal variance with pedigree 0.356938, pedigree (2,2,4,1,1)
  (same comment as for Lead)
- Lead [soil, agricultural]: 1.96685e-7 kg; = 3.06684681207e-07 + ( - 1.1e-07)*heavyMetalUptakeSwitch; source Freiermuth R.  2006
  Comment on mathematicalRelation:
  -1.1e-07 from Potatoes, heavy metals uptake model
  Heavy metal uptake can be excluded by setting the parameter heavyMetalUptakeSwitch to zero.
- Mercury [soil, agricultural]: 8.24268e-9 kg; = 2.6242681593e-08 + ( - 1.8e-08)*heavyMetalUptakeSwitch; source Freiermuth R.  2006
  Comment on mathematicalRelation:
  2.6242681593e-08 from Calculated value - Freiermuth (2006). See 'WFLDB-Guidelines.pdf', available at https://ecoquery.ecoinvent.org/File/Reports.
  -1.8e-08 from Potatoes, heavy metals uptake model
  Heavy metal uptake can be excluded by setting the parameter heavyMetalUptakeSwitch to zero.
- Cadmium, ion [water, surface water]: 5.18034e-9 kg; source Freiermuth R.  2006; lognormal variance with pedigree 0.356938, pedigree (2,2,4,1,1)
  (same comment as for Lead)
- Nickel [soil, agricultural]: 5.28956e-7 kg; = 5.94955928714e-07 + ( - 6.6e-08)*heavyMetalUptakeSwitch; source Freiermuth R.  2006
  Comment on mathematicalRelation:
  5.94955928714e-07 from Calculated value - Freiermuth (2006). See 'WFLDB-Guidelines.pdf', available at https://ecoquery.ecoinvent.org/File/Reports.
  -6.6e-08 from Potatoes, heavy metals uptake model
  Heavy metal uptake can be excluded by setting the parameter heavyMetalUptakeSwitch to zero.
- Zinc [soil, agricultural]: 1.39986e-5 kg; = 1.69986489095e-05 + ( - 3e-06)*heavyMetalUptakeSwitch; source Freiermuth R.  2006
  Comment on mathematicalRelation:
  1.69986489095e-05 from Calculated value - Freiermuth (2006). See 'WFLDB-Guidelines.pdf', available at https://ecoquery.ecoinvent.org/File/Reports.
  -3e-06 from Potatoes, heavy metals uptake model
  Heavy metal uptake can be excluded by setting the parameter heavyMetalUptakeSwitch to zero.
- Chlorothalonil [soil, agricultural]: 5.69832e-5 kg; lognormal variance with pedigree 0.0447216, pedigree (2,2,4,1,1)
  Calculated value - 100% emission in soil. See 'WFLDB-Guidelines.pdf', available at https://ecoquery.ecoinvent.org/File/Reports.
- Copper, ion [water, surface water]: 4.62292e-7 kg; source Freiermuth R.  2006; lognormal variance with pedigree 0.356938, pedigree (2,2,4,1,1)
  (same comment as for Lead)
- Diquat [soil, agricultural]: 2.77967e-5 kg; lognormal variance with pedigree 0.0447216, pedigree (2,2,4,1,1)
  (same comment as for Chlorothalonil)
- Fenpiclonil [soil, agricultural]: 2.18899e-6 kg; lognormal variance with pedigree 0.0447216, pedigree (2,2,4,1,1)
  (same comment as for Chlorothalonil)
- Teflubenzuron [soil, agricultural]: 1.73729e-7 kg; lognormal variance with pedigree 0.0447216, pedigree (2,2,4,1,1)
  (same comment as for Chlorothalonil)
- Mercury [water, surface water]: 1.47796e-9 kg; source Freiermuth R.  2006; lognormal variance with pedigree 0.356938, pedigree (2,2,4,1,1)
  (same comment as for Lead)
- Nitrogen oxides [air, non-urban air or from high stacks]: 0.000420652 kg; source EEA 2013; lognormal variance with pedigree 0.124664, pedigree (2,2,4,1,1)
  Calculated value - EEA/EMEP (2013). See 'WFLDB-Guidelines.pdf', available at https://ecoquery.ecoinvent.org/File/Reports.
- Zinc, ion [water, surface water]: 9.73879e-7 kg; source Freiermuth R.  2006; lognormal variance with pedigree 0.356938, pedigree (2,2,4,1,1)
  (same comment as for Lead)
- Nickel, ion [water, surface water]: 4.27105e-7 kg; source Freiermuth R.  2006; lognormal variance with pedigree 0.356938, pedigree (2,2,4,1,1)
  (same comment as for Lead)
- Orbencarb [soil, agricultural]: 1.40721e-5 kg; lognormal variance with pedigree 0.0447216, pedigree (2,2,4,1,1)
  (same comment as for Chlorothalonil)
- Chromium, ion [water, ground-]: 1.14193e-6 kg; source Freiermuth R.  2006; lognormal variance with pedigree 0.356938, pedigree (2,2,4,1,1)
  Calculated value - Freiermuth (2006). See 'WFLDB-Guidelines.pdf', available at https://ecoquery.ecoinvent.org/File/Reports. This emission might be overestimated in case of basic soils.
- Cadmium, ion [water, ground-]: 2.49643e-9 kg; source Freiermuth R.  2006; lognormal variance with pedigree 0.356938, pedigree (2,2,4,1,1)
  (same comment as for Chromium, ion)
- Carbon dioxide, fossil [air, non-urban air or from high stacks]: 0.0145455 kg; lognormal variance with pedigree 0.0138498, pedigree (2,2,4,1,1)
  Calculated value - CO2 emissions from urea and lime. See 'WFLDB-Guidelines.pdf', available at https://ecoquery.ecoinvent.org/File/Reports.
- Copper, ion [water, ground-]: 2.17448e-7 kg; source Freiermuth R.  2006; lognormal variance with pedigree 0.356938, pedigree (2,2,4,1,1)
  (same comment as for Chromium, ion)
- Ammonia [air, non-urban air or from high stacks]: 0.00248961 kg; source EEA 2013; lognormal variance with pedigree 0.0447216, pedigree (2,2,4,1,1)
  Calculated value - EMEP/EEA (2013). See 'WFLDB-Guidelines.pdf', available at https://ecoquery.ecoinvent.org/File/Reports.
- Lead [water, ground-]: 9.23824e-9 kg; source Freiermuth R.  2006; lognormal variance with pedigree 0.356938, pedigree (2,2,4,1,1)
  (same comment as for Chromium, ion)
- Metribuzin [soil, agricultural]: 2.60594e-6 kg; lognormal variance with pedigree 0.0447216, pedigree (2,2,4,1,1)
  (same comment as for Chlorothalonil)
- Mercury [water, ground-]: 4.52126e-9 kg; source Freiermuth R.  2006; lognormal variance with pedigree 0.356938, pedigree (2,2,4,1,1)
  (same comment as for Chromium, ion)
- Dinitrogen monoxide [air, non-urban air or from high stacks]: 0.000247023 kg; source IPCC 2006; lognormal variance with pedigree 0.124664, pedigree (2,2,4,1,1)
  Calculated value - IPCC (2006). See 'WFLDB-Guidelines.pdf', available at https://ecoquery.ecoinvent.org/File/Reports.
- Nickel, ion [water, ground-]: 5.25664e-9 kg; source Freiermuth R.  2006; lognormal variance with pedigree 0.356938, pedigree (2,2,4,1,1)
  (same comment as for Chromium, ion)
- Phosphate [water, ground-]: 1.24345e-5 kg; source Prasuhn V.  2006; lognormal variance with pedigree 0.175866, pedigree (2,2,4,1,1)
  Calculated value - Prasuhn (2006). See 'WFLDB-Guidelines.pdf', available at https://ecoquery.ecoinvent.org/File/Reports. This emission might be overestimated in case of basic soils.
- Water [air, non-urban air or from high stacks]: 0.0444232 m3; lognormal variance with pedigree 0.124177, pedigree (2,1,4,1,1)
  (same comment as for Water)
- Zinc, ion [water, ground-]: 1.45577e-6 kg; source Freiermuth R.  2006; lognormal variance with pedigree 0.356938, pedigree (2,2,4,1,1)
  (same comment as for Chromium, ion)
- Phosphate [water, surface water]: 3.7846e-5 kg; source Prasuhn V.  2006; lognormal variance with pedigree 0.175866, pedigree (2,2,4,1,1)
  Calculated value - Prasuhn (2006). See 'WFLDB-Guidelines.pdf', available at https://ecoquery.ecoinvent.org/File/Reports.
- Water [water, surface water]: 0.0118465 m3; lognormal variance with pedigree 0.124177, pedigree (2,1,4,1,1)
  (same comment as for Water)
- Mancozeb [soil, agricultural]: 7.40087e-5 kg; lognormal variance with pedigree 0.0447216, pedigree (2,2,4,1,1)
  (same comment as for Chlorothalonil)

## Sampling procedure
WFLDB Methodological Guidelines for the Life Cycle Inventory of Agricultural Products in the latest version, available at: (Report section: https://v30.ecoquery.ecoinvent.org/File/Reports). Data sources: Data were categorised from level 0 (L0) to level (L4) as follows: L0 = estimate, proxy; L1 = statistical data (e.g. FAOSTAT); L2 = L1 adapted to crop and country; L3 = literature data or L1 resp. L2 data approved by experts; medium detailing (i.e. kg of total N-fertiliser); L4 = L3 data of high detailing (i.e. portion N-fertiliser types).In this dataset data were obtained for yield: L3; Fertilisers: L4; Pesticides: L1; Machinery: L4; Irrigation: L3. For information regarding the calculation of individual exchanges see supporting documentation WFLDB-Documentation.pdf.

## Extrapolations
This dataset has been extrapolated from year 2013 to the year of the calculation (2021). The uncertainty has been adjusted accordingly.

## Review by Assumpció ANTON 2016-05-30
Be aware that the use of statistics in input calculations could provide some specific inputs not common for specific crops, this should be corrected if better information is available and better reflexed in DQR . Currently, I would dissent for some of good marks provided, being a revision of criteria applied advisable.

Pesticides will need to be amended periodically checking for update of pesticides' ban.
