# roof tile production

Dataset: EcoSpold 2, unit process
Geography: RER
Time period: 1992-01-01 to 2021-12-31
Technology level: current
Classification: EcoSpold01Categories: construction materials/coverings
Classification: ISIC rev.4 ecoinvent: 2392:Manufacture of clay building materials
Tags: ConvertedDataset
Scenario: Business-as-Usual
System model: Allocation, cut-off by classification
Generated by: Daniel Kellenberger (obsolete)
Published in: Kellenberger D. 2007
Database: ecoinvent
isCopyrightProtected: true
accessRestrictedTo: 1

## General comment
This dataset represents the production of 1 kg of roof tile. Data was obtained from literature values (average data from 12 Swiss brick plants) that were corrected and updated for some flows. Note that no hard coal coke is used within these 12 plants.
[This dataset was already contained in the ecoinvent database version 2. It was not individually updated during the transfer to ecoinvent version 3. Life Cycle Impact Assessment results may still have changed, as they are affected by changes in the supply chain, i.e. in other datasets. This dataset was generated following the ecoinvent quality guidelines for version 2. It may have been subject to central changes described in the ecoinvent version 3 change report (http://www.ecoinvent.org/database/ecoinvent-version-3/reports-of-changes/), and the results of the central updates were reviewed extensively. The changes added e.g. consistent water flows and other information throughout the database. The documentation of this dataset can be found in the ecoinvent reports of version 2, which are still available via the ecoinvent website. The change report linked above covers all central changes that were made during the conversion process.]

## Included activities start
From reception of clay at the factory gate.

## Included activities end
This dataset ends with the storage of the produced and packed roof tile at the factory. This datset includes the first ginding process, wet process (second ginding, mixing and plastifying), storage, forming (a compression molding method) and cutting, drying, firing, loading, packing and storage. The dataset doesn't include the charge of the wastewater and solid waste as no data was available. As roof tile are impermeables, no substances to make them porous are used in the process. Engobe is used to colour the tiles, however no information was obtained about the substance as it is confidential.

## Geography
Data was obtained from industries of Switzerland, Germany and Austria.

## Technology
This dataset corresponds to a mix of different brick production technologies (different firing fuels) in Austria, Germany and Switzerland.Share of heavy oil to natural gas about 20% to 80%
A difference to bricks is that roof tiles have to be more leek- and freeze-proven. Therefore pore forming media are not included in tile-production.
To have the roof tiles coloured often engobe is used. The amount of one company in Switzerland is about 3.6g/kg burned tile. The composition of engobe is confidential and therefore it cannot be taken into account in this study. More than 50% of the waste water from cleaning of the engobe equipment is usually reused as mixing water for the wet process to plastify the clay. Solid waste is deposited in the mine and waste water is supplied purified to the municipal waste water treatment.

## Parameters
- fraction, tap water, to air: 0.15 dimensionless; name fraction_TW_to_air; = fraction_PW_to_air; lognormal variance with pedigree 0.092025, pedigree (4,4,3,2,4)
  Calculated value. See comment in the other parametres present in this dataset. Tap water is considered to be always used as process water, thus process water fractions to air are applied to all tap water input flows to calculate the amount of water consumed in the processes.
- fraction, process water, to air: 0.15 dimensionless; name fraction_PW_to_air; lognormal variance with pedigree 0.092025, pedigree (4,4,3,2,4)
  Literature value. In case when no industry/process specific data are available, default evaporation fraction value is used. This value is 15% and is based on literature (Statistics Canada, 2007 & Shaffer, K.H., 2008, Consumptive water use in the Great Lakes Basin, USGS & Shiklomanov, 2003, World Water Resources at the Beginning of the 21st Century) and has been approved by an expert.

## Reference product
- roof tile: 1 kg; source Hauck, D. 1997; By-product classification allocatable product; CPC 373: Refractory products and structural non-refractory clay products
  Roofing tiles are manufactured to produce their particular shape either with natural colour or with a slip coating (engobed) or a glazed finish. They are manufactured by extrusion or stamping. They usually have a porous, unsintered structure, and before being weatherproof they must be properly shaped, water impermeable, and able to bear sufficient load.
  Three main types of roof tiles are produced in Switzerland. The most used tile is called roof tile and is offered in different shapes, colours, strength, consistencies and weathering resistances. Another type is the plain tile, which is flat and produced in the billet method. They are specially used for steep or round roofs (country houses and houses put under preservation order). Double welt tiles are also produced in the billet method but used mainly for less steep but large roofs.
  EcoSpold01Location=RER
  production volume 1.32237 kg
    This is a placeholder value that does not reflect real-world production volumes. This dataset does not currently require a real-world production volume to work in the database framework, and no actual data were collected yet. This has no negative effect on the results of the ecoinvent database. The placeholder value of this activity was scaled according to the nominal GDP of 2005 (source: United Nations, http://data.un.org/Glossary.aspx?q=GDP+%28current+US%24%29, accessed 20130726) to reflect an appropriate share of the global production volume, which is also a placeholder value.
  property price 0.196 EUR2005
    Calculated value based on data from United Nations Commodity Trade Statistics Database (comtrade.un.org). UN comtrade category: 690510 Roofing tiles, ceramic. Year 2005. Using exchange rate of 1EURO = 1.209 USD. Average of price of import into 5 main markets (EU, US, JP, IN and CN).
  property carbon content, non-fossil 0
    Made mainly from clay, sand and other aditives. All C contained in raw materials is emitted as CO2 ecoinvent v2.2 report 7, part IV
  property carbon content, fossil 0
    (same comment as for roof tile)
  property carbon content 0
    carbon content on a dry matter basis (reserved; not for manual entry)
  properties: wet mass 1 kg, water in wet mass 0 kg, water content 0, dry mass 1 kg, carbon allocation 0 kg

## Inputs from technosphere
- natural gas, high pressure: 0 m3; source Bruck, M. 1996; pedigree (1,1,1,1,1)
  EcoSpold01Location=RER
  Estimation, based on literature values. Natural gas and propan are used as combustible. It is assumed that the data is "net calorific value" with an efficiency of 0.87.
  The time for firing dried roof tiles is about 1.5 time longer than for bricks, according to (Weibel & Stritz (1995)). An expert of the clay production industry is very sceptical concerning this factor. He says that in nowadays tiles are burned in fast firing furnaces. As no better data are available nevertheless this factor has in general been used to increase the energy consumption and emission rates for brick production in order to adapt the values to tile production.
  Further references:
  Weibel T. and Stritz A. (1995) Ökoinventare und Wirkungsbilanzen von Baumaterialien; Grundlagen für den ökologischen Vergleich von Hochbaukonstruktionen. In: ESU-Reihe Nr. 1/95. Laboratorium für Energiesysteme, Eidg. Technische Hochschule (ETH), Zürich.
  Frischknecht R., Jungbluth N., Althaus H.-J., Doka G., Dones R., Hellweg S., Hischier R., Humbert S., Margni M., Nemecek T. and Spielmann M. (2007) Implementation of Life Cycle Impact Assessment Methods. Final report ecoinvent Data v2.0 No. 3. Swiss Centre for Life Cycle Inventories, Dübendorf, CH, Online-Version under: www.ecoinvent.ch <http://www.ecoinvent.ch>.
  Uncertainty: ;
  properties: wet mass 0.84 kg, dry mass 0.84 kg, heating value, gross 39 MJ, heating value, net 39 MJ, carbon content, fossil 0.602381
  note on heating value, net: Literature value, Source: United Nations Statistics Division (2018) International Recommendations for Energy Statistics (IRES). Available at: http://unstats.un.org/unsd/statcom/doc11/BG-IRES.pdf.
  note on carbon content, fossil: An average C content of 0.506 kg C/ m3 has been assumed (this average has been calculated using data in Tab 3.5, ecoinvent v2.2 report 6_V
- clay: 1.35 kg; source Bruck, M. 1996; lognormal variance with pedigree 0.1461, pedigree (5,5,5,3,3)
  Proxy, Swiss module was used as proxy.
  EcoSpold01Location=CH
  Uncertainty: ;
  properties: water content 0.0362694, dry mass 0.965 kg, wet mass 1 kg
- transport, passenger car: 0.0166 km; source Bruck, M. 1996; lognormal variance with pedigree 0.1461, pedigree (5,5,5,3,3)
  Literature value. Petrol is used as fuel. The fuel consumption considered is 2.82 MJ/km, with a load of 1.59 persons per car.
  EcoSpold01Location=RER
  Uncertainty: ;
- tap water: 0.0272 kg; name tap_water_input; source Bruck, M. 1996; lognormal variance with pedigree 0.1461, pedigree (5,5,5,3,3)
  EcoSpold01Location=RER
  Literature value. Water is supplied from public water supply.
  Uncertainty: ;
  properties: water content 2962.17, wet mass 1 kg, dry mass 0.000337476 kg, carbon content, fossil 0.00178991
  note on carbon content, fossil: Bicarbonate content is 2.93 mol/m3. CO2 content is 0.1 mol/m3 (ecoinvent v2.2 report 8, Tab 93.1).
- electricity, medium voltage: 0.08 kWh; lognormal variance with pedigree 0.1461, pedigree (5,5,5,3,3)
  Estimation, based on personal communication from an expert of the clay production industry (Mr. H. Schmild). Electricity source considered from an electricity supply company. Uncertainty was adjusted as the information about electricity was rather low.
  The electricity consumption for the production of 1kg roof tile in Europe is between 70 and 130Wh 5. For the dataset 80kW/kg is chosen. This assumption is rather optimistic. Anyway in relation to the consumption for brick it is about 5 to 10 times higher. This can be partly explained with the high-energy consumption for the flue gas cleaning plant as the cleaning time is about 1.5 times longer but no further explanation has been found.
  EcoSpold01Location=UCTE
  Uncertainty: ;
- polyethylene, high density, granulate: 8.58e-7 kg; source Bruck, M. 1996; lognormal variance with pedigree 0.1461, pedigree (5,5,5,3,3)
  EcoSpold01Location=RER
  Literature value. A plastic band is used in the manufacturing process.
  Uncertainty: ;
  properties: carbon content, fossil 0.857143, dry mass 1 kg, wet mass 1 kg, heating value, net 42.47 MJ
  note on carbon content, fossil: Polyethylene is formed out of a huge amount of ethylene monomers (C2H4) (ecoinvent v2.2 report 11_II). MW=28 g/mol
- light fuel oil: 0.00812 kg; source Bruck, M. 1996; lognormal variance with pedigree 0.1461, pedigree (5,5,5,3,3)
  EcoSpold01Location=RER
  Estimation, based on literature values. Light heating oil is used as combustible. It is assumed that the data is "net calorific value" with an efficiency of 0.85.
  The time for firing dried roof tiles is about 1.5 time longer than for bricks, according to (Weibel & Stritz (1995)). An expert of the clay production industry is very sceptical concerning this factor. He says that in nowadays tiles are burned in fast firing furnaces. As no better data are available nevertheless this factor has in general been used to increase the energy consumption and emission rates for brick production in order to adapt the values to tile production.
  Further references:
  Weibel T. and Stritz A. (1995) Ökoinventare und Wirkungsbilanzen von Baumaterialien; Grundlagen für den ökologischen Vergleich von Hochbaukonstruktionen. In: ESU-Reihe Nr. 1/95. Laboratorium für Energiesysteme, Eidg. Technische Hochschule (ETH), Zürich.
  Frischknecht R., Jungbluth N., Althaus H.-J., Doka G., Dones R., Hellweg S., Hischier R., Humbert S., Margni M., Nemecek T. and Spielmann M. (2007) Implementation of Life Cycle Impact Assessment Methods. Final report ecoinvent Data v2.0 No. 3. Swiss Centre for Life Cycle Inventories, Dübendorf, CH, Online-Version under: www.ecoinvent.ch <http://www.ecoinvent.ch>.
  Uncertainty: ;
  properties: carbon content, fossil 0.862, wet mass 1 kg, dry mass 1 kg, heating value, net 42.6 MJ
- EUR-flat pallet: 1.61e-5 unit; lognormal variance with pedigree 0.1461, pedigree (5,5,5,3,3)
  EcoSpold01Location=RER
  Estimation, based on personal communication: Thomas Ultizsch, Gütegemeinschaft Paletten of 03.09.02. The weight assumed is 22 kg.
  Uncertainty: ;
  properties: carbon content, non-fossil 0.58833, dry mass 18.3333 kg, carbon content, fossil 0.0311351, water content 0.2, wet mass 22 kg, heating value, net 335.11 MJ
  note on carbon content, non-fossil: C content in components of the pallet (ecoinvent v2.2 report 7_part XVIII)
- stucco: 0.00153 kg; lognormal variance with pedigree 0.1461, pedigree (5,5,5,3,3)
  EcoSpold01Location=CH
  Estimation, based on a personal communication from an expert of the clay production industry (Mr. H. Schmild). Moulding gypsum is used as stucco. Data was obtained from a Swiss company and the averade data for the years 1985 to 2002.
  Uncertainty: ;
  properties: dry mass 1 kg, wet mass 1 kg
- sheet rolling, steel: 1.57e-5 kg; source Bruck, M. 1996; lognormal variance with pedigree 0.1461, pedigree (5,5,5,3,3)
  Literature value. Steel band is used for the packing of bricks on pallets.
  EcoSpold01Location=RER
  Uncertainty: ;
- clay pit infrastructure: 2e-10 unit; lognormal variance with pedigree 0.408, pedigree (3,5,5,1,3)
  Estimated, based on improssions from a visit and an air photo of Brickworks Gasser in Rapperswill BE. The flow includes the infrastructure needed at the production place (i.e. buildings, acces) over 50 years.
  EcoSpold01Location=CH
  Uncertainty: ;
- sand: 0.0147 kg; source Bruck, M. 1996; lognormal variance with pedigree 0.1461, pedigree (5,5,5,3,3)
  EcoSpold01Location=CH
  Proxy, Swiss module was used as proxy.
  Uncertainty: ;
  properties: dry mass 1 kg, wet mass 1 kg
- steel, low-alloyed, hot rolled: 3.06e-5 kg; source Bruck, M. 1996; lognormal variance with pedigree 0.1461, pedigree (5,5,5,3,3)
  EcoSpold01Location=RER
  Literature value. Steel band is used for the packing of bricks on pallets. A steel mould is used for extruding (forming) the steel.
  Proxy. Steel, low-allowed is used as proxy for roll sleeve and other steel parts of the process materials.
  Uncertainty: ;
  properties: wet mass 1 kg, carbon content, fossil 0.005, dry mass 1 kg
  note on carbon content, fossil: Low alloyed steel composition given in Tab. 3.2 ecoinvent v2.2 report 10_partII. Steel assumed to have a C content of 0.5%
- sheet rolling, chromium steel: 1.57e-7 kg; source Bruck, M. 1996; lognormal variance with pedigree 0.1461, pedigree (5,5,5,3,3)
  EcoSpold01Location=RER
  Literature value. Chromium steel is used in the process of steel forming.
  Uncertainty: ;
- diesel, burned in building machine: 0.0297 MJ; source Bruck, M. 1996; lognormal variance with pedigree 0.1461, pedigree (5,5,5,3,3)
  EcoSpold01Location=GLO
  Literature value. The diesel consumption for machinery is included. Diesel for mining is not included as it is considered in the clay production dataset.
  Uncertainty: ;
  properties: heating value, net 1 MJ
- heavy fuel oil: 0.000572 kg; source Bruck, M. 1996; lognormal variance with pedigree 0.1461, pedigree (5,5,5,3,3)
  EcoSpold01Location=RER
  Estimation, based on literature values. Heavy heating oil is used as combustible. It is assumed that the data is "net calorific value" with an efficiency of 0.85.
  The time for firing dried roof tiles is about 1.5 time longer than for bricks, according to (Weibel & Stritz (1995)). An expert of the clay production industry is very sceptical concerning this factor. He says that in nowadays tiles are burned in fast firing furnaces. As no better data are available nevertheless this factor has in general been used to increase the energy consumption and emission rates for brick production in order to adapt the values to tile production.
  Further references:
  Weibel T. and Stritz A. (1995) Ökoinventare und Wirkungsbilanzen von Baumaterialien; Grundlagen für den ökologischen Vergleich von Hochbaukonstruktionen. In: ESU-Reihe Nr. 1/95. Laboratorium für Energiesysteme, Eidg. Technische Hochschule (ETH), Zürich.
  Frischknecht R., Jungbluth N., Althaus H.-J., Doka G., Dones R., Hellweg S., Hischier R., Humbert S., Margni M., Nemecek T. and Spielmann M. (2007) Implementation of Life Cycle Impact Assessment Methods. Final report ecoinvent Data v2.0 No. 3. Swiss Centre for Life Cycle Inventories, Dübendorf, CH, Online-Version under: www.ecoinvent.ch <http://www.ecoinvent.ch>.
  Uncertainty: ;
  properties: carbon content, fossil 0.849, dry mass 1 kg, wet mass 1 kg, heating value, net 41.2 MJ
- packaging film, low density polyethylene: 0.000542 kg; source Bruck, M. 1996; lognormal variance with pedigree 0.1461, pedigree (5,5,5,3,3)
  Literature value. Polyethylene foil is used in the process.
  EcoSpold01Location=RER
  Uncertainty: ;
  properties: wet mass 1 kg, heating value, net 42.47 MJ, dry mass 1 kg, carbon content, fossil 0.857143
- lime, packed: 0 kg; source Bruck, M. 1996; pedigree (1,1,1,1,1)
  EcoSpold01Location=CH
  Proxy, Swiss module was used as proxy.
  Literature value, natural stone flour is assumed as limestone.
  Uncertainty: ;
  properties: water content 0.00200401, carbon content, fossil 0.117492, wet mass 1 kg, dry mass 0.998 kg
  note on carbon content, fossil: Table 3.1, ecoinvent v2.2 report 7, part VII, pg 3. MW CaCO3=100, MW MgCO3=84
- limestone, crushed, for mill: 0.000396 kg; source Bruck, M. 1996; lognormal variance with pedigree 0.1461, pedigree (5,5,5,3,3)
  EcoSpold01Location=CH
  Proxy, Swiss module is used as proxy.
  Literature value, granulated lime is used in the production process.
  Uncertainty: ;
  properties: water content 0.00200401, carbon content, fossil 0.117492, dry mass 0.998 kg, wet mass 1 kg
- lubricating oil: 1.32e-5 kg; source Bruck, M. 1996; lognormal variance with pedigree 0.1461, pedigree (5,5,5,3,3)
  EcoSpold01Location=RER
  Proxy, lubricating oil is used as proxy for gear lubricant, hydraulic oil and lubricating grease.
  Uncertainty: ;
  properties: dry mass 1 kg, carbon content, fossil 0.75, wet mass 1 kg, heating value, net 40.2 MJ
  note on carbon content, fossil: Lubricating oil is produced from diesel. C-content/dry mass of fats and oils considered 75%, from: ecoinvent v2.2 report, n 15a, pg 40
  note on heating value, net: Literature value, Source: IPCC 2006, 2006 IPCC Guidelines for National Greenhouse Gas Inventories, Prepared by the National Greenhouse Gas Inventories Programme, Eggleston H.S., Buendia L., Miwa K., Ngara T. and Tanabe K. (eds). Published: IGES, Japan
- natural gas, high pressure: 0.0473864, 0.000305954 m3 (2 entries); source Bruck, M. 1996; lognormal variance with pedigree 0.1461, pedigree (5,5,5,3,3)
  (same comment as for natural gas, high pressure)
- lime, packed: 0.0233066, 0.000593387 kg (2 entries); source Bruck, M. 1996; lognormal variance with pedigree 0.1461, pedigree (5,5,5,3,3)
  (same comment as for lime, packed)

## Inputs from nature
- Water, well, in ground [natural resource, in water]: 7.36e-5 m3; name water_well_in_ground_input; source Bruck, M. 1996; lognormal variance with pedigree 0.1461, pedigree (5,5,5,3,3)
  Proxy, Swiss module was used as proxy.
  Literature value, water is assumed to be pumped on the company's ground.
  Proxy, Swiss module was used as proxy.
  Literature value, water is assumed to be pumped on the company's ground.
  Uncertainty: ;

## Emissions to nature
- Water [air, unspecified]: 1.512e-5 m3; name water_to_air_unspecified; = (tap_water_input/1000*fraction_TW_to_air)+(water_well_in_ground_input*fraction_PW_to_air); lognormal variance with pedigree 0.0807, pedigree (2,2,5,1,1)
  Calculated value based on literature values and expert opinion. See comments in the parametres' comment field.
  property fraction, origin: fresh water 1; name fraction_origin_fresh_water
  property fraction, origin: unspecified 0; name fraction_origin_unspecified
  property fraction, origin: salt water 0; name fraction_origin_salt_water
- Sulfur dioxide [air, unspecified]: 0.00015 kg; source Bruck, M. 1996; lognormal variance with pedigree 0.2661, pedigree (5,5,5,3,3)
  Estimation, based literature value. Data includes the total measured emissions within the system boundaries (mainly from combustion of the firing process).
  A corresponding probing by an expert of the clay production industry has shown that the factor of 1.5 for CO2, CO, dust, NO2, SO2, and org. C is realistic (between 0.3 and 1.7). The source is based on the composition of the raw material clay which differs from the raw material which is used for brick.
  Further references:
  Weibel T. and Stritz A. (1995) Ökoinventare und Wirkungsbilanzen von Baumaterialien; Grundlagen für den ökologischen Vergleich von Hochbaukonstruktionen. In: ESU-Reihe Nr. 1/95. Laboratorium für Energiesysteme, Eidg. Technische Hochschule (ETH), Zürich.
  Uncertainty: ;
- Water [water, unspecified]: 8.568e-5 m3; name water_to_water_unspecified; = (tap_water_input/1000)*(1-fraction_TW_to_air)+water_well_in_ground_input*(1-fraction_PW_to_air); lognormal variance with pedigree 0.0807, pedigree (2,2,5,1,1)
  (same comment as for Water)
  property fraction, origin: unspecified 0; name fraction_origin_unspecified_Ww
  property fraction, origin: salt water 0; name fraction_origin_salt_water_Ww
  property carbon content, fossil 0; name C_content_fossil
  property wet mass 1000 kg; name WM
  property water in wet mass 1000 kg; name WWM
  property dry mass 0 kg; name DM
  property carbon content, non-fossil 0; name C_content_non_fossil
  property fraction, origin: fresh water 1; name fraction_origin_fresh_water_Ww
- Hydrogen chloride [air, unspecified]: 6.11e-5 kg; source Bruck, M. 1996; lognormal variance with pedigree 0.1861, pedigree (5,5,5,3,3)
  Estimation, based literature value. Data includes the total measured emissions within the system boundaries (mainly from combustion of the firing process).
  The emission of hydrogen fluoride and hydrochloride acid is about 5 times higher than for the brick production. The source is based on the composition of the raw material clay which differs from the raw material which is used for brick.
  Further references:
  Weibel T. and Stritz A. (1995) Ökoinventare und Wirkungsbilanzen von Baumaterialien; Grundlagen für den ökologischen Vergleich von Hochbaukonstruktionen. In: ESU-Reihe Nr. 1/95. Laboratorium für Energiesysteme, Eidg. Technische Hochschule (ETH), Zürich.
  Uncertainty: ;
- Particulates, < 2.5 um [air, unspecified]: 2.1e-5 kg; source Bruck, M. 1996; lognormal variance with pedigree 0.4461, pedigree (5,5,5,3,3)
  Estimation, based on literature value. Total measured emissions within the system boundaries. It is assumed that the amount is 100% from combustion and therefore the share is calculated based on the emissions from the combustion. The share is based on EPA-Report: 75% of the total particulates.
  A corresponding probing by an expert of the clay production industry has shown that the factor of 1.5 for CO2, CO, dust, NO2, SO2, and org. C is realistic (between 0.3 and 1.7). The source is based on the composition of the raw material clay which differs from the raw material which is used for brick.
  Further references:
  EPA (1998) Brick and Structural Clay Product Manufacturing, Emissions Factor Documentation for AP-42, Final Report, Section 11.3. EPA Contract 68-D2-0159, Work Assignment No. I-0, MRI Project No. 4601-01. U.S. Environmental Protection Agency (EPA), Office of Air Quality Planning and Standards, Research Triangle Park/NC, Online-Version under: <http://www.epa.gov/ttn/chief/ap42/>.
  Weibel T. and Stritz A. (1995) Ökoinventare und Wirkungsbilanzen von Baumaterialien; Grundlagen für den ökologischen Vergleich von Hochbaukonstruktionen. In: ESU-Reihe Nr. 1/95. Laboratorium für Energiesysteme, Eidg. Technische Hochschule (ETH), Zürich.
  Uncertainty: ;
- Carbon dioxide, fossil [air, unspecified]: 0.271 kg; source Bruck, M. 1996; lognormal variance with pedigree 0.1461, pedigree (5,5,5,3,3)
  (same comment as for Sulfur dioxide)
- Particulates, > 10 um [air, unspecified]: 7.01e-6 kg; source Bruck, M. 1996; lognormal variance with pedigree 0.1861, pedigree (5,5,5,3,3)
  Estimation, based on literature value. Total measured emissions within the system boundaries. The share is based on EPA-Report: 25% of the total particulates.
  A corresponding probing by an expert of the clay production industry has shown that the factor of 1.5 for CO2, CO, dust, NO2, SO2, and org. C is realistic (between 0.3 and 1.7). The source is based on the composition of the raw material clay which differs from the raw material which is used for brick.
  Further references:
  EPA (1998) Brick and Structural Clay Product Manufacturing, Emissions Factor Documentation for AP-42, Final Report, Section 11.3. EPA Contract 68-D2-0159, Work Assignment No. I-0, MRI Project No. 4601-01. U.S. Environmental Protection Agency (EPA), Office of Air Quality Planning and Standards, Research Triangle Park/NC, Online-Version under: <http://www.epa.gov/ttn/chief/ap42/>.
  Weibel T. and Stritz A. (1995) Ökoinventare und Wirkungsbilanzen von Baumaterialien; Grundlagen für den ökologischen Vergleich von Hochbaukonstruktionen. In: ESU-Reihe Nr. 1/95. Laboratorium für Energiesysteme, Eidg. Technische Hochschule (ETH), Zürich.
  Uncertainty: ;
- NMVOC, non-methane volatile organic compounds, unspecified origin [air, unspecified]: 0.000115 kg; source Bruck, M. 1996; lognormal variance with pedigree 0.2661, pedigree (5,5,5,3,3)
  Estimation, based on literature values. Total measured emissions within the system boundaries. It is assumed that an average NMVOC includes about 80% weight of C.
  A corresponding probing by an expert of the clay production industry has shown that the factor of 1.5 for CO2, CO, dust, NO2, SO2, and org. C is realistic (between 0.3 and 1.7). The source is based on the composition of the raw material clay which differs from the raw material which is used for brick.
  Further references:
  Weibel T. and Stritz A. (1995) Ökoinventare und Wirkungsbilanzen von Baumaterialien; Grundlagen für den ökologischen Vergleich von Hochbaukonstruktionen. In: ESU-Reihe Nr. 1/95. Laboratorium für Energiesysteme, Eidg. Technische Hochschule (ETH), Zürich.
  Uncertainty: ;
- Phenol [air, unspecified]: 1.95e-7 kg; source Bruck, M. 1996; lognormal variance with pedigree 0.2661, pedigree (5,5,5,3,3)
  Estimation, based literature value. Data includes the total measured emissions within the system boundaries.
  A corresponding probing by an expert of the clay production industry has shown that the factor of 1.5 for CO2, CO, dust, NO2, SO2, and org. C is realistic (between 0.3 and 1.7). The source is based on the composition of the raw material clay which differs from the raw material which is used for brick.
  Further references:
  Weibel T. and Stritz A. (1995) Ökoinventare und Wirkungsbilanzen von Baumaterialien; Grundlagen für den ökologischen Vergleich von Hochbaukonstruktionen. In: ESU-Reihe Nr. 1/95. Laboratorium für Energiesysteme, Eidg. Technische Hochschule (ETH), Zürich.
  Uncertainty: ;
- Nitrogen oxides [air, unspecified]: 0.00039 kg; source Bruck, M. 1996; lognormal variance with pedigree 0.1861, pedigree (5,5,5,3,3)
  (same comment as for Sulfur dioxide)
- Hydrogen fluoride [air, unspecified]: 5.28e-5 kg; source Bruck, M. 1996; lognormal variance with pedigree 0.1861, pedigree (5,5,5,3,3)
  Estimation, based literature value. Data includes the total measured emissions within the system boundaries (mainly from combustion of the firing process).
  The emission of hydrogen fluoride and hydrochloride acid is about 5 times higher than for the brick production. The source is based on the composition of the raw material clay which differs from the raw material which is used for brick.
  Further references:
  Weibel T. and Stritz A. (1995) Ökoinventare und Wirkungsbilanzen von Baumaterialien; Grundlagen für den ökologischen Vergleich von Hochbaukonstruktionen. In: ESU-Reihe Nr. 1/95. Laboratorium für Energiesysteme, Eidg. Technische Hochschule (ETH), Zürich.
  Uncertainty: ;
- Benzene [air, unspecified]: 4.44e-6 kg; source Bruck, M. 1996; lognormal variance with pedigree 0.2661, pedigree (5,5,5,3,3)
  (same comment as for Phenol)
- Carbon monoxide, fossil [air, unspecified]: 0.000586 kg; source Bruck, M. 1996; lognormal variance with pedigree 0.1461, pedigree (5,5,5,3,3)
  (same comment as for Sulfur dioxide)
- Formaldehyde [air, unspecified]: 2.46e-5 kg; source Bruck, M. 1996; lognormal variance with pedigree 0.2661, pedigree (5,5,5,3,3)
  (same comment as for Phenol)

## Sampling procedure
The data relates to 12 brick production plants in Germany, Austria and Switzerland; The estimation of infrastructure relates to one company in Switzerland (Ziegelei Gasser AG in Rapperswil BE),

## Extrapolations
This dataset has been extrapolated from year 2002 to the year of the calculation (2021). The uncertainty has been adjusted accordingly.

## Review by Roberto Dones 2005-07-19
passed

## Review by Roland Hischier 2011-09-22
Transfer of documentation done.
