# fatty alcohol sulfate production, from palm kernel oil

Dataset: EcoSpold 2, unit process
Geography: RoW
Time period: 1992-01-01 to 2021-12-31
Technology level: current
Classification: ISIC rev.4 ecoinvent: 2023:Manufacture of soap and detergents, cleaning and polishing preparations, pe
Classification: EcoSpold01Categories: washing agents/tensides
Synonyms: FAS aus Palmkernöl
Tags: ConvertedDataset
Scenario: Business-as-Usual
System model: Allocation, cut-off by classification
Share of production covered: 60 %
Generated by: Rainer Zah
Published in: Zah R. 2007
Database: ecoinvent
isCopyrightProtected: true
accessRestrictedTo: 1

## General comment
data based on the ECOSOL study of the European surfactant industry. Allocations in multioutput processes were made, using the relative mass outputs of products.
[This dataset was already contained in the ecoinvent database version 2. It was not individually updated during the transfer to ecoinvent version 3. Life Cycle Impact Assessment results may still have changed, as they are affected by changes in the supply chain, i.e. in other datasets. This dataset was generated following the ecoinvent quality guidelines for version 2. It may have been subject to central changes described in the ecoinvent version 3 change report (http://www.ecoinvent.org/database/ecoinvent-version-3/reports-of-changes/), and the results of the central updates were reviewed extensively. The changes added e.g. consistent water flows and other information throughout the database. The documentation of this dataset can be found in the ecoinvent reports of version 2, which are still available via the ecoinvent website. The change report linked above covers all central changes that were made during the conversion process.]

## Included activities end
This module contains material and energy input, production of waste and emissions for the production of fatty alcohol sulfonate out of palm kernel oil. Transports and infrastructure have been estimated. No water consumption included.

## Geography
Data based on the European fatty alcohol sulfonate production

## Technology
Average technology for the production of FAS with short chain lengh (C12-C15), representing typical European production mix in the mid 90s

## Time period
data of published literature

## Reference product
- fatty alcohol sulfate: 1 kg; CPC 353: Soap, cleaning preparations, perfumes and toilet preparations; By-product classification allocatable product; CAS 68891-38-3
  EcoSpold01Location=RER
  production volume 9.06361e7 kg
    Total production volume of fatty alcohol sulfate is from year 2000 (Soap, Perfumery, and Cosmetics. November 2000, p. 51). 23% of this is assumed to be sourced from palm kernel oil.
  property carbon content, non-fossil 0.524272
    FAS are synthesized by sulfation to an acid form followed by a neutralization with sodium hydroxide. The generic chemical structure of FAS is: R-CH2-O-SO3-Na. Chain length of FAS derived form coconut oil, palm kernel oil and petrochemical sources is C12-C15 (ecoinvent v2.2 report 12). An average length of C13.5 has been used. MW of the molecule has been estimated considering R as C12.5H(2*12.5+1); MW R=176 g/mol. MW of FAS (133+176)=309 g/mol
  property heating value, net 15.89 MJ
    LHV is calculated based on the Carbon content of the product. More details can be found on the respective documentation.
  property price 1.02 EUR2005
    Calculated value based on data from United Nations Commodity Trade Statistics Database (comtrade.un.org). UN comtrade category: 382370 Industrial fatty alcohol Year 2005. Using exchange rate of 1EURO = 1.209 USD. Average of price of import into 5 main markets (EU, US, JP, IN and CN).
  property carbon content, fossil 0
    (same comment as for fatty alcohol sulfate)
  property carbon content 0.524272
    carbon content on a dry matter basis (reserved; not for manual entry)
  properties: water content 0, wet mass 1 kg, dry mass 1 kg, water in wet mass 0 kg, carbon allocation 0.524272 kg

## Inputs from technosphere
- heat, district or industrial, natural gas: 0 MJ; pedigree (1,1,1,1,1)
  properties: heating value, net 1 MJ
- electricity, medium voltage: 0 kWh; pedigree (1,1,1,1,1)
  EcoSpold01Location=UCTE
- heat, district or industrial, other than natural gas: 0 MJ; pedigree (1,1,1,1,1)
  properties: heating value, net 1 MJ
- chemical factory, organics: 4e-10 unit; lognormal variance with pedigree 0.3632, pedigree (2,3,5,5,1)
  EcoSpold01Location=RER
- sulfur: 0.113 kg; lognormal variance with pedigree 0.0632, pedigree (2,3,5,5,1)
  EcoSpold01Location=RER
  properties: wet mass 1 kg, dry mass 1 kg
- inert waste, for final disposal: -0.00062 kg; lognormal variance with pedigree 0.0632, pedigree (2,3,5,5,1)
  EcoSpold01Location=CH
  production volume 56194.4 kg
    Calculated from the production volume of fatty alcohol sulfate in proportion to the respective output amounts.
  properties: water content 0.00502513, wet mass 1 kg, dry mass 0.995 kg
- sodium hydroxide, without water, in 50% solution state: 0.144 kg; lognormal variance with pedigree 0.0632, pedigree (2,3,5,5,1)
  EcoSpold01Location=RER
  properties: heating value, net 3.03 MJ, wet mass 1 kg, dry mass 1 kg
- fatty alcohol: 0.698 kg; lognormal variance with pedigree 0.0632, pedigree (2,3,5,5,1)
  Literature source.
  EcoSpold01Location=RER
  properties: dry mass 1 kg, wet mass 1 kg, carbon content, non-fossil 0.743434, carbon content, fossil 0.0408973, heating value, net 41.01 MJ
  note on carbon content, non-fossil: Fatty alcohols have chain lengths between C6 and C22, their chemical formula is CH3(CH2)nCH2OH (ecoinvent v2.2 report 12, pg 16). As an average, C14 was used. The dataset represents a mix of 27% produced from fatty acid splitting and 73% produced from methyl ester (ecoinvent v2.2 report 12, pg 21). In the methyl esterification, methanol (CH3OH) has a fossil origin
- heat, district or industrial, natural gas: 0.0215712, 1.39963 MJ (2 entries); lognormal variance with pedigree 0.0632, pedigree (2,3,5,5,1)
- electricity, medium voltage: 0.00206863, 0.000396675, 0.00665934, 0.0968542, 0.0136516, 0.0444791 kWh (6 entries); lognormal variance with pedigree 0.0632, pedigree (2,3,5,5,1)
  EcoSpold01Location=UCTE
- heat, district or industrial, other than natural gas: 0.000321542, 0.792932 MJ (2 entries); lognormal variance with pedigree 0.0632, pedigree (2,3,5,5,1)

## Emissions to nature
- Chlorine [air, urban air close to ground]: 8.6e-9 kg; lognormal variance with pedigree 0.0932, pedigree (2,3,5,5,1)
- Nitrogen oxides [air, urban air close to ground]: 0.000114 kg; lognormal variance with pedigree 0.0932, pedigree (2,3,5,5,1)
- BOD5, Biological Oxygen Demand [water, surface water]: 0.001416 kg; lognormal variance with pedigree 0.0932, pedigree (2,3,5,5,1)
  Calculated as 0.5*COD.
- DOC, Dissolved Organic Carbon [water, surface water]: 0.000262222 kg; lognormal variance with pedigree 0.0932, pedigree (2,3,5,5,1)
  Calculated as equal to TOC.
- Hydrocarbons, unspecified [water, surface water]: 1.9e-7 kg; lognormal variance with pedigree 0.3632, pedigree (2,3,5,5,1)
- TOC, Total Organic Carbon [water, surface water]: 0.000262222 kg; lognormal variance with pedigree 0.0932, pedigree (2,3,5,5,1)
  Calculated by default as TOC (gC) = COD/2.7 (COD measured in g O2). Should more correctly be calculated from the carbon content of the specified emissions to water.
- Dissolved solids [water, surface water]: 0.00265 kg; lognormal variance with pedigree 0.0932, pedigree (2,3,5,5,1)
- Chromium, ion [water, surface water]: 2.43e-6 kg; lognormal variance with pedigree 0.7032, pedigree (2,3,5,5,1)
- COD, Chemical Oxygen Demand [water, surface water]: 0.000708 kg; lognormal variance with pedigree 0.0932, pedigree (2,3,5,5,1)
- Sulfur dioxide [air, urban air close to ground]: 6.07e-5 kg; lognormal variance with pedigree 0.0632, pedigree (2,3,5,5,1)
- Sulfate [water, surface water]: 0.0012 kg; lognormal variance with pedigree 0.0932, pedigree (2,3,5,5,1)
- Phenol [water, surface water]: 5.8e-9 kg; lognormal variance with pedigree 0.3632, pedigree (2,3,5,5,1)
- Nitrogen [water, surface water]: 4.16e-8 kg; lognormal variance with pedigree 0.7032, pedigree (2,3,5,5,1)
- Zinc, ion [water, surface water]: 1.3e-7 kg; lognormal variance with pedigree 0.7032, pedigree (2,3,5,5,1)

## Sampling procedure
data out of ECOSOL study of European Surfactant Industry. Common translation rules used, reported in Chemical report (Althaus et al. 2003).

## Extrapolations
see technology This dataset has been copied from an original dataset covering the geography RER. The uncertainty has been adjusted accordingly.

## Review by Emilia Moreno Ruiz 2018-03-15
Links added to connect specific suppliers to consumers (re. type of fatty alcohol).

## Review by Heiko Kunst 2003-07-04
Passed.
