# flattened bamboo production

Dataset: EcoSpold 2, unit process
Geography: PH
Time period: 2010-01-01 to 2021-12-31
Technology level: current
Classification: ISIC rev.4 ecoinvent: 162:Manufacture of products of wood, cork, straw and plaiting materials
Scenario: Business-as-Usual
System model: Allocation, cut-off by classification
Generated by: Edwin Zea Escamilla
Database: ecoinvent
isCopyrightProtected: true
accessRestrictedTo: 1

## General comment
This dataset represents the production of 1 Kg of flattened bamboo. The input of bamboo pole is assumed to have a water content of u=20%. The production takes place at a bamboo processing facility which is usually located extremely close to the bamboo pole production site. This is a handcrafted process usually done with hatchets. To produce flattened bamboo, a bamboo pole is cracked open and its internodes are removed. The innermost part of the bamboo is then trimmed down. During this process, some fibres are broken, rendering the material flexible but still able to maintain its shape. The main application of flattened bamboo is in load-bearing wall systems, where it is used between bamboo poles to support the soil-cement mortar with which the walls are plastered (Murphy et al., 2004; Zea Escamilla et al., 2013). Flattened bamboo is also used to produce woven bamboo mats. The figures origin from mainly calculations and literature values. This dataset was developed with the support of the International Organization for Bamboo and Rattan INBAR.
Ref:
Murphy, R.J., Trujillo, D., Londoño, X., 2004. Life cycle assessment (LCA) of a Guadua
house. In: International Symposium of Bamboo - Guadua. Pereira, Colombia.
Zea Escamilla, E. and G. Habert, Environmental impacts from the production of bamboo based construction materials representing the global production diversity. Journal of Cleaner Production, 2013.

## Included activities start
From reception of bamboo pole at the processing facility

## Included activities end
This activity ends with flattened bamboo (u=20%) at the processing facility. The dataset includes the inputs for trimming and processing. The dataset does not include infrastructure. This process is considered to be handcrafted, no power tools are used.

## Geography
Data for the Philippines

## Technology
Current production technology

## Reference product
- flattened bamboo: 1 kg; name RP; CPC 31212: Wood, continuously shaped along any of its edges or faces (including strips and friezes for parquet flooring, […]; By-product classification allocatable product
  production volume 578909 kg; name PV_RP; = 1.0697*541188.08
    The production volume is a rough estimate based on the annual production volume of woven bamboo mats assuming that all flattened bamboo is further processed into mats. 1.0697 Kg of flattened bamboo is required to produce 1 Kg of bamboo mat.
    All production volumes of bamboo products are calculated based on production volumes of glued laminated bamboo and woven bamboo mat panels, which are the end products of the bamboo production chain (as represented in the ecoinvent database). These are based on export data retrieved from INBAR (at <http://trade.inbar.int:10444/>, last accessed in December 2020) and the global GDP and the GDP of the Philippines for 2018 (retrieved from <https://unstats.un.org/unsd/snaama/Basic>, filtered for GDP, At current price- US Dollar, last accessed in November 2020).
  property price 0.529363 EUR2005; name RP_price_EUR2005
    Based on expert judgement, price given as 0.64 USD/kg. Converted with an exchange rate of 1EURO = 1.209 USD.
  property heating value, net 17.68 MJ
    Jetsada P. & Panmanas S. (2017),Evaluation of lower heating value and elemental composition of bamboo using near infrared spectroscopy,Energy,Volume 121,Pages 147-158,ISSN 0360-5442,https://doi.org/10.1016/j.energy.2017.01.020.
  property carbon content 0.494
    carbon content on a dry matter basis (reserved; not for manual entry)
  properties: dry mass 0.833333 kg, water in wet mass 0.166667 kg, wet mass 1 kg, carbon content, non-fossil 0.494, water content 0.2, carbon content, fossil 0, carbon allocation 0.411667 kg

## Inputs from technosphere
- bamboo pole: 1.25 kg; lognormal variance with pedigree 0.004425, pedigree (2,3,3,2,2)
  Refers to the round bamboo used, usually 3 to 6m in length
  properties: carbon content, non-fossil 0.494, heating value, net 17.68 MJ, wet mass 1 kg, water content 0.2, dry mass 0.833333 kg
  note on heating value, net: Jetsada P. & Panmanas S. (2017),Evaluation of lower heating value and elemental composition of bamboo using near infrared spectroscopy,Energy,Volume 121,Pages 147-158,ISSN 0360-5442,https://doi.org/10.1016/j.energy.2017.01.020.
- waste bamboo residues: -0.25 kg; name bamboo_residues
  production volume 144727 kg; = PV_RP*(bamboo_residues/RP)
    Calculated from production volume of reference product using the relative outputs.
  property price 0 EUR2005; name bamboo_residues_price_EUR2005
  properties: carbon content, non-fossil 0.494, dry mass 0.555556 kg, wet mass 1 kg, water content 0.8, heating value, net 17.68 MJ

## Sampling procedure
The dataset is mostly based on literature values and was developed with the support of the International Organization for Bamboo and Rattan INBAR

## Extrapolations
This dataset has been extrapolated from year 2020 to the year of the calculation (2021). The uncertainty has been adjusted accordingly.
