# treatment of lignite ash, opencast refill

Dataset: EcoSpold 2, unit process
Geography: CZ
Time period: 1996-01-01 to 2021-12-31
Technology level: current
Classification: EcoSpold01Categories: waste management/others
Classification: ISIC rev.4 ecoinvent: 3822:Treatment and disposal of hazardous waste
Synonyms: ashes form lignite incineration disposed as backfill in opencast lignite mines
Tags: ConvertedDataset; Treatment
Scenario: Business-as-Usual
System model: Allocation, cut-off by classification
Generated by: Gabor Doka (obsolete)
Published in: Doka G. 2008
Database: ecoinvent
isCopyrightProtected: true
accessRestrictedTo: 1

## General comment
backfilled waste composition is (in ppm): H2O n.a.; O n.a.; H n.a.; C n.a.; S 2938.8; N n.a.; P 79.931; B 420.02; Cl 2.9988; Br 3.1987; F 9.996; I 0.39984; Ag n.a.; As 9.9254; Ba 199.92; Cd 1.2162; Co 29.988; Cr 27.989; Cu 11.988; Hg 0.020001; Mn 39.984; Mo 13.988; Ni 29.956; Pb 9.9731; Sb 7.9858; Se 3.3864; Sn 3.1987; V 69.94; Zn 55.824; Be 1.9992; Sc 0.9996; Sr 139.91; Ti 199.92; Tl 0.039947; W 1.9992; Si 95962; Fe 10796; Ca 39984; Al 9396.2; K 1199.5; Mg 5997.6; Na 1799.3;
[This dataset was already contained in the ecoinvent database version 2. It was not individually updated during the transfer to ecoinvent version 3. Life Cycle Impact Assessment results may still have changed, as they are affected by changes in the supply chain, i.e. in other datasets. This dataset was generated following the ecoinvent quality guidelines for version 2. It may have been subject to central changes described in the ecoinvent version 3 change report (http://www.ecoinvent.org/database/ecoinvent-version-3/reports-of-changes/), and the results of the central updates were reviewed extensively. The changes added e.g. consistent water flows and other information throughout the database. The documentation of this dataset can be found in the ecoinvent reports of version 2, which are still available via the ecoinvent website. The change report linked above covers all central changes that were made during the conversion process.]

## Included activities end
This module contains only direct emissions from lignite ash used as backfill in opencast lignite mines: short-term emissions (0-100a) and long-term emissions (>100a) both to ground water. E.g. land-use and energy consumption is *not* included.

## Geography
Ash composition calculated from country-specific coal composition (CZ) and technology-specific transfer coefficients in power plant.

## Technology
Lignite ash as backfill in lignite opencast mine (together with tailings)

## Reference product
- lignite ash: -1 kg; CPC 39: Wastes or scraps; By-product classification Waste
  EcoSpold01Location=CZ
  production volume 3.38261e9 kg
    Estimated. Electricity and synthetic natural gas production are responsible for more than 90% of lignite use (https://www.lignite.com/about-lignite/lignite-uses/, accessed 20151008) . The production volume is calculated as the sum of lignite ashes resulting from electricity and heat and power co-generation production from lignite, in the respective country.
  property price 0 EUR2005
    Waste products are assigned a price of zero as they are assumed to require further treatment.
  property carbon content 0
    carbon content on a dry matter basis (reserved; not for manual entry)
  properties: water in wet mass 0 kg, heating value, net 0 MJ, water content 0, carbon content, fossil 0, carbon content, non-fossil 0, dry mass 1 kg, wet mass 1 kg, carbon allocation 0 kg

## Emissions to nature
- Boron [water, ground-, long-term]: 0.00026251 kg; lognormal variance with pedigree 0.87, pedigree (1,1,5,1,1)
  Long-term emission from lignite ash backfill. Uncertainty derived from uncertainty in ash composition and uncertainty in transfer coefficients.
- Iron, ion [water, ground-, long-term]: 0.0072144 kg; lognormal variance with pedigree 0.44, pedigree (1,1,5,1,1)
  (same comment as for Boron)
- Iodide [water, ground-, long-term]: 3.9984e-14 kg; lognormal variance with pedigree 1.75, pedigree (1,1,5,1,1)
  (same comment as for Boron)
- Fluoride [water, ground-]: 1.3041e-6 kg; lognormal variance with pedigree 1.41, pedigree (1,1,5,1,1)
  Short-term emission from lignite ash backfill. Uncertainty derived from uncertainty in ash composition and uncertainty in transfer coefficients.
- Tungsten [water, ground-, long-term]: 1.2282e-6 kg; lognormal variance with pedigree 1.53, pedigree (1,1,5,1,1)
  (same comment as for Boron)
- Antimony [water, ground-]: 3.0798e-6 kg; lognormal variance with pedigree 1.36, pedigree (1,1,5,1,1)
  (same comment as for Fluoride)
- Iron, ion [water, ground-]: 9.033e-8 kg; lognormal variance with pedigree 1.68, pedigree (1,1,5,1,1)
  (same comment as for Fluoride)
- Chloride [water, ground-]: 1.711e-6 kg; lognormal variance with pedigree 1.48, pedigree (1,1,5,1,1)
  (same comment as for Fluoride)
- Manganese [water, ground-]: 1.3834e-9 kg; lognormal variance with pedigree 2.22, pedigree (1,1,5,1,1)
  (same comment as for Fluoride)
- Copper, ion [water, ground-]: 1.9329e-9 kg; lognormal variance with pedigree 2.18, pedigree (1,1,5,1,1)
  (same comment as for Fluoride)
- Barium [water, ground-, long-term]: 0.00019991 kg; lognormal variance with pedigree 0.91, pedigree (1,1,5,1,1)
  (same comment as for Boron)
- Phosphate [water, ground-, long-term]: 0.00013738 kg; lognormal variance with pedigree 1.12, pedigree (1,1,5,1,1)
  (same comment as for Boron)
- Sodium, ion [water, ground-, long-term]: 0.00055269 kg; lognormal variance with pedigree 0.64, pedigree (1,1,5,1,1)
  (same comment as for Boron)
- Phosphate [water, ground-]: 2.2934e-7 kg; lognormal variance with pedigree 1.69, pedigree (1,1,5,1,1)
  (same comment as for Fluoride)
- Nickel, ion [water, ground-]: 4.5427e-8 kg; lognormal variance with pedigree 1.76, pedigree (1,1,5,1,1)
  (same comment as for Fluoride)
- Beryllium [water, ground-, long-term]: 1.9962e-6 kg; lognormal variance with pedigree 1.52, pedigree (1,1,5,1,1)
  (same comment as for Boron)
- Silicon [water, ground-]: 0.00054147 kg; lognormal variance with pedigree 0.6, pedigree (1,1,5,1,1)
  (same comment as for Fluoride)
- Beryllium [water, ground-]: 3.0317e-9 kg; lognormal variance with pedigree 2.12, pedigree (1,1,5,1,1)
  (same comment as for Fluoride)
- Mercury [water, ground-, long-term]: 1.9997e-8 kg; lognormal variance with pedigree 2.11, pedigree (1,1,5,1,1)
  (same comment as for Boron)
- Cadmium, ion [water, ground-, long-term]: 1.2161e-6 kg; lognormal variance with pedigree 1.58, pedigree (1,1,5,1,1)
  (same comment as for Boron)
- Chromium VI [water, ground-]: 4.2213e-6 kg; lognormal variance with pedigree 1.26, pedigree (1,1,5,1,1)
  (same comment as for Fluoride)
- Bromine [water, ground-, long-term]: 5.4093e-8 kg; lognormal variance with pedigree 1.48, pedigree (1,1,5,1,1)
  (same comment as for Boron)
- Calcium, ion [water, ground-, long-term]: 0.039969 kg; lognormal variance with pedigree 0.25, pedigree (1,1,5,1,1)
  (same comment as for Boron)
- Nickel, ion [water, ground-, long-term]: 2.9911e-5 kg; lognormal variance with pedigree 1.16, pedigree (1,1,5,1,1)
  (same comment as for Boron)
- Molybdenum [water, ground-, long-term]: 1.9035e-11 kg; lognormal variance with pedigree 1.29, pedigree (1,1,5,1,1)
  (same comment as for Boron)
- Potassium, ion [water, ground-, long-term]: 0.00052264 kg; lognormal variance with pedigree 0.68, pedigree (1,1,5,1,1)
  (same comment as for Boron)
- Zinc, ion [water, ground-]: 2.8657e-9 kg; lognormal variance with pedigree 2.12, pedigree (1,1,5,1,1)
  (same comment as for Fluoride)
- Selenium [water, ground-, long-term]: 2.0804e-6 kg; lognormal variance with pedigree 1.46, pedigree (1,1,5,1,1)
  (same comment as for Boron)
- Aluminium [water, ground-, long-term]: 0.0093846 kg; lognormal variance with pedigree 0.41, pedigree (1,1,5,1,1)
  (same comment as for Boron)
- Lead [water, ground-]: 2.1668e-10 kg; lognormal variance with pedigree 2.47, pedigree (1,1,5,1,1)
  (same comment as for Fluoride)
- Cadmium, ion [water, ground-]: 3.4583e-11 kg; lognormal variance with pedigree 2.71, pedigree (1,1,5,1,1)
  (same comment as for Fluoride)
- Titanium, ion [water, ground-, long-term]: 0.00019967 kg; lognormal variance with pedigree 0.91, pedigree (1,1,5,1,1)
  (same comment as for Boron)
- Selenium [water, ground-]: 1.306e-6 kg; lognormal variance with pedigree 1.48, pedigree (1,1,5,1,1)
  (same comment as for Fluoride)
- Cobalt [water, ground-, long-term]: 2.9967e-5 kg; lognormal variance with pedigree 1.16, pedigree (1,1,5,1,1)
  (same comment as for Boron)
- Vanadium, ion [water, ground-, long-term]: 3.7618e-5 kg; lognormal variance with pedigree 1.15, pedigree (1,1,5,1,1)
  (same comment as for Boron)
- Boron [water, ground-]: 3.2909e-6 kg; lognormal variance with pedigree 1.21, pedigree (1,1,5,1,1)
  (same comment as for Fluoride)
- Lead [water, ground-, long-term]: 9.9729e-6 kg; lognormal variance with pedigree 1.31, pedigree (1,1,5,1,1)
  (same comment as for Boron)
- Iodide [water, ground-]: 3.9984e-7 kg; lognormal variance with pedigree 1.73, pedigree (1,1,5,1,1)
  (same comment as for Fluoride)
- Zinc, ion [water, ground-, long-term]: 5.5821e-5 kg; lognormal variance with pedigree 1.08, pedigree (1,1,5,1,1)
  (same comment as for Boron)
- Sulfate [water, ground-, long-term]: 0.0064432 kg; lognormal variance with pedigree 0.56, pedigree (1,1,5,1,1)
  (same comment as for Boron)
- Sodium, ion [water, ground-]: 0.0012466 kg; lognormal variance with pedigree 0.63, pedigree (1,1,5,1,1)
  (same comment as for Fluoride)
- Chromium VI [water, ground-, long-term]: 2.7759e-6 kg; lognormal variance with pedigree 1.24, pedigree (1,1,5,1,1)
  (same comment as for Boron)
- Strontium [water, ground-]: 2.1217e-7 kg; lognormal variance with pedigree 1.56, pedigree (1,1,5,1,1)
  (same comment as for Fluoride)
- Molybdenum [water, ground-]: 1.3988e-5 kg; lognormal variance with pedigree 1.26, pedigree (1,1,5,1,1)
  (same comment as for Fluoride)
- Silicon [water, ground-, long-term]: 0.068428 kg; lognormal variance with pedigree 0.19, pedigree (1,1,5,1,1)
  (same comment as for Boron)
- Magnesium [water, ground-]: 2.8544e-6 kg; lognormal variance with pedigree 1.22, pedigree (1,1,5,1,1)
  (same comment as for Fluoride)
- Vanadium, ion [water, ground-]: 4.2986e-7 kg; lognormal variance with pedigree 1.47, pedigree (1,1,5,1,1)
  (same comment as for Fluoride)
- Scandium [water, ground-, long-term]: 7.171e-7 kg; lognormal variance with pedigree 1.61, pedigree (1,1,5,1,1)
  (same comment as for Boron)
- Mercury [water, ground-]: 3.9544e-12 kg; lognormal variance with pedigree 2.97, pedigree (1,1,5,1,1)
  (same comment as for Fluoride)
- Chloride [water, ground-, long-term]: 1.2878e-6 kg; lognormal variance with pedigree 1.48, pedigree (1,1,5,1,1)
  (same comment as for Boron)
- Manganese [water, ground-, long-term]: 3.9983e-5 kg; lognormal variance with pedigree 1.12, pedigree (1,1,5,1,1)
  (same comment as for Boron)
- Tin, ion [water, ground-, long-term]: 3.1985e-6 kg; lognormal variance with pedigree 1.46, pedigree (1,1,5,1,1)
  (same comment as for Boron)
- Copper, ion [water, ground-, long-term]: 1.1986e-5 kg; lognormal variance with pedigree 1.28, pedigree (1,1,5,1,1)
  (same comment as for Boron)
- Cobalt [water, ground-]: 2.1474e-8 kg; lognormal variance with pedigree 1.86, pedigree (1,1,5,1,1)
  (same comment as for Fluoride)
- Calcium, ion [water, ground-]: 1.5133e-5 kg; lognormal variance with pedigree 1.03, pedigree (1,1,5,1,1)
  (same comment as for Fluoride)
- Magnesium [water, ground-, long-term]: 0.0059947 kg; lognormal variance with pedigree 0.47, pedigree (1,1,5,1,1)
  (same comment as for Boron)
- Tin, ion [water, ground-]: 2.5389e-10 kg; lognormal variance with pedigree 2.44, pedigree (1,1,5,1,1)
  (same comment as for Fluoride)
- Fluoride [water, ground-, long-term]: 8.6919e-6 kg; lognormal variance with pedigree 1.31, pedigree (1,1,5,1,1)
  (same comment as for Boron)
- Tungsten [water, ground-]: 7.71e-7 kg; lognormal variance with pedigree 1.54, pedigree (1,1,5,1,1)
  (same comment as for Fluoride)
- Antimony [water, ground-, long-term]: 4.906e-6 kg; lognormal variance with pedigree 1.34, pedigree (1,1,5,1,1)
  (same comment as for Boron)
- Aluminium [water, ground-]: 1.1683e-5 kg; lognormal variance with pedigree 1.04, pedigree (1,1,5,1,1)
  (same comment as for Fluoride)
- Thallium [water, ground-]: 6.0577e-11 kg; lognormal variance with pedigree 2.62, pedigree (1,1,5,1,1)
  (same comment as for Fluoride)
- Titanium, ion [water, ground-]: 2.4858e-7 kg; lognormal variance with pedigree 1.53, pedigree (1,1,5,1,1)
  (same comment as for Fluoride)
- Potassium, ion [water, ground-]: 0.00067688 kg; lognormal variance with pedigree 0.68, pedigree (1,1,5,1,1)
  (same comment as for Fluoride)
- Arsenic, ion [water, ground-, long-term]: 9.9254e-15 kg; lognormal variance with pedigree 1.33, pedigree (1,1,5,1,1)
  (same comment as for Boron)
- Thallium [water, ground-, long-term]: 3.9887e-8 kg; lognormal variance with pedigree 2.02, pedigree (1,1,5,1,1)
  (same comment as for Boron)
- Sulfate [water, ground-]: 0.0023733 kg; lognormal variance with pedigree 0.6, pedigree (1,1,5,1,1)
  (same comment as for Fluoride)
- Barium [water, ground-]: 6.9171e-9 kg; lognormal variance with pedigree 2.01, pedigree (1,1,5,1,1)
  (same comment as for Fluoride)
- Arsenic, ion [water, ground-]: 9.9254e-6 kg; lognormal variance with pedigree 1.31, pedigree (1,1,5,1,1)
  (same comment as for Fluoride)
- Bromine [water, ground-]: 3.1446e-6 kg; lognormal variance with pedigree 1.46, pedigree (1,1,5,1,1)
  (same comment as for Fluoride)
- Strontium [water, ground-, long-term]: 0.0001397 kg; lognormal variance with pedigree 0.96, pedigree (1,1,5,1,1)
  (same comment as for Boron)
- Scandium [water, ground-]: 2.825e-7 kg; lognormal variance with pedigree 1.65, pedigree (1,1,5,1,1)
  (same comment as for Fluoride)

## Sampling procedure
country-specific calculation based on literature data

## Extrapolations
This dataset has been extrapolated from year 2000 to the year of the calculation (2021). The uncertainty has been adjusted accordingly.

## Review by Niels Jungbluth 2009-01-22
passed.
