# treatment of waste emulsion paint, hazardous waste incineration

Dataset: EcoSpold 2, unit process
Geography: RoW
Time period: 1997-01-01 to 2021-12-31
Technology level: current
Classification: ISIC rev.4 ecoinvent: 3822:Treatment and disposal of hazardous waste
Tags: Treatment
Scenario: Business-as-Usual
System model: Allocation, cut-off by classification
Share of production covered: 39 %
Generated by: Gabor Doka (obsolete)
Published in: Doka G. 2008
Database: ecoinvent
isCopyrightProtected: true
accessRestrictedTo: 1

## General comment
Inventoried waste contains 100% Emulsion paint (remains); . waste composition (wet, in ppm): upper heating value 11.14 MJ/kg; lower heating value 10.51 MJ/kg; H2O n.a.; O 214760; H 31708; C 268330; S n.a.; N n.a.; P n.a.; B n.a.; Cl 86465; Br n.a.; F n.a.; I n.a.; Ag n.a.; As 0.44122; Ba n.a.; Cd 0.016849; Co n.a.; Cr 1.248; Cu n.a.; Hg 0.0085442; Mn n.a.; Mo n.a.; Ni 0.95527; Pb 0.64946; Sb n.a.; Se n.a.; Sn n.a.; V n.a.; Zn 6.5444; Be n.a.; Sc n.a.; Sr n.a.; Ti 135000; Tl n.a.; W n.a.; Si 149810; Fe n.a.; Ca 113920; Al n.a.; K n.a.; Mg n.a.; Na n.a.; Share of carbon in waste that is biogenic 0%. Net energy produced in HWI: 17.11MJ/kg thermal energy and 1.27MJ/kg electric energy. Allocation of energy production: no substitution or expansion. 100% of burden allocated to waste disposal function of HWI. One kg of this waste produces 0.707 kg of residues, which are landfilled. Additional solidification with 0.2828 kg of cement.
[This dataset is meant to replace the following datasets:]

## Included activities end
waste-specific air and water emissions from incineration, auxiliary material consumption for flue gas cleaning. Short-term emissions to river water and long-term emissions to ground water from residual material landfill (from solidified fly ashes and scrubber slugde). Process energy demands for HWI.

## Geography
Specific to the technology encountered in Switzerland in 2000. Well applicable to modern incineration practices in Europe or North America or Japan.

## Technology
Swiss HWI plant in 2000 with wet flue gas scrubber and low-dust SCR DeNOx facility. Gross thermal efficiency 74.4% and gross electric efficiency 10%.

## Time period
Transfer coefficients for modern Swiss MSWI. Emission speciation based on early 90ies data.

## Reference product
- waste emulsion paint: -1 kg; name RP; By-product classification Waste; CPC 39: Wastes or scraps
  production volume 4.66683e8 kg; name PV_RP; = 45600000000*0.35*0.22*0.16
    Estimated value. Global demand of paint is estimated to be 45600000000kg (http://www.freedoniagroup.com/brochure/28xx/2845smwe.pdf, accessed 20151009) of which 55% is paint and 35% is emulsion paint (http://www.psgdover.com/en/mouvex-paint-coatings-market-overview/what-are-paint-a-coatings/defining-paintaccessed, accessed 20151009). 22% is considered hazardous waste and 78% non hazardous waste (http://archive.epa.gov/sectors/web/pdf/paint_quantity_report.pdf, accessed 20151009). In the US, of hazardous waste 7.2% is sent to hazardous incineration (http://www3.epa.gov/epawaste/hazard/tsd/td/combustion.htm, accessed 20151009). Of non hazardous waste 12% is sent to incineration (Extrapolated from the US data, according to GDP. The relative GDP of US in 2005 was .274857, compared to the global value of 1. EPA estimates that 12% of annual MSW in US is incinerated for energy recovery http://www.epa.gov/epawaste/nonhaz/municipal/pubs/2012_msw_fs.pdf) 23% is sent to inert material landfill (http://archive.epa.gov/sectors/web/pdf/paint_quantity_report.pdf, accessed 20151009). The rest (65%) is considered to go to sanitary landfill. In the EU (from Eurostat municipal waste treatment http://ec.europa.eu/eurostat/web/waste/transboundary-waste-shipments/key-waste-streams/municipal-waste), of hazardous waste 23% is sent to hazardous incineration. Of non hazardous waste 23% is sent to incineration. 37% is considered to be sent to landfilling and it is split between sanitary and inert landfill using the same shares assumed for the US. The treatment activities for the global dataset are calculated as the weighted average of US and EU, based on nominal GDP of 2010 (source: United Nations, http://data.un.org/Glossary.aspx?q=GDP+%28current+US%24%29, accessed 20130726 and 20130312). Where EU without CH GDP is 2.80E-01 and US is 0.253094 of the world. Gross domestic product (GDP) at current prices is GDP at prices of the current reporting period. Also known as nominal GDP. The assumed treatment are 16% of hazardous waste goes to incineration. For non hazardous, 20% goes to incineration, 12% goes to inert landfill, and 56% goes to sanitary landfill.
  property heating value, net 8.18 MJ
    LHV is calculated based on the Carbon content of the product. More details can be found on the respective documentation.
  property price 0 EUR2005; name RP_price_EUR2005
    Waste products are assigned a price of zero as they are assumed to require further treatment.
  property carbon content, fossil 0.27
    Tab A.4, ecoinvent v2.2 report 13_I. C content has been calculated after data in the tables, and then referred to 1 kg DM
  property carbon content 0.27
    carbon content on a dry matter basis (reserved; not for manual entry)
  properties: carbon content, non-fossil 0, water in wet mass 0 kg, water content 0, dry mass 1 kg, wet mass 1 kg, carbon allocation 0.27 kg

## Inputs from technosphere
- iron (III) chloride, without water, in 40% solution state: 0.078188 kg; lognormal variance with pedigree 0.192, pedigree (1,1,5,5,1)
  uncertainty calculated from uncertainty in average auxiliary material input, and the unertainty of the waste composition of this waste
  properties: wet mass 1 kg, dry mass 1 kg
- hydrochloric acid, without water, in 30% solution state: 0.00096247 kg; lognormal variance with pedigree 0.122, pedigree (1,1,5,5,1)
  (same comment as for iron (III) chloride, without water, in 40% solution state)
  properties: dry mass 1 kg, heating value, net 3.32 MJ, wet mass 1 kg
- waste cement, hydrated: -0.70699 kg; name BP; lognormal variance with pedigree 0.072, pedigree (1,1,5,5,1)
  Hydrated cement for solidification of landfilled residual material. Uncertainty calculated from unertainty of the waste composition of this waste and transfer coefficients in the incinerator and of the solidification recipe.
  production volume 3.2994e8 kg; = PV_RP*BP/ABS(RP)
    Calculated from the production volume of waste emulsion paint, 0% water in proportion to the respective output amounts.
  property price 0 EUR2005; name BP_price_EUR2005
  properties: dry mass 1 kg, wet mass 1 kg
- sodium hydroxide, without water, in 50% solution state: 0.091853 kg; lognormal variance with pedigree 0.232, pedigree (1,1,5,5,1)
  (same comment as for iron (III) chloride, without water, in 40% solution state)
  properties: wet mass 1 kg, dry mass 1 kg, heating value, net 3.03 MJ
- hazardous waste incineration facility: 1.25e-9 unit; lognormal variance with pedigree 0.042, pedigree (1,1,5,5,1)
  demands per kilogram waste. uncertainty is heeded in the module
- quicklime, milled, packed: 0.0072212 kg; lognormal variance with pedigree 0.232, pedigree (1,1,5,5,1)
  (same comment as for iron (III) chloride, without water, in 40% solution state)
  properties: dry mass 0.99 kg, water content 0.010101, wet mass 1 kg
- residual material landfill: 1.4729e-9 unit; lognormal variance with pedigree 0.062, pedigree (1,1,5,5,1)
  uncertainty is calculated from uncertainties in waste composition and transfer coefficients in incinerator
- process-specific burdens, hazardous waste incineration plant: 1 kg; lognormal variance with pedigree 0.042, pedigree (1,1,5,5,1)
  demands per kilogram waste. uncertainty is heeded in the module
- cement, unspecified: 0 kg; pedigree (1,1,1,1,1)
  Cement for solidification of landfilled residual material. Uncertainty calculated from unertainty of the waste composition of this waste, of transfer coefficients in the incinerator and of the solidification recipe.
  properties: dry mass 1 kg, wet mass 1 kg
- heat, central or small-scale, other than natural gas: 11.7406 MJ; lognormal variance with pedigree 0.162, pedigree (1,1,5,5,1)
  Uncertainty dependent on total energy required and heating value present, using experimental GSd for substraction from uc=A*GSDa^2-B
  properties: heating value, net 1 MJ
- chemical, organic: 1.3709e-7 kg; lognormal variance with pedigree 1.662, pedigree (1,1,5,5,1)
  Proxy for TMT15. uncertainty calculated from uncertainty in average auxiliary material input, and the unertainty of the waste composition of this waste
  properties: wet mass 1 kg, dry mass 1 kg, carbon content, fossil 0.628, heating value, net 19.03 MJ
  note on carbon content, fossil: This dataset is an unweighted average of 20 organic substances (listed in Tab 88.1, ecoinvent v2.2 report 8, part II), being part of the top100 chemicals included in this database. The C-content has also been calculated as an unweighted average of the C content of the substances composing this dataset.
- chemical, inorganic: 0.0016041 kg; lognormal variance with pedigree 0.122, pedigree (1,1,5,5,1)
  Proxy for Polyelectrolyte. uncertainty calculated from uncertainty in average auxiliary material input, and the unertainty of the waste composition of this waste
  properties: dry mass 1 kg, carbon content, fossil 0.003, wet mass 1 kg
  note on carbon content, fossil: This dataset is an unweighted average of 20 inorganic substances (listed in Tab 88.1, ecoinvent v2.2 report 8, part II), being part of the top100 chemicals included in this database. The C-content has also been calculated as an unweighted average of the C content of the substances composing this dataset.
- process-specific burdens, residual material landfill: 0.70699 kg; lognormal variance with pedigree 0.062, pedigree (1,1,5,5,1)
  (same comment as for residual material landfill)
- cement, unspecified: 0.0099305, 0.000727341, 0.00207316, 0.0468852, 0.00137997, 0.0151561, 0.00183372, 0.204814 kg (8 entries); lognormal variance with pedigree 0.072, pedigree (1,1,5,5,1)
  (same comment as for cement, unspecified)

## Emissions to nature
- Zinc, ion [water, ground-, long-term]: 7.9077e-8 kg; lognormal variance with pedigree 6.212, pedigree (1,1,5,5,1)
  Long-term emissions from landfilling of incineration residues. uncertainty is calculated from uncertainties in waste composition and transfer coefficients in incinerator and landfills.
- Chromium [air, urban air close to ground]: 9.2276e-14 kg; lognormal variance with pedigree 1.682, pedigree (1,1,5,5,1)
  (same comment as for residual material landfill)
- Calcium, ion [water, ground-, long-term]: 0.010277 kg; lognormal variance with pedigree 1.602, pedigree (1,1,5,5,1)
  (same comment as for Zinc, ion)
- DOC, Dissolved Organic Carbon [water, ground-, long-term]: 0.0019073 kg; lognormal variance with pedigree 0.142, pedigree (1,1,5,5,1)
  (same comment as for Zinc, ion)
- Titanium, ion [water, surface water]: 6.6836e-5 kg; lognormal variance with pedigree 0.882, pedigree (1,1,5,5,1)
  uncertainty is calculated from uncertainties in waste composition and transfer coefficients in incinerator and landfills
- Cadmium, ion [water, surface water]: 7.6138e-12 kg; lognormal variance with pedigree 1.912, pedigree (1,1,5,5,1)
  (same comment as for Titanium, ion)
- Nickel [air, urban air close to ground]: 6.6869e-10 kg; lognormal variance with pedigree 1.642, pedigree (1,1,5,5,1)
  (same comment as for residual material landfill)
- COD, Chemical Oxygen Demand [water, ground-, long-term]: 0.0043595 kg; lognormal variance with pedigree 0.142, pedigree (1,1,5,5,1)
  (same comment as for Zinc, ion)
- Titanium, ion [water, ground-, long-term]: 0.040035 kg; lognormal variance with pedigree 0.502, pedigree (1,1,5,5,1)
  (same comment as for Zinc, ion)
- Hydrogen chloride [air, urban air close to ground]: 2.6671e-5 kg; lognormal variance with pedigree 0.202, pedigree (1,1,5,5,1)
  (same comment as for residual material landfill)
- Nickel, ion [water, ground-, long-term]: 2.7488e-7 kg; lognormal variance with pedigree 1.872, pedigree (1,1,5,5,1)
  (same comment as for Zinc, ion)
- Carbon dioxide, fossil [air, urban air close to ground]: 0.97301 kg; lognormal variance with pedigree 0.092, pedigree (1,1,5,5,1)
  calculated from uncertainty in carbon in waste and transfer coefficients
- Mercury [water, surface water]: 9.0089e-11 kg; lognormal variance with pedigree 1.952, pedigree (1,1,5,5,1)
  (same comment as for Titanium, ion)
- Cadmium, ion [water, ground-, long-term]: 1.1433e-10 kg; lognormal variance with pedigree 8.192, pedigree (1,1,5,5,1)
  (same comment as for Zinc, ion)
- Silicon [air, urban air close to ground]: 0.00034876 kg; lognormal variance with pedigree 0.142, pedigree (1,1,5,5,1)
  (same comment as for residual material landfill)
- Nickel, ion [water, surface water]: 1.9581e-7 kg; lognormal variance with pedigree 1.612, pedigree (1,1,5,5,1)
  (same comment as for Titanium, ion)
- DOC, Dissolved Organic Carbon [water, surface water]: 5.8987e-6 kg; lognormal variance with pedigree 0.372, pedigree (1,1,5,5,1)
  (same comment as for Titanium, ion)
- Zinc [air, urban air close to ground]: 4.5811e-9 kg; lognormal variance with pedigree 1.392, pedigree (1,1,5,5,1)
  (same comment as for residual material landfill)
- Lead [water, surface water]: 1.7677e-11 kg; lognormal variance with pedigree 1.822, pedigree (1,1,5,5,1)
  (same comment as for Titanium, ion)
- Arsenic, ion [water, surface water]: 4.4122e-7 kg; lognormal variance with pedigree 1.722, pedigree (1,1,5,5,1)
  (same comment as for Titanium, ion)
- Arsenic [air, urban air close to ground]: 4.5005e-15 kg; lognormal variance with pedigree 1.832, pedigree (1,1,5,5,1)
  (same comment as for residual material landfill)
- COD, Chemical Oxygen Demand [water, surface water]: 1.3483e-5 kg; lognormal variance with pedigree 0.372, pedigree (1,1,5,5,1)
  (same comment as for Titanium, ion)
- Chloride [water, surface water]: 0.086334 kg; lognormal variance with pedigree 0.172, pedigree (1,1,5,5,1)
  (same comment as for Titanium, ion)
- Zinc, ion [water, surface water]: 8.7827e-8 kg; lognormal variance with pedigree 1.372, pedigree (1,1,5,5,1)
  (same comment as for Titanium, ion)
- Carbon monoxide, fossil [air, urban air close to ground]: 1.2076e-5 kg; lognormal variance with pedigree 0.712, pedigree (1,4,5,5,3)
  1 plant for waste solvent incineration in Switzerland
  Uncertainty: & basic uncertainty of 5; 1 plant for waste solvent incineration in Switzerland
- BOD5, Biological Oxygen Demand [water, surface water]: 1.3483e-5 kg; lognormal variance with pedigree 0.372, pedigree (1,1,5,5,1)
  (same comment as for Titanium, ion)
- Titanium [air, urban air close to ground]: 0.000135 kg; lognormal variance with pedigree 0.152, pedigree (1,1,5,5,1)
  (same comment as for residual material landfill)
- Lead [water, ground-, long-term]: 3.3686e-9 kg; lognormal variance with pedigree 8.592, pedigree (1,1,5,5,1)
  (same comment as for Zinc, ion)
- Lead [air, urban air close to ground]: 2.4107e-11 kg; lognormal variance with pedigree 1.712, pedigree (1,1,5,5,1)
  (same comment as for residual material landfill)
- Silicon [water, surface water]: 0.00033612 kg; lognormal variance with pedigree 0.682, pedigree (1,1,5,5,1)
  (same comment as for Titanium, ion)
- Silicon [water, ground-, long-term]: 0.14912 kg; lognormal variance with pedigree 0.132, pedigree (1,1,5,5,1)
  (same comment as for Zinc, ion)
- Arsenic, ion [water, ground-, long-term]: 0 kg; pedigree (1,1,1,1,1)
  (same comment as for Zinc, ion)
- TOC, Total Organic Carbon [water, surface water]: 5.8987e-6 kg; lognormal variance with pedigree 0.372, pedigree (1,1,5,5,1)
  (same comment as for Titanium, ion)
- Chloride [water, ground-, long-term]: 0.00010495 kg; lognormal variance with pedigree 0.202, pedigree (1,1,5,5,1)
  (same comment as for Zinc, ion)
- Mercury [air, urban air close to ground]: 0 kg; pedigree (1,1,1,1,1)
  (same comment as for residual material landfill)
- Chromium VI [water, surface water]: 7.8757e-8 kg; lognormal variance with pedigree 1.672, pedigree (1,1,5,5,1)
  (same comment as for Titanium, ion)
- Chromium VI [water, ground-, long-term]: 2.3622e-7 kg; lognormal variance with pedigree 1.592, pedigree (1,1,5,5,1)
  (same comment as for Zinc, ion)
- TOC, Total Organic Carbon [water, ground-, long-term]: 0.0019073 kg; lognormal variance with pedigree 0.142, pedigree (1,1,5,5,1)
  (same comment as for Zinc, ion)
- Calcium, ion [water, surface water]: 1.7156e-5 kg; lognormal variance with pedigree 1.052, pedigree (1,1,5,5,1)
  (same comment as for Titanium, ion)
- Mercury [water, ground-, long-term]: 3.9908e-10 kg; lognormal variance with pedigree 4.292, pedigree (1,1,5,5,1)
  (same comment as for Zinc, ion)
- BOD5, Biological Oxygen Demand [water, ground-, long-term]: 0.0043595 kg; lognormal variance with pedigree 0.142, pedigree (1,1,5,5,1)
  (same comment as for Zinc, ion)
- Calcium [air, urban air close to ground]: 0.00018991 kg; lognormal variance with pedigree 0.172, pedigree (1,1,5,5,1)
  (same comment as for residual material landfill)
- Cadmium [air, urban air close to ground]: 9.2786e-13 kg; lognormal variance with pedigree 2.002, pedigree (1,1,5,5,1)
  (same comment as for residual material landfill)

## Sampling procedure
The 2 Swiss HWI plants, used as the inventory reference technology mix, have a total annual capacity of 53'000 tons of hazardous waste. This corresponds to 39% of the Swiss total installed capacity in 2000. Swiss average plants size is 20'000 t/a.

## Extrapolations
Available waste composition data. Transfer coefficients from one modern HWI completed with data from MSWI. Waste-specific auxiliary material consumption adapted from MSWI. This dataset has been copied from an original dataset covering the geography CH. The uncertainty has been adjusted accordingly.
