# carton board box production service, with offset printing

Dataset: EcoSpold 2, unit process
Geography: CA-QC
Time period: 1993-01-01 to 2021-12-31
Technology level: current
Classification: EcoSpold01Categories: paper & cardboard/cardboard & corrugated board
Classification: ISIC rev.4 ecoinvent: 1702:Manufacture of corrugated paper and paperboard and of containers of paper a
Tags: recontextualization
Scenario: Business-as-Usual
System model: Allocation, cut-off by classification
Generated by: Pascal Lesage
Published in: Hischier R. 2007
Database: ecoinvent
isCopyrightProtected: true
accessRestrictedTo: 1

## General comment
This dataset represents offset printing of carton board box in Quebec.
Child dataset exchanges identical to GLO dataset. Created to enable linking to regional markets (e.g. for electricity). Data quality indicators adjusted accordingly.
The input of cartonboard is not included into this module allowing the user to establish its own cartonboard boxes. Per kg of used cartonboard, 0.80 kg of this module are needed.
[This dataset was already contained in the ecoinvent database version 2. It was not individually updated during the transfer to ecoinvent version 3. Life Cycle Impact Assessment results may still have changed, as they are affected by changes in the supply chain, i.e. in other datasets. This dataset was generated following the ecoinvent quality guidelines for version 2. It may have been subject to central changes described in the ecoinvent version 3 change report (http://www.ecoinvent.org/database/ecoinvent-version-3/reports-of-changes/), and the results of the central updates were reviewed extensively. The changes added e.g. consistent water flows and other information throughout the database. The documentation of this dataset can be found in the ecoinvent reports of version 2, which are still available via the ecoinvent website. The change report linked above covers all central changes that were made during the conversion process.]
[This dataset was already contained in the ecoinvent database version 2. It was not individually updated during the transfer to ecoinvent version 3. Life Cycle Impact Assessment results may still have changed, as they are affected by changes in the supply chain, i.e. in other datasets. This dataset was generated following the ecoinvent quality guidelines for version 2. It may have been subject to central changes described in the ecoinvent version 3 change report (http://www.ecoinvent.org/database/ecoinvent-version-3/reports-of-changes/), and the results of the central updates were reviewed extensively. The changes added e.g. consistent water flows and other information throughout the database. The documentation of this dataset can be found in the ecoinvent reports of version 2, which are still available via the ecoinvent website. The change report linked above covers all central changes that were made during the conversion process.]

## Included activities end
This module includes the production of boxes out of cartonboard. It contains the steps of cutting, folding and printing with an offset machine and therefore inks and glues are considered as well as the electricity consumption.

## Technology
Average of the used technology within the examined Swiss producers

## Parameters
- world gross domestic product 2011: 7e13 USD(2011); name worldGDP2011; lognormal variance with pedigree 0.0006, pedigree (1,1,1,1,1)
  Comment: World Gross domestic product for 2011, expressed in 2011 USD. Source: World Bank.
- Quebec gross domestic product 2011: 3.11e11 USD(2011); name quebecGDP2011; lognormal variance with pedigree 0.0006, pedigree (1,1,1,1,1)
  Quebec Gross domestic product for 2011, expressed in 2011 USD. Source: Institut de la statistique du Québec. Converted from CAD to USD using a yearly average exchange rate of 0.989 CAD/USD (Source: bank of Canada).
- fraction, process water, to air: 0.15 dimensionless; lognormal variance with pedigree 0.092025, pedigree (4,4,3,2,4)

## Reference product
- carton board box production, with offset printing: 1 kg; CPC 32153: Cartons, boxes, cases, record sleeves and other packing containers (except bags) of paper, paperboard, cellulo[…]; By-product classification allocatable product
  production volume 0.0177714 kg
    Gross approximation of Quebec production volume using relative value of Quebec GDP to world GDP
  properties: price 0.85 EUR2005

## Inputs from technosphere
- municipal solid waste: -0.038 kg; lognormal variance with pedigree 0.0526, pedigree (1,3,5,5,1)
  Average from 6 Swiss producers
  Uncertainty: a
  production volume 0.000675314 kg
    Calculated from the production volume of carton board box production, with offset printing in proportion to the respective output amounts.
  properties: water content 0.297017, wet mass 1 kg, carbon content, fossil 0.171549, dry mass 0.771 kg, carbon content, non-fossil 0.609371, heating value, net 11.74 MJ
  note on carbon content, fossil: MSW composition in tab 4.1, ecoinvent v2.2 report 13_I. C content referred to 1 kg DM
  note on heating value, net: Value taken from the general comment of the treatment dataset.
- solvent, organic: 0.0022 kg; lognormal variance with pedigree 0.0526, pedigree (1,3,5,5,1)
  Average from 6 Swiss producers
  Uncertainty: a
  properties: dry mass 1 kg, heating value, net 19.11 MJ, wet mass 1 kg, carbon content, fossil 0.63072
  note on carbon content, fossil: Mixture of 15 of the most often used solvents (list in ecoinvent v2.2 report 11-III, pg 293). C content was calculated as an unweighted average of C content of the different solvents
- paper, woodfree, coated: 0.0543 kg; lognormal variance with pedigree 0.0526, pedigree (1,3,5,5,1)
  Average from 6 Swiss producers
  Uncertainty: a
  properties: dry mass 0.945 kg, water content 0.0582011, heating value, net 14.11 MJ, carbon content, non-fossil 0.22775, carbon content, fossil 0.0590617, wet mass 1 kg
  note on carbon content, non-fossil: Biogenic C content was calculated after biogenic C contents of chemicals used in the production of the paper (in Tab 8.72 & 8.73 ecoinvent v2.2 report 11_III, part 8). The cellulose content in 1 kg of paper (on a wet mas basis) was estimated as (1-chemical content), C content of cellulose was considered 0.44 kgC/kg dry mass (ecoinvent v2.2 report, n 15a, pg 40)
  note on carbon content, fossil: Fossil C content was calculated after fossil C contents of chemicals used in the production of the paper (in Tab 8.72 & 8.73 ecoinvent v2.2 report 11_III, part 8).
- electricity, medium voltage: 0.325 kWh; lognormal variance with pedigree 0.0526, pedigree (1,3,5,5,1)
  Average from 6 Swiss producers
  Uncertainty: a
- polyethylene, high density, granulate: 0.0108 kg; lognormal variance with pedigree 0.0526, pedigree (1,3,5,5,1)
  Average from 6 Swiss producers
  Uncertainty: a
  properties: carbon content, fossil 0.857143, wet mass 1 kg, heating value, net 42.47 MJ, dry mass 1 kg
  note on carbon content, fossil: Polyethylene is formed out of a huge amount of ethylene monomers (C2H4) (ecoinvent v2.2 report 11_II). MW=28 g/mol
- rosin size, for paper production: 0.0052 kg; lognormal variance with pedigree 0.0526, pedigree (1,3,5,5,1)
  Average from 6 Swiss producers
  Uncertainty: a
  properties: heating value, net 15.62 MJ, wet mass 1 kg, dry mass 1 kg, carbon content, non-fossil 0.515474
  note on carbon content, non-fossil: Mixture of rosin size (approximated by soap) (75%) and alkali (shown as sodium hydroxide) (25%). (ecoinvent v2.2 report 11-III, pg 299).
- heat, district or industrial, other than natural gas: 0.6479 MJ; lognormal variance with pedigree 0.0526, pedigree (1,3,5,5,1)
  Average from 6 Swiss producers
  Uncertainty: a
  properties: heating value, net 1 MJ
- liquefied petroleum gas: 0.0001 kg; lognormal variance with pedigree 0.0526, pedigree (1,3,5,5,1)
  Average from 6 Swiss producers
  Uncertainty: a
  properties: heating value, net 45.5 MJ, dry mass 1 kg, carbon content, fossil 0.821863, wet mass 1 kg
  note on heating value, net: Indicative value. Reference: Fuels - Higher and Lower Calorific Values, available at: https://www.engineeringtoolbox.com/fuels-higher-calorific-values-d_169.html
- chemical, organic: 0.00023 kg; lognormal variance with pedigree 0.0526, pedigree (1,3,5,5,1)
  Average from 6 Swiss producers
  Uncertainty: a
  properties: wet mass 1 kg, dry mass 1 kg, carbon content, fossil 0.628, heating value, net 19.03 MJ
  note on carbon content, fossil: This dataset is an unweighted average of 20 organic substances (listed in Tab 88.1, ecoinvent v2.2 report 8, part II), being part of the top100 chemicals included in this database. The C-content has also been calculated as an unweighted average of the C content of the substances composing this dataset.
- heat, district or industrial, natural gas: 1.1305 MJ; lognormal variance with pedigree 0.0526, pedigree (1,3,5,5,1)
  Average from 6 Swiss producers
  Uncertainty: a
  properties: heating value, net 1 MJ
- hazardous waste, for underground deposit: -0.00105 kg; lognormal variance with pedigree 0.0526, pedigree (1,3,5,5,1)
  Average from 6 Swiss producers
  Uncertainty: a
  production volume 1.866e-5 kg
    (same comment as for municipal solid waste)
  properties: wet mass 1 kg, carbon content, fossil 0.554667, dry mass 1 kg
  note on carbon content, fossil: Tab A.6, ecoinvent v2.2 report 13_I, average hazardous waste composition was used, and referred to 0% water mass. No waste-specific emission are currently inventoried for underground deposits. Accordingly, no waste composition must be specified. For generic, average waste to underground deposit deposition in a 200 liter steel drum without cement solidification is assumed (ecoinvent v2.2 report 13_I).
- bilge oil: -0.00016 kg; lognormal variance with pedigree 0.0526, pedigree (1,3,5,5,1)
  Average from 6 Swiss producers
  Uncertainty: a
  production volume 2.84343e-6 kg
    (same comment as for municipal solid waste)
  properties: dry mass 0.1 kg, carbon content, fossil 0.84, heating value, net 1.92 MJ, water content 9, wet mass 1 kg
  note on carbon content, fossil: Tab A.6, ecoinvent v2.2 report 13_I. C content has been calculated after data in the tables, and then referred to 1 kg DM
- packaging box factory: 1.43e-9 unit; lognormal variance with pedigree 0.448, pedigree (4,5,5,5,5)
  Own assumption
  Uncertainty: o
- printing ink, offset, without solvent, in 47.5% solution state: 0.0183 kg; lognormal variance with pedigree 0.0526, pedigree (1,3,5,5,1)
  Average from 6 Swiss producers
  Uncertainty: a
  properties: carbon content, fossil 0.455266, carbon content, non-fossil 0.221773, wet mass 1 kg, dry mass 1 kg, heating value, net 20.51 MJ
  note on carbon content, fossil: C content was calculated as an addition of C content in the raw materials.
- lubricating oil: 0.0002 kg; lognormal variance with pedigree 0.0526, pedigree (1,3,5,5,1)
  Average from 6 Swiss producers
  Uncertainty: a
  properties: carbon content, fossil 0.75, dry mass 1 kg, wet mass 1 kg, heating value, net 40.2 MJ
  note on carbon content, fossil: Lubricating oil is produced from diesel. C-content/dry mass of fats and oils considered 75%, from: ecoinvent v2.2 report, n 15a, pg 40
  note on heating value, net: Literature value, Source: IPCC 2006, 2006 IPCC Guidelines for National Greenhouse Gas Inventories, Prepared by the National Greenhouse Gas Inventories Programme, Eggleston H.S., Buendia L., Miwa K., Ngara T. and Tanabe K. (eds). Published: IGES, Japan

## Inputs from nature
- Water, unspecified natural origin [natural resource, in water]: 2.5e-6 m3; lognormal variance with pedigree 0.0526, pedigree (1,3,5,5,1)
  Average from 6 Swiss producers
  Uncertainty: a

## Emissions to nature
- DOC, Dissolved Organic Carbon [water, surface water]: 3.5e-5 kg; lognormal variance with pedigree 0.0926, pedigree (1,3,5,5,1)
  Calculated as equal to TOC.
  Uncertainty: a
- Water [air, unspecified]: 3.75e-7 m3; lognormal variance with pedigree 0.0827, pedigree (2,2,5,5,1)
  Calculated value based on literature values and expert opinion. See comments in the parametres" comment field.
- NMVOC, non-methane volatile organic compounds, unspecified origin [air, urban air close to ground]: 0.00134 kg; lognormal variance with pedigree 0.0926, pedigree (1,3,5,5,1)
  Average from 6 Swiss producers
  Uncertainty: a
- Water [water, unspecified]: 2.125e-6 m3; lognormal variance with pedigree 0.0827, pedigree (2,2,5,5,1)
  (same comment as for Water)
  property wet mass 1000 kg; name WM
  property dry mass 0 kg; name DM
  property carbon content, fossil 0; name C_content_fossil
  property carbon content, non-fossil 0; name C_content_non_fossil
  property water in wet mass 1000 kg; name WWM
- TOC, Total Organic Carbon [water, surface water]: 3.5e-5 kg; lognormal variance with pedigree 0.0926, pedigree (1,3,5,5,1)
  Average from 6 Swiss producers
  Uncertainty: a
- Ammonia [air, urban air close to ground]: 7.1e-5 kg; lognormal variance with pedigree 0.0926, pedigree (1,3,5,5,1)
  Average from 6 Swiss producers
  Uncertainty: a
- BOD5, Biological Oxygen Demand [water, surface water]: 0.000189 kg; lognormal variance with pedigree 0.0926, pedigree (1,3,5,5,1)
  Calculated as 0.5*COD.
  Uncertainty: a
- COD, Chemical Oxygen Demand [water, surface water]: 9.45e-5 kg; lognormal variance with pedigree 0.0926, pedigree (1,3,5,5,1)
  Calculated as COD (g O2) = 2.7*TOC (gC).
  Uncertainty: a

## Extrapolations
This dataset has been extrapolated from year 1993 to the year of the calculation (2021). The uncertainty has been adjusted accordingly.
