# treatment of spent cation exchange resin from potable water production, municipal incineration

Dataset: EcoSpold 2, unit process
Geography: RoW
Time period: 2006-01-01 to 2021-12-31
Technology level: current
Classification: ISIC rev.4 ecoinvent: 3821:Treatment and disposal of non-hazardous waste
Synonyms: Siedlungsabfallverbrennung; municipal waste incineration; Kehrichtverbrennung
Scenario: Business-as-Usual
System model: Allocation, cut-off by classification
Share of production covered: 1.8 %
Generated by: Gabor Doka
Published in: Doka G. 2013
Database: ecoinvent
isCopyrightProtected: true
accessRestrictedTo: 1

## General comment
This dataset represents the activity of waste disposal of spent cation exchange resin from potable water production in a municipal solid waste incinerator (MSWI) // Recommended use of this dataset: disposal of used ion exchange resins *for potable water production*. Resins used of other purifications can have significantly more toxic composition, depending on use. // // Waste composition (wet, in ppm): upper heating value 11.35 MJ/kg; lower heating value 1.474 MJ/kg; H2O 496920; O 110250; H 19060; C 254640; S 73640; N 569.57; P n.a.; B n.a.; Cl 331.94; Br 258.64; F 4.178; I n.a.; Ag n.a.; As 0.54001; Ba 53.006; Cd 6.8422; Co 8.9784; Cr 11.614; Cu 31.537; Hg 0.24133; Mn 22.714; Mo n.a.; Ni 5.8546; Pb 4.379; Sb 12.212; Se 0.59685; Sn 7.448; V 81.897; Zn 244.71; Be 0.14211; Sc n.a.; Sr 25.153; Ti 284.22; Tl 0.11369; W n.a.; Si n.a.; Fe 1058.9; Ca 33440; Al 56.843; K 940; Mg 2650; Na 5380; // Share of carbon in waste that is biogenic 0%. // Share of metals in waste not oxidised and bulk-recyclable (exclude very small or thin parts) Iron: 0%; Alu: 0%; Copper: 0%. // One kg of this waste produces 0.1774 kg of slag and 0.08701 kg of residues, which are landfilled. Additional solidification with 0.0348 kg of cement. // Net energy production: 0MJ/kg electric energy and 0.04MJ/kg thermal energy. // Recovery of metal scrap to recycling: 0g iron scrap, 0g aluminium scrap, 0g copper scrap.

## Included activities start
waste incineration from waste reception gate and delivery into waste bunker at incinerator plant site (without transports to the incinerator)

## Included activities end
Waste-specific short-term emissions to water from leachate. Long-term emissions from landfill to ground water.

## Geography
Specific to the technology mix encountered in Switzerland in 2010. Well applicable to modern incineration practices in Europe, North America or Japan.

## Technology
average Swiss MSWI plants in 2010 (grate incinerators) with electrostatic precipitator for fly ash (ESP), wet flue gas scrubber and 25% SNCR , 42.77% SCR-high dust , 32.68% SCR-low dust -DeNOx facilities and 0% without Denox (weighted according to mass of burnt waste, representing Swiss average). Efficiency of iron scrap separation from slag : 58%. Efficiency of non-ferrous scrap separation from slag : 31%. Gross electric efficiency technology mix 15.84% and Gross thermal efficiency technology mix 28.51%

## Time period
Waste composition as given in literature reference, theoretical data or other source. Transfer coefficients for modern MSWI.

## Reference product
- spent cation exchange resin from potable water production: -1 kg; CPC 39: Wastes or scraps; By-product classification Waste
  Main reference product of this activity (supply of disposal service).
  production volume 3.1335e6 kg
    based on cation exchanger resin demand from water deionisation process inventory (Althaus et al. 2007, p.834) and a total global deionised water demand of 7.48E12 kg (ecoinvent DB total process demand, Feb 2013) and a generic rate of 21.7w% of MSW into incineration (UNSD 2012)
  property heating value, net 1.47 MJ
    Value taken from the general comment of the treatment dataset.
  property price 0 EUR2005
    Waste products are assigned a price of zero as they are assumed to require further treatment.
  property carbon content 0.512
    carbon content on a dry matter basis (reserved; not for manual entry)
  properties: wet mass 1 kg, dry mass 0.5 kg, water content 1, water in wet mass 0.5 kg, carbon content, fossil 0.512, carbon content, non-fossil 0, carbon allocation 0.256 kg

## By-products
- heat, for reuse in municipal waste incineration only: 0 MJ; name E_th_prod_MSWI; By-product classification allocatable product; CPC 17300: Steam and hot water; pedigree (1,1,1,1,1)
  Net electricity generated from this waste and used in internal MSWI plant energy redistribution.
  Uncertainty: uncertainty is calculated from uncertainties in waste composition and uncertainties in energy efficiency and the uncertainty in internal energy demand
  production volume 128190 MJ
    calculated in proportion to reference product waste input to incinerator
  property price 0.0106 EUR2005; name E_th_prod_MSWI_price_EUR2005
    Average European district heat price from Ecoheatcool and Euroheat 2005-2006, Ecoheat Work package 1: The European heat market. Final report. 10.6 EUR/GJ i s the price of district heat. http://www.solarthermalworld.org/files/Ecoheatcool%20WP1%20Web.pdf?download

## Inputs from technosphere
- process-specific burdens, residual material landfill: 0 kg; pedigree (1,1,1,1,1)
  Mass-specific expenditures required for landfilling of incineration residues.
  Uncertainty: uncertainty is calculated from uncertainties in waste composition and transfer coefficients in incinerator
- waste cement, hydrated: 0 kg; pedigree (1,1,1,1,1)
  Hydrated cement output for solidification of landfilled residual material.
  Uncertainty: Uncertainty calculated from uncertainty of the waste composition of this waste and transfer coefficients in the incinerator and of the solidification recipe.
  production volume 0 kg
    calculated in proportion to reference product waste input to incinerator
  properties: dry mass 1 kg, wet mass 1 kg
- heat, district or industrial, natural gas: 0 MJ; pedigree (1,1,1,1,1)
  Input to DeNOx stage, to heat up flue gas in low-dust SCR.
  Uncertainty: uncertainty calculated from uncertainty in average DeNOx input, uncertainty in the share of thermal NOx, uncertainty of nitrogen content in average municipal waste and the uncertainty in nitrogen content in *this* waste.
  properties: heating value, net 1 MJ
- sodium hydroxide, without water, in 50% solution state: 0.025491 kg; lognormal variance with pedigree 0.089847, pedigree (1,1,4,1,1)
  Auxilliary inputs for the flue gas treatment stage of the incinerator plant.
  Uncertainty: uncertainty calculated from uncertainty in average NaOH input, of transfer coefficients in the incinerator, and the uncertainty of the waste composition of this waste
  properties: wet mass 1 kg, dry mass 1 kg, heating value, net 3.03 MJ
- municipal waste incineration facility: 2.5e-10 unit
  Demands per kilogram waste.
- iron (III) chloride, without water, in 40% solution state: 2.616e-5 kg; lognormal variance with pedigree 0.34563, pedigree (1,1,4,1,1)
  Auxilliary inputs for the wastewater treatment stage of the incinerator plant.
  Uncertainty: uncertainty calculated from uncertainty in average FeCl3 input, of transfer coefficients in the incinerator, and the uncertainty of the waste composition of this waste
  properties: dry mass 1 kg, wet mass 1 kg
- titanium dioxide: 2.1006e-5 kg; lognormal variance with pedigree 0.64207, pedigree (1,1,4,1,1)
  Input to DeNOx stage (TiO2 catalyst carrier)
  Uncertainty: uncertainty calculated from uncertainty in average DeNOx input, uncertainty in the share of thermal NOx, uncertainty of nitrogen content in average municipal waste and the uncertainty in nitrogen content in *this* waste.
  properties: wet mass 1 kg, dry mass 1 kg
- chromium oxide, flakes: 4.287e-7 kg; lognormal variance with pedigree 0.64207, pedigree (1,1,4,1,1)
  Input to DeNOx stage.
  Uncertainty: uncertainty calculated from uncertainty in average DeNOx input, uncertainty in the share of thermal NOx, uncertainty of nitrogen content in average municipal waste and the uncertainty in nitrogen content in *this* waste.
  properties: wet mass 1 kg, dry mass 1 kg
- slag landfill: 3.1445e-10 unit; lognormal variance with pedigree 0.046441, pedigree (1,1,4,1,1)
  Landfill infrastructure required for landfilling of bottom ash.
  Uncertainty: uncertainty is calculated from uncertainties in waste composition and transfer coefficients in incinerator
- cement, unspecified: 0 kg; pedigree (1,1,1,1,1)
  Cement required for solidification of landfilled residual material.
  Uncertainty: Uncertainty calculated from uncertainty of the waste composition of this waste, of transfer coefficients in the incinerator and of the solidification recipe.
  properties: dry mass 1 kg, wet mass 1 kg
- chemical, inorganic: 0.00050434 kg; lognormal variance with pedigree 0.07281, pedigree (1,1,4,1,1)
  Auxilliary inputs for the wastewater treatment stage of the incinerator plant. Proxy for Polyelectrolyte.
  Uncertainty: uncertainty calculated from uncertainty in average Polyelectrolyte input, of transfer coefficients in the incinerator, and the uncertainty of the waste composition of this waste
  properties: wet mass 1 kg, carbon content, fossil 0.003, dry mass 1 kg
- ammonia, anhydrous, liquid: 0 kg; pedigree (1,1,1,1,1)
  Input to DeNOx stage (100% NH3).
  Uncertainty: uncertainty calculated from uncertainty in average DeNOx input, uncertainty in the share of thermal NOx, uncertainty of nitrogen content in average municipal waste and the uncertainty in nitrogen content in *this* waste.
  properties: wet mass 1 kg, dry mass 1 kg
- hydrochloric acid, without water, in 30% solution state: 0.00013256 kg; lognormal variance with pedigree 0.07281, pedigree (1,1,4,1,1)
  Auxilliary inputs for the wastewater treatment stage of the incinerator plant.
  Uncertainty: uncertainty calculated from uncertainty in average HCl input, of transfer coefficients in the incinerator, and the uncertainty of the waste composition of this waste
  properties: dry mass 1 kg, wet mass 1 kg, heating value, net 3.32 MJ
- transport, freight, lorry, unspecified: 0 metric ton*km; pedigree (1,1,1,1,1)
  Transport services to transport incineration residues to landfills.
  Uncertainty: uncertainty calculated from uncertainty of the waste composition of this waste, uncertainty of transfer coefficients and the uncertainty in generic transportation distances
- process-specific burdens, slag landfill: 0 kg; pedigree (1,1,1,1,1)
  Mass-specific expenditures required for landfilling of bottom ash.
  Uncertainty: uncertainty is calculated from uncertainties in waste composition and transfer coefficients in incinerator
- quicklime, milled, packed: 0.00020768 kg; lognormal variance with pedigree 0.65692, pedigree (1,1,4,1,1)
  Auxilliary inputs for the flue gas treatment stage of the incinerator plant.
  Uncertainty: uncertainty calculated from uncertainty in average CaO input, of transfer coefficients in the incinerator, and the uncertainty of the waste composition of this waste
  properties: wet mass 1 kg, water content 0.010101, dry mass 0.99 kg
- water, decarbonised: 0 kg; pedigree (1,1,1,1,1)
  Incinerator process water used in flue gas scrubber stage.
  Uncertainty: uncertainty calculated from uncertainty in average water input, and the uncertainty of the waste composition of this waste
  properties: wet mass 1 kg
- chemical, organic: 5.7957e-6 kg; lognormal variance with pedigree 1.3325, pedigree (1,1,4,1,1)
  Auxilliary inputs for the wastewater treatment stage of the incinerator plant. Proxy for (pure) Trisodium-trimercapto-s-triazine (CAS 17766-26-6), used as 15% diluted solution, aka TMT15.
  Uncertainty: uncertainty calculated from uncertainty in average TMT15 input, of transfer coefficients in the incinerator, and the uncertainty of the waste composition of this waste
  properties: dry mass 1 kg, wet mass 1 kg, carbon content, fossil 0.628, heating value, net 19.03 MJ
- residual material landfill: 1.8127e-10 unit; lognormal variance with pedigree 0.043213, pedigree (1,1,4,1,1)
  Landfill infrastructure required for landfilling of incineration residues.
  Uncertainty: uncertainty is calculated from uncertainties in waste composition and transfer coefficients in incinerator
- process-specific burdens, residual material landfill: 0.0246126, 0.0623964 kg (2 entries); lognormal variance with pedigree 0.043213, pedigree (1,1,4,1,1)
  (same comment as for process-specific burdens, residual material landfill)
- waste cement, hydrated: -0.0246126, -0.0623964 kg (2 entries); lognormal variance with pedigree 0.052297, pedigree (1,1,4,1,1)
  (same comment as for waste cement, hydrated)
  production volume 272640 kg
- heat, district or industrial, natural gas: 0.000697838, 0.0167216, 0.0452786 MJ (3 entries); lognormal variance with pedigree 0.33908, pedigree (1,1,4,1,1)
  (same comment as for heat, district or industrial, natural gas)
- cement, unspecified: 0.00502555, 0.00104567, 7.6588e-5, 0.000218301, 0.00493694, 0.000145309, 0.00159592, 0.000193088, 0.0215666 kg (9 entries); lognormal variance with pedigree 0.052297, pedigree (1,1,4,1,1)
  (same comment as for cement, unspecified)
- ammonia, anhydrous, liquid: 7.02791e-5, 6.04133e-6, 9.39875e-6, 1.86223e-5, 1.82449e-5, 1.91226e-6, 8.54851e-6, 0.000202233 kg (8 entries); lognormal variance with pedigree 0.33908, pedigree (1,1,4,1,1)
  (same comment as for ammonia, anhydrous, liquid)
- transport, freight, lorry, unspecified: 0.00120792, 0.000189116, 0.00915796 metric ton*km (3 entries); lognormal variance with pedigree 0.029285, pedigree (1,1,4,1,1)
  (same comment as for transport, freight, lorry, unspecified)
- process-specific burdens, slag landfill: 0.0500348, 0.126845 kg (2 entries); lognormal variance with pedigree 0.046441, pedigree (1,1,4,1,1)
  (same comment as for process-specific burdens, slag landfill)
- water, decarbonised: 0.0539132, 0.140282, 0.565789, 0.138163, 0.0278529, 0.0915858, 0.00505608, 0.0720481, 0.16783, 1.05275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 kg (12 entries); lognormal variance with pedigree 0.34563, pedigree (1,1,4,1,1)
  (same comment as for water, decarbonised)

## Inputs from nature
- Oxygen [natural resource, in air]: 0.95099 kg; lognormal variance with pedigree 0.042826, pedigree (1,1,4,1,1)
  Oxygen from ambient air needed to combust and oxidise this waste. Net demand, i.e. without O2 leaving the plant in flue gas uncombusted.
  Uncertainty: uncertainty is calculated from uncertainties in waste composition and transfer coefficients to flue gas and soild residues in incinerator

## Emissions to nature
- Selenium [air, urban air close to ground]: 7.1204e-9 kg; lognormal variance with pedigree 1.6559, pedigree (1,1,4,1,1)
  Emission to air from waste composition and transfer coefficients.
  Uncertainty: uncertainty is calculated from uncertainties in waste composition and transfer coefficients in incinerator
- Antimony [water, surface water]: 4.209e-6 kg; lognormal variance with pedigree 1.2482, pedigree (1,1,4,1,1)
  Emissions to water from waste composition and transfer coefficients in incinerator and landfills.
  Uncertainty: uncertainty is calculated from uncertainties in waste composition and transfer coefficients in incinerator and landfills
- Thallium [water, surface water]: 6.9645e-11 kg; lognormal variance with pedigree 2.0194, pedigree (1,1,4,1,1)
  (same comment as for Antimony)
- Copper [air, urban air close to ground]: 2.8885e-9 kg; lognormal variance with pedigree 1.1563, pedigree (1,1,4,1,1)
  (same comment as for Selenium)
- Strontium [water, surface water]: 1.5837e-8 kg; lognormal variance with pedigree 1.8652, pedigree (1,1,4,1,1)
  (same comment as for Antimony)
- Sodium, ion [water, ground-, long-term]: 0.0038741 kg; lognormal variance with pedigree 0.21736, pedigree (1,1,4,1,1)
  Long-term emissions from landfilling of incineration residues.
  Uncertainty: uncertainty is calculated from uncertainties in waste composition and transfer coefficients in incinerator and landfills.
- Titanium, ion [water, ground-, long-term]: 8.4965e-5 kg; lognormal variance with pedigree 0.94121, pedigree (1,1,4,1,1)
  (same comment as for Sodium, ion)
- Aluminium [water, ground-, long-term]: 4.1106e-5 kg; lognormal variance with pedigree 0.95949, pedigree (1,1,4,1,1)
  (same comment as for Sodium, ion)
- Cadmium [air, urban air close to ground]: 3.4875e-9 kg; lognormal variance with pedigree 1.3464, pedigree (1,1,4,1,1)
  (same comment as for Selenium)
- Sodium [air, urban air close to ground]: 4.4171e-5 kg; lognormal variance with pedigree 0.46085, pedigree (1,1,4,1,1)
  (same comment as for Selenium)
- Zinc, ion [water, surface water]: 2.2078e-8 kg; lognormal variance with pedigree 0.71209, pedigree (1,1,4,1,1)
  (same comment as for Antimony)
- Potassium [air, urban air close to ground]: 4.6441e-6 kg; lognormal variance with pedigree 0.68727, pedigree (1,1,4,1,1)
  (same comment as for Selenium)
- Tin, ion [water, ground-, long-term]: 2.8505e-6 kg; lognormal variance with pedigree 2.1626, pedigree (1,1,4,1,1)
  (same comment as for Sodium, ion)
- Magnesium [air, urban air close to ground]: 2.7952e-6 kg; lognormal variance with pedigree 0.55847, pedigree (1,1,4,1,1)
  (same comment as for Selenium)
- Calcium [air, urban air close to ground]: 0.00026317 kg; lognormal variance with pedigree 0.24671, pedigree (1,1,4,1,1)
  (same comment as for Selenium)
- Lead [water, surface water]: 4.1888e-10 kg; lognormal variance with pedigree 1.1716, pedigree (1,1,4,1,1)
  (same comment as for Antimony)
- Arsenic, ion [water, surface water]: 3.7407e-7 kg; lognormal variance with pedigree 1.5381, pedigree (1,1,4,1,1)
  (same comment as for Antimony)
- Titanium, ion [water, surface water]: 1.0597e-7 kg; lognormal variance with pedigree 0.6296, pedigree (1,1,4,1,1)
  (same comment as for Antimony)
- Iron, ion [water, surface water]: 2.7837e-8 kg; lognormal variance with pedigree 0.9199, pedigree (1,1,4,1,1)
  (same comment as for Antimony)
- Arsenic [air, urban air close to ground]: 4.23e-9 kg; lognormal variance with pedigree 1.6701, pedigree (1,1,4,1,1)
  (same comment as for Selenium)
- Fluoride [water, ground-, long-term]: 3.7459e-6 kg; lognormal variance with pedigree 0.85962, pedigree (1,1,4,1,1)
  (same comment as for Sodium, ion)
- Bromine [air, urban air close to ground]: 1.2919e-7 kg; lognormal variance with pedigree 0.86959, pedigree (1,1,4,1,1)
  (same comment as for Selenium)
- Manganese [air, urban air close to ground]: 4.3379e-9 kg; lognormal variance with pedigree 1.2003, pedigree (1,1,4,1,1)
  (same comment as for Selenium)
- Hydrogen fluoride [air, urban air close to ground]: 2.8187e-8 kg; lognormal variance with pedigree 1.402, pedigree (1,1,4,1,1)
  (same comment as for Selenium)
- Benzo(a)pyrene [air, urban air close to ground]: 8.2864e-13 kg; lognormal variance with pedigree 0.43223, pedigree (1,1,4,1,1)
  Incomplete combustion product emitted to air.
  Uncertainty: uncertainty calculated from uncertainty in average operation emissions, and the uncertainty of the flue gas volume from this waste.
- Iron, ion [water, ground-, long-term]: 0.0005342 kg; lognormal variance with pedigree 0.83377, pedigree (1,1,4,1,1)
  (same comment as for Sodium, ion)
- COD, Chemical Oxygen Demand [water, ground-, long-term]: 0.0019123 kg; lognormal variance with pedigree 0.045887, pedigree (1,1,4,1,1)
  (same comment as for Sodium, ion)
- Benzene [air, urban air close to ground]: 3.7237e-8 kg; lognormal variance with pedigree 0.100875, pedigree (1,1,4,1,1)
  (same comment as for Benzo(a)pyrene)
- Aluminium [water, surface water]: 6.1516e-9 kg; lognormal variance with pedigree 1.2359, pedigree (1,1,4,1,1)
  (same comment as for Antimony)
- Lead [air, urban air close to ground]: 3.6077e-10 kg; lognormal variance with pedigree 1.419, pedigree (1,1,4,1,1)
  (same comment as for Selenium)
- Nitrate [water, ground-, long-term]: 2.0486e-5 kg; lognormal variance with pedigree 0.74438, pedigree (1,1,4,1,1)
  (same comment as for Sodium, ion)
- Vanadium, ion [water, ground-, long-term]: 3.8176e-5 kg; lognormal variance with pedigree 0.74411, pedigree (1,1,4,1,1)
  (same comment as for Sodium, ion)
- Benzene, hexachloro- [air, urban air close to ground]: 7.7861e-11 kg; lognormal variance with pedigree 0.100875, pedigree (1,1,4,1,1)
  (same comment as for Benzo(a)pyrene)
- Calcium, ion [water, ground-, long-term]: 0.024908 kg; lognormal variance with pedigree 0.22485, pedigree (1,1,4,1,1)
  (same comment as for Sodium, ion)
- Thallium [water, ground-, long-term]: 6.6338e-8 kg; lognormal variance with pedigree 1.4112, pedigree (1,1,4,1,1)
  (same comment as for Sodium, ion)
- Tin [air, urban air close to ground]: 4.8651e-12 kg; lognormal variance with pedigree 1.39, pedigree (1,1,4,1,1)
  (same comment as for Selenium)
- Strontium [air, urban air close to ground]: 2.5153e-9 kg; lognormal variance with pedigree 1.1856, pedigree (1,1,4,1,1)
  (same comment as for Selenium)
- Nitrogen oxides [air, urban air close to ground]: 0.00012483 kg; lognormal variance with pedigree 0.38226, pedigree (1,1,4,1,1)
  Sum of fuel-Nox and thermal-NOx emitted to air after DeNOx stage.
  Uncertainty: uncertainty calculated from uncertainty in average N-emissions and uncertainty in the share of thermal NOx and the uncertainty in nitrogen content in *this* waste.
- Beryllium [water, ground-, long-term]: 1.2988e-7 kg; lognormal variance with pedigree 1.7448, pedigree (1,1,4,1,1)
  (same comment as for Sodium, ion)
- Dinitrogen monoxide [air, urban air close to ground]: 8.495e-6 kg; lognormal variance with pedigree 1.5134, pedigree (1,1,4,1,1)
  Nitrogen species emitted to air after DeNOx stage.
  Uncertainty: uncertainty calculated from uncertainty in average N-emissions and uncertainty in the share of thermal NOx and the uncertainty in nitrogen content in *this* waste.
- Sulfur dioxide [air, urban air close to ground]: 0.00078312 kg; lognormal variance with pedigree 0.16939, pedigree (1,1,4,1,1)
  (same comment as for Selenium)
- Mercury [water, ground-, long-term]: 1.5371e-8 kg; lognormal variance with pedigree 3.2898, pedigree (1,1,4,1,1)
  (same comment as for Sodium, ion)
- Copper, ion [water, surface water]: 4.0865e-9 kg; lognormal variance with pedigree 1.00567, pedigree (1,1,4,1,1)
  (same comment as for Antimony)
- Sulfate [water, surface water]: 0.037357 kg; lognormal variance with pedigree 0.083794, pedigree (1,1,4,1,1)
  (same comment as for Antimony)
- Water [water, surface water]: 0.00046633 m3; lognormal variance with pedigree 1.4559, pedigree (1,1,4,1,1)
  Process water released to surface water.
  Uncertainty: uncertainty calculated from uncertainty in process water input and the uncertainty of fraction to surface water.
- Bromine [water, surface water]: 0.00023358 kg; lognormal variance with pedigree 0.38921, pedigree (1,1,4,1,1)
  (same comment as for Antimony)
- Cobalt [air, urban air close to ground]: 1.6329e-8 kg; lognormal variance with pedigree 1.31, pedigree (1,1,4,1,1)
  (same comment as for Selenium)
- Particulates, < 2.5 um [air, urban air close to ground]: 4.4458e-6 kg; lognormal variance with pedigree 0.43223, pedigree (1,1,4,1,1)
  (same comment as for Benzo(a)pyrene)
- Cadmium, ion [water, ground-, long-term]: 4.9928e-7 kg; lognormal variance with pedigree 6.7804, pedigree (1,1,4,1,1)
  (same comment as for Sodium, ion)
- Potassium, ion [water, surface water]: 0.00020462 kg; lognormal variance with pedigree 0.40272, pedigree (1,1,4,1,1)
  (same comment as for Antimony)
- Carbon monoxide, fossil [air, urban air close to ground]: 6.3299e-5 kg; lognormal variance with pedigree 0.83018, pedigree (1,1,4,1,1)
  (same comment as for Benzo(a)pyrene)
- Barium [water, ground-, long-term]: 2.6695e-5 kg; lognormal variance with pedigree 2.3642, pedigree (1,1,4,1,1)
  (same comment as for Sodium, ion)
- BOD5, Biological Oxygen Demand [water, surface water]: 0.00029405 kg; lognormal variance with pedigree 0.079695, pedigree (1,1,4,1,1)
  (same comment as for Antimony)
- Toluene [air, urban air close to ground]: 7.4474e-8 kg; lognormal variance with pedigree 0.100875, pedigree (1,1,4,1,1)
  (same comment as for Benzo(a)pyrene)
- Zinc [air, urban air close to ground]: 1.6402e-7 kg; lognormal variance with pedigree 0.87693, pedigree (1,1,4,1,1)
  (same comment as for Selenium)
- Carbon dioxide, fossil [air, urban air close to ground]: 0.92796 kg; lognormal variance with pedigree 0.056914, pedigree (1,1,4,1,1)
  (same comment as for Selenium)
- Potassium, ion [water, ground-, long-term]: 0.00073074 kg; lognormal variance with pedigree 0.35183, pedigree (1,1,4,1,1)
  (same comment as for Sodium, ion)
- Selenium [water, surface water]: 2.0163e-7 kg; lognormal variance with pedigree 1.3235, pedigree (1,1,4,1,1)
  (same comment as for Antimony)
- Cyanide [air, urban air close to ground]: 1.8251e-6 kg; lognormal variance with pedigree 1.5134, pedigree (1,1,4,1,1)
  (same comment as for Dinitrogen monoxide)
- Magnesium [water, ground-, long-term]: 0.0023468 kg; lognormal variance with pedigree 0.52012, pedigree (1,1,4,1,1)
  (same comment as for Sodium, ion)
- Mercury [water, surface water]: 2.621e-10 kg; lognormal variance with pedigree 1.2631, pedigree (1,1,4,1,1)
  (same comment as for Antimony)
- Iron [air, urban air close to ground]: 1.8977e-9 kg; lognormal variance with pedigree 0.72349, pedigree (1,1,4,1,1)
  (same comment as for Selenium)
- Cobalt [water, ground-, long-term]: 7.3138e-6 kg; lognormal variance with pedigree 1.2105, pedigree (1,1,4,1,1)
  (same comment as for Sodium, ion)
- Benzene, pentachloro- [air, urban air close to ground]: 1.9674e-10 kg; lognormal variance with pedigree 0.100875, pedigree (1,1,4,1,1)
  (same comment as for Benzo(a)pyrene)
- Sulfate [water, ground-, long-term]: 0.18239 kg; lognormal variance with pedigree 0.083381, pedigree (1,1,4,1,1)
  (same comment as for Sodium, ion)
- Magnesium [water, surface water]: 1.2365e-5 kg; lognormal variance with pedigree 0.72442, pedigree (1,1,4,1,1)
  (same comment as for Antimony)
- Nickel, ion [water, ground-, long-term]: 5.6197e-6 kg; lognormal variance with pedigree 1.3157, pedigree (1,1,4,1,1)
  (same comment as for Sodium, ion)
- Calcium, ion [water, surface water]: 0.0003702 kg; lognormal variance with pedigree 0.21538, pedigree (1,1,4,1,1)
  (same comment as for Antimony)
- Cadmium, ion [water, surface water]: 6.558e-10 kg; lognormal variance with pedigree 1.1034, pedigree (1,1,4,1,1)
  (same comment as for Antimony)
- BOD5, Biological Oxygen Demand [water, ground-, long-term]: 0.0006255 kg; lognormal variance with pedigree 0.045887, pedigree (1,1,4,1,1)
  (same comment as for Sodium, ion)
- Particulates, > 2.5 um, and < 10um [air, urban air close to ground]: 2.2341e-8 kg; lognormal variance with pedigree 0.20924, pedigree (1,1,4,1,1)
  (same comment as for Benzo(a)pyrene)
- Tin, ion [water, surface water]: 1.9704e-10 kg; lognormal variance with pedigree 1.943, pedigree (1,1,4,1,1)
  (same comment as for Antimony)
- Barium [water, surface water]: 7.1342e-9 kg; lognormal variance with pedigree 1.3329, pedigree (1,1,4,1,1)
  (same comment as for Antimony)
- Hydrogen chloride [air, urban air close to ground]: 1.8942e-7 kg; lognormal variance with pedigree 0.83396, pedigree (1,1,4,1,1)
  (same comment as for Selenium)
- Lead [water, ground-, long-term]: 2.1172e-6 kg; lognormal variance with pedigree 4.5197, pedigree (1,1,4,1,1)
  (same comment as for Sodium, ion)
- TOC, Total Organic Carbon [water, ground-, long-term]: 0.00075669 kg; lognormal variance with pedigree 0.045887, pedigree (1,1,4,1,1)
  (same comment as for Sodium, ion)
- Antimony [air, urban air close to ground]: 9.7823e-12 kg; lognormal variance with pedigree 1.3245, pedigree (1,1,4,1,1)
  (same comment as for Selenium)
- Strontium [water, ground-, long-term]: 2.512e-5 kg; lognormal variance with pedigree 1.1532, pedigree (1,1,4,1,1)
  (same comment as for Sodium, ion)
- Chloride [water, ground-, long-term]: 7.6918e-5 kg; lognormal variance with pedigree 0.80607, pedigree (1,1,4,1,1)
  (same comment as for Sodium, ion)
- Manganese [water, surface water]: 3.5357e-9 kg; lognormal variance with pedigree 1.00004, pedigree (1,1,4,1,1)
  (same comment as for Antimony)
- Fluoride [water, surface water]: 3.1946e-7 kg; lognormal variance with pedigree 0.91979, pedigree (1,1,4,1,1)
  (same comment as for Antimony)
- Nickel [air, urban air close to ground]: 7.3547e-9 kg; lognormal variance with pedigree 1.3682, pedigree (1,1,4,1,1)
  (same comment as for Selenium)
- Methane, fossil [air, urban air close to ground]: 5.5855e-7 kg; lognormal variance with pedigree 0.100875, pedigree (1,1,4,1,1)
  (same comment as for Benzo(a)pyrene)
- Barium [air, urban air close to ground]: 2.0805e-7 kg; lognormal variance with pedigree 1.0681, pedigree (1,1,4,1,1)
  (same comment as for Selenium)
- Dioxins, measured as 2,3,7,8-tetrachlorodibenzo-p-dioxin [air, urban air close to ground]: 7.4469e-14 kg; lognormal variance with pedigree 0.43223, pedigree (1,1,4,1,1)
  (same comment as for Benzo(a)pyrene)
- Cobalt [water, surface water]: 1.6267e-9 kg; lognormal variance with pedigree 1.5892, pedigree (1,1,4,1,1)
  (same comment as for Antimony)
- Nitrate [water, surface water]: 7.2606e-6 kg; lognormal variance with pedigree 0.5202, pedigree (1,1,4,1,1)
  (same comment as for Antimony)
- Thallium [air, urban air close to ground]: 1.1369e-10 kg; lognormal variance with pedigree 1.8742, pedigree (1,1,4,1,1)
  (same comment as for Selenium)
- COD, Chemical Oxygen Demand [water, surface water]: 0.00029787 kg; lognormal variance with pedigree 0.077693, pedigree (1,1,4,1,1)
  (same comment as for Antimony)
- Titanium [air, urban air close to ground]: 2.358e-7 kg; lognormal variance with pedigree 0.85492, pedigree (1,1,4,1,1)
  (same comment as for Selenium)
- Manganese [water, ground-, long-term]: 1.4013e-5 kg; lognormal variance with pedigree 2.1372, pedigree (1,1,4,1,1)
  (same comment as for Sodium, ion)
- Sodium, ion [water, surface water]: 0.0014618 kg; lognormal variance with pedigree 0.23071, pedigree (1,1,4,1,1)
  (same comment as for Antimony)
- Vanadium [air, urban air close to ground]: 1.7369e-6 kg; lognormal variance with pedigree 1.00191, pedigree (1,1,4,1,1)
  (same comment as for Selenium)
- Chromium, ion [water, surface water]: 9.0183e-10 kg; lognormal variance with pedigree 1.2919, pedigree (1,1,4,1,1)
  (same comment as for Antimony)
- Antimony [water, ground-, long-term]: 7.7658e-6 kg; lognormal variance with pedigree 1.2125, pedigree (1,1,4,1,1)
  (same comment as for Sodium, ion)
- TOC, Total Organic Carbon [water, surface water]: 0.00013008 kg; lognormal variance with pedigree 0.077956, pedigree (1,1,4,1,1)
  (same comment as for Antimony)
- Aluminium [air, urban air close to ground]: 4.6345e-11 kg; lognormal variance with pedigree 1.1196, pedigree (1,1,4,1,1)
  (same comment as for Selenium)
- Chloride [water, surface water]: 0.00025483 kg; lognormal variance with pedigree 0.67185, pedigree (1,1,4,1,1)
  (same comment as for Antimony)
- Ammonia [air, urban air close to ground]: 3.9421e-7 kg; lognormal variance with pedigree 0.38226, pedigree (1,1,4,1,1)
  (same comment as for Dinitrogen monoxide)
- NMVOC, non-methane volatile organic compounds, unspecified origin [air, urban air close to ground]: 1.6946e-6 kg; lognormal variance with pedigree 0.100875, pedigree (1,1,4,1,1)
  (same comment as for Benzo(a)pyrene)
- Water [air, urban air close to ground]: 0.0015432 m3; lognormal variance with pedigree 1.0283, pedigree (1,1,4,1,1)
  Water vapour from waste humidity, hydrogen oxidation and part of the process water.
  Uncertainty: Uncertainty calculated from uncertainty in waste composition, process water input and the uncertainty of fraction to air.
- Mercury [air, urban air close to ground]: 6.8427e-9 kg; lognormal variance with pedigree 1.7691, pedigree (1,1,4,1,1)
  (same comment as for Selenium)
- Heat, waste [air, urban air close to ground]: 8.93 MJ; lognormal variance with pedigree 0.043693, pedigree (1,1,4,1,1)
  Waste heat generated from heating value of this waste plus any electricity required to process it.
  Uncertainty: uncertainty is calculated from uncertainties in waste composition and uncertainties in energy efficiency and the uncertainty in internal energy demand
- Chromium VI [water, ground-, long-term]: 1.0654e-6 kg; lognormal variance with pedigree 1.7157, pedigree (1,1,4,1,1)
  (same comment as for Sodium, ion)
- Chromium VI [water, surface water]: 3.246e-7 kg; lognormal variance with pedigree 1.3281, pedigree (1,1,4,1,1)
  (same comment as for Antimony)
- DOC, Dissolved Organic Carbon [water, ground-, long-term]: 0.00075669 kg; lognormal variance with pedigree 0.045887, pedigree (1,1,4,1,1)
  (same comment as for Sodium, ion)
- Vanadium, ion [water, surface water]: 1.3076e-7 kg; lognormal variance with pedigree 1.0791, pedigree (1,1,4,1,1)
  (same comment as for Antimony)
- Chromium [air, urban air close to ground]: 1.0142e-8 kg; lognormal variance with pedigree 1.2735, pedigree (1,1,4,1,1)
  (same comment as for Selenium)
- Bromine [water, ground-, long-term]: 2.4928e-5 kg; lognormal variance with pedigree 0.84763, pedigree (1,1,4,1,1)
  (same comment as for Sodium, ion)
- DOC, Dissolved Organic Carbon [water, surface water]: 0.00013008 kg; lognormal variance with pedigree 0.077956, pedigree (1,1,4,1,1)
  (same comment as for Antimony)
- Copper, ion [water, ground-, long-term]: 2.817e-5 kg; lognormal variance with pedigree 1.1042, pedigree (1,1,4,1,1)
  (same comment as for Sodium, ion)
- Heat, waste [water, surface water]: 2.7717 MJ; lognormal variance with pedigree 0.043693, pedigree (1,1,4,1,1)
  (same comment as for Heat, waste)
- Beryllium [water, surface water]: 8.9005e-11 kg; lognormal variance with pedigree 2.3394, pedigree (1,1,4,1,1)
  (same comment as for Antimony)
- Selenium [water, ground-, long-term]: 3.8765e-7 kg; lognormal variance with pedigree 1.2252, pedigree (1,1,4,1,1)
  (same comment as for Sodium, ion)
- Arsenic, ion [water, ground-, long-term]: 1.6171e-7 kg; lognormal variance with pedigree 1.6577, pedigree (1,1,4,1,1)
  (same comment as for Sodium, ion)
- Nickel, ion [water, surface water]: 3.9337e-9 kg; lognormal variance with pedigree 1.8922, pedigree (1,1,4,1,1)
  (same comment as for Antimony)
- Phenol, pentachloro- [air, urban air close to ground]: 1.6216e-11 kg; lognormal variance with pedigree 0.100875, pedigree (1,1,4,1,1)
  (same comment as for Benzo(a)pyrene)
- Zinc, ion [water, ground-, long-term]: 7.4415e-5 kg; lognormal variance with pedigree 2.974, pedigree (1,1,4,1,1)
  (same comment as for Sodium, ion)
