# router, internet

Dataset: EcoSpold 2, unit process
Geography: CH
Time period: 2005-01-01 to 2021-12-31
Technology level: current
Classification: ISIC rev.4 ecoinvent: 2630:Manufacture of communication equipment
Classification: EcoSpold01Categories: electronics/devices
Tags: ConvertedDataset
Scenario: Business-as-Usual
System model: Allocation, cut-off by classification
Generated by: Marianne Leuenberger
Published in: Leuenberger M. 2010
Database: ecoinvent
isCopyrightProtected: true
accessRestrictedTo: 1

## General comment
The data set represents an average IP core network device, based on assumption for the chassis and PWB.
[This dataset was already contained in the ecoinvent database version 2. It was not individually updated during the transfer to ecoinvent version 3. Life Cycle Impact Assessment results may still have changed, as they are affected by changes in the supply chain, i.e. in other datasets. This dataset was generated following the ecoinvent quality guidelines for version 2. It may have been subject to central changes described in the ecoinvent version 3 change report (http://www.ecoinvent.org/database/ecoinvent-version-3/reports-of-changes/), and the results of the central updates were reviewed extensively. The changes added e.g. consistent water flows and other information throughout the database. The documentation of this dataset can be found in the ecoinvent reports of version 2, which are still available via the ecoinvent website. The change report linked above covers all central changes that were made during the conversion process.]

## Included activities end
This data sets represents an IP core network router. Manufacture and transport included.

## Geography
Data for Swiss conditions

## Technology
IP core network device (IP router) derived from Cisco Service Router 1800 Series, maximal data rate: 100 Mbit/s, realistic: 25 Mbit/s. Power demand: 0.0042 kW at 1 Mbit/s.

## Reference product
- router, internet: 1 unit; CPC 47223: Other telephone sets and apparatus for transmission or reception of voice, images or other data, including app[…]; By-product classification allocatable product
  EcoSpold01Location=CH
  production volume 0.0336675 unit
    This is a placeholder value that does not reflect real-world production volumes. This dataset does not currently require a real-world production volume to work in the database framework, and no actual data were collected yet. This has no negative effect on the results of the ecoinvent database. The placeholder value of this activity was scaled according to the nominal GDP of 2005 (source: United Nations, http://data.un.org/Glossary.aspx?q=GDP+%28current+US%24%29, accessed 20130726) to reflect an appropriate share of the global production volume, which is also a placeholder value.
  property price 15 EUR2005
    Based on the actual sale price [http://www.ebay.com/sch/i.html?_from=R40&_trksid=p2050601.m570.l1311.R1.TR12.TRC2.A0.H1.Xrouter.TRS0&_nkw=router&_sacat=0]

## Inputs from technosphere
- printed wiring board, surface mounted, unspecified, Pb free: 0.16133 kg; = 0.074863*0.5*4.31; lognormal variance with pedigree 0.1286, pedigree (4,3,5,1,4)
  Estimation; Factssheet Zyxel IES-6000 Series: 39.6x24cm per 48 ports, 50% utilisation; Cisco router factssheet: area 26.67cmx28.07cm
  square-weight of the used PWB: 4.31 kg/m2
  This original value from production mix has been replaced by 2 flows. Each has 50% share in the production mix.
  Uncertainty: Estimation; Factssheet Zyxel IES-6000 Series: 39.6x24cm per 48 ports, 50% utilisation; Cisco router factssheet: area 26.67cmx28.07cm
  properties: carbon content, fossil 0.132522, wet mass 1 kg, dry mass 1 kg
- chassis, internet access equipment: 1.815 kg; lognormal variance with pedigree 0.1286, pedigree (4,3,5,1,4)
  EcoSpold01Location=RER
  Estimation, total weight from factssheet Zyxel; Factssheet Zyxel IES-6000 Series: 15 kg / 768 ports, 50% utilisation; Cisco router factssheet: 3.63 kg, assumption PWB=50% of weight
  Uncertainty: Estimation, total weight from factssheet Zyxel; Factssheet Zyxel IES-6000 Series: 15 kg / 768 ports, 50% utilisation; Cisco router factssheet: 3.63 kg, assumption PWB=50% of weight
  properties: wet mass 1 kg, dry mass 1 kg, carbon content, fossil 0.0691989
  note on carbon content, fossil: C content calculated as the addition of the C contents in the final product components
- printed wiring board, surface mounted, unspecified, Pb containing: 0.16133 kg; = 0.074863*0.5*4.31; lognormal variance with pedigree 0.1286, pedigree (4,3,5,1,4)
  (same comment as for printed wiring board, surface mounted, unspecified, Pb free)
  properties: wet mass 1 kg, dry mass 1 kg, carbon content, fossil 0.132522

## Extrapolations
This dataset has been extrapolated from year 2009 to the year of the calculation (2021). The uncertainty has been adjusted accordingly.

## Review by Christian Bauer 2010-02-07
26.01.2010
passed
C:\Dokumente und Einstellungen\Marianne\Eigene Dateien\Projekte\277_Mobitool\Review\[Ecospold_NetworkDevices-v1.1.xls]X-Process

## Review by Emilia Moreno Ruiz 2013-01-08
correction of exchange name to“printed wiring board, surface mounted, [...]"
