# power sawing, without catalytic converter

Dataset: EcoSpold 2, unit process
Geography: RER
Time period: 2011-01-01 to 2021-12-31
Technology level: current
Classification: ISIC rev.4 ecoinvent: 1610:Sawmilling and planing of wood
Synonyms: chainsaw; chain saw
Tags: Swiss brush-up completed
Scenario: Business-as-Usual
System model: Allocation, cut-off by classification
Generated by: Frank Werner
Published in: Magnusson R. 2010
Database: ecoinvent
isCopyrightProtected: true
accessRestrictedTo: 1

## General comment
The inventory represents the operation of a professional power saw with a fuel consumption of 1.6 kg of standard two-stroke petrol blend (0.75 kg/l) for power saws per working hour and with a power output of about 3.1 - 3.2 kW.

## Included activities start
Service beginning with the input of fuel into the power saw.

## Included activities end
Includes the input of machinery infrastructure, the input of fuel, lubricants/greases as well as their disposal, and the emissions into air from fuel consumption. Wood is not included in the dataset.

## Geography
Data sourced from several European studies

## Technology
The module represents average technology used in Europe around 2010

## Parameters
- lifetime of machine, productive machine hours: 2500 hour; name total_PMH
  total service life of power saw according to producer information

## Reference product
- power sawing, without catalytic converter: 1 hour; CPC 88311: Wood manufacturing services; By-product classification allocatable product
  production volume 3.48105e9 hour; name p_power_sawing; = 6000000*total_PMH/71707302*16641109
    1,00,000 chainsaws with 2500 PMH, weighted by RER GDP/Global GDP
  property price 1.41653 EUR2005
    Calculated based on inputs: The price of the product has been calculated as a sum of the values of the material and energy inputs for this product. This value is therefore a rough estimation. It may underestimate the real price since there are additional expenses when producing any product. These expences can include for example labour costs, treatment of waste materials and profit for the producer. Please consider carefully whether this level of data quality is acceptable for your application.

## Inputs from technosphere
- power saw, without catalytic converter: 0.0004 unit; = 1/total_PMH; source Kellenberger D. 2007; lognormal variance with pedigree 0.049, pedigree (4,5,4,1,1)
  calculated based on producer information
- vegetable oil, refined: 0.54 kg; name m_lubricating_oil; source Kellenberger D. 2007; lognormal variance with pedigree 0.043, pedigree (3,5,4,1,1)
  lubricating oil for chain
  properties: heating value, net 38.4 MJ, wet mass 1 kg, carbon content, non-fossil 0.768, UVEK_link_1 3739, dry mass 1 kg, UVEK_relative_amount_1 1
  note on heating value, net: Values is approximated from HHV from "vegetable oil, crude". Source: Radovanovic,M.; Zivanovic,T.; Stojiljkovic,D.; Jovanovic,V.; Jerinic,N.; Knezevic,S. et.al. Utilization of sunflower husk as a fuel for industrial boilers - 20 years experience. Proc. 5th Eur. Conf. on Industrial Furnaces&Boilers 2000,vol.2,p.221-233. Available at: https://phyllis.nl/Biomass/View/2152
  note on UVEK_link_1: to be used only in special submissions in coordination with ecoinvent and the Swiss FOEN
- petrol, two-stroke blend: 1.6 kg; name m_petrol; source Willared, J. 2011; lognormal variance with pedigree 0.049, pedigree (4,5,4,1,1)
  average consumption per working hour; reference for normalizing values from different sources
  properties: carbon content, fossil 0.865, dry mass 1 kg, wet mass 1 kg, UVEK_relative_amount_1 1, UVEK_link_1 3428, heating value, net 43.2 MJ
  note on heating value, net: Assumed equal to "petroleum". LHV for petroleum: Based on literature, page 7, Report6, part 4

## Emissions to nature
- Carbon dioxide, fossil [air, non-urban air or from high stacks]: 2.14709 kg; = m_petrol*0.8472*0.43199/12*(12+2*16); source Willared, J. 2011; lognormal variance with pedigree 0.0731, pedigree (1,5,5,3,1)
  calculated based on a C content of petrol of 0.847 kg C/kg and 43% of carbon content emitted as CO2 (personal communication power saw producer)
- Oils, non-fossil [soil, forestry]: 0.054 kg; = m_lubricating_oil*0.1; source Kellenberger D. 2007; lognormal variance with pedigree 0.2481, pedigree (1,5,5,3,1)
  10% of the oil from lubricating the chain
- Dinitrogen monoxide [air, non-urban air or from high stacks]: 8.64e-5 kg; source Spielmann, M. 2007; lognormal variance with pedigree 0.336, pedigree (1,5,4,1,5)
- PAH, polycyclic aromatic hydrocarbons [air, non-urban air or from high stacks]: 5.95e-5 kg; name pah; lognormal variance with pedigree 0.686, pedigree (1,5,4,1,5)
  amount of PAH that are not inventoried as individual substances as quantified based on Magnussen et al (2002) and Magnussen et al. (2000)
- Benzaldehyde [air, non-urban air or from high stacks]: 0.000461 kg; source Magnusson R. 2002; lognormal variance with pedigree 0.518, pedigree (1,5,5,1,5)
- NMVOC, non-methane volatile organic compounds, unspecified origin [air, non-urban air or from high stacks]: 0.298 kg; name nmvoc; lognormal variance with pedigree 0.3381, pedigree (3,5,4,3,5)
  amount of NMVOC emissions that are not inventoried as individual substances based on total NMVOC emissions of 26% of carbon content (personal communication by power saw producer) and based on a C content of petrol of 0.857 kg C/kg and excluding PAH, which are inventoried separately
- Benzo(a)pyrene [air, non-urban air or from high stacks]: 2.38e-7 kg; source Magnusson R. 2000; lognormal variance with pedigree 0.718, pedigree (1,5,5,1,5)
- Formaldehyde [air, non-urban air or from high stacks]: 0.0351 kg; source Magnusson R. 2000; lognormal variance with pedigree 0.336, pedigree (1,5,4,1,5)
  various sources: Magnussen et al (2002), Magnussen et al. (2000), Spielmann et al. 2007) as adequate
- Toluene [air, non-urban air or from high stacks]: 0.0332 kg; source Magnusson R. 2002; lognormal variance with pedigree 0.486, pedigree (1,5,4,1,5)
- Acetone [air, non-urban air or from high stacks]: 0.000157 kg; source Magnusson R. 2002; lognormal variance with pedigree 0.486, pedigree (1,5,4,1,5)
- Nitrogen oxides [air, non-urban air or from high stacks]: 0.0086 kg; source Willared, J. 2011; lognormal variance with pedigree 0.336, pedigree (1,5,4,1,5)
  personal communication of power chain producer
- Propanal [air, non-urban air or from high stacks]: 0.000124 kg; source Magnusson R. 2002; lognormal variance with pedigree 0.486, pedigree (1,5,4,1,5)
- Acetaldehyde [air, non-urban air or from high stacks]: 0.000687 kg; source Magnusson R. 2000; lognormal variance with pedigree 0.336, pedigree (1,5,4,1,5)
  (same comment as for Formaldehyde)
- Methane, fossil [air, non-urban air or from high stacks]: 0.0413 kg; source Spielmann, M. 2007; lognormal variance with pedigree 0.336, pedigree (1,5,4,1,5)
- Sulfur dioxide [air, non-urban air or from high stacks]: 3.2e-5 kg; = m_petrol*0.00001/32*(32+2*16); source Schweizer Bundesrat 2003; lognormal variance with pedigree 0.033, pedigree (1,1,4,1,1)
  calculated based on an assumed S content of 0.001 % (by mass) as the threshold value for the Swiss tax on sulfur in Petrol
- Acrolein [air, non-urban air or from high stacks]: 4.41e-5 kg; source Magnusson R. 2002; lognormal variance with pedigree 0.518, pedigree (1,5,5,1,5)
- Carbon monoxide, fossil [air, non-urban air or from high stacks]: 0.980683 kg; = m_petrol*0.8472*0.31006/12*(12+16); source Willared, J. 2011; lognormal variance with pedigree 0.2166, pedigree (2,5,4,1,1)
  calculated based on a C content of petrol of 0.8472 kg C/kg and 31% of carbon content emitted as CO (personal communication power saw producer)
- Pentane [air, non-urban air or from high stacks]: 0.0342 kg; source Magnusson R. 2002; lognormal variance with pedigree 0.486, pedigree (1,5,4,1,5)

## Sampling procedure
producer data and data from several scientific papers (emission measurements from different types of power saws, different fuels and additives)

## Extrapolations
This dataset has been extrapolated from year 2012 to the year of the calculation (2021). The uncertainty has been adjusted accordingly.
