# treatment of waste polystyrene, open dump, hyperarid infiltration class (-250mm)

Dataset: EcoSpold 2, unit process
Geography: GLO
Time period: 2006-01-01 to 2021-12-31
Technology level: current
Classification: ISIC rev.4 ecoinvent: 3821:Treatment and disposal of non-hazardous waste
Synonyms: municipal waste landfill
Scenario: Business-as-Usual
System model: Allocation, cut-off by classification
Share of production covered: 1 %
Generated by: Avraam Symeonidis
Database: ecoinvent
isCopyrightProtected: true
accessRestrictedTo: 1

## General comment
This dataset represents the activity of waste disposal of waste polystyrene in a open dump. Recommended use of this dataset: For PS, which goes to disposal as part of unmanaged communal waste mixture. For Expanded PS (EPS) use other dataset. // Waste composition (wet, in ppm): upper heating value 38.88 MJ/kg; lower heating value 38.67 MJ/kg; H2O 2000; O 38852; H 78046; C 868490; S 678.75; N 1942.6; P n.a.; B n.a.; Cl 1132.1; Br 882.12; F 14.25; I n.a.; Ag n.a.; As 1.8418; Ba 180.79; Cd 23.336; Co 30.622; Cr 39.613; Cu 107.56; Hg 0.82311; Mn 77.469; Mo n.a.; Ni 19.968; Pb 14.935; Sb 41.65; Se 2.0357; Sn 25.403; V 279.32; Zn 834.61; Be 0.48468; Sc n.a.; Sr 85.789; Ti 969.36; Tl 0.38774; W n.a.; Si n.a.; Fe 3611.5; Ca n.a.; Al 193.87; K n.a.; Mg n.a.; Na 1420.6; . // Share of carbon in waste that is biogenic 0%. Share of metals in waste not oxidised and bulk-recyclable (exclude very small or thin parts) Iron: 0%; Alu: 0%; Copper: 0%. Overall degradability of waste during 100 years: 1%.

## Included activities start
from final waste deposition (without transports to the site)

## Included activities end
Waste-specific short-term emissions to air via landfill gas and landfill leachate. Waste-specific long-term emissions from landfill.

## Geography
Given name of landfill location is 'infiltration class 1 hyperarid (2018)'. Landfill site with mean annual temperature (MAT) of 8 degC, mean annual precipitation (MAP) of 350 mm/year, and net infiltration of -250 mm/year. Negative infiltration means that leachate flow is reversed and flows upward to the surface, where water is evaporated and dissolved solids become solid evaporites.
Climate adjustments result in an alpha t (temperature) for permafrost areas of 0.999. Total climate adjustments with alpha pt of 0.999.

## Technology
This is an inventory for an open, uncontrolled waste dump for municipal solid waste. Ultimate average landfill height is 7 meters. Operation phase duration is 15 years.Percentage of landfill gas directly emitted is 100w%. A Methane Correction Factor (MCF) for landfill air emissions of 0.7057 is employed.
Leachate of the landfill is not treated. Leachate flow is upward to the surface due to net negative infiltration. No leachate treatment can be performed. Based on average waste composition and climate data the end of carbonate phase is estimated to be reached 3171 years after waste deposition. Arid conditions at this location prompt formation of evaporites from landfill contents which are partially eroded by wind. It is assumed that 10% of these evaporites are eroded by wind and airborne. Initial decay in the first 100 years of this waste results in a wind erosion rate corresponding to 4.266 g/m2.year and long-term decay corresponds to wind erosion of 11.63 g/m2.year.

## Reference product
- waste polystyrene: -1 kg; CPC 39270: Waste, parings and scrap of plastics; By-product classification Waste; CAS 9003-53-6; pedigree (1,1,1,1,1)
  main reference product of this activity (supply of disposal service).
  Uncertainty: Uncertainty is not adjusted, as this is the refence product
  production volume 1 kg
    The amount of the annual production volume is a placeholder value. The contribution of this technology to the different local markets can be found in the markets themselves.
  property heating value, net 38.67 MJ
    Value taken from the general comment of the treatment dataset.
  property price 0 EUR2005
    Waste products are assigned a price of zero as they are assumed to require further treatment.
  property carbon content 0.87023
    carbon content on a dry matter basis (reserved; not for manual entry)
  properties: dry mass 0.998 kg, carbon content, fossil 0.87023, tin content 2.5454e-5, beryllium content 4.8565e-7, sodium content 0.0014234, zinc content 0.00083628, lead content 1.4965e-5, iron content 0.0036188, water in wet mass 0.002 kg, titanium content 0.0009713, strontium content 8.596e-5, manganese content 7.7625e-5, antimony content 4.1734e-5, water content 0.002004, thallium content 3.8852e-7, aluminium content 0.00019426, vanadium content 0.00027988, barium content 0.00018115, cobalt content 3.0684e-5, oxygen content 0.03893, nitrogen content 0.0019465, mercury content 8.2476e-7, sulfur content 0.00068011, heating value, gross 38.884 MJ, hydrogen content 0.078203, cadmium content 2.3383e-5, arsenic content 1.8455e-6, chromium content 3.9692e-5, chlorine content 0.0011344, copper content 0.00010778, bromine content 0.00088389, fluorine content 1.4278e-5, selenium content 2.0397e-6, wet mass 1 kg, nickel content 2.0008e-5, carbon allocation 0.86849 kg

## Inputs from nature
- Occupation, dump site [natural resource, land]: 0.0035714 m2*year; lognormal variance with pedigree 0.088256, pedigree (1,1,4,1,1)
  for landfill operation phase and spontaneous renaturation.
  Uncertainty: Uncertainty calculated from uncertainty in base parameters.

## Emissions to nature
- Aluminium [soil, industrial]: 0.00017449 kg; lognormal variance with pedigree 0.22628, pedigree (1,1,4,1,1)
  burden from leachate evaporite in arid climates deposited on landflill surface.
  Uncertainty: Uncertainty calculated from unertainty of the waste composition of this waste, uncertainty in waste decomposition and short-term leaching in landfill
- Nickel [air, non-urban air or from high stacks]: 1.1624e-9 kg; lognormal variance with pedigree 0.48118, pedigree (1,1,4,1,1)
  burden from direct release or incineration of landfill biogas; or windblown leachate evaporite in arid climates.
  Uncertainty: Uncertainty calculated from unertainty of the waste composition of this waste, uncertainty in waste decomposition and short-term leaching in landfill
- Thallium [soil, industrial]: 3.4897e-7 kg; lognormal variance with pedigree 0.43054, pedigree (1,1,4,1,1)
  (same comment as for Aluminium)
- Copper [air, non-urban air or from high stacks]: 5.2758e-10 kg; lognormal variance with pedigree 0.50658, pedigree (1,1,4,1,1)
  (same comment as for Nickel)
- Zinc [soil, industrial]: 0.00075115 kg; lognormal variance with pedigree 0.17814, pedigree (1,1,4,1,1)
  (same comment as for Aluminium)
- Manganese [air, non-urban air or from high stacks]: 8.8838e-8 kg; lognormal variance with pedigree 0.34259, pedigree (1,1,4,1,1)
  (same comment as for Nickel)
- Strontium [soil, industrial]: 7.721e-5 kg; lognormal variance with pedigree 0.25335, pedigree (1,1,4,1,1)
  (same comment as for Aluminium)
- Mercury [air, non-urban air or from high stacks]: 2.8157e-10 kg; lognormal variance with pedigree 0.52837, pedigree (1,1,4,1,1)
  (same comment as for Nickel)
- Vanadium [soil, industrial]: 5.5113e-5 kg; lognormal variance with pedigree 0.35733, pedigree (1,1,4,1,1)
  (same comment as for Aluminium)
- Barium [air, non-urban air or from high stacks]: 2.0732e-7 kg; lognormal variance with pedigree 0.31446, pedigree (1,1,4,1,1)
  (same comment as for Nickel)
- Beryllium [soil, industrial]: 4.3621e-7 kg; lognormal variance with pedigree 0.42338, pedigree (1,1,4,1,1)
  (same comment as for Aluminium)
- Arsenic [air, non-urban air or from high stacks]: 3.7672e-10 kg; lognormal variance with pedigree 0.46527, pedigree (1,1,4,1,1)
  (same comment as for Nickel)
- Antimony [soil, industrial]: 2.768e-6 kg; lognormal variance with pedigree 0.70272, pedigree (1,1,4,1,1)
  (same comment as for Aluminium)
- Sodium [air, low population density, long-term]: 0.00013619 kg; lognormal variance with pedigree 0.16103, pedigree (1,1,4,1,1)
  burden from windblown long-term leachate evaporite in arid climates.
  Uncertainty: Uncertainty calculated from unertainty of the waste composition of this waste, uncertainty in waste decomposition and short-term leaching in landfill
- Cadmium [air, non-urban air or from high stacks]: 4.3747e-9 kg; lognormal variance with pedigree 0.40966, pedigree (1,1,4,1,1)
  (same comment as for Nickel)
- Tin [soil, industrial]: 2.2862e-5 kg; lognormal variance with pedigree 0.29405, pedigree (1,1,4,1,1)
  (same comment as for Aluminium)
- Aluminium [air, low population density, long-term]: 1.9378e-5 kg; lognormal variance with pedigree 0.22649, pedigree (1,1,4,1,1)
  (same comment as for Sodium)
- Chromium [air, non-urban air or from high stacks]: 4.521e-10 kg; lognormal variance with pedigree 0.51208, pedigree (1,1,4,1,1)
  (same comment as for Nickel)
- Selenium [soil, industrial]: 3.8825e-7 kg; lognormal variance with pedigree 0.52642, pedigree (1,1,4,1,1)
  (same comment as for Aluminium)
- Thallium [air, low population density, long-term]: 3.8752e-8 kg; lognormal variance with pedigree 0.43088, pedigree (1,1,4,1,1)
  (same comment as for Sodium)
- Cobalt [air, non-urban air or from high stacks]: 9.8551e-9 kg; lognormal variance with pedigree 0.4121, pedigree (1,1,4,1,1)
  (same comment as for Nickel)
- Lead [soil, industrial]: 1.3442e-5 kg; lognormal variance with pedigree 0.31167, pedigree (1,1,4,1,1)
  (same comment as for Aluminium)
- Titanium [air, low population density, long-term]: 9.6888e-5 kg; lognormal variance with pedigree 0.17342, pedigree (1,1,4,1,1)
  (same comment as for Sodium)
- Hydrogen chloride [air, non-urban air or from high stacks]: 3.2579e-6 kg; lognormal variance with pedigree 0.19516, pedigree (1,1,4,1,1)
  (same comment as for Nickel)
- Nickel [soil, industrial]: 1.7971e-5 kg; lognormal variance with pedigree 0.30179, pedigree (1,1,4,1,1)
  (same comment as for Aluminium)
- Iron [air, low population density, long-term]: 0.0003611 kg; lognormal variance with pedigree 0.13117, pedigree (1,1,4,1,1)
  (same comment as for Sodium)
- Hydrogen fluoride [air, non-urban air or from high stacks]: 5.7776e-8 kg; lognormal variance with pedigree 0.42591, pedigree (1,1,4,1,1)
  (same comment as for Nickel)
- Manganese [soil, industrial]: 6.9722e-5 kg; lognormal variance with pedigree 0.25276, pedigree (1,1,4,1,1)
  (same comment as for Aluminium)
- Beryllium [air, low population density, long-term]: 4.844e-8 kg; lognormal variance with pedigree 0.42372, pedigree (1,1,4,1,1)
  (same comment as for Sodium)
- Bromine [air, non-urban air or from high stacks]: 2.5297e-6 kg; lognormal variance with pedigree 0.20294, pedigree (1,1,4,1,1)
  (same comment as for Nickel)
- Mercury [soil, industrial]: 7.406e-7 kg; lognormal variance with pedigree 0.40626, pedigree (1,1,4,1,1)
  (same comment as for Aluminium)
- Zinc [air, low population density, long-term]: 8.3421e-5 kg; lognormal variance with pedigree 0.17831, pedigree (1,1,4,1,1)
  (same comment as for Sodium)
- Sulfur dioxide [air, non-urban air or from high stacks]: 8.8469e-7 kg; lognormal variance with pedigree 0.36222, pedigree (1,1,4,1,1)
  burden from direct release or incineration of landfill biogas.
  Uncertainty: Uncertainty calculated from unertainty of the waste composition of this waste, uncertainty in waste decomposition and short-term leaching in landfill
- Chromium [soil, industrial]: 1.1972e-7 kg; lognormal variance with pedigree 2.3315, pedigree (1,1,4,1,1)
  (same comment as for Aluminium)
- Strontium [air, low population density, long-term]: 8.5739e-6 kg; lognormal variance with pedigree 0.25361, pedigree (1,1,4,1,1)
  (same comment as for Sodium)
- Nitrate [air, non-urban air or from high stacks]: 2.0079e-5 kg; lognormal variance with pedigree 0.21763, pedigree (1,1,4,1,1)
  burden from windblown leachate evaporite in arid climates.
  Uncertainty: Uncertainty calculated from unertainty of the waste composition of this waste, uncertainty in waste decomposition and short-term leaching in landfill
- Copper [soil, industrial]: 9.6807e-5 kg; lognormal variance with pedigree 0.24605, pedigree (1,1,4,1,1)
  (same comment as for Aluminium)
- Lead [air, low population density, long-term]: 1.4934e-6 kg; lognormal variance with pedigree 0.3117, pedigree (1,1,4,1,1)
  (same comment as for Sodium)
- Nitrogen oxides [air, non-urban air or from high stacks]: 2.661e-8 kg; lognormal variance with pedigree 0.30985, pedigree (1,1,4,1,1)
  (same comment as for Sulfur dioxide)
- Cobalt [soil, industrial]: 2.756e-5 kg; lognormal variance with pedigree 0.2865, pedigree (1,1,4,1,1)
  (same comment as for Aluminium)
- Vanadium [air, low population density, long-term]: 6.0943e-6 kg; lognormal variance with pedigree 0.3592, pedigree (1,1,4,1,1)
  (same comment as for Sodium)
- Sulfate [air, non-urban air or from high stacks]: 7.5736e-7 kg; lognormal variance with pedigree 0.3064, pedigree (1,1,4,1,1)
  (same comment as for Nitrate)
- Barium [soil, industrial]: 0.00016271 kg; lognormal variance with pedigree 0.22488, pedigree (1,1,4,1,1)
  (same comment as for Aluminium)
- Tin [air, low population density, long-term]: 2.5401e-6 kg; lognormal variance with pedigree 0.29409, pedigree (1,1,4,1,1)
  (same comment as for Sodium)
- Particulates, > 10 um [air, non-urban air or from high stacks]: 3.0469e-5 kg; lognormal variance with pedigree 0.14131, pedigree (1,1,4,1,1)
  (same comment as for Nickel)
- Cadmium [soil, industrial]: 2.1003e-5 kg; lognormal variance with pedigree 0.2961, pedigree (1,1,4,1,1)
  (same comment as for Aluminium)
- Antimony [air, low population density, long-term]: 3.0317e-7 kg; lognormal variance with pedigree 0.70667, pedigree (1,1,4,1,1)
  (same comment as for Sodium)
- Particulates, > 2.5 um, and < 10um [air, non-urban air or from high stacks]: 1.8282e-5 kg; lognormal variance with pedigree 0.16107, pedigree (1,1,4,1,1)
  (same comment as for Nickel)
- Bromine [soil, industrial]: 0.00079363 kg; lognormal variance with pedigree 0.16969, pedigree (1,1,4,1,1)
  (same comment as for Aluminium)
- Selenium [air, low population density, long-term]: 4.2925e-8 kg; lognormal variance with pedigree 0.52864, pedigree (1,1,4,1,1)
  (same comment as for Sodium)
- Particulates, < 2.5 um [air, non-urban air or from high stacks]: 1.2188e-5 kg; lognormal variance with pedigree 0.20647, pedigree (1,1,4,1,1)
  (same comment as for Nickel)
- Fluoride [soil, industrial]: 1.2776e-5 kg; lognormal variance with pedigree 0.31289, pedigree (1,1,4,1,1)
  (same comment as for Aluminium)
- Nickel [air, low population density, long-term]: 1.9956e-6 kg; lognormal variance with pedigree 0.30208, pedigree (1,1,4,1,1)
  (same comment as for Sodium)
- Methane, fossil [air, non-urban air or from high stacks]: 0.0044334 kg; lognormal variance with pedigree 0.11122, pedigree (1,1,4,1,1)
  (same comment as for Sulfur dioxide)
- Arsenic [soil, industrial]: 1.6576e-6 kg; lognormal variance with pedigree 0.37959, pedigree (1,1,4,1,1)
  (same comment as for Aluminium)
- Manganese [air, low population density, long-term]: 7.6583e-6 kg; lognormal variance with pedigree 0.25701, pedigree (1,1,4,1,1)
  (same comment as for Sodium)
- Carbon dioxide, fossil [air, non-urban air or from high stacks]: 0.018687 kg; lognormal variance with pedigree 0.101087, pedigree (1,1,4,1,1)
  (same comment as for Sulfur dioxide)
- Heat, waste [water, ground-, long-term]: 38.496 MJ; lognormal variance with pedigree 0.020651, pedigree (1,1,4,1,1)
  burden from long-term decomposition of waste (>100a).
  Uncertainty: Uncertainty calculated from unertainty of the waste composition of this waste, uncertainty in waste decomposition and short-term leaching in landfill
- Mercury [air, low population density, long-term]: 8.2232e-8 kg; lognormal variance with pedigree 0.40665, pedigree (1,1,4,1,1)
  (same comment as for Sodium)
- Nitrogen [soil, industrial]: 0.0017455 kg; lognormal variance with pedigree 0.14527, pedigree (1,1,4,1,1)
  (same comment as for Aluminium)
- Copper [air, low population density, long-term]: 1.0756e-5 kg; lognormal variance with pedigree 0.24608, pedigree (1,1,4,1,1)
  (same comment as for Sodium)
- Chloride [soil, industrial]: 0.0010185 kg; lognormal variance with pedigree 0.16179, pedigree (1,1,4,1,1)
  (same comment as for Aluminium)
- Chromium [air, low population density, long-term]: 1.2851e-8 kg; lognormal variance with pedigree 2.332, pedigree (1,1,4,1,1)
  (same comment as for Sodium)
- Heat, waste [soil, industrial]: 0.31835 MJ; lognormal variance with pedigree 0.063378, pedigree (1,1,4,1,1)
  burden from short-term decomposition of waste (0-100a).
  Uncertainty: Uncertainty calculated from unertainty of the waste composition of this waste, uncertainty in waste decomposition and short-term leaching in landfill
- Cadmium [air, low population density, long-term]: 2.3295e-6 kg; lognormal variance with pedigree 0.2969, pedigree (1,1,4,1,1)
  (same comment as for Sodium)
- Carbon [soil, industrial]: 0.77406 kg; lognormal variance with pedigree 0.00816177, pedigree (1,1,4,1,1)
  (same comment as for Aluminium)
- Cobalt [air, low population density, long-term]: 3.0524e-6 kg; lognormal variance with pedigree 0.28788, pedigree (1,1,4,1,1)
  (same comment as for Sodium)
- Sulfur [soil, industrial]: 0.00061047 kg; lognormal variance with pedigree 0.18389, pedigree (1,1,4,1,1)
  (same comment as for Aluminium)
- Barium [air, low population density, long-term]: 1.7872e-5 kg; lognormal variance with pedigree 0.22882, pedigree (1,1,4,1,1)
  (same comment as for Sodium)
- Iron [air, non-urban air or from high stacks]: 4.9669e-8 kg; lognormal variance with pedigree 0.358, pedigree (1,1,4,1,1)
  (same comment as for Nickel)
- Bromine [air, low population density, long-term]: 8.5962e-5 kg; lognormal variance with pedigree 0.17651, pedigree (1,1,4,1,1)
  (same comment as for Sodium)
- Sodium [air, non-urban air or from high stacks]: 5.8863e-6 kg; lognormal variance with pedigree 0.2112, pedigree (1,1,4,1,1)
  (same comment as for Nickel)
- Hydrogen fluoride [air, low population density, long-term]: 1.4185e-6 kg; lognormal variance with pedigree 0.31326, pedigree (1,1,4,1,1)
  (same comment as for Sodium)
- Aluminium [air, non-urban air or from high stacks]: 9.7035e-9 kg; lognormal variance with pedigree 0.41065, pedigree (1,1,4,1,1)
  (same comment as for Nickel)
- Arsenic [air, low population density, long-term]: 1.8384e-7 kg; lognormal variance with pedigree 0.38051, pedigree (1,1,4,1,1)
  (same comment as for Sodium)
- Strontium [air, non-urban air or from high stacks]: 4.9939e-9 kg; lognormal variance with pedigree 0.43278, pedigree (1,1,4,1,1)
  (same comment as for Nickel)
- Hydrogen chloride [air, low population density, long-term]: 0.00011032 kg; lognormal variance with pedigree 0.16838, pedigree (1,1,4,1,1)
  (same comment as for Sodium)
- Titanium [air, non-urban air or from high stacks]: 4.8518e-8 kg; lognormal variance with pedigree 0.35767, pedigree (1,1,4,1,1)
  (same comment as for Nickel)
- Sulfate [air, low population density, long-term]: 0.00020273 kg; lognormal variance with pedigree 0.18508, pedigree (1,1,4,1,1)
  (same comment as for Sodium)
- Thallium [air, non-urban air or from high stacks]: 2.2571e-11 kg; lognormal variance with pedigree 0.60986, pedigree (1,1,4,1,1)
  (same comment as for Nickel)
- Nitrate [air, low population density, long-term]: 0.00083884 kg; lognormal variance with pedigree 0.15092, pedigree (1,1,4,1,1)
  (same comment as for Sodium)
- Zinc [air, non-urban air or from high stacks]: 3.9577e-8 kg; lognormal variance with pedigree 0.36448, pedigree (1,1,4,1,1)
  (same comment as for Nickel)
- Particulates, < 2.5 um [air, low population density, long-term]: 0.019911 kg; lognormal variance with pedigree 0.12824, pedigree (1,1,4,1,1)
  (same comment as for Sodium)
- Selenium [air, non-urban air or from high stacks]: 2.1494e-10 kg; lognormal variance with pedigree 0.53691, pedigree (1,1,4,1,1)
  (same comment as for Nickel)
- Particulates, > 10 um [air, low population density, long-term]: 0.049777 kg; lognormal variance with pedigree 0.063082, pedigree (1,1,4,1,1)
  (same comment as for Sodium)
- Beryllium [air, non-urban air or from high stacks]: 2.8214e-11 kg; lognormal variance with pedigree 0.6027, pedigree (1,1,4,1,1)
  (same comment as for Nickel)
- Particulates, > 2.5 um, and < 10um [air, low population density, long-term]: 0.029866 kg; lognormal variance with pedigree 0.082835, pedigree (1,1,4,1,1)
  (same comment as for Sodium)
- Vanadium [air, non-urban air or from high stacks]: 2.9493e-8 kg; lognormal variance with pedigree 0.37427, pedigree (1,1,4,1,1)
  (same comment as for Nickel)
- Sodium [soil, industrial]: 0.0012785 kg; lognormal variance with pedigree 0.15099, pedigree (1,1,4,1,1)
  (same comment as for Aluminium)
- Tin [air, non-urban air or from high stacks]: 1.4988e-10 kg; lognormal variance with pedigree 0.54866, pedigree (1,1,4,1,1)
  (same comment as for Nickel)
- Iron [soil, industrial]: 0.0032504 kg; lognormal variance with pedigree 0.13113, pedigree (1,1,4,1,1)
  (same comment as for Aluminium)
- Lead [air, non-urban air or from high stacks]: 8.8186e-11 kg; lognormal variance with pedigree 0.56568, pedigree (1,1,4,1,1)
  (same comment as for Nickel)
- Titanium [soil, industrial]: 0.00087243 kg; lognormal variance with pedigree 0.17324, pedigree (1,1,4,1,1)
  (same comment as for Aluminium)
- Antimony [air, non-urban air or from high stacks]: 4.3978e-9 kg; lognormal variance with pedigree 0.43744, pedigree (1,1,4,1,1)
  (same comment as for Nickel)

## Extrapolations
This dataset has been extrapolated from year 2012 to the year of the calculation (2021). The uncertainty has been adjusted accordingly.
