# treatment of conditioned spent nuclear fuel, in interim storage

Dataset: EcoSpold 2, unit process
Geography: CH
Time period: 1992-01-01 to 2021-12-31
Technology level: current
Classification: ISIC rev.4 ecoinvent: 3822:Treatment and disposal of hazardous waste
Classification: EcoSpold01Categories: nuclear power/waste treatment
Tags: Treatment; ConvertedDataset
Scenario: Business-as-Usual
System model: Allocation, cut-off by classification
Generated by: Roberto Dones
Published in: Dones, R. 2007
Database: ecoinvent
isCopyrightProtected: true
accessRestrictedTo: 1

## General comment
Electricity consumption is assumed to be negligible (cooling of the high level waste is by natural circulation). The heat generated by the waste itself has not been taken into account.
[This dataset was already contained in the ecoinvent database version 2. It was not individually updated during the transfer to ecoinvent version 3. Life Cycle Impact Assessment results may still have changed, as they are affected by changes in the supply chain, i.e. in other datasets. This dataset was generated following the ecoinvent quality guidelines for version 2. It may have been subject to central changes described in the ecoinvent version 3 change report (http://www.ecoinvent.org/database/ecoinvent-version-3/reports-of-changes/), and the results of the central updates were reviewed extensively. The changes added e.g. consistent water flows and other information throughout the database. The documentation of this dataset can be found in the ecoinvent reports of version 2, which are still available via the ecoinvent website. The change report linked above covers all central changes that were made during the conversion process.]

## Included activities end
The module requires input of service from the final repository for high and intermediate active level waste, i.e. the take over of the conditioned waste. Use of the infrastructure has been accounted for using the originally planned waste flow. Transport of the conditioned waste from the reprocessing facilities is included.

## Geography
Swiss conditions.

## Technology
Information regards design in mid 1990s.

## Reference product
- conditioned spent nuclear fuel: -1 m3; CPC 33720: Spent (irradiated) fuel elements (cartridges) of nuclear reactors; By-product classification Waste
  EcoSpold01Location=CH
  production volume 0.0336675 m3
    This is a placeholder value that does not reflect real-world production volumes. This dataset does not currently require a real-world production volume to work in the database framework, and no actual data were collected yet. This has no negative effect on the results of the ecoinvent database. The placeholder value of this activity was scaled according to the nominal GDP of 2005 (source: United Nations, http://data.un.org/Glossary.aspx?q=GDP+%28current+US%24%29, accessed 20130726) to reflect an appropriate share of the global production volume, which is also a placeholder value.
  property price 0 EUR2005
    Waste products are assigned a price of zero as they are assumed to require further treatment.
  property carbon content 0
    carbon content on a dry matter basis (reserved; not for manual entry)
  properties: carbon content, non-fossil 0, wet mass 7600 kg, water in wet mass 0 kg, dry mass 7600 kg, carbon content, fossil 0, water content 0, carbon allocation 0 kg

## Inputs from technosphere
- high level radioactive waste for final repository: -1 m3; lognormal variance with pedigree 0.04, pedigree (1,1,5,1,1)
  EcoSpold01Location=CH
  all waste in will move out to final repository
  production volume 1 m3
    Calculated from the production volume of conditioned spent nuclear fuel in proportion to the respective output amounts.
  properties: dry mass 5400 kg, wet mass 5400 kg
- nuclear waste storage, interim, for high level radioactive waste before final repository: 0.000175 unit; lognormal variance with pedigree 0.08, pedigree (1,1,5,1,1)
  EcoSpold01Location=CH
  estimation based on somewhat outdated waste flow amount

## Sampling procedure
Literature

## Extrapolations
This dataset has been extrapolated from year 1998 to the year of the calculation (2021). The uncertainty has been adjusted accordingly.

## Review by Roberto Dones 2003-08-27
passed
for final run August 2003
