# treatment of lignite ash, opencast refill

Dataset: EcoSpold 2, unit process
Geography: BA
Time period: 1996-01-01 to 2021-12-31
Technology level: current
Classification: ISIC rev.4 ecoinvent: 3822:Treatment and disposal of hazardous waste
Classification: EcoSpold01Categories: waste management/others
Synonyms: ashes form lignite incineration disposed as backfill in opencast lignite mines
Tags: Treatment; ConvertedDataset
Scenario: Business-as-Usual
System model: Allocation, cut-off by classification
Generated by: Gabor Doka (obsolete)
Published in: Doka G. 2008
Database: ecoinvent
isCopyrightProtected: true
accessRestrictedTo: 1

## General comment
backfilled waste composition is (in ppm): H2O n.a.; O n.a.; H n.a.; C n.a.; S 29487; N n.a.; P 90.969; B 483.95; Cl 3.4341; Br 3.663; F 11.447; I 0.45788; Ag n.a.; As 11.048; Ba 228.94; Cd 1.3411; Co 34.341; Cr 32.051; Cu 13.618; Hg 0.023045; Mn 45.788; Mo 15.92; Ni 33.818; Pb 11.068; Sb 8.9757; Se 3.6904; Sn 3.663; V 79.598; Zn 61.557; Be 2.2894; Sc 1.1447; Sr 159.73; Ti 228.94; Tl 0.045181; W 2.2894; Si 109890; Fe 12363; Ca 45788; Al 10760; K 1373.6; Mg 6868.1; Na 2060.4;
[This dataset was already contained in the ecoinvent database version 2. It was not individually updated during the transfer to ecoinvent version 3. Life Cycle Impact Assessment results may still have changed, as they are affected by changes in the supply chain, i.e. in other datasets. This dataset was generated following the ecoinvent quality guidelines for version 2. It may have been subject to central changes described in the ecoinvent version 3 change report (http://www.ecoinvent.org/database/ecoinvent-version-3/reports-of-changes/), and the results of the central updates were reviewed extensively. The changes added e.g. consistent water flows and other information throughout the database. The documentation of this dataset can be found in the ecoinvent reports of version 2, which are still available via the ecoinvent website. The change report linked above covers all central changes that were made during the conversion process.]

## Included activities end
This module contains only direct emissions from lignite ash used as backfill in opencast lignite mines: short-term emissions (0-100a) and long-term emissions (>100a) both to ground water. E.g. land-use and energy consumption is *not* included.

## Geography
Ash composition calculated from country-specific coal composition (BA) and technology-specific transfer coefficients in power plant.

## Technology
Lignite ash as backfill in lignite opencast mine (together with tailings)

## Reference product
- lignite ash: -1 kg; CPC 39: Wastes or scraps; By-product classification Waste
  EcoSpold01Location=BA
  production volume 2.23199e9 kg
    Estimated. Electricity and synthetic natural gas production are responsible for more than 90% of lignite use (https://www.lignite.com/about-lignite/lignite-uses/, accessed 20151008) . The production volume is calculated as the sum of lignite ashes resulting from electricity and heat and power co-generation production from lignite, in the respective country.
  property price 0 EUR2005
    Waste products are assigned a price of zero as they are assumed to require further treatment.
  property carbon content 0
    carbon content on a dry matter basis (reserved; not for manual entry)
  properties: dry mass 1 kg, carbon content, fossil 0, carbon content, non-fossil 0, water in wet mass 0 kg, water content 0, wet mass 1 kg, heating value, net 0 MJ, carbon allocation 0 kg

## Emissions to nature
- Chloride [water, ground-, long-term]: 1.4748e-6 kg; lognormal variance with pedigree 1.46, pedigree (1,1,5,1,1)
  Long-term emission from lignite ash backfill. Uncertainty derived from uncertainty in ash composition and uncertainty in transfer coefficients.
- Lead [water, ground-]: 2.4047e-10 kg; lognormal variance with pedigree 2.45, pedigree (1,1,5,1,1)
  Short-term emission from lignite ash backfill. Uncertainty derived from uncertainty in ash composition and uncertainty in transfer coefficients.
- Arsenic, ion [water, ground-]: 1.1048e-5 kg; lognormal variance with pedigree 1.3, pedigree (1,1,5,1,1)
  (same comment as for Lead)
- Titanium, ion [water, ground-, long-term]: 0.00022865 kg; lognormal variance with pedigree 0.89, pedigree (1,1,5,1,1)
  (same comment as for Chloride)
- Chromium VI [water, ground-]: 4.834e-6 kg; lognormal variance with pedigree 1.24, pedigree (1,1,5,1,1)
  (same comment as for Lead)
- Silicon [water, ground-]: 0.00062006 kg; lognormal variance with pedigree 0.59, pedigree (1,1,5,1,1)
  (same comment as for Lead)
- Mercury [water, ground-]: 4.5563e-12 kg; lognormal variance with pedigree 2.95, pedigree (1,1,5,1,1)
  (same comment as for Lead)
- Barium [water, ground-, long-term]: 0.00022893 kg; lognormal variance with pedigree 0.89, pedigree (1,1,5,1,1)
  (same comment as for Chloride)
- Antimony [water, ground-]: 3.4615e-6 kg; lognormal variance with pedigree 1.35, pedigree (1,1,5,1,1)
  (same comment as for Lead)
- Tin, ion [water, ground-, long-term]: 3.6627e-6 kg; lognormal variance with pedigree 1.44, pedigree (1,1,5,1,1)
  (same comment as for Chloride)
- Cadmium, ion [water, ground-]: 3.8134e-11 kg; lognormal variance with pedigree 2.69, pedigree (1,1,5,1,1)
  (same comment as for Lead)
- Sodium, ion [water, ground-, long-term]: 0.00063291 kg; lognormal variance with pedigree 0.62, pedigree (1,1,5,1,1)
  (same comment as for Chloride)
- Zinc, ion [water, ground-]: 3.1601e-9 kg; lognormal variance with pedigree 2.11, pedigree (1,1,5,1,1)
  (same comment as for Lead)
- Boron [water, ground-]: 3.7918e-6 kg; lognormal variance with pedigree 1.19, pedigree (1,1,5,1,1)
  (same comment as for Lead)
- Tin, ion [water, ground-]: 2.9074e-10 kg; lognormal variance with pedigree 2.43, pedigree (1,1,5,1,1)
  (same comment as for Lead)
- Molybdenum [water, ground-]: 1.592e-5 kg; lognormal variance with pedigree 1.25, pedigree (1,1,5,1,1)
  (same comment as for Lead)
- Sulfate [water, ground-, long-term]: 0.064649 kg; lognormal variance with pedigree 0.29, pedigree (1,1,5,1,1)
  (same comment as for Chloride)
- Bromine [water, ground-]: 3.6011e-6 kg; lognormal variance with pedigree 1.44, pedigree (1,1,5,1,1)
  (same comment as for Lead)
- Manganese [water, ground-, long-term]: 4.5786e-5 kg; lognormal variance with pedigree 1.11, pedigree (1,1,5,1,1)
  (same comment as for Chloride)
- Beryllium [water, ground-]: 3.4717e-9 kg; lognormal variance with pedigree 2.1, pedigree (1,1,5,1,1)
  (same comment as for Lead)
- Nickel, ion [water, ground-, long-term]: 3.3767e-5 kg; lognormal variance with pedigree 1.15, pedigree (1,1,5,1,1)
  (same comment as for Chloride)
- Phosphate [water, ground-, long-term]: 0.00015635 kg; lognormal variance with pedigree 1.1, pedigree (1,1,5,1,1)
  (same comment as for Chloride)
- Scandium [water, ground-, long-term]: 8.2118e-7 kg; lognormal variance with pedigree 1.6, pedigree (1,1,5,1,1)
  (same comment as for Chloride)
- Aluminium [water, ground-]: 1.3379e-5 kg; lognormal variance with pedigree 1.02, pedigree (1,1,5,1,1)
  (same comment as for Lead)
- Lead [water, ground-, long-term]: 1.1068e-5 kg; lognormal variance with pedigree 1.29, pedigree (1,1,5,1,1)
  (same comment as for Chloride)
- Copper, ion [water, ground-, long-term]: 1.3616e-5 kg; lognormal variance with pedigree 1.27, pedigree (1,1,5,1,1)
  (same comment as for Chloride)
- Scandium [water, ground-]: 3.2351e-7 kg; lognormal variance with pedigree 1.63, pedigree (1,1,5,1,1)
  (same comment as for Lead)
- Strontium [water, ground-, long-term]: 0.00015948 kg; lognormal variance with pedigree 0.94, pedigree (1,1,5,1,1)
  (same comment as for Chloride)
- Vanadium, ion [water, ground-]: 4.8922e-7 kg; lognormal variance with pedigree 1.46, pedigree (1,1,5,1,1)
  (same comment as for Lead)
- Sodium, ion [water, ground-]: 0.0014275 kg; lognormal variance with pedigree 0.61, pedigree (1,1,5,1,1)
  (same comment as for Lead)
- Cobalt [water, ground-, long-term]: 3.4316e-5 kg; lognormal variance with pedigree 1.14, pedigree (1,1,5,1,1)
  (same comment as for Chloride)
- Tungsten [water, ground-, long-term]: 1.4065e-6 kg; lognormal variance with pedigree 1.51, pedigree (1,1,5,1,1)
  (same comment as for Chloride)
- Magnesium [water, ground-]: 3.2687e-6 kg; lognormal variance with pedigree 1.2, pedigree (1,1,5,1,1)
  (same comment as for Lead)
- Arsenic, ion [water, ground-, long-term]: 1.1048e-14 kg; lognormal variance with pedigree 1.32, pedigree (1,1,5,1,1)
  (same comment as for Chloride)
- Cobalt [water, ground-]: 2.4591e-8 kg; lognormal variance with pedigree 1.84, pedigree (1,1,5,1,1)
  (same comment as for Lead)
- Chromium VI [water, ground-, long-term]: 3.1788e-6 kg; lognormal variance with pedigree 1.22, pedigree (1,1,5,1,1)
  (same comment as for Chloride)
- Beryllium [water, ground-, long-term]: 2.2859e-6 kg; lognormal variance with pedigree 1.5, pedigree (1,1,5,1,1)
  (same comment as for Chloride)
- Zinc, ion [water, ground-, long-term]: 6.1554e-5 kg; lognormal variance with pedigree 1.07, pedigree (1,1,5,1,1)
  (same comment as for Chloride)
- Silicon [water, ground-, long-term]: 0.07836 kg; lognormal variance with pedigree 0.18, pedigree (1,1,5,1,1)
  (same comment as for Chloride)
- Molybdenum [water, ground-, long-term]: 2.1663e-11 kg; lognormal variance with pedigree 1.27, pedigree (1,1,5,1,1)
  (same comment as for Chloride)
- Aluminium [water, ground-, long-term]: 0.010747 kg; lognormal variance with pedigree 0.4, pedigree (1,1,5,1,1)
  (same comment as for Chloride)
- Iodide [water, ground-]: 4.5788e-7 kg; lognormal variance with pedigree 1.71, pedigree (1,1,5,1,1)
  (same comment as for Lead)
- Sulfate [water, ground-]: 0.023812 kg; lognormal variance with pedigree 0.33, pedigree (1,1,5,1,1)
  (same comment as for Lead)
- Calcium, ion [water, ground-, long-term]: 0.04577 kg; lognormal variance with pedigree 0.24, pedigree (1,1,5,1,1)
  (same comment as for Chloride)
- Vanadium, ion [water, ground-, long-term]: 4.2812e-5 kg; lognormal variance with pedigree 1.13, pedigree (1,1,5,1,1)
  (same comment as for Chloride)
- Potassium, ion [water, ground-, long-term]: 0.0005985 kg; lognormal variance with pedigree 0.67, pedigree (1,1,5,1,1)
  (same comment as for Chloride)
- Fluoride [water, ground-]: 1.4933e-6 kg; lognormal variance with pedigree 1.39, pedigree (1,1,5,1,1)
  (same comment as for Lead)
- Thallium [water, ground-, long-term]: 4.5113e-8 kg; lognormal variance with pedigree 2, pedigree (1,1,5,1,1)
  (same comment as for Chloride)
- Phosphate [water, ground-]: 2.6101e-7 kg; lognormal variance with pedigree 1.68, pedigree (1,1,5,1,1)
  (same comment as for Lead)
- Selenium [water, ground-]: 1.4232e-6 kg; lognormal variance with pedigree 1.46, pedigree (1,1,5,1,1)
  (same comment as for Lead)
- Bromine [water, ground-, long-term]: 6.1944e-8 kg; lognormal variance with pedigree 1.46, pedigree (1,1,5,1,1)
  (same comment as for Chloride)
- Nickel, ion [water, ground-]: 5.1283e-8 kg; lognormal variance with pedigree 1.75, pedigree (1,1,5,1,1)
  (same comment as for Lead)
- Strontium [water, ground-]: 2.4221e-7 kg; lognormal variance with pedigree 1.54, pedigree (1,1,5,1,1)
  (same comment as for Lead)
- Selenium [water, ground-, long-term]: 2.2672e-6 kg; lognormal variance with pedigree 1.45, pedigree (1,1,5,1,1)
  (same comment as for Chloride)
- Barium [water, ground-]: 7.921e-9 kg; lognormal variance with pedigree 1.99, pedigree (1,1,5,1,1)
  (same comment as for Lead)
- Manganese [water, ground-]: 1.5842e-9 kg; lognormal variance with pedigree 2.2, pedigree (1,1,5,1,1)
  (same comment as for Lead)
- Thallium [water, ground-]: 6.8515e-11 kg; lognormal variance with pedigree 2.6, pedigree (1,1,5,1,1)
  (same comment as for Lead)
- Antimony [water, ground-, long-term]: 5.5142e-6 kg; lognormal variance with pedigree 1.33, pedigree (1,1,5,1,1)
  (same comment as for Chloride)
- Calcium, ion [water, ground-]: 1.7329e-5 kg; lognormal variance with pedigree 1.02, pedigree (1,1,5,1,1)
  (same comment as for Lead)
- Mercury [water, ground-, long-term]: 2.3041e-8 kg; lognormal variance with pedigree 2.09, pedigree (1,1,5,1,1)
  (same comment as for Chloride)
- Tungsten [water, ground-]: 8.8291e-7 kg; lognormal variance with pedigree 1.53, pedigree (1,1,5,1,1)
  (same comment as for Lead)
- Cadmium, ion [water, ground-, long-term]: 1.341e-6 kg; lognormal variance with pedigree 1.57, pedigree (1,1,5,1,1)
  (same comment as for Chloride)
- Copper, ion [water, ground-]: 2.1958e-9 kg; lognormal variance with pedigree 2.16, pedigree (1,1,5,1,1)
  (same comment as for Lead)
- Magnesium [water, ground-, long-term]: 0.0068649 kg; lognormal variance with pedigree 0.45, pedigree (1,1,5,1,1)
  (same comment as for Chloride)
- Iron, ion [water, ground-, long-term]: 0.0082616 kg; lognormal variance with pedigree 0.42, pedigree (1,1,5,1,1)
  (same comment as for Chloride)
- Iron, ion [water, ground-]: 1.0344e-7 kg; lognormal variance with pedigree 1.67, pedigree (1,1,5,1,1)
  (same comment as for Lead)
- Chloride [water, ground-]: 1.9593e-6 kg; lognormal variance with pedigree 1.46, pedigree (1,1,5,1,1)
  (same comment as for Lead)
- Iodide [water, ground-, long-term]: 4.5788e-14 kg; lognormal variance with pedigree 1.73, pedigree (1,1,5,1,1)
  (same comment as for Chloride)
- Fluoride [water, ground-, long-term]: 9.9535e-6 kg; lognormal variance with pedigree 1.29, pedigree (1,1,5,1,1)
  (same comment as for Chloride)
- Boron [water, ground-, long-term]: 0.00030247 kg; lognormal variance with pedigree 0.85, pedigree (1,1,5,1,1)
  (same comment as for Chloride)
- Titanium, ion [water, ground-]: 2.8466e-7 kg; lognormal variance with pedigree 1.52, pedigree (1,1,5,1,1)
  (same comment as for Lead)
- Potassium, ion [water, ground-]: 0.00077513 kg; lognormal variance with pedigree 0.67, pedigree (1,1,5,1,1)
  (same comment as for Lead)

## Sampling procedure
country-specific calculation based on literature data

## Extrapolations
This dataset has been extrapolated from year 2000 to the year of the calculation (2021). The uncertainty has been adjusted accordingly.

## Review by Niels Jungbluth 2009-01-22
passed.
