# potato seed production, Swiss integrated production, for setting

Dataset: EcoSpold 2, unit process
Geography: CH
Time period: 1999-01-01 to 2021-12-31
Technology level: current
Classification: EcoSpold01Categories: agricultural means of production/seed
Classification: ISIC rev.4 ecoinvent: 0164:Seed processing for propagation
Tags: ConvertedDataset
Scenario: Business-as-Usual
System model: Allocation, cut-off by classification
Share of production covered: 71 %
Generated by: Thomas Nemecek
Published in: Nemecek, T. 2007
Database: ecoinvent
isCopyrightProtected: true
accessRestrictedTo: 1

## General comment
Refers to 1 kg of potato seed (fresh weight), with an average dry matter content of 22%
[This dataset was already contained in the ecoinvent database version 2. It was not individually updated during the transfer to ecoinvent version 3. Life Cycle Impact Assessment results may still have changed, as they are affected by changes in the supply chain, i.e. in other datasets. This dataset was generated following the ecoinvent quality guidelines for version 2. It may have been subject to central changes described in the ecoinvent version 3 change report (http://www.ecoinvent.org/database/ecoinvent-version-3/reports-of-changes/), and the results of the central updates were reviewed extensively. The changes added e.g. consistent water flows and other information throughout the database. The documentation of this dataset can be found in the ecoinvent reports of version 2, which are still available via the ecoinvent website. The change report linked above covers all central changes that were made during the conversion process.]

## Included activities end
The seed produced at the farm is transported to the processing centre, treated (pre-cleaning, cleaning, eventually drying, chemical dressing (for integrated production) and bag filling), stored and afterwards transported to the regional storage centre. No data on wastewater production were available.

## Technology
Refers to average seed processing

## Time period
Date of the major data sources.

## Reference product
- potato seed, Swiss integrated production, for setting: 1 kg; By-product classification allocatable product; CPC 01260: Vegetable seeds, except beet seeds
  EcoSpold01Location=CH
  production volume 3.36042e7 kg
    Consumption of potato seed in Switzerland is 61'450 t/year, 8% imported
    2520 kg/ha * 13335 ha
  property price 0.0349102 EUR2005
    Calculated based on inputs: The price of the product has been calculated as a sum of the values of the material and energy inputs for this product. This value is therefore a rough estimation. It may underestimate the real price since there are additional expenses when producing any product. These expences can include for example labour costs, treatment of waste materials and profit for the producer. Please consider carefully whether this level of data quality is acceptable for your application.
  property carbon content, fossil 0; name C_content_fossil
    fossil carbon content on a dry matter basis
  property wet mass 1 kg; name WM
  property dry mass 0.2 kg; name DM
  property water content 4; name water_content; = (1-DM)/DM
  property water in wet mass 0.8 kg; name WWM; = 1-DM
  property carbon content, non-fossil 0.413567; name C_content_non_fossil
    biogene carbon content on a dry matter basis
  property energy content 3.518 MJ; name energy_content
    as gross calorific value (when relevant)
  property carbon content 0.413567
    carbon content on a dry matter basis (reserved; not for manual entry)
  properties: carbon allocation 0.0827133 kg

## Inputs from technosphere
- potato seed, Swiss integrated production, at farm: 0.9 kg; lognormal variance with pedigree 0.04, pedigree (1,1,5,1,1)
  See "01_crop production - seed production & processing_v1.0.pdf" - pdf-document on the dedicated talk page of ecoinvent (www.ecoinvent.org/documentation)
  EcoSpold01Location=CH
  properties: wet mass 1 kg, carbon content, non-fossil 0.4282, water content 4, dry mass 0.2 kg
  note on carbon content, non-fossil: For potato, seeds are tubers (Tab 1.14, ecoinvent v2.2 report 15b). Composition data obtained from Potatoes, raw, skin, in (http://www.nal.usda.gov/fnic/foodcomp/search/). First, composition data were refered to 1 kg dry mass. Then, C-contents were calculated considering a C-content/dry mass of 46% in carbohydrates (including fibres), 53% in proteins and 75% in fats. All data from "Evolutionary and Biochemical Aspects", A.D. Kay and T. Vrede (in Global Ecology, 2010, Elsevier B.V., S.E. Jørgensen Ed.).
- building, multi-storey: 4e-5 m3; lognormal variance with pedigree 0.410625, pedigree (5,3,5,2,1)
  EcoSpold01Location=RER
  See "01_crop production - seed production & processing_v1.0.pdf" - pdf-document on the dedicated talk page of ecoinvent (www.ecoinvent.org/documentation)
- electricity, low voltage: 0.073 kWh; lognormal variance with pedigree 0.1226, pedigree (5,3,5,5,1)
  EcoSpold01Location=CH
  See "01_crop production - seed production & processing_v1.0.pdf" - pdf-document on the dedicated talk page of ecoinvent (www.ecoinvent.org/documentation)
- potato seed, at farm: 0.1 kg; name potato_seed_farm; lognormal variance with pedigree 0.04, pedigree (1,1,5,1,1)
  See "01_crop production - seed production & processing_v1.0.pdf" - pdf-document on the dedicated talk page of ecoinvent (www.ecoinvent.org/documentation)
  property carbon content, non-fossil 0.413567; name potato_seed_farm_C_content_non_fossil
  property dry mass 0.2 kg; name potato_seed_farm_DM
  property water content 4; name potato_seed_farm_water_content; = (1-potato_seed_farm_DM)/potato_seed_farm_DM
  property wet mass 1 kg; name potato_seed_farm_WM
  property water in wet mass 0.8 kg; name potato_seed_farm_WWM; = 1-potato_seed_farm_DM
  note on carbon content, non-fossil: biogene carbon content on a dry matter basis; For potato, seeds are tubers (Tab 1.14, ecoinvent report 15b). Composition data obtained from Potatoes, raw, skin, in (http://www.nal.usda.gov/fnic/foodcomp/search/). First, composition data were refered to 1 kg dry mass. Then, C-contents were calculated considering a C-content/dry mass of 44% in carbohydrates (including fibres), 53% in proteins and 75% in fats. All data from ecoinvent report, n 15a, pg 40, except C-content in protein, that comes from Determination of protein concentration by total organic carbon analysis, Rouwenhorst et al., 1991, J Biochem and Biophys Methods, 22:119-128.
- packaging, for pesticides: 0.0001 kg; lognormal variance with pedigree 0.0912, pedigree (4,3,5,5,4)
  Total amount of active substance/s of pesticides needed for the production of potato seed, Swiss integrated production, for setting is calculated to be circa 5.00E-05 kg. Pesticide/s used in this dataset is/are: 'nitrile-compound'. The total amount of active substance/s is doubled in order to account for the packaging of the dilluted product of pesticide/s that is/are applied. Therefore, 1.00E-04 kg of packaging for pesticides is justified with this exchange.
  properties: wet mass 1 kg, dry mass 1 kg, heating value, net 25.97 MJ, price 0.0642 EUR2005, carbon content, fossil 0.85714
- nitrile-compound: 5e-5 kg; lognormal variance with pedigree 0.0507, pedigree (2,2,5,1,1)
  (same comment as for potato seed, Swiss integrated production, at farm)
  properties: dry mass 1 kg, wet mass 1 kg, carbon content, fossil 0.344995
  note on carbon content, fossil: An unweighted average of the C content in chlorothalonil, dichlobenil, bromoxynil, ioxynil, substances classified as nitrile-compounds in Tab 2.25, Sutter 2010

## Inputs from nature
- Occupation, industrial area [natural resource, land]: 0.0004 m2*year; lognormal variance with pedigree 0.160625, pedigree (5,3,5,2,1)
  (same comment as for potato seed, at farm)
- Energy, gross calorific value, in biomass [natural resource, biotic]: 3.8 MJ; lognormal variance with pedigree 0.0819, pedigree (2,3,5,3,4)
  Estimated based on literature value (Swiss Feed Database, http://www.feed-alp.admin.ch, accesseed 20131113).
- Transformation, to industrial area [natural resource, land]: 8e-6 m2; lognormal variance with pedigree 0.220625, pedigree (5,3,5,2,1)
  (same comment as for potato seed, at farm)
- Occupation, construction site [natural resource, land]: 1.6e-5 m2*year; lognormal variance with pedigree 0.160625, pedigree (5,3,5,2,1)
  (same comment as for potato seed, at farm)
- Transformation, from unspecified [natural resource, land]: 8e-6 m2; lognormal variance with pedigree 0.220625, pedigree (5,3,5,2,1)
  (same comment as for potato seed, at farm)

## Sampling procedure
Data based on a literature, expert information and enquiry of seed processing plants.

## Extrapolations
This dataset has been extrapolated from year 2002 to the year of the calculation (2021). The uncertainty has been adjusted accordingly.

## Review by Roland Hischier 2003-06-03
Passed.
