# barley grain, feed production, organic

Dataset: EcoSpold 2, unit process
Geography: RoW
Time period: 1996-01-01 to 2021-12-31
Technology level: current
Classification: ISIC rev.4 ecoinvent: 1080:Manufacture of prepared animal feeds
Classification: EcoSpold01Categories: agricultural means of production/feed
Tags: ConvertedDataset
Scenario: Business-as-Usual
System model: Allocation, cut-off by classification
Generated by: Thomas Nemecek
Published in: Nemecek, T. 2007
Database: ecoinvent
isCopyrightProtected: true
accessRestrictedTo: 1

## General comment
The inventory refers to 1 kg processed feedstuff (fresh weight).
[This dataset was already contained in the ecoinvent database version 2. It was not individually updated during the transfer to ecoinvent version 3. Life Cycle Impact Assessment results may still have changed, as they are affected by changes in the supply chain, i.e. in other datasets. This dataset was generated following the ecoinvent quality guidelines for version 2. It may have been subject to central changes described in the ecoinvent version 3 change report (http://www.ecoinvent.org/database/ecoinvent-version-3/reports-of-changes/), and the results of the central updates were reviewed extensively. The changes added e.g. consistent water flows and other information throughout the database. The documentation of this dataset can be found in the ecoinvent reports of version 2, which are still available via the ecoinvent website. The change report linked above covers all central changes that were made during the conversion process.]

## Included activities end
The inventory includes the transport of the raw materials to the feed processing centre, processing feedstuff (crushing or milling, heat treatment, dosing, mixing squeezing and pelleting) and the storage of the feed mixes. It also includes water use and wastewater treatment, the transformation and use of land related to the storage buildings. No process emissions were included except heat waste from the use of electricity. Packaging is not included.

## Geography
Values refer to feedstuff delivered in Switzerland.

## Technology
Refers to expanded feedstuff.

## Time period
Years of the publications of the main sources

## Parameters
- fraction, tap water, to air: 0.9 dimensionless; name fraction_TW_to_air; lognormal variance with pedigree 0.092025, pedigree (4,4,3,2,4)
- fraction, process water, to air: 0.9 dimensionless; name fraction_PW_to_air; lognormal variance with pedigree 0.092025, pedigree (4,4,3,2,4)

## Reference product
- barley grain, feed, organic: 1 kg; name barley_RP; By-product classification allocatable product; CPC 23319: Preparations used in animal feeding n.e.c.
  EcoSpold01Location=CH
  production volume 1.43277e9 kg; name barley_RP_PV
    Global area of barley: 47368145 ha (FAOSTAT, year 2010), 0.73% of agricultural area organic (FAOSTAT, year 2009, no data for 2010), yield of dataset “barley production, organic” 4153 kg/ha.
  property price 0.158151 EUR2005
    Calculated based on inputs: The price of the product has been calculated as a sum of the values of the material and energy inputs for this product. This value is therefore a rough estimation. It may underestimate the real price since there are additional expenses when producing any product. These expences can include for example labour costs, treatment of waste materials and profit for the producer. Please consider carefully whether this level of data quality is acceptable for your application.
  property carbon content, non-fossil 0.46538
    Composition data obtained from Barley hulled, in (http://www.nal.usda.gov/fnic/foodcomp/search/). First, composition data were refered to 1 kg dry mass. Then, C-contents were calculated considering a C-content/dry mass of 46% in carbohydrates (including fibres), 53% in proteins and 75% in fats. All data from "Evolutionary and Biochemical Aspects", A.D. Kay and T. Vrede (in Global Ecology, 2010, Elsevier B.V., S.E. Jørgensen Ed.).
  property carbon content 0.46538
    carbon content on a dry matter basis (reserved; not for manual entry)
  properties: water content 0.176471, water in wet mass 0.15 kg, dry mass 0.85 kg, wet mass 1 kg, carbon content, fossil 0, carbon allocation 0.395573 kg

## Inputs from technosphere
- wastewater, average: 0 m3; name wastewater; pedigree (1,1,1,1,1)
  EcoSpold01Location=CH
  production volume 0 m3
    Calculated from the production volume of barley grain, feed, organic in proportion to the respective output amounts.
  property price 0 EUR2005; name wastewater_price_EUR2005
  properties: carbon content, non-fossil 0.194039, water content 2882.2, wet mass 1000 kg, dry mass 0.346837 kg
  note on carbon content, non-fossil: 0.0673 kg TOC/m3 (Tab A.17, ecoinvent v2.2 report 13_I). TOC was considered as Total Carbon.
- tap water: 0 kg; name tap_water_input; source Salzgeber Ch. 1996; pedigree (1,1,1,1,1)
  EcoSpold01Location=RER
  Literature Value. Salzgeber & Lörcher (1996) give the total energy and water consumption of a mill processing about 30,000 tonnes of cereals per year. The mill consumes 1800 m3 water and produces 1200 m3 wastewater per year. Water consumption and wastewater output was completed from Salzgeber and Lörcher (1996), namely 56 litres tap water and 38 litres wastewater per tonne of feedstuff produced.
  properties: water content 2962.17, carbon content, fossil 0.00178991, wet mass 1 kg, dry mass 0.000337476 kg
  note on carbon content, fossil: Bicarbonate content is 2.93 mol/m3. CO2 content is 0.1 mol/m3 (ecoinvent v2.2 report 8, Tab 93.1).
- heat, district or industrial, natural gas: 0 MJ; pedigree (1,1,1,1,1)
  EcoSpold01Location=RER
  properties: heating value, net 1 MJ
- electricity, low voltage: 0 kWh; pedigree (1,1,1,1,1)
  EcoSpold01Location=CH
- barley grain, organic: 1 kg; lognormal variance with pedigree 0.06, pedigree (1,1,5,5,3)
  EcoSpold01Location=CH
  properties: dry mass 0.85 kg, carbon content, non-fossil 0.46538, water content 0.176471, wet mass 1 kg
  note on carbon content, non-fossil: Composition data obtained from Barley hulled, in (http://www.nal.usda.gov/fnic/foodcomp/search/). First, composition data were refered to 1 kg dry mass. Then, C-contents were calculated considering a C-content/dry mass of 46% in carbohydrates (including fibres), 53% in proteins and 75% in fats. All data from "Evolutionary and Biochemical Aspects", A.D. Kay and T. Vrede (in Global Ecology, 2010, Elsevier B.V., S.E. Jørgensen Ed.).
- building, multi-storey: 8.5e-6 m3; lognormal variance with pedigree 0.3446, pedigree (3,3,5,5,1)
  EcoSpold01Location=RER
- wastewater, average: -1.22889e-5, -2.57111e-5 m3 (2 entries); lognormal variance with pedigree 0.1246, pedigree (3,3,5,5,4)
  EcoSpold01Location=CH
  production volume 54570.1 m3
- tap water: 0.000523272, 6.29879e-5, 0.000104098, 0.0223837, 0.00262494, 6.82871e-5, 0.000194242, 0.0300385 kg (8 entries); source Salzgeber Ch. 1996; lognormal variance with pedigree 0.1246, pedigree (3,3,5,5,4)
  (same comment as for tap water)
- heat, district or industrial, natural gas: 0.00153318, 0.0367379, 0.0994789 MJ (3 entries); lognormal variance with pedigree 0.0532, pedigree (2,3,5,5,1)
  EcoSpold01Location=RER
- electricity, low voltage: 0.00036539, 6.65305e-5, 0.00150185, 0.00524711, 0.00107122, 0.0164467, 0.00266079, 0.00764041 kWh (8 entries); lognormal variance with pedigree 0.0532, pedigree (2,3,5,5,1)
  EcoSpold01Location=CH

## Inputs from nature
- Occupation, industrial area [natural resource, land]: 5e-5 m2*year; lognormal variance with pedigree 0.0846, pedigree (3,3,5,5,1)
- Transformation, to industrial area [natural resource, land]: 1e-6 m2; lognormal variance with pedigree 0.1646, pedigree (3,3,5,5,1)
- Transformation, from unspecified [natural resource, land]: 1e-6 m2; lognormal variance with pedigree 0.1646, pedigree (3,3,5,5,1)
- Occupation, construction site [natural resource, land]: 2e-6 m2*year; lognormal variance with pedigree 0.0846, pedigree (3,3,5,5,1)

## Emissions to nature
- Water [air, unspecified]: 5.04e-5 m3; name water_to_air_unspecified; lognormal variance with pedigree 0.0827, pedigree (2,2,5,5,1)
  Calculated value based on literature values and expert opinion. See comments in the parametres' comment field.
  property fraction, origin: unspecified 0; name fraction_origin_unspecified
  property fraction, origin: salt water 0; name fraction_origin_salt_water
  property fraction, origin: fresh water 1; name fraction_origin_fresh_water

## Sampling procedure
Data based on literature, trade statistics and information from feedstuff processing enterprises.

## Extrapolations
Production of imported raw material is approximated by raw material produced in Switzerland. This dataset has been copied from an original dataset covering the geography CH. The uncertainty has been adjusted accordingly.

## Review by Maggie Osses 2003-06-03
Passed.

## Review by Emilia Moreno Ruiz 2015-02-05
PV correction
