# electricity production, wind, 2.3MW turbine, precast concrete tower, onshore

Dataset: EcoSpold 2, unit process
Geography: CA-QC
Time period: 2010-01-01 to 2021-12-31
Technology level: modern
Classification: ISIC rev.4 ecoinvent: 3510:Electric power generation, transmission and distribution
Tags: wind power
Scenario: Business-as-Usual
System model: Allocation, cut-off by classification
Generated by: Christian Bauer
Database: ecoinvent
isCopyrightProtected: true
accessRestrictedTo: 1

## General comment
This dataset represents the production of high voltage electricity at onshore grid-connected wind power plants using a precast concrete tower with a capacity of 2.3 MW in Quebec in 2014. It includes operation and maintenance expenditures as well as infrastructure inputs. Wind load hours have been calculated using the total production of this category. Only the Quebec regional dataset is based on this technology.
[This dataset is meant to replace the following datasets:
- electricity production, wind, 2.3MW turbine, precast concrete tower, onshore, CA-QC, 2008 - 2008
- electricity production, wind, <1MW turbine, onshore, CA-QC, 2008 - 2008
- electricity production, wind, 1-3MW turbine, onshore, CA-QC, 2008 - 2008]

## Included activities start
From operation of the wind power plant to high voltage electricity at the plant. According to (European Communities 2001), electricity produced with wind turbines in a wind power plant is connected to medium voltage or high voltage systems, depending on the size of the windfarm. Normally, each wind turbine contains a transformer from low voltage to medium voltage. The network connection additionally transforms the electricity to high voltage electricity. It is assumed here, that there are no stand-alone grid-connected small wind turbines and that all electricity is connected to the network in form of high voltage electricity.

Source:
European Communities. 2001. Wind Turbine Grid Connection and Interaction. Deutsches Windenergie-Institut /Tech-wise A/S /DM Energy, p. 7 Tab.2.1

## Included activities end
This activity ends with the production of 1kWh of high voltage electricity produced at the power plant and delivered to the grid.

This dataset includes
- the operation and maintenance of the wind power plant
- change of lubricating oil every year

This dataset doesn't include
- raw materials extraction, decommissioning and waste treatment as these activities are already included in infrastructure datasets
- transformation of the electricity produced in order to deliver in to the grid as this is already included in the infrastructure datasets.

## Geography
Data collected for Quebec

## Technology
The Enercon E82-2.3 MW turbine is chosen as reference technology.
See dataset "wind turbine construction, 2.3MW, precast concrete tower, onshore" for detailed technical information.

## Time period
Operation data were collected for the 2008-2013 period, but it is assumed valid for all the operation lifetime.
Production volume valid for 2014

## Parameters
- gross electricity production: 2.261e9 kWh; name gross_electricity; = 6.65e9*34%; lognormal variance with pedigree 0.0012, pedigree (2,1,1,1,1)
  Measured/Calculated value. Total wind power in the region measured. Split between technologies based on installed power.
  Split (2013)
  >1MW=4%
  1-3MW=66%
  2.3MW=30%
- use of lubricating oil for maintenance: 181.125 kg; name lubricating_oil_maintenance; = 63*(2.3/0.8); lognormal variance with pedigree 0.1726, pedigree (4,4,5,5,5)
  Literature value. 500l of lubricating oil every three years
  Uncertainty: estimated variance. Extrapolation factor very rough.
- share of wind turbine 2 MW in 1-3 MW class: 0.08 dimensionless; name share_turbine_23MW; lognormal variance with pedigree 0.0006, pedigree (1,1,1,1,1)
  Estimated value. Based on market share of the main company manufacturing this kind of turbine.
- Percentage of onshore wind power plant class capacity on total: 0.69 dimensionless; name percentage_class_onshore; lognormal variance with pedigree 0.008, pedigree (1,1,1,1,1)
  Literature value/calculated value.
  Percentage of installed capacity with onshore wind turbines 1-3MW on total installed wind capacity installed worldwide.
  Worldwide, 98%of total installed capacity are onshore, 2% offshore.
  The three turbine classes hold about the following percentages on the onshore installed capacity: <1MW 21%, 1-3MW 69% and >3MW 9%.
  Source:
  - Data for all local datasets from
  The Wind Power. 2011. Wind turbines and windfarms database. www.thewindpower.net, Buc (FR)
- Installed capacity: 976.35 MW; name capacity_installed; lognormal variance with pedigree 0.0014, pedigree (2,1,2,1,1)
  Measured value for 2014.
- distance: 200 km; lognormal variance with pedigree 0.103, pedigree (4,5,5,5,4)
  Estimation. Maintenance transport to the power plant. One person travels two times per year over a distance of 200 km each time, one time for check only with a car, one time for change of the lubricating oil with a lorry.
  Uncertainty: estimated variance. High uncertainty.
- Wind load hours: 783.202 hour; name wind_load_hours; = ( gross_electricity*(1- losses_gross_net)* perc_power)/(capacity_installed*1000); lognormal variance with pedigree 0, pedigree (1,1,1,1,1)
  Calculated value. Based on total energy produced and installed capacity of this category
- percentage of wind power in this category: 0.34162 dimensionless; name perc_power; = capacity_installed/ totalCapacity; lognormal variance with pedigree 0, pedigree (1,1,1,1,1)
  Calculated value. Percentage of total installed capacity on this category
- total installed capacity: 2858 MW; name totalCapacity; lognormal variance with pedigree 0.0008, pedigree (1,1,2,1,1)
  Literature data. Total installed capacity inthe region in 2014
  Source:
  http://www.canwea.ca
- losses from gross electricity production: 0.01 dimensionless; name losses_gross_net; lognormal variance with pedigree 0.0452, pedigree (3,3,1,5,4)
  Estimation. The factor for the loss of electricity from gross to net electricity production is an assumption based on experiences, statistics and expertise (1% losses for wind).

## Reference product
- electricity, high voltage: 1 kWh; name amount_RP; By-product classification allocatable product; CPC 17100: Electrical energy
  production volume 2.23839e9 kWh; name APV_electricity; = gross_electricity* (1-losses_gross_net)
    Measured/Calculated value. Total wind power in the region measured. Split between technologies based on installed power.
    Split (2014)
    >1MW=4%
    1-3MW=62%
    2.3MW=34%
  property price 0.0977 EUR2005
    Temporary price data. Calculated as 90% of purchasers price based on: 94% of the average price (to account for a 6% loss in transformation and transmission) for electricity for industrial consumersin 2005 (excluded taxes). From IEA.

## Inputs from technosphere
All rows: lognormal variance with pedigree 0.002, pedigree (1,1,3,1,1)
- lubricating oil: 0.000100549 kg; name lubricating_oil; = lubricating_oil_maintenance* turbine_lifetime/(turbine_lifetime*( turbine_capacity_MW*1000)*wind_load_hours)
  Calculated value/Estimation. Estimated consumption of 157.5 kg lubrication oil per year, extrapolated from the 800 kW turbine in (Burger & Bauer 2004) with the rate of capacities are assumed for maintainance.
  Uncertainty: Calculated variable. Uncertainty will be determined from propagation of uncertainty factors of underlying variables. Uncertainty of actual relation between variables not accounted at this time, although this could be included in a future update.
  properties: wet mass 1 kg, dry mass 1 kg, carbon content, fossil 0.75, heating value, net 40.2 MJ
  note on carbon content, fossil: Lubricating oil is produced from diesel. C-content/dry mass of fats and oils considered 75%, from: ecoinvent v2.2 report, n 15a, pg 40
  note on heating value, net: Literature value, Source: IPCC 2006, 2006 IPCC Guidelines for National Greenhouse Gas Inventories, Prepared by the National Greenhouse Gas Inventories Programme, Eggleston H.S., Buendia L., Miwa K., Ngara T. and Tanabe K. (eds). Published: IGES, Japan
- transport, freight, lorry 7.5-16 metric ton, EURO3: 1.11636e-11 metric ton*km; = ((lubricating_oil/1000)/2)*(distance*2*turbine_lifetime/(turbine_lifetime*(turbine_capacity_MW*1000)*wind_load_hours))
  Calculated value. Two maintenance transports to the power plant with 200 km each. Once a year, the lubricating oil is transported and changed.
  Uncertainty: Calculated variable. Uncertainty will be determined from propagation of uncertainty factors of underlying variables. Uncertainty of actual relation between variables not accounted at this time, although this could be included in a future update.
- wind turbine, 2.3MW, onshore: 2.77568e-8 unit; name turbine; = 1/( turbine_lifetime*( turbine_capacity_MW*1000)*wind_load_hours)
  Calculated value;activityLink introduced to establish a direct link to the corresponding regional supply of this product
  Uncertainty: Calculated variable. Uncertainty will be determined from propagation of uncertainty factors of underlying variables. Uncertainty of actual relation between variables not accounted at this time, although this could be included in a future update.
  property lifetime 20 year; name turbine_lifetime
  property capacity [MW] 2.3 MW; name turbine_capacity_MW
  note on lifetime: Estimation/literature value. Today, wind turbine producers often use a lifetime of 20 years for all parts of the wind turbine in their financial calculataions, even if it can be assumed that the foundation could have a longer lifetime.
- wind turbine network connection, 2MW, onshore: 2.77568e-8 unit; = 1/( turbine_lifetime*( turbine_capacity_MW*1000)*wind_load_hours)
  (same comment as for wind turbine, 2.3MW, onshore)
  properties: lifetime 20 year
- waste mineral oil: -0.000100549 kg; name waste_min_oil; = (lubricating_oil)*-1
  Calculated value. The same amount as lubricating oil use.
  Uncertainty: Calculated variable. Uncertainty will be determined from propagation of uncertainty factors of underlying variables. Uncertainty of actual relation between variables not accounted at this time, although this could be included in a future update.
  production volume 225068 kg; = waste_min_oil* APV_electricity/amount_RP
    Calculated from production volume of reference product using the relative outputs.
    Due to reasons of the parent-child relationship, a safety amount of 400000kg waste mineral oil was added.
  property price 0 EUR2005; name waste_min_oil_price_EUR2005
  properties: wet mass 1 kg, dry mass 0.9 kg, water content 0.111111, carbon content, fossil 0.864444, heating value, net 34.7 MJ
  note on carbon content, fossil: Tab A.6, ecoinvent v2.2 report 13_I. C content has been calculated after data in the tables, and then referred to 1 kg DM
  note on heating value, net: Value taken from the general comment of the treatment dataset.

## Inputs from nature
- Energy, kinetic (in wind), converted [natural resource, in air]: 3.87 MJ

## Sampling procedure
Literature, calculations

## Extrapolations
This dataset has been extrapolated from year 2015 to the year of the calculation (2021). The uncertainty has been adjusted accordingly.

## Review by Carl Vadenbo 2015-05-23
The update of the whole electricity sector for the ecoinvent v3.2 database consist of hundreds of datasets. All these datasets have passed through a streamlined review processes where the underlying modelling of production volumes, technology shares and efficiencies was reviewed in detail prior to the datasets being submitted to the database.
