# transport, tram

Dataset: EcoSpold 2, unit process
Geography: CH
Time period: 2000-01-01 to 2021-12-31
Technology level: current
Classification: ISIC rev.4 ecoinvent: 4921:Urban and suburban passenger land transport
Classification: EcoSpold01Categories: transport systems/road
Scenario: Business-as-Usual
System model: Allocation, cut-off by classification
Generated by: Michael Spielmann (obsolete)
Published in: Spielmann M. 2004
Database: ecoinvent
isCopyrightProtected: true
accessRestrictedTo: 1

## General comment
Inventory refers to the entire transport life cycle. For the attribution of vehicle share to the transport performance a vehicle life time performance of 59'100’000 pkm/vehicle have been assumed. This dataset includes as well the energy use and combustion emission of a tram in Switzerland.

## Included activities start
The energy use and combustion emissions service starts with electricity consumption.

## Included activities end
operation of vehicle; production and maintenance of vehicles; construction of road. The energy use and combustion emissions service ends with the service of transporting 1 vehicle over 1 kilometre. The dataset includes electricity consumption, particulate emissions and until and including heavy metal emission (iron).

## Geography
The data for vehicle operation and infrastructure reflect Swiss conditions. Data for vehicle manufacturing and maintenance represents generic European data. Data for the vehicle disposal reflect Swiss situation. The data of the energy use and combustion emissions refers to average regional transport conditions in Switzerland.

## Technology
For vehicle operation all technologies are included in the average data. For the energy use and combustion emissions, tram transport abrasions tyre and brake emissions are taking into account

## Reference product
- transport, tram: 1 person*km; CPC 64112: Urban and suburban scheduled road transport services of passengers; By-product classification allocatable product
  EcoSpold01Location=CH
  production volume 0.0336675 person*km
    This is a placeholder value that does not reflect real-world production volumes. This dataset does not currently require a real-world production volume to work in the database framework, and no actual data were collected yet. This has no negative effect on the results of the ecoinvent database. The placeholder value of this activity was scaled according to the nominal GDP of 2005 (source: United Nations, http://data.un.org/Glossary.aspx?q=GDP+%28current+US%24%29, accessed 20130726) to reflect an appropriate share of the global production volume, which is also a placeholder value.
  property price 0.0151342 EUR2005
    Calculated based on inputs: The price of the product has been calculated as a sum of the values of the material and energy inputs for this product. This value is therefore a rough estimation. It may underestimate the real price since there are additional expenses when producing any product. These expences can include for example labour costs, treatment of waste materials and profit for the producer. Please consider carefully whether this level of data quality is acceptable for your application.

## Inputs from technosphere
- tram: 1.69e-8 unit; lognormal variance with pedigree 0.042025, pedigree (3,1,5,2,1)
  EcoSpold01Location=RER
  Uncertainty: own calculations
- electricity, medium voltage: 0.089775 kWh; source Bundesamt für Statistik (BfS) 2000; lognormal variance with pedigree 0.2106, pedigree (5,5,5,5,5)
  Literature value. The total electricity consumption of trolley buses and trams operating in Switzerland is available from the Swiss transport statistic Bundesamt für Statistik (BfS) (2000). Energy use and combustion emissions
- tram track: 0.00012 m*year; lognormal variance with pedigree 0.042, pedigree (3,1,5,1,1)
  activityLink introduced to establish a direct link to the corresponding regional supply of this product
  EcoSpold01Location=CH
  Uncertainty: own calculations
- maintenance, tram: 1.69e-8 unit; lognormal variance with pedigree 0.042025, pedigree (3,1,5,2,1)
  activityLink introduced to establish a direct link to the corresponding regional supply of this product
  Uncertainty: own calculations

## Emissions to nature
- Particulates, > 2.5 um, and < 10um [air, urban air close to ground]: 1.53657e-5 kg; lognormal variance with pedigree 0.16, pedigree (1,1,5,1,1)
  Estimated value. For Tram transport abrasions tyre and brake emissions are taking into account. Energy use and combustion emissions
- Iron [soil, industrial]: 1.27386e-5 kg; lognormal variance with pedigree 0.16, pedigree (1,1,5,1,1)
  (same comment as for Particulates, > 2.5 um, and < 10um)
  property dry mass 1 kg; name DM
  property carbon content, fossil 0; name C_content_fossil
  property wet mass 1 kg; name WM
  property water in wet mass 0 kg; name WWM
  property carbon content, non-fossil 0; name C_content_non_fossil
  property water content 0; name water_content
- Particulates, > 10 um [air, urban air close to ground]: 8.6184e-6 kg; lognormal variance with pedigree 0.16, pedigree (1,1,5,1,1)
  (same comment as for Particulates, > 2.5 um, and < 10um)

## Sampling procedure
National statistics, literature studies

## Extrapolations
This dataset has been extrapolated from year 2000 to the year of the calculation (2021). The uncertainty has been adjusted accordingly.

## Review by Niels Jungbluth 2004-04-02
Passed.

## Review by Carl Vadenbo 2012-06-29
In preparation for the release of ecoinvent v3.0, the datasets 'operation, tram CH' and 'transport, tram CH' in ecoinvent v2.2 were merged into the dataset 'transport, tram, CH, 2000-2000'. The amounts and the uncertainty information of the exchanges were reviewed and were found to correspond to the disaggregated datasets, and the new dataset was accepted for inclusion into the ecoinvent database on 2012.07.04.
