# treatment of hazardous waste, hazardous waste incineration

Dataset: EcoSpold 2, unit process
Geography: Europe without Switzerland
Time period: 1997-01-01 to 2021-12-31
Technology level: current
Classification: ISIC rev.4 ecoinvent: 3822:Treatment and disposal of hazardous waste
Tags: ConvertedDataset; Treatment
Scenario: Business-as-Usual
System model: Allocation, cut-off by classification
Generated by: [System]
Database: ecoinvent
isCopyrightProtected: true
accessRestrictedTo: 1

## General comment
Inventoried waste contains 100% hazardous waste avg.; . waste composition (wet, in ppm): lower heating value 17 MJ/kg; H2O 250000; O 40000; H 61000; C 416000; S 32000; N 7400; P 2200; B 7; Cl 104000; Br n.a.; F 3700; I n.a.; Ag n.a.; As n.a.; Ba n.a.; Cd 0.37; Co 74; Cr 123.95; Cu 267.47; Hg 0.74; Mn n.a.; Mo n.a.; Ni 126.81; Pb 296.64; Sb n.a.; Se n.a.; Sn n.a.; V n.a.; Zn 2378.3; Be n.a.; Sc n.a.; Sr n.a.; Ti n.a.; Tl n.a.; W n.a.; Si 80425; Fe n.a.; Ca n.a.; Al n.a.; K n.a.; Mg n.a.; Na n.a.; Share of carbon in waste that is biogenic 0%. Net energy produced in HWI: 17.11MJ/kg thermal energy and 1.27MJ/kg electric energy. Allocation of energy production: no substitution or expansion. 100% of burden allocated to waste disposal function of HWI. One kg of this waste produces 0.189 kg of residues, which are landfilled. Additional solidification with 0.07561 kg of cement.
[This dataset is meant to replace the following datasets:]

## Included activities end
waste-specific air and water emissions from incineration, auxiliary material consumption for flue gas cleaning. Short-term emissions to river water and long-term emissions to ground water from residual material landfill (from solidified fly ashes and scrubber slugde). Process energy demands for HWI.

## Geography
Specific to the technology encountered in Switzerland in 2000. Well applicable to modern incineration practices in Europe or North America or Japan.
This dataset has been extrapolated from the global dataset.

## Technology
Swiss HWI plant in 2000 with wet flue gas scrubber and low-dust SCR DeNOx facility. Gross thermal efficiency 74.4% and gross electric efficiency 10%.

## Time period
Transfer coefficients for modern Swiss MSWI. Emission speciation based on early 90ies data.

## Parameters
- fraction, process water, to air: 1 dimensionless; name fraction_PW_to_air; lognormal variance with pedigree 0.092025, pedigree (4,4,3,2,4)

## Reference product
- hazardous waste, for incineration: -1 kg; name RP; CPC 39: Wastes or scraps; By-product classification Waste
  production volume 1.288 kg; name PV_RP; = 4*0.322
    This is a placeholder value that does not reflect real-world production volumes. This dataset does not currently require a real-world production volume to work in the database framework, and no actual data were collected yet. This has no negative effect on the results of the ecoinvent database.
  property carbon content, fossil 0.554667
    Tab A.6, ecoinvent v2.2 report 13_I. C content has been calculated after data in the tables, and then referred to 1 kg DM
  property heating value, net 17 MJ
    Value taken from the general comment of the treatment dataset.
  property price 0 EUR2005; name RP_price_EUR2005
    Waste products are assigned a price of zero as they are assumed to require further treatment.
  property carbon content 0.554667
    carbon content on a dry matter basis (reserved; not for manual entry)
  properties: water in wet mass 0.25 kg, wet mass 1 kg, dry mass 0.75 kg, carbon content, non-fossil 0, water content 0.333333, carbon allocation 0.416 kg

## Inputs from technosphere
- chromium: 2.1627e-7 kg; lognormal variance with pedigree 1.312, pedigree (1,1,5,5,1)
  Proxy for vanadium pentoxide V2O5 in SCR catalyst. uncertainty calculated from uncertainty in average DeNOx input, uncertainty in the share of thermal NOx, uncertainty of nitrogen content in average municipal waste and the unertainty in nitrogen content in *this* waste.
  properties: wet mass 1 kg, dry mass 1 kg
- hazardous waste incineration facility: 1.25e-9 unit; lognormal variance with pedigree 0.042, pedigree (1,1,5,5,1)
  demands per kilogram waste. uncertainty is heeded in the module
- quicklime, milled, packed: 0.024577 kg; lognormal variance with pedigree 0.172, pedigree (1,1,5,5,1)
  uncertainty calculated from uncertainty in average auxiliary material input, and the unertainty of the waste composition of this waste
  properties: dry mass 0.99 kg, water content 0.010101, wet mass 1 kg
- hydrochloric acid, without water, in 30% solution state: 0.00044446 kg; lognormal variance with pedigree 0.142, pedigree (1,1,5,5,1)
  (same comment as for quicklime, milled, packed)
  properties: dry mass 1 kg, wet mass 1 kg, heating value, net 3.32 MJ
- residual material landfill: 3.9378e-10 unit; lognormal variance with pedigree 0.132, pedigree (1,1,5,5,1)
  uncertainty is calculated from uncertainties in waste composition and transfer coefficients in incinerator
- process-specific burdens, hazardous waste incineration plant: 1 kg; lognormal variance with pedigree 0.042, pedigree (1,1,5,5,1)
  demands per kilogram waste. uncertainty is heeded in the module
- heat, district or industrial, natural gas: 0.131733 MJ; lognormal variance with pedigree 1.032, pedigree (1,1,5,5,1)
  uncertainty calculated from uncertainty in average DeNOx input, uncertainty in the share of thermal NOx, uncertainty of nitrogen content in average municipal waste and the unertainty in nitrogen content in *this* waste.
  properties: heating value, net 1 MJ
- iron (III) chloride, without water, in 40% solution state: 0.0018935 kg; lognormal variance with pedigree 0.412, pedigree (1,1,5,5,1)
  (same comment as for quicklime, milled, packed)
  properties: dry mass 1 kg, wet mass 1 kg
- chemical, inorganic: 0.00074076 kg; lognormal variance with pedigree 0.142, pedigree (1,1,5,5,1)
  Proxy for Polyelectrolyte. uncertainty calculated from uncertainty in average auxiliary material input, and the unertainty of the waste composition of this waste
  properties: wet mass 1 kg, dry mass 1 kg, carbon content, fossil 0.003
  note on carbon content, fossil: This dataset is an unweighted average of 20 inorganic substances (listed in Tab 88.1, ecoinvent v2.2 report 8, part II), being part of the top100 chemicals included in this database. The C-content has also been calculated as an unweighted average of the C content of the substances composing this dataset.
- sodium hydroxide, without water, in 50% solution state: 0.20351 kg; lognormal variance with pedigree 0.142, pedigree (1,1,5,5,1)
  (same comment as for quicklime, milled, packed)
  properties: wet mass 1 kg, dry mass 1 kg, heating value, net 3.03 MJ
- titanium dioxide: 1.0597e-5 kg; lognormal variance with pedigree 1.312, pedigree (1,1,5,5,1)
  (same comment as for heat, district or industrial, natural gas)
  properties: dry mass 1 kg, wet mass 1 kg
- heat, central or small-scale, other than natural gas: 5.64 MJ; lognormal variance with pedigree 0.352, pedigree (1,1,5,5,1)
  Uncertainty dependent on total energy required and heating value present, using experimental GSd for substraction from uc=A*GSDa^2-B
  properties: heating value, net 1 MJ
- hydrogen peroxide, without water, in 50% solution state: 0.00014391 kg; lognormal variance with pedigree 0.312, pedigree (1,1,5,5,1)
  (same comment as for quicklime, milled, packed)
  properties: heating value, net 7.13 MJ, dry mass 1 kg, wet mass 1 kg
- calcium chloride: 0.0076287 kg; lognormal variance with pedigree 0.642, pedigree (1,1,5,5,1)
  (same comment as for quicklime, milled, packed)
  properties: dry mass 1 kg, wet mass 1 kg
- chemical, organic: 4.9718e-6 kg; lognormal variance with pedigree 1.212, pedigree (1,1,5,5,1)
  Proxy for TMT15. uncertainty calculated from uncertainty in average auxiliary material input, and the unertainty of the waste composition of this waste
  properties: dry mass 1 kg, wet mass 1 kg, heating value, net 19.03 MJ, carbon content, fossil 0.628
  note on carbon content, fossil: This dataset is an unweighted average of 20 organic substances (listed in Tab 88.1, ecoinvent v2.2 report 8, part II), being part of the top100 chemicals included in this database. The C-content has also been calculated as an unweighted average of the C content of the substances composing this dataset.
- cement, unspecified: 0.075605 kg; lognormal variance with pedigree 0.142, pedigree (1,1,5,5,1)
  Cement for solidification of landfilled residual material. Uncertainty calculated from unertainty of the waste composition of this waste, of transfer coefficients in the incinerator and of the solidification recipe.
  properties: wet mass 1 kg, dry mass 1 kg
- waste cement, hydrated: -0.18901 kg; name BP; lognormal variance with pedigree 0.142, pedigree (1,1,5,5,1)
  Hydrated cement for solidification of landfilled residual material. Uncertainty calculated from unertainty of the waste composition of this waste and transfer coefficients in the incinerator and of the solidification recipe.
  production volume 0.243445 kg; = PV_RP*BP/ABS(RP)
    Calculated from the production volume of hazardous waste, 25% water in proportion to the respective output amounts.
  property price 0 EUR2005; name BP_price_EUR2005
  properties: dry mass 1 kg, wet mass 1 kg
- process-specific burdens, residual material landfill: 0.18901 kg; lognormal variance with pedigree 0.132, pedigree (1,1,5,5,1)
  uncertainty is calculated from uncertainties in waste composition and transfer coefficients in incinerator;activityLink introduced to establish a direct link to the corresponding regional supply of this product
- ammonia, anhydrous, liquid: 0.00026987 kg; lognormal variance with pedigree 0.932, pedigree (1,1,5,5,1)
  (same comment as for heat, district or industrial, natural gas)
  properties: wet mass 1 kg, dry mass 1 kg

## Emissions to nature
- Cyanide [air, urban air close to ground]: 6.5867e-6 kg; lognormal variance with pedigree 1.06, pedigree (5,5,5,5,5)
  uncertainty calculated from uncertainty for proxy (from MSWI), uncertainty in average N-emissions, uncertainty in the share of thermal NOx, uncertainty of nitrogen content in average municipal waste and the unertainty in nitrogen content in *this* waste.
- Boron [water, surface water]: 1.0948e-6 kg; lognormal variance with pedigree 1.292, pedigree (1,1,5,5,1)
  uncertainty is calculated from uncertainties in waste composition and transfer coefficients in incinerator and landfills
- Sulfate [water, surface water]: 0.092274 kg; lognormal variance with pedigree 0.272, pedigree (1,1,5,5,1)
  (same comment as for Boron)
- Phosphorus [air, urban air close to ground]: 1.54e-6 kg; lognormal variance with pedigree 0.622, pedigree (1,1,5,5,1)
  (same comment as for residual material landfill)
- Chloride [water, ground-, long-term]: 0.00012623 kg; lognormal variance with pedigree 0.182, pedigree (1,1,5,5,1)
  Long-term emissions from landfilling of incineration residues. uncertainty is calculated from uncertainties in waste composition and transfer coefficients in incinerator and landfills.
- Sulfur dioxide [air, urban air close to ground]: 3.84e-5 kg; lognormal variance with pedigree 0.302, pedigree (1,1,5,5,1)
  (same comment as for residual material landfill)
- Silicon [water, surface water]: 0.00018045 kg; lognormal variance with pedigree 0.732, pedigree (1,1,5,5,1)
  (same comment as for Boron)
- Cobalt [air, urban air close to ground]: 5.18e-8 kg; lognormal variance with pedigree 1.062, pedigree (1,1,5,5,1)
  (same comment as for residual material landfill)
- Chloride [water, surface water]: 0.10384 kg; lognormal variance with pedigree 0.162, pedigree (1,1,5,5,1)
  (same comment as for Boron)
- Zinc, ion [water, surface water]: 3.1917e-5 kg; lognormal variance with pedigree 0.592, pedigree (1,1,5,5,1)
  (same comment as for Boron)
- Zinc [air, urban air close to ground]: 1.6648e-6 kg; lognormal variance with pedigree 0.612, pedigree (1,1,5,5,1)
  (same comment as for residual material landfill)
- Dinitrogen monoxide [air, urban air close to ground]: 2.6347e-5 kg; lognormal variance with pedigree 1.06, pedigree (5,5,5,5,5)
  (same comment as for Cyanide)
- Nickel, ion [water, ground-, long-term]: 3.6489e-5 kg; lognormal variance with pedigree 1.232, pedigree (1,1,5,5,1)
  (same comment as for Chloride)
- Phosphate [water, surface water]: 0.00010563 kg; lognormal variance with pedigree 0.582, pedigree (1,1,5,5,1)
  (same comment as for Boron)
- Copper, ion [water, ground-, long-term]: 9.8473e-6 kg; lognormal variance with pedigree 3.522, pedigree (1,1,5,5,1)
  (same comment as for Chloride)
- Silicon [water, ground-, long-term]: 0.080057 kg; lognormal variance with pedigree 0.182, pedigree (1,1,5,5,1)
  (same comment as for Chloride)
- BOD5, Biological Oxygen Demand [water, ground-, long-term]: 0.0067587 kg; lognormal variance with pedigree 0.122, pedigree (1,1,5,5,1)
  (same comment as for Chloride)
- Cadmium, ion [water, ground-, long-term]: 2.5106e-9 kg; lognormal variance with pedigree 7.972, pedigree (1,1,5,5,1)
  (same comment as for Chloride)
- Nickel, ion [water, surface water]: 2.5993e-5 kg; lognormal variance with pedigree 0.972, pedigree (1,1,5,5,1)
  (same comment as for Boron)
- Copper [air, urban air close to ground]: 1.8723e-7 kg; lognormal variance with pedigree 0.892, pedigree (1,1,5,5,1)
  (same comment as for residual material landfill)
- DOC, Dissolved Organic Carbon [water, ground-, long-term]: 0.0029569 kg; lognormal variance with pedigree 0.122, pedigree (1,1,5,5,1)
  (same comment as for Chloride)
- Chromium VI [water, ground-, long-term]: 2.3461e-5 kg; lognormal variance with pedigree 0.982, pedigree (1,1,5,5,1)
  (same comment as for Chloride)
- Chromium VI [water, surface water]: 7.8221e-6 kg; lognormal variance with pedigree 1.082, pedigree (1,1,5,5,1)
  (same comment as for Boron)
- Mercury [water, surface water]: 7.8024e-9 kg; lognormal variance with pedigree 1.642, pedigree (1,1,5,5,1)
  (same comment as for Boron)
- Cadmium [air, urban air close to ground]: 2.0375e-11 kg; lognormal variance with pedigree 1.782, pedigree (1,1,5,5,1)
  (same comment as for residual material landfill)
- Lead [water, ground-, long-term]: 1.5386e-6 kg; lognormal variance with pedigree 7.782, pedigree (1,1,5,5,1)
  (same comment as for Chloride)
- COD, Chemical Oxygen Demand [water, ground-, long-term]: 0.0067587 kg; lognormal variance with pedigree 0.122, pedigree (1,1,5,5,1)
  (same comment as for Chloride)
- DOC, Dissolved Organic Carbon [water, surface water]: 9.145e-6 kg; lognormal variance with pedigree 0.362, pedigree (1,1,5,5,1)
  (same comment as for Boron)
- Fluoride [water, ground-, long-term]: 5.9491e-6 kg; lognormal variance with pedigree 0.552, pedigree (1,1,5,5,1)
  (same comment as for Chloride)
- Zinc, ion [water, ground-, long-term]: 2.8737e-5 kg; lognormal variance with pedigree 5.432, pedigree (1,1,5,5,1)
  (same comment as for Chloride)
- Ammonia [air, urban air close to ground]: 7.3186e-6 kg; lognormal variance with pedigree 0.972, pedigree (1,1,5,5,1)
  uncertainty calculated from uncertainty in average N-emissions, uncertainty in the share of thermal NOx, uncertainty of nitrogen content in average municipal waste and the unertainty in nitrogen content in *this* waste.
- Nitrate [water, surface water]: 9.4655e-5 kg; lognormal variance with pedigree 0.332, pedigree (1,1,5,5,1)
  (same comment as for Boron)
- Mercury [air, urban air close to ground]: 2.5558e-14 kg; lognormal variance with pedigree 1.752, pedigree (1,1,5,5,1)
  (same comment as for residual material landfill)
- Nitrogen oxides [air, urban air close to ground]: 0.00019028 kg; lognormal variance with pedigree 0.972, pedigree (1,1,5,5,1)
  (same comment as for Ammonia)
- Fluoride [water, surface water]: 0.0036932 kg; lognormal variance with pedigree 0.532, pedigree (1,1,5,5,1)
  (same comment as for Boron)
- Water [air, unspecified]: 0.00025 m3; name water_to_air_unspecified; lognormal variance with pedigree 0.0827, pedigree (2,2,5,5,1)
  Calculated value based on water balance.
  property fraction, origin: unspecified 1; name fraction_origin_unspecified
  property wet mass 1000 kg; name WM
  property fraction, origin: salt water 0; name fraction_origin_salt_water
  property water in wet mass 1000 kg; name WWM
  property carbon content, non-fossil 0; name C_content_non_fossil
  property dry mass 0 kg; name DM
  property carbon content, fossil 0; name C_content_fossil
  property fraction, origin: fresh water 0; name fraction_origin_fresh_water
- TOC, Total Organic Carbon [water, surface water]: 9.145e-6 kg; lognormal variance with pedigree 0.362, pedigree (1,1,5,5,1)
  (same comment as for Boron)
- Lead [water, surface water]: 8.0741e-9 kg; lognormal variance with pedigree 1.112, pedigree (1,1,5,5,1)
  (same comment as for Boron)
- Carbon monoxide, fossil [air, urban air close to ground]: 1.2076e-5 kg; lognormal variance with pedigree 0.712, pedigree (1,4,5,5,3)
  1 plant for waste solvent incineration in Switzerland
- TOC, Total Organic Carbon [water, ground-, long-term]: 0.0029569 kg; lognormal variance with pedigree 0.122, pedigree (1,1,5,5,1)
  (same comment as for Chloride)
- Sulfate [water, ground-, long-term]: 0.003668 kg; lognormal variance with pedigree 0.282, pedigree (1,1,5,5,1)
  (same comment as for Chloride)
- Silicon [air, urban air close to ground]: 0.00018723 kg; lognormal variance with pedigree 0.202, pedigree (1,1,5,5,1)
  (same comment as for residual material landfill)
- Cobalt [water, surface water]: 7.3948e-5 kg; lognormal variance with pedigree 1.042, pedigree (1,1,5,5,1)
  (same comment as for Boron)
- Lead [air, urban air close to ground]: 1.1011e-8 kg; lognormal variance with pedigree 0.902, pedigree (1,1,5,5,1)
  (same comment as for residual material landfill)
- Chromium [air, urban air close to ground]: 9.1648e-12 kg; lognormal variance with pedigree 1.072, pedigree (1,1,5,5,1)
  (same comment as for residual material landfill)
- Hydrogen chloride [air, urban air close to ground]: 3.208e-5 kg; lognormal variance with pedigree 0.182, pedigree (1,1,5,5,1)
  (same comment as for residual material landfill)
- Boron [air, urban air close to ground]: 8.4e-7 kg; lognormal variance with pedigree 1.362, pedigree (1,1,5,5,1)
  (same comment as for residual material landfill)
- Nickel [air, urban air close to ground]: 8.8766e-8 kg; lognormal variance with pedigree 0.992, pedigree (1,1,5,5,1)
  (same comment as for residual material landfill)
- BOD5, Biological Oxygen Demand [water, surface water]: 2.0903e-5 kg; lognormal variance with pedigree 0.362, pedigree (1,1,5,5,1)
  (same comment as for Boron)
- Carbon dioxide, fossil [air, urban air close to ground]: 1.5085 kg; lognormal variance with pedigree 0.062, pedigree (1,1,5,5,1)
  calculated from uncertainty in carbon in waste and transfer coefficients
- Hydrogen fluoride [air, urban air close to ground]: 9.3098e-7 kg; lognormal variance with pedigree 0.562, pedigree (1,1,5,5,1)
  (same comment as for residual material landfill)
- Mercury [water, ground-, long-term]: 3.4564e-8 kg; lognormal variance with pedigree 3.982, pedigree (1,1,5,5,1)
  (same comment as for Chloride)
- Phosphate [water, ground-, long-term]: 0.0014829 kg; lognormal variance with pedigree 1.162, pedigree (1,1,5,5,1)
  (same comment as for Chloride)
- Copper, ion [water, surface water]: 1.1491e-5 kg; lognormal variance with pedigree 0.872, pedigree (1,1,5,5,1)
  (same comment as for Boron)
- Nitrate [water, ground-, long-term]: 0.00026583 kg; lognormal variance with pedigree 0.462, pedigree (1,1,5,5,1)
  (same comment as for Chloride)
- COD, Chemical Oxygen Demand [water, surface water]: 2.0903e-5 kg; lognormal variance with pedigree 0.362, pedigree (1,1,5,5,1)
  (same comment as for Boron)
- Cadmium, ion [water, surface water]: 1.6719e-10 kg; lognormal variance with pedigree 1.692, pedigree (1,1,5,5,1)
  (same comment as for Boron)
- Boron [water, ground-, long-term]: 5.0197e-6 kg; lognormal variance with pedigree 1.362, pedigree (1,1,5,5,1)
  (same comment as for Chloride)

## Sampling procedure
The 2 Swiss HWI plants, used as the inventory reference technology mix, have a total annual capacity of 53'000 tons of hazardous waste. This corresponds to 39% of the Swiss total installed capacity in 2000. Swiss average plants size is 20'000 t/a.

## Extrapolations
This dataset has been extrapolated from year 2000 to the year of the calculation (2021). The uncertainty has been adjusted accordingly.
