# limestone quarry operation

Dataset: EcoSpold 2, unit process
Geography: CH
Time period: 1992-01-01 to 2021-12-31
Technology level: current
Classification: EcoSpold01Categories: construction materials/additives
Classification: ISIC rev.4 ecoinvent: 0810:Quarrying of stone, sand and clay
Tags: ConvertedDataset
Scenario: Business-as-Usual
System model: Allocation, cut-off by classification
Generated by: Daniel Kellenberger (obsolete)
Published in: Kellenberger D. 2007
Database: ecoinvent
isCopyrightProtected: true
accessRestrictedTo: 1

## General comment
This dataset represents the quarry operation of 1 kg of limestone. The dataset includes the land-use for recultivation but not for mining. The size partition of dust emissions were adapted from bauxite mining. Data was normalized using a capacity of about 380'000 tons of product per year.
[This dataset was already contained in the ecoinvent database version 2. It was not individually updated during the transfer to ecoinvent version 3. Life Cycle Impact Assessment results may still have changed, as they are affected by changes in the supply chain, i.e. in other datasets. This dataset was generated following the ecoinvent quality guidelines for version 2. It may have been subject to central changes described in the ecoinvent version 3 change report (http://www.ecoinvent.org/database/ecoinvent-version-3/reports-of-changes/), and the results of the central updates were reviewed extensively. The changes added e.g. consistent water flows and other information throughout the database. The documentation of this dataset can be found in the ecoinvent reports of version 2, which are still available via the ecoinvent website. The change report linked above covers all central changes that were made during the conversion process.]

## Included activities start
From limestone at ground, unexcavated.

## Included activities end
The activity ends with the limestone quarried. The dataset includes blasting, transports within the mine (for mining and recultivation), heating energy for administration buildings and the infrastructure, and the land-use of the mine. The dataset doesn't include the land-use of the paved roads and buildings within the mine, which are included in the module 'limestone quarry construction' dataset. Output of overburden material neglected as it is only about 0.26% of mined limestone.

## Geography
Data was obtained from Swiss companies.

## Technology
Data corresponds to the high level technology.

## Parameters
- fraction, process water, to air: 1 dimensionless; name fraction_PW_to_air; lognormal variance with pedigree 0.092025, pedigree (4,4,3,2,4)
  Literature value (Statistics Canada, 2007 & Shaffer, K.H., 2008, Consumptive water use in the Great Lakes Basin, USGS) (Vionnet, S., Quantis Water Database - Technical Report, 2012).

## Reference product
- limestone, unprocessed: 1 kg; source Oates T. 1997; By-product classification allocatable product; CPC 15200: Gypsum; anhydrite; limestone flux; limestone and other calcareous stone, of a kind used for the manufacture of[…]; CAS 1317-65-3
  Limestone is a naturally occurring mineral that consists principally of calcium carbonate but may also contain magnesium carbonate as a secondary component. It is found in many forms and is classified in terms of its origin, chemical composition, structure, and geological formation. Limestone occurs widely throughout the world and is an essential raw material for many industries.
  Limestone is generally used for construction, cement, quicklime, agriculture, metal refining and flue gas desulphurisation:
  Construction: Limestone is the most widely used crushed rock, although it is generally sold in form of sand and gravel.
  Cement: The production of cement is the main use for chalk, and a major use for dense, high-calcium limestone. Approximately 1.1 t of limestone is required for 1 t of cement.
  Quicklime: Approximately 1.8 t of limestone is required per 1.0 t of quicklime.
  Agriculture: Many crops grow best under neutral to slightly acid conditions (i.e., pH between 6 and 7). Thus soils which are more acidic than pH 6 generally benefit from the application of limestone.
  Metal refining: When limestone is used in metal refining it is initially converted to quicklime, which reacts with acidic oxides (e.g., SiO2, Al2O, and Fe2O3) to produce molten slag.
  Flue gas desulphurisation: A growing use of limestone is in the treatment of flue gas from combustion processes to remove sulphur dioxide.
  Limestone is a naturally occurring mineral that consists principally of calcium carbonate but may also contain magnesium carbonate as a secondary component. It is found in many forms and is classified in terms of its origin, chemical composition, structure, and geological formation. Limestone occurs widely throughout the world and is an essential raw material for many industries.
  Limestone is generally used for construction, cement, quicklime, agriculture, metal refining and flue gas desulphurisation:
  Construction: Limestone is the most widely used crushed rock, although it is generally sold in form of sand and gravel.
  Cement: The production of cement is the main use for chalk, and a major use for dense, high-calcium limestone. Approximately 1.1 t of limestone is required for 1 t of cement.
  Quicklime: Approximately 1.8 t of limestone is required per 1.0 t of quicklime.
  Agriculture: Many crops grow best under neutral to slightly acid conditions (i.e., pH between 6 and 7). Thus soils which are more acidic than pH 6 generally benefit from the application of limestone.
  Metal refining: When limestone is used in metal refining it is initially converted to quicklime, which reacts with acidic oxides (e.g., SiO2, Al2O, and Fe2O3) to produce molten slag.
  Flue gas desulphurisation: A growing use of limestone is in the treatment of flue gas from combustion processes to remove sulphur dioxide.
  production volume 3.03121e9 kg; = 3.6013E+11*0.008417
    Estimated. The european production volume is extrapolated from the global production volume using the nominal GDP of 2005 (source: United Nations, http://data.un.org/Glossary.aspx?q=GDP+%28current+US%24%29, accessed 20130726 and 20130312).
    Gross domestic product (GDP) at current prices is GDP at prices of the current reporting period. Also known as nominal GDP.
  property price 0.014 EUR2005
    Calculated value based on data from United Nations Commodity Trade Statistics Database (comtrade.un.org). UN comtrade category: 252100 Limestone materials for manufacture of lime or cement. Year 2005. Using exchange rate of 1EURO = 1.209 USD. Average of price of import into 5 main markets (EU, US, JP, IN and CN).
  property carbon content, fossil 0.117257
    Table 3.1, ecoinvent v2.2 report 7, part VII, pg 3. MW CaCO3=100, MW MgCO3=84. C content of limestone is 0.117257 kg/kg DM
  property carbon content 0.117257
    carbon content on a dry matter basis (reserved; not for manual entry)
  properties: carbon content, non-fossil 0, dry mass 0.998 kg, wet mass 1 kg, water in wet mass 0.002 kg, water content 0.00200401, heating value, net 0 MJ, carbon allocation 0.117023 kg

## Inputs from technosphere
- blasting: 7.73e-5 kg; lognormal variance with pedigree 0.0401, pedigree (1,2,5,1,1)
  Estimation, based on company data. The amount of explosives for blasting used in 2001 is assumed. About half of the used explosives is „Tovex' which is used at the foot of the drilled hole; the upper half is filled with „Amolit'. In general, the types of explosive used in mining can change quickly. However, Tovex explosives are assumed to be used for the total amount.
- diesel, burned in building machine: 0.018 MJ; lognormal variance with pedigree 0.1601, pedigree (1,2,5,1,1)
  Estimation, based on company data.
  Estimation, based on company data.
  properties: heating value, net 1 MJ
- recultivation, limestone mine: 6.52e-6 m2; source Berger A. and Durner R.  1992; lognormal variance with pedigree 0.1607, pedigree (2,2,5,1,1)
  Estimation, based on literature value. It is assumed that there are five mining stages and the mining duration for each stage lasts about 10 years. After that period of time the next stage is tackled and the last is recultivated.
  This exchange has an activity link directly to the producing activity because the product is primarily consumed in the same geographical area where it is produced.
- heat, central or small-scale, other than natural gas: 0.00055836 MJ; lognormal variance with pedigree 0.0401, pedigree (1,2,5,1,1)
  Estimation, based on company data. The total amount of fuel used for heating administration buildings is considered.
  properties: heating value, net 1 MJ
- limestone quarry infrastructure: 5.25e-11 unit; lognormal variance with pedigree 0.3401, pedigree (1,2,5,1,1)
  Estimation, based on company data. The input includes the infrastructure needed at mine (buildings, road,...) but not the building machines. A service life of 50 years and a total amount of produced products of 19.051.400.000 kg are assumed.
  This exchange has an activity link directly to the producing activity because the product is primarily consumed in the same geographical area where it is produced.

## Inputs from nature
- Occupation, mineral extraction site [natural resource, land]: 8.48e-5 m2*year; source Berger A. and Durner R.  1992; lognormal variance with pedigree 0.0801, pedigree (1,2,5,1,1)
  Estimation, based on literature value. According to the company data reported, it was planned to mine 10'280'000 m3 over 65 years, representing a yearly average amount of mined material about 160'000 m3/a (with a density of 2'300 kg/m3 the amount is 368'000'000 kg/a). Therefore, the total area to be mined over 65 years is 156‘000 m2 or 2'400 m2 per year. The total amount of material excavated per m2 for the year 2001 is therefore about 160’000 kg. For the occupation calculations, it is assumed that after 13 years te used land is recultivated.
- Transformation, to mineral extraction site [natural resource, land]: 6.52e-6 m2; source Berger A. and Durner R.  1992; lognormal variance with pedigree 0.1607, pedigree (2,2,5,1,1)
  Estimation, based on literature value. According to the company data reported, it was planned to mine 10'280'000 m3 over 65 years, representing a yearly average amount of mined material about 160'000 m3/a (with a density of 2'300 kg/m3 the amount is 368'000'000 kg/a). Therefore, the total area to be mined over 65 years is 156‘000 m2 or 2'400 m2 per year. The total amount of material excavated per m2 for the year 2001 is therefore about 160’000 kg.
- Calcite, in ground [natural resource, in ground]: 1 kg; lognormal variance with pedigree 0.0706, pedigree (3,3,5,1,3)
  Estimation, based on company data. The data considers the total amount of mined limestone for the year 2001. The losses due to dust emissions were neglected.
- Water, unspecified natural origin [natural resource, in water]: 2.14425e-5 m3; name water_UNO_input; source Marceau 2006; lognormal variance with pedigree 0.052625, pedigree (3,3,5,2,1)
  Calculated based on literature, (Vionnet, S., Quantis Water Database - Technical Report, 2012). The water used for dust suppression is listed as process water. The evaporation rate is assumed to be 90%. It includes the process of water used for dust suppression in the mine; both off road and on road. The process boundaries are set by the boundaries of limestone mine. The process ends when the raw limestone leaves the mine for further processing. It is assumed that the evaporation rate of process water is 90%. Higher the temperatures are - more dust occurs, more water for suppression is needed, higher the evaporation rate is.
  property carbon content, non-fossil 0; name C_content_non_fossil
  property carbon content, fossil 0.0104329; name C_content_fossil
  property water content 9081.65; name water_content
  property wet mass 1000 kg; name WM
  property dry mass 0.1101 kg; name DM
  property water in wet mass 999.89 kg; name WWM
- Transformation, from forest, unspecified [natural resource, land]: 6.52e-6 m2; source Berger A. and Durner R.  1992; lognormal variance with pedigree 0.1607, pedigree (2,2,5,1,1)
  (same comment as for Transformation, to mineral extraction site)

## Emissions to nature
- Particulates, > 2.5 um, and < 10um [air, non-urban air or from high stacks]: 4e-5 kg; source BUWAL 2001; lognormal variance with pedigree 0.2481, pedigree (1,5,5,3,4)
  Estimation, based on literature value. The total dust production for limestone mining is 0.16g/kg. The distribution of particle sizes is taken from the process „bauxite mining' (50% of the total dust are > 10microm, 5% < 2.5microm and 45% between 2.5microm and 10microm) as no specific information is available.
- Water [air, unspecified]: 2.14425e-5 m3; name water_to_air_unspecified; = (water_UNO_input*fraction_PW_to_air); lognormal variance with pedigree 0.0807, pedigree (2,2,5,1,1)
  Calculated value based on literature values and expert opinion. See comments in the parametres' comment field.
  property fraction, origin: fresh water 0; name fraction_origin_fresh_water
  property fraction, origin: unspecified 1; name fraction_origin_unspecified
  property fraction, origin: salt water 0; name fraction_origin_salt_water
- Particulates, > 10 um [air, non-urban air or from high stacks]: 0.000112 kg; source BUWAL 2001; lognormal variance with pedigree 0.1681, pedigree (1,5,5,3,4)
  (same comment as for Particulates, > 2.5 um, and < 10um)
- Particulates, < 2.5 um [air, non-urban air or from high stacks]: 8e-6 kg; source BUWAL 2001; lognormal variance with pedigree 0.4281, pedigree (1,5,5,3,4)
  (same comment as for Particulates, > 2.5 um, and < 10um)

## Sampling procedure
Data is based on a Swiss company (KFN), with a yearly production of 381‘028 t (2001).

## Extrapolations
This dataset has been extrapolated from year 2002 to the year of the calculation (2021). The uncertainty has been adjusted accordingly.

## Review by Roland Hischier 2011-12-01
Transfer of documentation done.

## Review by Roberto Dones 2005-07-19
passed
