# sugarcane processing, traditional annexed plant

Dataset: EcoSpold 2, unit process
Geography: BR
Time period: 2012-01-01 to 2021-12-31
Technology level: current
Classification: ISIC rev.4 ecoinvent: 1072:Manufacture of sugar
Synonyms: sugarcane biorefinery
Scenario: Business-as-Usual
System model: Allocation, cut-off by classification
Share of production covered: 100 %
Generated by: Mateus Chagas
Published in: Mateus F. Chagas 2015
Database: ecoinvent
isCopyrightProtected: true
accessRestrictedTo: 1

## General comment
This dataset represents a typical Brazilian sugarcane mill processing of 2 million metric tonnes of sugarcane stalks per year for the production of raw sugar, ethanol (anhydrous and hydrated) and surplus bagasse. The plant operates 200 days per season.
The industrial process diverts 50% of sugarcane juice for row sugar production and the other 50%, along with molasses (a by-product of sugar crystallization process), is diverted to ethanol production process. It considers high-pressure boilers (22 bar, 300°C), mechanical drives in the crushing mills and azeotropic distillation for anhydrous ethanol production.
Overall process efficiencies assumed were 96% for sugars extraction, 90% for ethanol fermentation and 76.5% for sugar recovery as raw sugar. Each 1000 kg of cane stalks yields 51.3 kg of raw sugar, 32.3 L of hydrated ethanol (93% w/w), 23.0 L of anhydrous ethanol (99.6% w/w); 6.0 kWh of surplus electricity; and 81.8 kg of surplus bagasse (50% moisture).

## Included activities start
This activity starts when sugarcane arrives at the industrial area.

## Included activities end
The dataset includes the sugarcane conversion into raw sugar, ethanol and surplus bagasse. Processing equipment, chemical inputs, industrial area, water use treatment, and emissions to air are included in the inventory. Sugarcane processed arrives with 5% of vegetal impurities (sugarcane straw) and 1% of mineral impurities (dirt). The dataset doesn't include the surplus electricity production in traditional mills. No additional sugarcane straw recovery and industrial use is considered.
The activity ends when products are available at factory gate.

## Geography
The inventory is modeled for Brazil.

## Technology
This dataset represents an typical medium-scale annexed sugarcane mill facilitiy existing in Brazil.

## Time period
Time period where the technology is being implemented and used in Brazil.

## Reference product
- bagasse, from sugarcane: 1 kg; name BP2; source Mateus F. Chagas 2015; By-product classification allocatable product; CPC 39141: Bagasse
  Surplus bagasse generated in traditional annexed plants in Brazil.
  production volume 1.62967e10 kg; = PV_RP*BP2/RP
    Bagasse produced in traditional annexed plants.
  property price 0.01 EUR2005; name BP2_price_EUR2005
    Temporary price data. Calculated as 90% of purchasers price based on: Source: ecoinvent report 17, page 380
  property carbon content 0.443
    carbon content on a dry matter basis (reserved; not for manual entry)
  property true value 0.818; name BP2_true_value
    allocation property applied in "true value" allocation // value calculated from revenue
  properties: carbon content, fossil 0, heating value, net 15.4 MJ, wet mass 1 kg, water content 0.270648, dry mass 0.787 kg, carbon content, non-fossil 0.443, water in wet mass 0.213 kg, carbon allocation 0.348641 kg
- sugar, from sugarcane: 0 kg; name RP; source Mateus F. Chagas 2015; By-product classification allocatable product; CPC 23511: Cane sugar
  Sugar produced in traditional annexed plants in Brazil.
  production volume 1.02203e10 kg; name PV_RP
    Sugar produced in traditional annexed plants, based on total Brazilian production.
    It was considered the percentege of sugarcane crushed in annexed mills related to total sugarcane crushed in annexed and autonomous plants(73.8%), based on CONAB (2017) data.
    The participation of traditional plants in the Brazilian sugarcane sector was estimated based on surplus electricity commercialization.Traditional plants were classified considering the plants without electricity commercialization or comercializing less than the national average (27.5 kWh per metric tonne of sugarcane in 2014). No surplus electricity was considered in this case.
  property price 0.436 EUR2005; name RP_price_EUR2005
    Calculated value based on data from United Nations Commodity Trade Statistics Database (comtrade.un.org). UN comtrade category: 170199 Refined sugar, in solid form, nes, pure sucrose. Year 2005. Using exchange rate of 1EURO = 1.209 USD. Average of price of import into 5 main markets (EU, US, JP, IN and CN). The price of raw sugar, from sugarcane calcualted using the values from the comtrade database is 0.319 EUR/kg, but there are not many values available so the resulting number has very high uncertainty.
  property carbon content 0.44
    carbon content on a dry matter basis (reserved; not for manual entry)
  property true value 22.3668; name RP_true_value
    allocation property applied in "true value" allocation // value calculated from revenue
  properties: wet mass 1 kg, water in wet mass 0 kg, water content 0, dry mass 1 kg, carbon content, non-fossil 0.44, carbon content, fossil 0, carbon allocation 0.44 kg

## By-products
All rows: source Mateus F. Chagas 2015
- ash, from combustion of bagasse from sugarcane: 0 kg; CPC 86119: Other support services to crop production; By-product classification Recyclable; pedigree (1,1,1,1,1)
  Ash production. Based on computer simulation of the process validated using literature and industry data.
  production volume 0 kg; = PV_RP*BP4/RP
    Ash produced in traditional annexed plants.
  property price 0 EUR2005; name BP4_price_EUR2005
    Assumed without economic value
  property carbon content 0
    carbon content on a dry matter basis (reserved; not for manual entry)
  properties: carbon content, non-fossil 0, carbon content, fossil 0, wet mass 1 kg, water in wet mass 0 kg, water content 0, dry mass 1 kg, carbon allocation 0 kg
- ethanol, without water, in 99.7% solution state, from fermentation: 0 kg; name BP3; CPC 35491: Biodiesel; By-product classification allocatable product; CAS 64-17-5
  Anhydrous ethanol produced in traditional annexed plants in Brazil.
  production volume 3.58608e9 kg; = PV_RP*BP3/RP
    Anhydrous ethanol produced in traditional annexed plants, based on total Brazilian production.
    It was considered the percentege of sugarcane crushed in annexed mills related to total sugarcane crushed in annexed and autonomous plants(73.8%), based on CONAB (2017) data.
    The participation of traditional plants in the Brazilian sugarcane sector was estimated based on surplus electricity commercialization.Traditional plants were classified considering the plants without electricity commercialization or comercializing less than the national average (27.5 kWh per metric tonne of sugarcane in 2014). No surplus electricity was considered in this case.
  property heating value, net 31.58 MJ
    LHV is calculated based on the elemental composition of the substance. Based on the CAS number of the substance (000064-17-5), the chemical formula of the substance is found to be: C2H6O, (PubChem 2020).
    Reference: Kim, S., Chen, J., Cheng, T., Gindulyte, A., He, J., He, S., Li, Q., Shoemaker, B. A., Thiessen, P. A., Yu, B., Zaslavsky, L., Zhang, J., & Bolton, E. E. (2019). PubChem 2019 update: improved access to chemical data. Nucleic acids research, 47(D1), D1102–D1109. https://doi.org/10.1093/nar/gky1033
  property price 0.436 EUR2005; name BP3_price_EUR2005
    Calculated using world prices in FAPRI2007, 2009. Agricultural outlook. The prices in 2003 and 2004 were assumed to be the same as the most recent year (2005). (http://www.fapri.missouri.edu/outreach/publications/ag_outlook.asp?current_page=outreach; accessed 22/06/10). Unit conversion from US gallon to kg - 1 gallon = 3.7856 liter * 0.789 kg/liter (ethanol density) = 2.9868 kg (from http://www.peteducation.com/category.cfm?c=0+1305 and http://en.wikipedia.org/wiki/Ethanol accessed 25/6/10).
  property carbon content 0.521739
    carbon content on a dry matter basis (reserved; not for manual entry)
  property true value 7.848; name BP3_true_value
    allocation property applied in "true value" allocation // value calculated from revenue
  properties: carbon content, fossil 0, dry mass 1 kg, carbon content, non-fossil 0.521739, water content 0, wet mass 1 kg, water in wet mass 0 kg, carbon allocation 0.521739 kg
- filter cake, from sugarcane juice filtration: 0 kg; By-product classification Recyclable; CPC 39149: Beet-pulp and other waste of sugar manufacture; pedigree (1,1,1,1,1)
  Filter cake production. Based on computer simulation of the process validated using literature and industry data. Value in wet basis (moisture content 65%).
  production volume 0 kg; = PV_RP*BP6/RP
    Filter cake produced in traditional annexed plants.
  property price 0.03 EUR2005; name BP6_price_EUR2005
    Estimated based on the prioce of "compost", comment: Temporary price data. Calculated as 90% of purchasers price based on: Estimation done using the following sources: <http://www.wmaa.asn.au/uploads/documents/MarkWinser_1May2007.pdf>; <http://www.swlf.ait.ac.th/UpdData/International/Composting%20and%20anaerobic%20digestion_%20comparions%20for%20Europe%20and%20Asia.pdf>; <http://www.epa.gov/osw/conserve/rrr/composting/basic.htm>, accessed 2011.06.16. This choice is made as both products end up in the same generic market and have similar characteristics.
  property carbon content 0.6514
    carbon content on a dry matter basis (reserved; not for manual entry)
  properties: water content 1.85714, water in wet mass 0.65 kg, dry mass 0.35 kg, wet mass 1 kg, carbon content, non-fossil 0.6514, carbon content, fossil 0, carbon allocation 0.22799 kg
- ethanol, without water, in 95% solution state, from fermentation: 0 kg; name BP1; CPC 35491: Biodiesel; By-product classification allocatable product; CAS 64-17-5
  Hydrated ethanol produced in traditional annexed plants in Brazil.
  production volume 4.78143e9 kg; = PV_RP*BP1/RP
    Hydrated ethanol produced in traditional annexed plants, based on total Brazilian production.
    It was considered the percentege of sugarcane crushed in annexed mills related to total sugarcane crushed in annexed and autonomous plants(73.8%), based on CONAB (2017) data.
    The participation of traditional plants in the Brazilian sugarcane sector was estimated based on surplus electricity commercialization.Traditional plants were classified considering the plants without electricity commercialization or comercializing less than the national average (27.5 kWh per metric tonne of sugarcane in 2014). No surplus electricity was considered in this case.
  property heating value, net 31.58 MJ
    (same comment as for ethanol, without water, in 99.7% solution state, from fermentation)
  property price 0.324 EUR2005; name BP1_price_EUR2005
    Temporary price data. Calculated as 90% of purchasers price based on: 2005 prices from FAPRI2007, 2009. Agricultural outlook. (http://www.fapri.missouri.edu/outreach/publications/ag_outlook.asp?current_page=outreach; accessed 22/06/10). Unit conversion from US gallon to kg - 1 gallon = 3.7856 liter * 0.789 kg/liter (ethanol density) = 2.9868 kg
  property carbon content 0.521739
    carbon content on a dry matter basis (reserved; not for manual entry)
  property true value 7.776; name BP1_true_value
    allocation property applied in "true value" allocation // value calculated from revenue
  properties: carbon content, fossil 0, water in wet mass 0 kg, carbon content, non-fossil 0.521739, wet mass 1 kg, water content 0, dry mass 1 kg, carbon allocation 0.521739 kg
- vinasse, from fermentation of sugarcane: 0 kg; CPC 39149: Beet-pulp and other waste of sugar manufacture; By-product classification Recyclable; pedigree (1,1,1,1,1)
  Vinasse production (not including flegmasse). Based on computer simulation of the process validated using literature and industry data.
  production volume 0 kg; = PV_RP*BP5/RP
    Vinasse produced in traditional annexed plants.
  property price 0.027 EUR2005; name BP5_price_EUR2005
    Temporary price data. Calculated as 90% of purchasers price based on: Calculated relative to the price of sugar beet pulp based on the difference in dry matter content 5.54%/25%
  property carbon content 0.1288
    carbon content on a dry matter basis (reserved; not for manual entry)
  properties: dry mass 0.0554348 kg, water in wet mass 0.944565 kg, carbon content, fossil 0, carbon content, non-fossil 0.1288, water content 17.0392, wet mass 1 kg, carbon allocation 0.00714 kg

## Inputs from technosphere
All rows: source Mateus F. Chagas 2015
- dimethylamine: 1.34506e-7 kg; lognormal variance with pedigree 0.0033, pedigree (2,2,3,1,1)
  Chemicals used for the water treatment in a typical Brazilian sugarcane processing plant (LDC Bioenergia, 2010). Treatment of captured water and recycled water in closed circuits (parameterized by water catchment) were considered.
  properties: carbon content, fossil 0.533333, dry mass 1 kg, wet mass 1 kg, heating value, net 13.47 MJ
- lubricating oil: 3.34976e-6 kg; lognormal variance with pedigree 0.0033, pedigree (2,2,3,1,1)
  Lubrication oil for reception, preparation and milling equipments. Based on computer simulation of the process validated using literature and industry data.
  properties: wet mass 1 kg, carbon content, fossil 0.75, dry mass 1 kg, heating value, net 40.2 MJ
  note on carbon content, fossil: Lubricating oil is produced from diesel. C-content/dry mass of fats and oils considered 75%, from: ecoinvent v2.2 report, n 15a, pg 40
  note on heating value, net: Literature value, Source: IPCC 2006, 2006 IPCC Guidelines for National Greenhouse Gas Inventories, Prepared by the National Greenhouse Gas Inventories Programme, Eggleston H.S., Buendia L., Miwa K., Ngara T. and Tanabe K. (eds). Published: IGES, Japan
- monoethanolamine: 4.76696e-8 kg; lognormal variance with pedigree 0.0033, pedigree (2,2,3,1,1)
  (same comment as for dimethylamine)
  properties: heating value, net 25.8 MJ, dry mass 1 kg, carbon content, fossil 0.393443, wet mass 1 kg
- cyclohexane: 1.23168e-6 kg; lognormal variance with pedigree 0.0033, pedigree (2,2,3,1,1)
  Replacement of cyclohexane in dehydration system. Based on computer simulation of the process validated using literature and industry data.
  properties: carbon content, fossil 0.857143, wet mass 1 kg, dry mass 1 kg, heating value, net 43.22 MJ
- sulfuric acid: 9.50815e-5 kg; = 0.264 + 1.05E-01; lognormal variance with pedigree 0.0033, pedigree (2,2,3,1,1)
  Sulphuric acid used for yeast treatment in fermentation process and water treatment. Based on computer simulation of the process validated using literature and industry data. Treatment of captured water and recycled water in closed circuits (parameterized by water catchment) were considered.
  properties: dry mass 1 kg, wet mass 1 kg
- phosphoric acid, industrial grade, without water, in 85% solution state: 6.0811e-5 kg; lognormal variance with pedigree 0.0033, pedigree (2,2,3,1,1)
  Phosphoric acid used for juice treatment. Based on computer simulation of the process validated using literature and industry data.
  properties: dry mass 1 kg, wet mass 1 kg
- sodium dichromate: 1.51254e-7 kg; lognormal variance with pedigree 0.0033, pedigree (2,2,3,1,1)
  (same comment as for dimethylamine)
  properties: wet mass 1 kg, dry mass 1 kg
- metal working, average for chromium steel product manufacturing: 1.95574e-6 kg; lognormal variance with pedigree 0.3426, pedigree (3,3,5,1,1)
  Economic investment was used to estimate the amount of equipment and infrastructure. Baseline values were taken from Macedo et al. (2004) and Macedo et al. (2008), using a scaling factor to adjust plant capacity.
- chemical, inorganic: 7.67867e-8 kg; lognormal variance with pedigree 0.0033, pedigree (2,2,3,1,1)
  Antibiotic for fermentation process. Based on computer simulation of the process validated using literature and industry data.
  properties: carbon content, fossil 0.003, wet mass 1 kg, dry mass 1 kg
  note on carbon content, fossil: This dataset is an unweighted average of 20 inorganic substances (listed in Tab 88.1, ecoinvent v2.2 report 8, part II), being part of the top100 chemicals included in this database. The C-content has also been calculated as an unweighted average of the C content of the substances composing this dataset.
- concrete, normal: 4.48352e-8 m3; lognormal variance with pedigree 0.3426, pedigree (3,3,5,1,1)
  (same comment as for metal working, average for chromium steel product manufacturing)
  properties: dry mass 2190 kg, water content 0.086758, wet mass 2380 kg
- metal working, average for steel product manufacturing: 3.34976e-5 kg; lognormal variance with pedigree 0.3426, pedigree (3,3,5,1,1)
  (same comment as for metal working, average for chromium steel product manufacturing)
- hydrochloric acid, without water, in 30% solution state: 2.86018e-8 kg; lognormal variance with pedigree 0.0033, pedigree (2,2,3,1,1)
  (same comment as for dimethylamine)
  properties: dry mass 1 kg, wet mass 1 kg, heating value, net 3.32 MJ
- sodium hydroxide, without water, in 50% solution state: 8.63206e-8 kg; lognormal variance with pedigree 0.0033, pedigree (2,2,3,1,1)
  (same comment as for dimethylamine)
  properties: wet mass 1 kg, dry mass 1 kg, heating value, net 3.03 MJ
- acetic acid, without water, in 98% solution state: 5.30807e-8 kg; lognormal variance with pedigree 0.0033, pedigree (2,2,3,1,1)
  (same comment as for dimethylamine)
  properties: heating value, net 14.6 MJ, carbon content, fossil 0.400016, wet mass 1 kg, dry mass 1 kg
  note on heating value, net: Based on literature, page 10, Althaus H.-J., Chudacoff M., Hischier R., Jungbluth N., Osses M. and Primas A. (2007) Life Cycle Inventories of Chemicals. Final report ecoinvent data v2.0 No. 8. EMPA, Swiss Centre for Life Cycle Inventories, Dübendorf, CH, Online-Version under: www.ecoinvent.org.
- sodium hypochlorite, without water, in 15% solution state: 1.74703e-5 kg; lognormal variance with pedigree 0.0033, pedigree (2,2,3,1,1)
  (same comment as for dimethylamine)
  properties: dry mass 1 kg, wet mass 1 kg
- iron (III) chloride, without water, in 40% solution state: 1.38371e-6 kg; lognormal variance with pedigree 0.0033, pedigree (2,2,3,1,1)
  (same comment as for dimethylamine)
  properties: wet mass 1 kg, dry mass 1 kg
- building, hall, steel construction: 9.37932e-9 m2; lognormal variance with pedigree 0.3426, pedigree (3,3,5,1,1)
  (same comment as for metal working, average for chromium steel product manufacturing)
- magnesium sulfate: 5.02463e-9 kg; lognormal variance with pedigree 0.0033, pedigree (2,2,3,1,1)
  (same comment as for dimethylamine)
  properties: dry mass 1 kg, wet mass 1 kg
- aluminium sulfate, powder: 2.34998e-6 kg; lognormal variance with pedigree 0.0033, pedigree (2,2,3,1,1)
  (same comment as for dimethylamine)
  properties: dry mass 1 kg, wet mass 1 kg
- sodium sulfate, anhydrite: 2.37317e-5 kg; lognormal variance with pedigree 0.0033, pedigree (2,2,3,1,1)
  (same comment as for dimethylamine)
  properties: wet mass 1 kg, dry mass 1 kg
- phosphane: 8.55476e-8 kg; lognormal variance with pedigree 0.0033, pedigree (2,2,3,1,1)
  (same comment as for dimethylamine)
  properties: wet mass 1 kg, dry mass 1 kg
- soda ash, dense: 1.67745e-6 kg; lognormal variance with pedigree 0.0033, pedigree (2,2,3,1,1)
  (same comment as for dimethylamine)
  properties: dry mass 1 kg, heating value, net 3.43 MJ, carbon content, fossil 0.113208, wet mass 1 kg
- chemical, organic: 1.5615e-8 kg; = 0.0000117+0.0000489; lognormal variance with pedigree 0.0033, pedigree (2,2,3,1,1)
  Chemicals used for the water treatment in a typical Brazilian sugarcane processing plant (LDC Bioenergia, 2010). Treatment of captured water and recycled water in closed circuits (parameterized by water catchment) were considered. The amount contains also an amount to approximate the substance of 2-bromo-2-nitropropane-1,3-diol. Amount of this substance was: 0.0000489 kg
  properties: wet mass 1 kg, carbon content, fossil 0.628, dry mass 1 kg, heating value, net 19.03 MJ
  note on carbon content, fossil: This dataset is an unweighted average of 20 organic substances (listed in Tab 88.1, ecoinvent v2.2 report 8, part II), being part of the top100 chemicals included in this database. The C-content has also been calculated as an unweighted average of the C content of the substances composing this dataset.
- dithiocarbamate-compound: 2.41955e-7 kg; lognormal variance with pedigree 0.0033, pedigree (2,2,3,1,1)
  (same comment as for dimethylamine)
  properties: carbon content, fossil 0.179339, dry mass 1 kg, wet mass 1 kg
- quicklime, milled, packed: 0.000219022 kg; lognormal variance with pedigree 0.0033, pedigree (2,2,3,1,1)
  Quicklime used for juice treatment. Based on computer simulation of the process validated using literature and industry data.
  properties: wet mass 1 kg, dry mass 0.99 kg, water content 0.010101
- sodium metasilicate pentahydrate, 58% active substance, powder: 9.74006e-8 kg; lognormal variance with pedigree 0.0033, pedigree (2,2,3,1,1)
  (same comment as for dimethylamine)
  properties: wet mass 1 kg, heating value, net 5.71 MJ, dry mass 1 kg
- paraffin: 7.36173e-7 kg; = 2.66E-03 + 1.97E-04; lognormal variance with pedigree 0.0033, pedigree (2,2,3,1,1)
  Flocculating polymer used for juice treatment and water treatment. Based on computer simulation of the process validated using literature and industry data. Treatment of captured water and recycled water in closed circuits (parameterized by water catchment) were considered.
  properties: wet mass 1 kg, dry mass 1 kg, carbon content, fossil 0.847059, heating value, net 41.5 MJ
  note on heating value, net: Indicative value. Reference: Fuels - Higher and Lower Calorific Values, available at: https://www.engineeringtoolbox.com/fuels-higher-calorific-values-d_169.html
- formaldehyde: 5.23077e-9 kg; lognormal variance with pedigree 0.0033, pedigree (2,2,3,1,1)
  (same comment as for dimethylamine)
  properties: heating value, net 20.19 MJ, carbon content, fossil 0.4, wet mass 1 kg, dry mass 1 kg
- sugarcane: 0.257674 kg; lognormal variance with pedigree 0.0033, pedigree (2,2,3,1,1)
  Processed sugarcane. Based on computer simulation of the process validated using literature and industry data.
  properties: water content 2.9216, carbon content, non-fossil 0.533566, dry mass 0.255 kg, wet mass 1 kg
- calcium chloride: 1.72899e-7 kg; lognormal variance with pedigree 0.0033, pedigree (2,2,3,1,1)
  (same comment as for dimethylamine)
  properties: wet mass 1 kg, dry mass 1 kg
- pesticide, unspecified: 5.02463e-9 kg; lognormal variance with pedigree 0.0033, pedigree (2,2,3,1,1)
  Chemicals (biocides) used for the water treatment in a typical Brazilian sugarcane processing plant (LDC Bioenergia, 2010). Treatment of captured water and recycled water in closed circuits (parameterized by water catchment) were considered.
  properties: dry mass 1 kg, wet mass 1 kg, carbon content, fossil 0.486978
- ash, from combustion of bagasse from sugarcane: -0.000824555 kg; lognormal variance with pedigree 0.0033, pedigree (2,2,3,1,1)
  (same comment as for ash, from combustion of bagasse from sugarcane)
  production volume 6.37525e8 kg
  properties: wet mass 1 kg, dry mass 1 kg
- filter cake, from sugarcane juice filtration: -0.0139659 kg; lognormal variance with pedigree 0.0033, pedigree (2,2,3,1,1)
  (same comment as for filter cake, from sugarcane juice filtration)
  production volume 1.07981e10 kg
  properties: water content 1.85714, dry mass 0.35 kg, wet mass 1 kg, carbon content, non-fossil 0.6514
- vinasse, from fermentation of sugarcane: -0.13131 kg; lognormal variance with pedigree 0.0033, pedigree (2,2,3,1,1)
  (same comment as for vinasse, from fermentation of sugarcane)
  production volume 1.01526e11 kg
  properties: dry mass 0.0554348 kg, carbon content, non-fossil 0.1288, water content 17.0392, wet mass 1 kg

## Inputs from nature
- Transformation, to industrial area [natural resource, land]: 1.64911e-8 m2; source Mateus F. Chagas 2015; lognormal variance with pedigree 0.1626, pedigree (3,3,5,1,1)
  Transformation of area occupied by the industrial plant based on data from MACEDO et al., 2008. The occupation was calculated considering a life span of 25 years.
- Occupation, industrial area [natural resource, land]: 8.40016e-7 m2*year; source Mateus F. Chagas 2015; lognormal variance with pedigree 0.0826, pedigree (3,3,5,1,1)
  Industrial area plant based on data from MACEDO et al., 2008.
- Water, well, in ground [natural resource, in water]: 0.00038651 m3; source Mateus F. Chagas 2015; lognormal variance with pedigree 0.0033, pedigree (2,2,3,1,1)
  Water catchment. Based on computer simulation of the process validated using literature and industry data.
- Transformation, from arable land, unspecified use [natural resource, land]: 1.64911e-8 m2; source Mateus F. Chagas 2015; lognormal variance with pedigree 0.1626, pedigree (3,3,5,1,1)
  (same comment as for Transformation, to industrial area)

## Emissions to nature
All rows: source Mateus F. Chagas 2015
- Phosphoric acid [air, non-urban air or from high stacks]: 1.55635e-11 kg; lognormal variance with pedigree 0.0446, pedigree (3,3,3,1,1)
  Emissions from sugar drying process, based on process simulation results.
- Particulates, > 10 um [air, non-urban air or from high stacks]: 5.25654e-7 kg; lognormal variance with pedigree 0.0446, pedigree (3,3,3,1,1)
  Emissions from sugar drying process, based on process simulation results.
- Nitrogen oxides [air, non-urban air or from high stacks]: 1.87329e-5 kg; lognormal variance with pedigree 0.0446, pedigree (3,3,3,1,1)
  Emissions from sugarcane bagasse combustion in the boilers of cogeneration units were estimated according to GREET (2010) emission factors, except carbon dioxide emissions, which are based on process simulation results.
- Sulfur oxides [air, unspecified]: 1.00493e-6 kg; lognormal variance with pedigree 0.0446, pedigree (3,3,3,1,1)
  (same comment as for Nitrogen oxides)
- Particulates, > 2.5 um, and < 10um [air, non-urban air or from high stacks]: 2.12336e-5 kg; = 8.24E-02 + 5.15E-06; lognormal variance with pedigree 0.1246, pedigree (3,3,3,1,1)
  Emissions from sugarcane bagasse combustion and from sugar drying process. Emissions from combustion in the boilers of cogeneration units were estimated according to GREET (2010) emission factors, except carbon dioxide emissions, which are based on process simulation results. Emissions from sugar drying processos were based on process simulation results.
- NMVOC, non-methane volatile organic compounds, unspecified origin [air, non-urban air or from high stacks]: 1.30933e-6 kg; = 5.08E-03 + 1.34E-06; lognormal variance with pedigree 0.0446, pedigree (3,3,3,1,1)
  (same comment as for Particulates, > 2.5 um, and < 10um)
- Carbon monoxide, non-fossil [air, non-urban air or from high stacks]: 1.88359e-5 kg; lognormal variance with pedigree 0.0446, pedigree (3,3,3,1,1)
  (same comment as for Nitrogen oxides)
- Carbon dioxide, non-fossil [air, non-urban air or from high stacks]: 0.0590918 kg; = 186.60 + 41.94 + 7.88E-01; lognormal variance with pedigree 0.0033, pedigree (2,2,3,1,1)
  Emissions from sugarcane bagasse combustion, from fermentation and distillation process. Emissions from sugarcane bagasse combustion in the boilers of cogeneration units were estimated according to GREET (2010) emission factors, except carbon dioxide emissions, which are based on process simulation results. Emissions from fermentation and distillation process were based on process simulation results.
- Ethanol [air, non-urban air or from high stacks]: 2.09746e-5 kg; lognormal variance with pedigree 0.0427, pedigree (2,2,3,1,1)
  Emissions from distillation process, based on process simulation results.
- Dinitrogen monoxide [air, non-urban air or from high stacks]: 1.03585e-6 kg; lognormal variance with pedigree 0.0446, pedigree (3,3,3,1,1)
  (same comment as for Nitrogen oxides)
- Particulates, < 2.5 um [air, non-urban air or from high stacks]: 1.06161e-5 kg; lognormal variance with pedigree 0.3046, pedigree (3,3,3,1,1)
  (same comment as for Nitrogen oxides)
- Methane, non-fossil [air, non-urban air or from high stacks]: 7.75597e-6 kg; lognormal variance with pedigree 0.0446, pedigree (3,3,3,1,1)
  (same comment as for Nitrogen oxides)

## Sampling procedure
The main source of information on inputs and unit operation parameters is based on literature. These data were validated using computer process simulation to check mass and energy balances. Further information is obtained in Bonomi et al. (2016).

## Extrapolations
Figures in the inventory represent average data for a traditional average-scale annexed plant.
