# nutrient supply from phosphoric acid, fertiliser grade, without water, in 70% solution state

Dataset: EcoSpold 2, unit process
Geography: RER
Time period: 2016-01-01 to 2021-12-31
Technology level: current
Classification: ISIC rev.4 ecoinvent: 0161:Support activities for crop production
Scenario: Business-as-Usual
System model: Allocation, cut-off by classification
Generated by: Avraam Symeonidis
Database: ecoinvent
isCopyrightProtected: true
accessRestrictedTo: 1

## General comment
This inventory describes the supply of nutrients from ''phosphoric acid, fertiliser grade, without water, in 70% solution state'' for fertiliser use.
No machinery expenditures or emissions to the environment are considered related to the actual application of this substance on soil during its agricultural use. The purpose of this activity is to connect the chemical production of ''phosphoric acid, fertiliser grade, without water, in 70% solution state'' with its generic use as fertilizer. The product ''phosphoric acid, fertiliser grade, without water, in 70% solution state'' is connected to the generic market for ''inorganic phosphorus fertiliser, as P2O5'' through this supplying activity. In the agricultural context, ''phosphoric acid, fertiliser grade, without water, in 70% solution state'' can be used directly as a fertilizer input to crop production, eventually with other chemicals; alternatively, a generic input of ''inorganic phosphorus fertiliser, as P2O5'' can be used instead, and this will represent the regional consumption mix for his type of nutrient. A way in between is allowed by using the generic input ''inorganic phosphorus fertiliser, as P2O5'' and link to the activity providing it from a specific chemical.
In all cases, emissions associated to the application of the fertilizer have to be calculated in the crop production activity.

## Technology
Inventory based on composition of ''phosphoric acid, fertiliser grade, without water, in 70% solution state''.

## Reference product
- inorganic phosphorus fertiliser, as P2O5: 1 kg; name RP; By-product classification allocatable product; CPC 3462: Mineral or chemical fertilizers, phosphatic
  production volume 9.92749e9 kg; = 76137600*1000*0.51*0.255664316966328
    The production volume has been extrapolated from the global production volume of this product in the database by employing GDP scaling. GDP for Europe is calculated to amount circa 25.6% of the global GDP. Original comment of the GLO dataset is: The global annual production Volume of phosphoric acid was estimated based on the production capacity of phosphoric acid. Global production capacity was calculated to be 76137600 t in 2014 (International Fertilizers Association (2014)). Phosphoric acid has a P2O5 content of 0.51. Thus, 38830176000 Kg of inorganic phosphorus fertiliser as P2O5 are produced from phosphoric acid.References: United Nations, Statistics division, 2020, GDP/breakdown at current prices in US Dollars (all countries and regions), All countries and regions/subregions (totals) for all years - sorted by region/subregion,
    Available at: https://unstats.un.org/unsd/snaama/Downloads
  property price 0.241 EUR2005; name RP_price_EUR2005
    Temporary price data. Calculated as 90% of purchasers price based on: 2004 prices are calculated on basis of Import/Export data (tonnes and US$) from UN Trade Statistics Database (http://data.un.org/Browse.aspx?d=ComTrade, accessed 7/7-2010). N, P2O5, or K2O content (http://www.fertilizer.org/ifa/Home-Page/STATISTICS/Conversions-factors)
  property oxygen content 0.563579
    Oxygen content (on a dry matter basis) of inorganic phosphorus fertiliser, as P2O5 is calculated from the molecular formula of the substance (Potassium).
  property carbon content, fossil 0
    Carbon content, fossil is calculated based on the chemical formula of the substance.
  property phosphorus content 0.436421
    Phosphorus content (on a dry matter basis) of inorganic phosphorus fertiliser, as P2O5 is calculated from the molecular formula of the substance (Potassium).
  property carbon content 0
    carbon content on a dry matter basis (reserved; not for manual entry)
  properties: water content 0, wet mass 1 kg, water in wet mass 0 kg, dry mass 1 kg, carbon content, non-fossil 0, carbon allocation 0 kg

## Inputs from technosphere
- phosphoric acid, fertiliser grade, without water, in 70% solution state: 1.96078 kg; lognormal variance with pedigree 0.1702, pedigree (3,5,2,1,4)
  properties: dry mass 1 kg, phosphorus content 0.235667, oxygen content 0.304333, wet mass 1 kg
  note on phosphorus content: Phosphorus content (on a dry matter basis) of phosphoric acid, fertiliser grade, without water, in 70% solution state is calculated from the molecular formula of the substance (H3PO4).
  note on oxygen content: Oxygen content (on a dry matter basis) of phosphoric acid, fertiliser grade, without water, in 70% solution state is calculated from the molecular formula of the substance (H3PO4).

## Extrapolations
This dataset has been extrapolated from year 2019 to the year of the calculation (2021). The uncertainty has been adjusted accordingly.
