# oil storage production, 3000l

Dataset: EcoSpold 2, unit process
Geography: RoW
Time period: 1993-01-01 to 2021-12-31
Technology level: current
Classification: ISIC rev.4 ecoinvent: 2512:Manufacture of tanks, reservoirs and containers of metal
Classification: EcoSpold01Categories: oil/heating systems
Tags: ConvertedDataset
Scenario: Business-as-Usual
System model: Allocation, cut-off by classification
Generated by: Niels Jungbluth
Published in: Jungbluth, N. 2007
Database: ecoinvent
isCopyrightProtected: true
accessRestrictedTo: 1

## General comment
Inventory for an oil storage with a life time of 20 years.
[This dataset was already contained in the ecoinvent database version 2. It was not individually updated during the transfer to ecoinvent version 3. Life Cycle Impact Assessment results may still have changed, as they are affected by changes in the supply chain, i.e. in other datasets. This dataset was generated following the ecoinvent quality guidelines for version 2. It may have been subject to central changes described in the ecoinvent version 3 change report (http://www.ecoinvent.org/database/ecoinvent-version-3/reports-of-changes/), and the results of the central updates were reviewed extensively. The changes added e.g. consistent water flows and other information throughout the database. The documentation of this dataset can be found in the ecoinvent reports of version 2, which are still available via the ecoinvent website. The change report linked above covers all central changes that were made during the conversion process.]

## Included activities end
Infrastructure of an oil tank, including oil pipes and valves used for small oil heating. Disposal of the facilities. Not including energy use for the production.

## Geography
Data for Swiss producers.

## Technology
Oil storage 3000l used for oil heating.

## Time period
Materials investigated in 1993.

## Reference product
- oil storage, 3000l: 1 unit; CPC 42210: Reservoirs, tanks, vats and similar containers (other than for compressed or liquefied gas), of iron, steel or[…]; By-product classification allocatable product
  EcoSpold01Location=CH
  production volume 3.96633 unit
    This is a placeholder value that does not reflect real-world production volumes. This dataset does not currently require a real-world production volume to work in the database framework, and no actual data were collected yet. This has no negative effect on the results of the ecoinvent database.
  property price 18107 EUR2005
    EU27 I/O database(in the 'EU & DK Input Output Database' (available in SimaPro)); -79 Building, non-residential EU 27 (calculated to be 38.169 EUR2003/kg). Based on consumption of (_53 Iron basic, virgin, EU27;7.25517782294095E-3 kg/EUR building; 0.45 EUR2003 per kg DS), (_61 Iron, after first processing, EU27;5.8766830719783E-3kg/EUR building; 0.62 EUR2003 per kg DS), (_65 Fabricated metal products, except machinery, EU27; 8.9167022775554E-3 kg/EUR building; 3.63 EUR2003 per kg DS) and (_66 Machinery and equipment n.e.c., EU27;4.15071881936446E-3 kg/EUR building; 5.71 EUR2003 per kg DS) - 478 kg

## Inputs from technosphere
- waste concrete: 0 kg; pedigree (1,1,1,1,1)
  Literature
  EcoSpold01Location=CH
  Uncertainty: Literature
  production volume 0 kg
    Calculated from the production volume of oil storage, 3000l in proportion to the respective output amounts.
  properties: water content 1, wet mass 1 kg, dry mass 0.5 kg
- alkyd paint, white, without solvent, in 60% solution state: 6 kg; lognormal variance with pedigree 0.056, pedigree (3,4,5,5,1)
  EcoSpold01Location=RER
  Literature
  Uncertainty: Literature
  properties: wet mass 1 kg, carbon content, non-fossil 0.199629, heating value, net 10.3 MJ, dry mass 1 kg, carbon content, fossil 0.140367
  note on carbon content, non-fossil: C content was calculated as an addition of C content in the raw materials.
- brass: 1.4 kg; lognormal variance with pedigree 0.056, pedigree (3,4,5,5,1)
  EcoSpold01Location=CH
  Literature, mixing valve
  Uncertainty: Literature, mixing valve
  properties: dry mass 1 kg, wet mass 1 kg
- copper, cathode: 20.1 kg; lognormal variance with pedigree 0.056, pedigree (3,4,5,5,1)
  EcoSpold01Location=RER
  Literature
  Uncertainty: Literature
  properties: dry mass 1 kg, wet mass 1 kg
- waste plastic, mixture: 0 kg; pedigree (1,1,1,1,1)
  Literature
  EcoSpold01Location=CH
  Uncertainty: Literature
  production volume 0 kg
    (same comment as for waste concrete)
  properties: wet mass 1 kg, carbon content, fossil 0.747344, dry mass 0.847 kg, water content 0.180638, heating value, net 30.79 MJ
  note on carbon content, fossil: C content in 1 kg DM was calculated using data in Tab A.2, ecoinvent v2.2 report 13_I
  note on heating value, net: Value taken from the general comment of the treatment dataset.
- concrete, normal: 0 m3; pedigree (1,1,1,1,1)
  Literature
  EcoSpold01Location=CH
  Uncertainty: Literature
  properties: dry mass 2190 kg, wet mass 2380 kg, water content 0.086758
- polyethylene, high density, granulate: 0.55 kg; lognormal variance with pedigree 0.056, pedigree (3,4,5,5,1)
  EcoSpold01Location=RER
  Literature
  Uncertainty: Literature
  properties: heating value, net 42.47 MJ, wet mass 1 kg, carbon content, fossil 0.857143, dry mass 1 kg
  note on carbon content, fossil: Polyethylene is formed out of a huge amount of ethylene monomers (C2H4) (ecoinvent v2.2 report 11_II). MW=28 g/mol
- steel, low-alloyed, hot rolled: 452 kg; lognormal variance with pedigree 0.056, pedigree (3,4,5,5,1)
  EcoSpold01Location=RER
  Literature
  Uncertainty: Literature
  properties: wet mass 1 kg, carbon content, fossil 0.005, dry mass 1 kg
  note on carbon content, fossil: Low alloyed steel composition given in Tab. 3.2 ecoinvent v2.2 report 10_partII. Steel assumed to have a C content of 0.5%
- cast iron: 6 kg; lognormal variance with pedigree 0.056, pedigree (3,4,5,5,1)
  Literature
  EcoSpold01Location=RER
  Uncertainty: Literature
  properties: wet mass 1 kg, dry mass 1 kg, carbon content, fossil 0.04
  note on carbon content, fossil: Cast iron is made by remelting pig iron in small furnaces (e.g. cupola furnaces or electric arc furnaces) and poured into moulds to make castings. It usually contains 2% to 6% carbon (ecoinvent v2.2 report 10_partII). An average content of 4% was considered
- waste concrete: -33.8303, -461.17 kg (2 entries); lognormal variance with pedigree 0.056, pedigree (3,4,5,5,1)
  Literature
  EcoSpold01Location=CH
  Uncertainty: Literature
  production volume 1485 kg
- waste plastic, mixture: -0.061183, -0.00408801, -0.00030917, -0.0016885, -0.000682133, -0.00160338, -0.0521308, -0.428315 kg (8 entries); lognormal variance with pedigree 0.056, pedigree (3,4,5,5,1)
  Literature
  EcoSpold01Location=CH
  Uncertainty: Literature
  production volume 1.65 kg
- concrete, normal: 0.00508885, 0.000530251, 0.00429275, 0.00241467, 0.0102255, 0.000344899, 0.202103 m3 (7 entries); lognormal variance with pedigree 0.056, pedigree (3,4,5,5,1)
  Literature
  EcoSpold01Location=CH
  Uncertainty: Literature

## Sampling procedure
Data provided by manufacturers.

## Extrapolations
none This dataset has been copied from an original dataset covering the geography CH. The uncertainty has been adjusted accordingly.

## Review by Michael Spielmann (obsolete) 2003-07-15
Passed.
