# portafer production

Dataset: EcoSpold 2, unit process
Geography: RoW
Time period: 2000-01-01 to 2021-12-31
Technology level: current
Classification: ISIC rev.4 ecoinvent: 0710:Mining of iron ores
Synonyms: Micaceous Iron Oxides
Scenario: Business-as-Usual
System model: Allocation, cut-off by classification
Generated by: Roland Hischier
Published in: Hischier R. 2007
Database: ecoinvent
isCopyrightProtected: true
accessRestrictedTo: 1

## General comment
This dataset represents the production of 1 kg of portafer (ferric oxide) from iron ore in the ground. Portafer is a brand name for ferric oxide and is used mainly for the production of construction materials (50%) and coatings (28%). It is used to produce brown glass, as well as brown, black, green, red or yellow colors in glazes or enamels. Ferric oxide (Fe2O3) – also called red iron oxide – is one of the three different forms of iron oxides which exist and that are used in iron production.
Since no quantitative information was found concerning the production of ferric oxides, it is assumed for this dataset that ferric oxide – like for iron-containing minerals in general – is extracted by open pits mining, followed by crushing and milling of the mined ores. Land-use is approximated based on iron ore extraction. Material and energy inputs, industrial machines, and particulate emissions are approximated based on iron mining and limestone crushing and milling.
References:
Hischier R. (2007) Life Cycle Inventories of Packagings and Graphical Papers. Ecoinvent report No. 11, Swiss Centre for Life Cycle Inventories, Dübendorf, 2007.

## Included activities start
From the extraction of iron ore in ground.

## Included activities end
This activity ends with the production of 1 kg of portafer. The dataset includes raw materials, machineries and energy consumption for production, emissions to air, and infrastructure. The dataset doesn't include water emissions, overburden and tailing material from processing, and losses of product.

## Geography
Data are used here as global average.

## Technology
As a first approximation, the technology is based on iron mining, limestone crushing and limestone milling technologies. The overall yield is assumed to be 90%. The dataset represents a rough average of the aforementioned technologies.
Reference:
Hischier R. (2007) Life Cycle Inventories of Packagings and Graphical Papers. Ecoinvent report No. 11, Swiss Centre for Life Cycle Inventories, Dübendorf, 2007.

## Parameters
- fraction, process water, to air: 0.205 dimensionless; name fraction_PW_to_air; lognormal variance with pedigree 0.092025, pedigree (4,4,3,2,4)
  Literature value (Statistics Canada, 2007 & Shaffer, K.H., 2008, Consumptive water use in the Great Lakes Basin, USGS) (Vionnet, S., Quantis Water Database - Technical Report, 2012).

## Reference product
- portafer: 1 kg; name RP; CPC 14100: Iron ores and concentrates, other than roasted iron pyrites; By-product classification allocatable product; CAS 1309-37-1
  Portafer is a brand name for ferric oxide and is used for the production of brown glass. Besides it is used for brown, black, green, red or yellow colors in glazes or enamels. Ferric oxide also called red iron oxide - is one of the three different forms of iron oxides which exist and that are used in the iron production. Most important uses of Portafer are construction materials and coatings.
  production volume 1.19738e12 kg; name RP_PV; = 8.00E+09 * 7.00e13/3.11e11
    This is a very gross estimation of the world production volume, based on the production volume in Quebec and scaled using relative gross domestic products for 2011. It should be replaced as soon as better data is made found.
  property price 0.0107686 EUR2005
    Calculated based on inputs: The price of the product has been calculated as a sum of the values of the material and energy inputs for this product. This value is therefore a rough estimation. It may underestimate the real price since there are additional expenses when producing any product. These expences can include for example labour costs, treatment of waste materials and profit for the producer. Please consider carefully whether this level of data quality is acceptable for your application.
  property carbon content 0
    carbon content on a dry matter basis (reserved; not for manual entry)
  properties: water content 0, dry mass 1 kg, wet mass 1 kg, water in wet mass 0 kg, carbon content, fossil 0, carbon content, non-fossil 0, carbon allocation 0 kg

## Inputs from technosphere
- recultivation, iron mine: 2.13e-6 m2; lognormal variance with pedigree 0.2086, pedigree (4,3,5,5,3)
  Proxy: approximation with data from iron mining.
  Uncertainty: a
- conveyor belt: 2.78e-8 m; lognormal variance with pedigree 0.3686, pedigree (4,3,5,5,3)
  Proxy: approximation with data from limestone treatment
  Uncertainty: a
- heat, central or small-scale, other than natural gas: 0.00282 MJ; lognormal variance with pedigree 0.0786, pedigree (4,3,5,5,3)
  Proxy: approximation with data from limestone treatment
  Uncertainty: a
  properties: heating value, net 1 MJ
- mine infrastructure, iron: 8.33e-13 unit; lognormal variance with pedigree 0.3686, pedigree (4,3,5,5,3)
  Proxy: approximation with data from iron mining.
  Uncertainty: a
- blasting: 0.000271 kg; lognormal variance with pedigree 0.0786, pedigree (4,3,5,5,3)
  Proxy: approximation with data from iron mining.
  Uncertainty: a
- electricity, medium voltage: 0 kWh; pedigree (1,1,1,1,1)
  Proxy: approximation with data from iron mining & lime treatment
  Uncertainty: a
- industrial machine, heavy, unspecified: 0.000231 kg; lognormal variance with pedigree 0.3686, pedigree (4,3,5,5,3)
  Proxy: approximation with data from limestone treatment.
  Uncertainty: a
- diesel, burned in building machine: 0.0255 MJ; lognormal variance with pedigree 0.0786, pedigree (4,3,5,5,3)
  Proxy: approximation with data from iron mining.
  Uncertainty: a
  properties: heating value, net 1 MJ
- heat, district or industrial, other than natural gas: 0.0898 MJ; lognormal variance with pedigree 0.0786, pedigree (4,3,5,5,3)
  Proxy: approximation with data from limestone treatment
  Uncertainty: a
  properties: heating value, net 1 MJ
- electricity, medium voltage: 0.000432087, 8.28558e-5, 0.000675418, 0.00139098, 0.0202305, 0.0028515, 0.00823666 kWh (7 entries); lognormal variance with pedigree 0.0786, pedigree (4,3,5,5,3)
  Proxy: approximation with data from iron mining & lime treatment
  Uncertainty: a

## Inputs from nature
- Iron, in ground [natural resource, in ground]: 1.11 kg; lognormal variance with pedigree 0.0786, pedigree (4,3,5,5,3)
  46% Fe in siderite; 25% Fe in ore; Proxy: approximation with data from iron mining & lime treatment. Overall yield of 90% is assumed.
  Uncertainty: a
- Transformation, to mineral extraction site [natural resource, land]: 2.13e-6 m2; lognormal variance with pedigree 0.2086, pedigree (4,3,5,5,3)
  Proxy: approximation with data from iron mining.
  Uncertainty: a
- Transformation, from forest, unspecified [natural resource, land]: 2.13e-6 m2; lognormal variance with pedigree 0.2086, pedigree (4,3,5,5,3)
  Proxy: approximation with data from iron mining.
  Uncertainty: a
- Occupation, mineral extraction site [natural resource, land]: 0.00012 m2*year; lognormal variance with pedigree 0.1286, pedigree (4,3,5,5,3)
  Proxy: approximation with data from iron mining
  Uncertainty: a
- Water, well, in ground [natural resource, in water]: 2.93e-5 m3; name water_well_in_ground_input; lognormal variance with pedigree 0.0786, pedigree (4,3,5,5,3)
  Proxy: approximation with data from lime treatment
  Uncertainty: a

## Emissions to nature
- Particulates, > 2.5 um, and < 10um [air, non-urban air or from high stacks]: 0.00131 kg; lognormal variance with pedigree 0.2086, pedigree (4,3,5,5,3)
  Proxy: approximation with data from iron mining & lime treatment
  Uncertainty: a
- Particulates, > 10 um [air, non-urban air or from high stacks]: 0.00145 kg; lognormal variance with pedigree 0.1286, pedigree (4,3,5,5,3)
  Proxy: approximation with data from iron mining & lime treatment
  Uncertainty: a
- Water [water, unspecified]: 2.32935e-5 m3; = water_well_in_ground_input*(1-fraction_PW_to_air); lognormal variance with pedigree 0.0827, pedigree (2,2,5,5,1)
  Calculated as a fraction of the input of water. For more details, refer to the mathematical relation and the parameters.
  property water in wet mass 1000 kg; name WWM
  property wet mass 1000 kg; name WM
  property dry mass 0 kg; name DM
  property carbon content, non-fossil 0; name C_content_non_fossil
  property carbon content, fossil 0; name C_content_fossil
- Particulates, < 2.5 um [air, non-urban air or from high stacks]: 0.000145 kg; lognormal variance with pedigree 0.3686, pedigree (4,3,5,5,3)
  Proxy: approximation with data from iron mining & lime treatment
  Uncertainty: a
- Water [air, unspecified]: 6.0065e-6 m3; = (water_well_in_ground_input*fraction_PW_to_air); lognormal variance with pedigree 0.0827, pedigree (2,2,5,5,1)
  (same comment as for Water)

## Sampling procedure
Approximation with data from literature.

## Extrapolations
The processes described in this dataset are approximated with data from other similar activities:
- Mining: as an approximation of the environmental burden due to the mining activities, the dataset for iron mining (see Classen et al. (2007)) is used. Therefore, all information is copied directly from the iron mining dataset.
- Crushing: data for crushing are copied from the dataset that represents the crushing of limestone (see Kellenberger et al. (2007)).
- Milling: data for milling are also copied from the equivalent step within the limestone production chain.

This dataset has been copied from an original dataset covering the geography RER. The uncertainty has been adjusted accordingly.

References:
Hischier R. (2007) Life Cycle Inventories of Packagings and Graphical Papers. Ecoinvent report No. 11, Swiss Centre for Life Cycle Inventories, Dübendorf, 2007.
Classen M., Althaus H.-J., Blaser S., Doka G., Jungbluth N. and Tuchschmid M. (2007) Life Cycle Inventories of Metals. Final report ecoinvent data v2.0 No.10. EMPA Dübendorf, Swiss Centre for Life Cycle Inventories, Dübendorf, CH.
Kellenberger D., Althaus H.-J., Jungbluth N. and Künniger T. (2007) Life Cycle Inventories of Building Products. Final report ecoinvent data v2.0 No. 7. Swiss Centre for Life Cycle Inventories, Empa - TSL, Dübendorf, CH.

## Review by Emilia Moreno Ruiz 2017-08-10
This dataset was additionally reviewed in a separate review process by Eric Johnson of Atlantic Consulting as well as Emilia Moreno Ruiz and Gregor Wernet of ecoinvent.
