# board, softwood, raw, air drying to u=20%

Dataset: EcoSpold 2, unit process
Geography: Europe without Switzerland
Time period: 2011-01-01 to 2021-12-31
Technology level: current
Classification: ISIC rev.4 ecoinvent: 1610:Sawmilling and planing of wood
Tags: Swiss brush-up completed
Scenario: Business-as-Usual
System model: Allocation, cut-off by classification
Generated by: Frank Werner
Published in: Werner, F. (Ed.) 2015
Database: ecoinvent
isCopyrightProtected: true
accessRestrictedTo: 1

## General comment
This dataset represents the natural air drying process of softwood board, per m3 dried wood. The volume is excluding bark. After sawing the softwood is dried. Air drying occurs during storage, which is assumed to take place at the sawmill site. Boards will be dried for 12 months. Shrinkage ratio of between the moisture content of u=30% - 0% is 0.004 %/%.%.

## Included activities start
Natural air drying process starting from sawn softwood, at sawmill site.

## Included activities end
This activity ends with air dried softwood board at the sawmill. The dataset includes air drying of wet wood assumed as u=70% down to u=20%, shrinkage and land use. The dataset does not include air emissions released from the wood because the same emissions would occur if the wood would not be used..

## Geography
Represents average Swiss conditions assumed to be represenative for Europe

## Parameters
- moisture content board: 20 dimensionless; name moisture_board
  moisture content of beam after drying
- shrinkage ratio (u=30% - 0%): 0.004 dimensionless; name shrinkage_ratio
  % volume loss/% loss of moisture content (u) between u=30% and u=0
- moisture content sawnwood: 70 dimensionless; name moisture_sawnwood
  moisture content of sawn timber before drying
- wood density, dry: 440 kg/m3; name dry_wood_d
  kg oven-dry matter/oven-dry volume
- wood density, basic: 404.8 kg/m3; name basic_wood_d; = dry_wood_d*(1-moisture_board*shrinkage_ratio)
  kg oven-dry matter/wet volume

## Reference product
- sawnwood, board, softwood, raw, dried (u=20%): 1 m3; name board_raw_airdried; CPC 31101: Wood, sawn or chipped lengthwise, sliced or peeled, of a thickness exceeding 6 mm, of coniferous wood; By-product classification allocatable product
  production volume 1.513e7 m3; = 71888.04/60*(12688-60)
    Scaled from the PV estimates of the Swiss sawmilling chain based UNECE data for 2013 for the production volumes of Switzerland (60'000 m3) and the production volume of Europe without Switzerland ( 12'748 m3 - 60'000 m3).
  property heating value, net 5860.46 MJ
    LHV is calculated based on the Carbon content of the product. More details can be found on the respective documentation.The property is based on a value of 12.06MJ/kg
  property dry mass 404.8 kg; = basic_wood_d
  property price 160 EUR2005
    Expert judgement (Urs Luginbühl, Swiss Sawmilling industry, personal communication in June 2014). Cross-reference; FAOSTAT (accessed 20140428). The price is calculated by using data on total world import quantity (m3) and import value (1000 USD), year 2005. 109432798 m3 of Sawnwood (C) - coniferous was imported in the world in 2005. The import value was 22249842000 USD. The calculated price is thus (22249842000/109432798=203*0.8=) 164 Euro.
  property wet mass 485.76 kg; = basic_wood_d*(1+ water_content)
  property water content 0.2; name water_content
  property water in wet mass 80.96 kg; name WWM_dried; = basic_wood_d* water_content
  property carbon content 0.494
    carbon content on a dry matter basis (reserved; not for manual entry)
  properties: carbon content, non-fossil 0.494, carbon content, fossil 0, carbon allocation 199.971 kg

## Inputs from technosphere
- sawnwood, softwood, raw: 1.04167 m3; name sawnwood_raw; = board_raw_airdried/(1- (30-moisture_board)*shrinkage_ratio); lognormal variance with pedigree 0.0342, pedigree (2,1,4,4,1)
  Processed internally within the sawmill
  property water in wet mass 271.04 kg; name WWM_sawnwood
  properties: water content 0.7, carbon content, non-fossil 0.494, dry mass 387.2 kg, heating value, net 5130.57 MJ, wet mass 658.24 kg

## Inputs from nature
- Transformation, to industrial area [natural resource, land]: 0.00392 m2; = 0.392/100; lognormal variance with pedigree 0.3587, pedigree (2,1,4,3,1)
  land occupation estimated for production volume over 100 years
- Occupation, industrial area [natural resource, land]: 0.00196 m2*year; = 0.392/100*6/12; lognormal variance with pedigree 0.2087, pedigree (2,1,4,3,1)
  land occupation estimated for production volume over 100 years times monthts divided by 12 months per year
- Transformation, from unspecified [natural resource, land]: 0.00392 m2; = 0.392/100; lognormal variance with pedigree 0.3587, pedigree (2,1,4,3,1)
  land occupation estimated for production volume over 100 years

## Emissions to nature
- Water [air, unspecified]: 0.201373 m3; = (WWM_sawnwood*sawnwood_raw-WWM_dried*board_raw_airdried)/1000; lognormal variance with pedigree 0.2081, pedigree (1,1,4,3,1)
  difference in water in wet mass between undried and dried sawn timber, converted from kg to m3

## Sampling procedure
complementary literature and sampling from sawmills; CH data used to approximate European processes

## Extrapolations
This dataset has been extrapolated from year 2013 to the year of the calculation (2021). The uncertainty has been adjusted accordingly.
