# polyurethane production, flexible foam, TDI-based, high density

Dataset: EcoSpold 2, unit process
Geography: RoW
Time period: 1997-01-01 to 2021-12-31
Technology level: current
Classification: ISIC rev.4 ecoinvent: 2013:Manufacture of plastics and synthetic rubber in primary forms
Synonyms: flexible polyurethane foams FPF PU
Scenario: Business-as-Usual
System model: Allocation, cut-off by classification
Generated by: [System]
Database: ecoinvent
isCopyrightProtected: true
accessRestrictedTo: 1

## General comment
This dataset represents the production of 1 kg of one possible composition of polyurethane (PUR) flexible foam (35 to 40 kg/m³). Flexible polyurethane foam is used to manufacture mattresses, upholstered furniture and car seats, but also acoustic insulation boards, carpet underlays, household sponges, clothing and sportswear, packaging and many other applications. More specifically, the high density TDI-based grades are typically used in furniture and bedding, whereas the low-density TDI-based grades are preferred for insulation, packaging, building and footwear.This dataset models the production of PUR foam from polyol and toluene diisocyanate (TDI). The inventory is estimated based on industrial data.
References:
Adam, N., Avar, G., Blankenheim, H., Friederichs, W., Giersig, M., Weigand, E., Halfmann, M., Wittbecker, F.-W., Larimer, D.-R., Maier, U., Meyer-Ahrens, S., Noble, K.-L. and Wussow, H.-G. 2005. Polyurethanes. Ullmann's Encyclopedia of Industrial Chemistry.
[This dataset is meant to replace the following datasets:
- polyurethane production, flexible foam, GLO, 1997 - 2020]

## Included activities start
From reception of raw materials at the factory gate.

## Included activities end
This activity ends with the production of 1 kg of PUR flexible foam.

## Geography
Typical composition for European conditions.

## Technology
Polyurethane is made by reacting diisocyanates and polyols. To generate PU foam, addition of water to the main reagents causes a side reaction producing carbon dioxide, which acts as a blowing agent. Flexible slabstock polyurethane foams are produced as large blocks using a continuous process with minimal human handling. Continuous foam machines are the standard in Europe today.
The process represents production with water as a blowing agent, althought this might not be the case all over the world. If this is important in your study, make sure to check which blowing agent is used and replace it, if necessary.
References:
The full report can be accessed here: https://www.europur.org/images/20150821_EPD_EUROPUR_PU_foam.pdf (last accessed 2020-12-14).
The data is a copy of the corresponding RER dataset, uncertianty has been adjusted accrodingly.

## Time period
Time of publications.

## Parameters
- fraction, process water, to air: 0.205 dimensionless; name fraction_PW_to_air; lognormal variance with pedigree 0.092025, pedigree (4,4,3,2,4)
  Literature value (Statistics Canada, 2007 & Shaffer, K.H., 2008, Consumptive water use in the Great Lakes Basin, USGS) (Vionnet, S., Quantis Water Database - Technical Report, 2012).

## Reference product
- polyurethane, flexible foam: 1 kg; name RP; CPC 34740: Polyacetals, other polyethers and epoxide resins, in primary forms; polycarbonates, alkyd resins, polyallyl es[…]; By-product classification allocatable product; CAS 9009-54-5
  PUR flexible foam is used for manufacturing products such as mattresses, cushions and car seats.
  production volume 3.154e8 kg; name RP_PV
    The amount of total production of flexible polyurethane foam in 2018 in EU28 was of 1.7 million t, information taken from Austin, A. 2019. The European flexible PU foam market report for 2018. PU magazine vol 16, NO.4 – August/September 2019. The figures were provided by Europur. According to the article roughly half of the amount of MDI compared to TDI was consumed to produce flexible foam. Based on the amount of MDI/TDI consumed in the process, the split between MDI and TDI based polyurethane foams has been calculated. A 50/50 split was assumed among the two types of TDI products. 5% of overall foams are assumed to be flame retardant based on lack of data, assuming flame retardant foams belong to the "other" category in figure 2 of the article.
  property carbon content, fossil 0.633827
    Polyurethanes (PUR) is the collective name for an extensive group of polymers with very different compositions and correspondingly varied property profiles, though their molecule chain contains all a urethane group (-NH-CO-O-). All PURs are built on a common principle : they are produced by the diisocyanate polyaddition process, that links polyols and (di)isocyanates. In this dataset, an example of typical polyurethane mixture is described (Ullmann, Polyurethanes, Dieterich et al. & ecoinvent v2 report 11_II). C content was calculated as an addition of C contents in its components.
  property carbon content 0.633827
    carbon content on a dry matter basis (reserved; not for manual entry)
  properties: water content 0, dry mass 1 kg, price 1.29 EUR2005, wet mass 1 kg, carbon content, non-fossil 0, water in wet mass 0 kg, heating value, net 30.67 MJ, carbon allocation 0.633827 kg

## By-products
- waste paper, unsorted: 0 kg; By-product classification Recyclable; CPC 39240: Waste and scrap of paper or paperboard; pedigree (1,1,1,1,1)
  production volume 0 kg; = BP_waste_paper*RP_PV/abs(RP)
    Calculated from production volume of reference product using the relative outputs.
  property price 0.093 EUR2005; name BP_waste_paper_price_EUR2005
    Temporary price data. Calculated as 90% of purchasers price based on: Assumed to be 10% less than for sorted waste paper
  properties: heating value, net 14.11 MJ, water in wet mass 0 kg

## Inputs from technosphere
- styrene-acrylonitrile copolymer: 0.00891573 kg; lognormal variance with pedigree 0.0035, pedigree (2,2,2,5,1)
  properties: carbon content, fossil 0.856023, wet mass 1 kg, dry mass 1 kg, heating value, net 32.54 MJ
- monoethanolamine: 0.000367 kg; lognormal variance with pedigree 0.0035, pedigree (2,2,2,5,1)
  properties: dry mass 1 kg, wet mass 1 kg, heating value, net 25.8 MJ, carbon content, fossil 0.393443
- dichloromethane: 1.55e-5 kg; lognormal variance with pedigree 0.0035, pedigree (2,2,2,5,1)
  properties: wet mass 1 kg, dry mass 1 kg, carbon content, fossil 0.142857, heating value, net 7.14 MJ
- waste paint: -0.00133 kg; name BP_waste_paint; lognormal variance with pedigree 0.0035, pedigree (2,2,2,5,1)
  production volume 419482 kg; = BP_waste_paint*RP_PV/abs(RP)
    Calculated from production volume of reference product using the relative outputs.
  property price 0 EUR2005; name BP_waste_paint_price_EUR2005
  properties: wet mass 1 kg, dry mass 1 kg, carbon content, fossil 0.65, heating value, net 19.7 MJ
- chemical factory, organics: 4e-10 unit; lognormal variance with pedigree 0.3114, pedigree (2,3,2,5,3)
- polyol: 0.747946 kg; lognormal variance with pedigree 0.0035, pedigree (2,2,2,5,1)
  properties: heating value, net 19.42 MJ, carbon content, fossil 0.640856, dry mass 1 kg, wet mass 1 kg
- waste plastic, mixture: 0 kg; name BP_waste_plastic; pedigree (1,1,1,1,1)
  production volume 0 kg
    Calculated from production volume of reference product using the relative outputs.
  property price 0 EUR2005; name BP_waste_plastic_price_EUR2005
  properties: dry mass 0.847 kg, wet mass 1 kg, heating value, net 30.79 MJ, water content 0.180638, carbon content, fossil 0.747344
  note on heating value, net: Value taken from the general comment of the treatment dataset.
- urea: 0 kg; pedigree (1,1,1,1,1)
  properties: dry mass 1 kg, wet mass 1 kg, carbon content, fossil 0.2
- paper, woodcontaining, supercalendered: 0.00817715 kg; lognormal variance with pedigree 0.0035, pedigree (2,2,2,5,1)
  properties: carbon content, fossil 0.0109646, heating value, net 14.11 MJ, dry mass 0.945 kg, carbon content, non-fossil 0.289073, wet mass 1 kg, water content 0.0582011
- toluene diisocyanate: 0.278127 kg; lognormal variance with pedigree 0.0035, pedigree (2,2,2,5,1)
  properties: wet mass 1 kg, heating value, net 22.98 MJ, carbon content, fossil 0.62069, dry mass 1 kg
- lime, hydrated, packed: 0.00907304 kg; lognormal variance with pedigree 0.0035, pedigree (2,2,2,5,1)
  properties: wet mass 1 kg, water content 0.00300903, dry mass 0.997 kg
- water, deionised: 0.016738 kg; lognormal variance with pedigree 0.0035, pedigree (2,2,2,5,1)
  properties: wet mass 1 kg
- nitrogen, liquid: 0.00036656 kg; lognormal variance with pedigree 0.0035, pedigree (2,2,2,5,1)
  properties: dry mass 1 kg, wet mass 1 kg
- waste polyurethane: 0 kg; name BP_waste_polyurethane; pedigree (1,1,1,1,1)
  Typical example, based on industry data.
  production volume 0 kg
    Calculated from production volume of reference product using the relative outputs.
  property price 0 EUR2005; name BP_waste_polyurethane_price_EUR2005
  properties: dry mass 0.998 kg, carbon content, fossil 0.641283, water content 0.00200401, heating value, net 30.67 MJ, wet mass 1 kg
  note on carbon content, fossil: C content was calculated for 1 kg DM, using data in Tab A.2, ecoinvent v2.2 report 13_I.
- N-methyl-2-pyrrolidone: 4.5e-5 kg; lognormal variance with pedigree 0.0435, pedigree (2,2,2,5,4)
  properties: carbon content, fossil 0.585366, dry mass 1 kg, wet mass 1 kg, heating value, net 29.36 MJ
- wastewater, average: -8.6e-7 m3; name BP_wastewater; lognormal variance with pedigree 0.0035, pedigree (2,2,2,5,1)
  production volume 271.244 m3; = BP_wastewater*RP_PV/abs(RP)
    Calculated from production volume of reference product using the relative outputs.
  property price 0 EUR2005; name BP_wastewater_price_EUR2005
  properties: carbon content, non-fossil 0.194039, wet mass 1000 kg, water content 2882.2, dry mass 0.346837 kg
  note on carbon content, non-fossil: 0.0673 kg TOC/m3 (Tab A.17, ecoinvent v2.2 report 13_I). TOC was considered as Total Carbon.
- triphenyl phosphate: 0.00043545 kg; lognormal variance with pedigree 0.0435, pedigree (2,2,2,5,4)
  properties: heating value, net 25.65 MJ
- tap water: 0 kg; pedigree (1,1,1,1,1)
  properties: dry mass 0.000337476 kg, water content 2962.17, wet mass 1 kg, carbon content, fossil 0.00178991
  note on carbon content, fossil: Bicarbonate content is 2.93 mol/m3. CO2 content is 0.1 mol/m3 (ecoinvent v2.2 report 8, Tab 93.1).
- compressed air, 1000 kPa gauge: 0.00613241 m3; lognormal variance with pedigree 0.0035, pedigree (2,2,2,5,1)
- spent solvent mixture: -1.72e-5 kg; name BP_spent_solvent; lognormal variance with pedigree 0.0035, pedigree (2,2,2,5,1)
  production volume 5424.88 kg; = BP_spent_solvent*RP_PV/abs(RP)
    Calculated from production volume of reference product using the relative outputs.
  property price 0 EUR2005; name BP_spent_solvent_price_EUR2005
  properties: wet mass 1 kg, dry mass 0.835 kg, carbon content, fossil 0.571257, heating value, net 21.7 MJ, water content 0.197605
  note on carbon content, fossil: Tab A.7, ecoinvent v2.2 report 13_I. C content has been calculated after data in the tables, and then referred to 1 kg DM
- cyclic N-compound: 0.000455 kg; lognormal variance with pedigree 0.0435, pedigree (2,2,2,5,4)
  properties: wet mass 1 kg, carbon content, fossil 0.641962, dry mass 1 kg
- heat, district or industrial, natural gas: 0 MJ; pedigree (1,1,1,1,1)
  properties: heating value, net 1 MJ
- packaging film, low density polyethylene: 0.00116293 kg; lognormal variance with pedigree 0.0035, pedigree (2,2,2,5,1)
  properties: dry mass 1 kg, heating value, net 42.47 MJ, wet mass 1 kg, carbon content, fossil 0.857143
- silicon, metallurgical grade: 0.00735373 kg; lognormal variance with pedigree 0.0035, pedigree (2,2,2,5,1)
  properties: dry mass 1 kg, wet mass 1 kg
- chemical, organic: 0.00213 kg; lognormal variance with pedigree 0.0435, pedigree (2,2,2,5,4)
  Chemicals included: Bis(2-dimethylaminoethyl) ether (BDMAEE), Red Pigment, Tin(II) 2-ethylhexanoate
  properties: heating value, net 19.03 MJ, dry mass 1 kg, carbon content, fossil 0.628, wet mass 1 kg
  note on carbon content, fossil: This dataset is an unweighted average of 20 organic substances (listed in Tab 88.1, ecoinvent v2.2 report 8, part II), being part of the top100 chemicals included in this database. The C-content has also been calculated as an unweighted average of the C content of the substances composing this dataset.
- electricity, medium voltage: 0 kWh; pedigree (1,1,1,1,1)
- diethylene glycol: 0.00020771 kg; lognormal variance with pedigree 0.0435, pedigree (2,2,2,5,4)
  properties: wet mass 1 kg, dry mass 1 kg, carbon content, fossil 0.45283, heating value, net 25.14 MJ
- waste paper, unsorted: -0.00091242 kg; lognormal variance with pedigree 0.0035, pedigree (2,2,2,5,1)
  production volume 287777 kg
  properties: heating value, net 14.11 MJ
- waste plastic, mixture: -0.00117255, -7.83456e-5, -5.92515e-6, -3.23595e-5, -1.30729e-5, -3.07284e-5, -0.00820853 kg (7 entries); lognormal variance with pedigree 0.0035, pedigree (2,2,2,5,1)
  production volume 3.0094e6 kg
- urea: 0.00013216, 1.95736e-5, 0.000154767 kg (3 entries); lognormal variance with pedigree 0.0035, pedigree (2,2,2,5,1)
- waste polyurethane: -0.000542655, -3.62581e-5, -2.74214e-6, -1.49759e-5, -6.05009e-6, -1.4221e-5, -0.00379889 kg (7 entries); lognormal variance with pedigree 0.0035, pedigree (2,2,2,5,1)
  Typical example, based on industry data.
  production volume 1.39274e6 kg
- tap water: 5.99869e-5, 7.22081e-6, 1.19336e-5, 0.000300918, 7.8283e-6, 2.22675e-5, 0.00344356 kg (7 entries); lognormal variance with pedigree 0.0035, pedigree (2,2,2,5,1)
- heat, district or industrial, natural gas: 1.01308e-5, 0.000657329 MJ (2 entries); lognormal variance with pedigree 0.0035, pedigree (2,2,2,5,1)
- electricity, medium voltage: 0.000437482, 8.38902e-5, 0.00192625, 0.00140834, 0.0204831, 0.0028871, 0.0094066 kWh (7 entries); lognormal variance with pedigree 0.0035, pedigree (2,2,2,5,1)

## Inputs from nature
- Water, cooling, unspecified natural origin [natural resource, in water]: 1.16e-8 m3; lognormal variance with pedigree 0.0035, pedigree (2,2,2,5,1)

## Emissions to nature
- Carbon dioxide, fossil [air, urban air close to ground]: 0.0484 kg; lognormal variance with pedigree 0.0035, pedigree (2,2,2,5,1)
  Typical example, based on industry data.
- NMVOC, non-methane volatile organic compounds, unspecified origin [air, unspecified]: 0.00162814 kg; lognormal variance with pedigree 0.0429, pedigree (2,2,2,5,1)
- Water [air, unspecified]: 1.16e-8 m3; lognormal variance with pedigree 0.0429, pedigree (2,2,2,5,1)
  Calculated as a fraction of the input of water. For more details, refer to the mathematical relation and the parameters.
  property fraction, origin: unspecified 1; name fraction_origin_unspecified
  property fraction, origin: fresh water 0; name fraction_origin_fresh_water
  property fraction, origin: salt water 0; name fraction_origin_salt_water
- Particulates, > 2.5 um, and < 10um [air, unspecified]: 1.17e-8 kg; lognormal variance with pedigree 0.3029, pedigree (2,2,2,5,1)

## Sampling procedure
Data based on industry report and expert judgement.

## Extrapolations
The dataset is a copy of the corresponding RER dataset, uncertainty has been adjusted accordingly.
