# treatment of sulfidic tailings, from zinc-lead mine operation, tailings impoundment

Dataset: EcoSpold 2, unit process
Geography: RoW
Time period: 2015-01-01 to 2021-12-31
Technology level: current
Classification: ISIC rev.4 ecoinvent: 3822:Treatment and disposal of hazardous waste
Synonyms: sulphidic; pond; tailing; tails
Scenario: Business-as-Usual
System model: Allocation, cut-off by classification
Share of production covered: 80 %
Generated by: David Turner
Database: ecoinvent
isCopyrightProtected: true
accessRestrictedTo: 1

## General comment
This dataset represents the activity of waste disposal of sulfidic tailings, from zinc-lead mine operation in a tailings impoundment.
Background: Tailings, a waste material produced during mineral concentration (beneficiation), often contain significant quantities of mobile toxic metals and are typically produced in large quantities. To manage these wastes, tailings are commonly stored behind dammed impoundments, known as tailings ponds. These ponds pose a significant long-term pollution risk as metals may leach out into the surrounding environment, potentially over very long timeframes.
Modelling approach: This dataset was produced using a model developed specifically for assessing the long-term emissions of tailings disposal (see Doka, 2017). The tailings disposal model is based on the modelling framework applied in existing landfill process models used in ecoinvent and is based on a top-down approach. Literature data on measurements of deposited tailings compositions (solids) and measured current concentrations in leachate (liquid) form the basis of the model and are used to characterise pollutant mobility and calculate the currently occurring rate of emissions of the landfill. Heeding chief parameters, such as hydrology, pH development and elemental chemistry, these emissions are then projected into the future. Tailings composition is based on the typical composition of tailings at zinc-lead mine sites worldwide; i.e. composition is not region-specific. Land use was calculated following the approach described by Doka (2008). Based on an assumed generic final height of a tailings impoundment of 60 m and an assumed tailings density of 2200 kg/m3, a land area of 7.58E-06 m2 is required per kilogram of sulfidic tailings. The land is assumed to be converted from unknown origin to a disposal site. After an operational phase of 30 years, spontaneous restoration of a consolidated state is assumed to be reached after one hundred years. The total occupation time is therefore 130 years and the land occupation per kilogram tailings is 9.85E-04 m2.
Waste composition (wet, in ppm): H2O 300000; O 603730; H na; C 6145; S 8563.2; N 5.0454; P 272.84; B 54.583; Cl 102.61; Br 0.22894; F 772.88; I na; Ag 26.476; As 516.17; Ba 443.79; Cd 12.479; Co 15.076; Cr 34.174; Cu 314.87; Hg 1.1079; Mn 443.21; Mo 6.3919; Ni 15.511; Pb 1329.2; Sb 100.88; Se 5.2557; Sn 9.9969; V 40.852; Zn 1656.2; Be 1.0585; Sc 5.1722; Sr 75.651; Ti 1.9307; Tl 3.7219; W 10.954; Si 29391; Fe 21079; Ca 6599.5; Al 10112; K 4448.8; Mg 3031.4; Na 620.3. // Share of carbon in waste that is biogenic 0%.
Activity extent: The dataset includes all potential emissions to the environment and land use changes. Input exchanges of infrastructure, materials, energy, and water are not included here but are accounted for in the activity, zinc-lead mine operation.
References
Doka, G. (2008). Life Cycle Inventory data of mining waste: Emissions from sulfidic tailings disposal. Zürich, Switzerland: Doka Life Cycle Assessments.
Doka, G. (2017). A model for waste-specific and climate-specific life cycle inventories of tailings impoundments. Zürich, Switzerland: Doka Life Cycle Assessments.

## Included activities start
The activity starts at the point of waste deposition in the impoundment. All upstream activities, including the pumping of tailings to the site, any dewatering or treatment, or other transport-related activities are excluded.

## Included activities end
Waste-specific short- and long-term emissions to the environment via impoundment leachate; land transformation and occupation. Note that the structural integrity of the site is assumed to be unwavering during the entie modelled time horizon; i.e. accidental releases of leachate (due to impoundment failure) are not considered.

## Geography
Given name of site is 'Zinc-lead deposits; Global'. Impoundment site with mean annual temperature (MAT) of 12.6330091048703 degC, mean annual precipitation (MAP) of 676.861178244086 mm/year, mean annual actual evaporation (EAT) of 481.196761667085 mm/year, and net infiltration of 436.262797410544 mm/year (using half of natural surface evapotranspiration).

## Technology
This is an inventory for an impoundment of copper ore beneficiation tailings waste. The following assumptions were made concerning technology: final impoundment height is 60 meters; operation phase duration is 30 years; and impoundment leachates are released into the environment untreated.

## Time period
'Data on average composition of tailings and tailings-derived leachates from literature sources published between 1994 and 2017 (mean publication date: 2009±6). Mean annual temperature and precipitation data for 1970-2000 (source: Fick and Hijmans, 2017); mean annual evapotranspiration for 1950-2000 (source: Fekete et al., 2002). Production volume based on world mine production data from the USGS Minerals Yearbook 2015. Transfer coefficients from prospective, tailings-specific model.
References:
Fekete, B. M., Vorosmarty, C. J. & Grabs, W. (2002). High-resolution fields of global runoff combining observed river discharge and simulated water balances. Global Biogeochemical Cycles, 16, 15-1 - 15-10.
Fick, S. E. & Hijmans, R. J. (2017). Worldclim 2: New 1-km spatial resolution climate surfaces for global land areas. International Journal of Climatology, 37, 4302-4315.'

## Reference product
- sulfidic tailings, from zinc-lead mine operation: -1 kg; By-product classification Waste
  main reference product of this activity (supply of disposal service).
  production volume 5.924e10 kg
    Estimate of the national tailings production volume from the mining and concentration of sulfidic zinc-lead ores, based on world mine production of zinc-lead from sulfide mineral deposits (kg) multiplied by an estimated tailings generation rate per kg of mined zinc and lead (15.5 kg per kg zinc and lead in concentrate).
  property price 0 EUR2005
    Waste products are assigned a price of zero as they are assumed to require further treatment.
  property carbon content 0.0087785
    carbon content on a dry matter basis (reserved; not for manual entry)
  properties: boron content 7.7976e-5, tungsten content 1.5648e-5, sulfur content 0.012233, oxygen content 0.86247, calcium content 0.0094279, fluorine content 0.0011041, arsenic content 0.00073739, carbon content, non-fossil 0, copper content 0.00044981, lead content 0.0018988, nickel content 2.2158e-5, manganese content 0.00063316, beryllium content 1.5122e-6, mercury content 1.5828e-6, zinc content 0.002366, cobalt content 2.1537e-5, aluminium content 0.014446, tin content 1.4281e-5, barium content 0.00063399, wet mass 1 kg, chromium content 4.8821e-5, vanadium content 5.8361e-5, silicon content 0.041987, antimony content 0.00014411, bromine content 3.2706e-7, selenium content 7.5081e-6, titanium content 2.7581e-6, chlorine content 0.00014659, strontium content 0.00010807, water content 0.42857, sodium content 0.00088614, molybdenum content 9.1313e-6, silver content 3.7823e-5, scandium content 7.3888e-6, cadmium content 1.7827e-5, thallium content 5.317e-6, magnesium content 0.0043305, potassium content 0.0063554, dry mass 0.7 kg, water in wet mass 0.3 kg, carbon content, fossil 0.0087785, iron content 0.030113, nitrogen content 7.2076e-6, phosphorus content 0.00038978, carbon allocation 0.00614495 kg

## Inputs from nature
- Occupation, dump site [natural resource, land]: 0.00098485 m2*year; lognormal variance with pedigree 0.14986, pedigree (1,1,2,1,1)
  for impoundment operation phase and 100 year renaturation phase.
  Uncertainty: U
- Transformation, to dump site [natural resource, land]: 7.5758e-6 m2; lognormal variance with pedigree 0.030796, pedigree (1,1,2,1,1)
  conversion to impoundment area.
  Uncertainty: U
- Transformation, from unspecified [natural resource, land]: 7.5758e-6 m2; lognormal variance with pedigree 0.030796, pedigree (1,1,2,1,1)
  conversion of impoundment area.
  Uncertainty: U

## Emissions to nature
- BOD5, Biological Oxygen Demand [water, ground-, long-term]: 1.0868e-6 kg; lognormal variance with pedigree 0.44676, pedigree (1,1,2,1,1)
  Emissions from long-term leachate (>100a) directly from tailings impoundment.
  Uncertainty: U
- Nickel, ion [water, ground-]: 4.6575e-8 kg; lognormal variance with pedigree 0.43068, pedigree (1,1,2,1,1)
  burden from short-term leachate to groundwater in uncontrolled impoundment in moist cimate.
  Uncertainty: U
- Beryllium [water, ground-, long-term]: 1.0558e-6 kg; lognormal variance with pedigree 0.39071, pedigree (1,1,2,1,1)
  (same comment as for BOD5, Biological Oxygen Demand)
- Barium [water, ground-]: 2.559e-9 kg; lognormal variance with pedigree 0.5243, pedigree (1,1,2,1,1)
  (same comment as for Nickel, ion)
- Molybdenum [water, ground-]: 6.7233e-8 kg; lognormal variance with pedigree 0.42156, pedigree (1,1,2,1,1)
  (same comment as for Nickel, ion)
- Barium [water, ground-, long-term]: 0.0002046 kg; lognormal variance with pedigree 0.22874, pedigree (1,1,2,1,1)
  (same comment as for BOD5, Biological Oxygen Demand)
- Molybdenum [water, ground-, long-term]: 4.6537e-6 kg; lognormal variance with pedigree 0.33811, pedigree (1,1,2,1,1)
  (same comment as for BOD5, Biological Oxygen Demand)
- Beryllium [water, ground-]: 2.6677e-9 kg; lognormal variance with pedigree 0.52428, pedigree (1,1,2,1,1)
  (same comment as for Nickel, ion)
- Mercury [water, ground-, long-term]: 1.1069e-6 kg; lognormal variance with pedigree 0.38923, pedigree (1,1,2,1,1)
  (same comment as for BOD5, Biological Oxygen Demand)
- Zinc, ion [water, ground-, long-term]: 0.0016492 kg; lognormal variance with pedigree 0.14824, pedigree (1,1,2,1,1)
  (same comment as for BOD5, Biological Oxygen Demand)
- Antimony [water, ground-]: 4.0204e-8 kg; lognormal variance with pedigree 0.43367, pedigree (1,1,2,1,1)
  (same comment as for Nickel, ion)
- Mercury [water, ground-]: 1.0043e-9 kg; lognormal variance with pedigree 0.55563, pedigree (1,1,2,1,1)
  (same comment as for Nickel, ion)
- Vanadium, ion [water, ground-, long-term]: 1.1771e-7 kg; lognormal variance with pedigree 2.4091, pedigree (1,1,2,1,1)
  (same comment as for BOD5, Biological Oxygen Demand)
- Aluminium [water, ground-, long-term]: 0.010105 kg; lognormal variance with pedigree 0.091717, pedigree (1,1,2,1,1)
  (same comment as for BOD5, Biological Oxygen Demand)
- Manganese [water, ground-, long-term]: 0.00044027 kg; lognormal variance with pedigree 0.19131, pedigree (1,1,2,1,1)
  (same comment as for BOD5, Biological Oxygen Demand)
- Zinc, ion [water, ground-]: 7.0275e-6 kg; lognormal variance with pedigree 0.26545, pedigree (1,1,2,1,1)
  (same comment as for Nickel, ion)
- Antimony [water, ground-, long-term]: 4.935e-6 kg; lognormal variance with pedigree 0.8095, pedigree (1,1,2,1,1)
  (same comment as for BOD5, Biological Oxygen Demand)
- Magnesium [water, ground-]: 5.1813e-5 kg; lognormal variance with pedigree 0.2044, pedigree (1,1,2,1,1)
  (same comment as for Nickel, ion)
- Vanadium, ion [water, ground-]: 9.3644e-10 kg; lognormal variance with pedigree 0.55812, pedigree (1,1,2,1,1)
  (same comment as for Nickel, ion)
- Aluminium [water, ground-]: 6.5185e-6 kg; lognormal variance with pedigree 0.26922, pedigree (1,1,2,1,1)
  (same comment as for Nickel, ion)
- Manganese [water, ground-]: 2.9353e-6 kg; lognormal variance with pedigree 0.29483, pedigree (1,1,2,1,1)
  (same comment as for Nickel, ion)
- Tungsten [water, ground-, long-term]: 2.462e-6 kg; lognormal variance with pedigree 0.45334, pedigree (1,1,2,1,1)
  (same comment as for BOD5, Biological Oxygen Demand)
- Nitrate [water, ground-, long-term]: 1.1938e-5 kg; lognormal variance with pedigree 0.34106, pedigree (1,1,2,1,1)
  (same comment as for BOD5, Biological Oxygen Demand)
- Magnesium [water, ground-, long-term]: 0.0029796 kg; lognormal variance with pedigree 0.12891, pedigree (1,1,2,1,1)
  (same comment as for BOD5, Biological Oxygen Demand)
- TOC, Total Organic Carbon [water, ground-, long-term]: 0.00059658 kg; lognormal variance with pedigree 0.44676, pedigree (1,1,2,1,1)
  (same comment as for BOD5, Biological Oxygen Demand)
- Arsenic, ion [water, ground-]: 1.2911e-7 kg; lognormal variance with pedigree 0.39487, pedigree (1,1,2,1,1)
  (same comment as for Nickel, ion)
- Lead [water, ground-, long-term]: 0.001329 kg; lognormal variance with pedigree 0.15535, pedigree (1,1,2,1,1)
  (same comment as for BOD5, Biological Oxygen Demand)
- Nitrate [water, ground-]: 6.4028e-6 kg; lognormal variance with pedigree 0.34725, pedigree (1,1,2,1,1)
  (same comment as for Nickel, ion)
- Iron, ion [water, ground-, long-term]: 0.021069 kg; lognormal variance with pedigree 0.070341, pedigree (1,1,2,1,1)
  (same comment as for BOD5, Biological Oxygen Demand)
- Arsenic, ion [water, ground-, long-term]: 1.5997e-5 kg; lognormal variance with pedigree 0.94057, pedigree (1,1,2,1,1)
  (same comment as for BOD5, Biological Oxygen Demand)
- Lead [water, ground-]: 1.4255e-7 kg; lognormal variance with pedigree 0.39192, pedigree (1,1,2,1,1)
  (same comment as for Nickel, ion)
- Tungsten [water, ground-]: 2.2182e-8 kg; lognormal variance with pedigree 0.45468, pedigree (1,1,2,1,1)
  (same comment as for Nickel, ion)
- Ammonium, ion [water, ground-]: 4.0564e-7 kg; lognormal variance with pedigree 0.34725, pedigree (1,1,2,1,1)
  (same comment as for Nickel, ion)
- Hydrogen sulfide [water, ground-, long-term]: 0.0012098 kg; lognormal variance with pedigree 0.098525, pedigree (1,1,2,1,1)
  (same comment as for BOD5, Biological Oxygen Demand)
- Titanium, ion [water, ground-]: 7.0922e-11 kg; lognormal variance with pedigree 0.64321, pedigree (1,1,2,1,1)
  (same comment as for Nickel, ion)
- Ammonium, ion [water, ground-, long-term]: 7.5635e-7 kg; lognormal variance with pedigree 0.34106, pedigree (1,1,2,1,1)
  (same comment as for BOD5, Biological Oxygen Demand)
- Iron, ion [water, ground-]: 9.7774e-6 kg; lognormal variance with pedigree 0.25861, pedigree (1,1,2,1,1)
  (same comment as for Nickel, ion)
- TOC, Total Organic Carbon [water, ground-]: 9.9597e-7 kg; lognormal variance with pedigree 0.32974, pedigree (1,1,2,1,1)
  (same comment as for Nickel, ion)
- Fluoride [water, ground-]: 8.254e-7 kg; lognormal variance with pedigree 0.33411, pedigree (1,1,2,1,1)
  (same comment as for Nickel, ion)
- Titanium, ion [water, ground-, long-term]: 1.9306e-6 kg; lognormal variance with pedigree 0.37118, pedigree (1,1,2,1,1)
  (same comment as for BOD5, Biological Oxygen Demand)
- Fluoride [water, ground-, long-term]: 0.00036497 kg; lognormal variance with pedigree 0.20819, pedigree (1,1,2,1,1)
  (same comment as for BOD5, Biological Oxygen Demand)
- Thallium [water, ground-, long-term]: 3.7213e-6 kg; lognormal variance with pedigree 0.34971, pedigree (1,1,2,1,1)
  (same comment as for BOD5, Biological Oxygen Demand)
- Hydrogen sulfide [water, ground-]: 0.00091041 kg; lognormal variance with pedigree 0.10173, pedigree (1,1,2,1,1)
  (same comment as for Nickel, ion)
- Tin, ion [water, ground-]: 1.0088e-8 kg; lognormal variance with pedigree 0.4801, pedigree (1,1,2,1,1)
  (same comment as for Nickel, ion)
- DOC, Dissolved Organic Carbon [water, ground-]: 9.9597e-7 kg; lognormal variance with pedigree 0.32974, pedigree (1,1,2,1,1)
  (same comment as for Nickel, ion)
- Tin, ion [water, ground-, long-term]: 9.9868e-6 kg; lognormal variance with pedigree 0.31719, pedigree (1,1,2,1,1)
  (same comment as for BOD5, Biological Oxygen Demand)
- Copper, ion [water, ground-, long-term]: 0.00031472 kg; lognormal variance with pedigree 0.20261, pedigree (1,1,2,1,1)
  (same comment as for BOD5, Biological Oxygen Demand)
- Thallium [water, ground-]: 6.7063e-10 kg; lognormal variance with pedigree 0.56913, pedigree (1,1,2,1,1)
  (same comment as for Nickel, ion)
- DOC, Dissolved Organic Carbon [water, ground-, long-term]: 0.00059658 kg; lognormal variance with pedigree 0.44676, pedigree (1,1,2,1,1)
  (same comment as for BOD5, Biological Oxygen Demand)
- Sulfate [water, ground-, long-term]: 0.011243 kg; lognormal variance with pedigree 0.098525, pedigree (1,1,2,1,1)
  (same comment as for BOD5, Biological Oxygen Demand)
- Copper, ion [water, ground-]: 1.4722e-7 kg; lognormal variance with pedigree 0.39062, pedigree (1,1,2,1,1)
  (same comment as for Nickel, ion)
- Strontium [water, ground-, long-term]: 7.5549e-5 kg; lognormal variance with pedigree 0.24999, pedigree (1,1,2,1,1)
  (same comment as for BOD5, Biological Oxygen Demand)
- COD, Chemical Oxygen Demand [water, ground-, long-term]: 5.4341e-5 kg; lognormal variance with pedigree 0.44676, pedigree (1,1,2,1,1)
  (same comment as for BOD5, Biological Oxygen Demand)
- Sulfate [water, ground-]: 0.0084603 kg; lognormal variance with pedigree 0.10173, pedigree (1,1,2,1,1)
  (same comment as for Nickel, ion)
- COD, Chemical Oxygen Demand [water, ground-]: 9.0719e-8 kg; lognormal variance with pedigree 0.32974, pedigree (1,1,2,1,1)
  (same comment as for Nickel, ion)
- Strontium [water, ground-]: 1.0276e-7 kg; lognormal variance with pedigree 0.40331, pedigree (1,1,2,1,1)
  (same comment as for Nickel, ion)
- Chromium VI [water, ground-]: 4.8992e-9 kg; lognormal variance with pedigree 0.5034, pedigree (1,1,2,1,1)
  (same comment as for Nickel, ion)
- Silver, ion [water, ground-, long-term]: 2.6473e-5 kg; lognormal variance with pedigree 0.28491, pedigree (1,1,2,1,1)
  (same comment as for BOD5, Biological Oxygen Demand)
- Cobalt [water, ground-, long-term]: 1.4938e-5 kg; lognormal variance with pedigree 0.3036, pedigree (1,1,2,1,1)
  (same comment as for BOD5, Biological Oxygen Demand)
- Sodium, ion [water, ground-]: 5.7876e-6 kg; lognormal variance with pedigree 0.27343, pedigree (1,1,2,1,1)
  (same comment as for Nickel, ion)
- Chromium VI [water, ground-, long-term]: 6.1113e-7 kg; lognormal variance with pedigree 1.2884, pedigree (1,1,2,1,1)
  (same comment as for BOD5, Biological Oxygen Demand)
- Sodium, ion [water, ground-, long-term]: 0.00061227 kg; lognormal variance with pedigree 0.18024, pedigree (1,1,2,1,1)
  (same comment as for BOD5, Biological Oxygen Demand)
- Cobalt [water, ground-]: 1.374e-7 kg; lognormal variance with pedigree 0.39748, pedigree (1,1,2,1,1)
  (same comment as for Nickel, ion)
- Silver, ion [water, ground-]: 3.0195e-9 kg; lognormal variance with pedigree 0.51945, pedigree (1,1,2,1,1)
  (same comment as for Nickel, ion)
- Chloride [water, ground-]: 1.7549e-5 kg; lognormal variance with pedigree 0.2589, pedigree (1,1,2,1,1)
  (same comment as for Nickel, ion)
- Silicon [water, ground-, long-term]: 0.00035255 kg; lognormal variance with pedigree 1.2839, pedigree (1,1,2,1,1)
  (same comment as for BOD5, Biological Oxygen Demand)
- Chloride [water, ground-, long-term]: 8.5061e-5 kg; lognormal variance with pedigree 0.24029, pedigree (1,1,2,1,1)
  (same comment as for BOD5, Biological Oxygen Demand)
- Selenium [water, ground-, long-term]: 4.8727e-7 kg; lognormal variance with pedigree 0.69184, pedigree (1,1,2,1,1)
  (same comment as for BOD5, Biological Oxygen Demand)
- Calcium, ion [water, ground-, long-term]: 0.0064887 kg; lognormal variance with pedigree 0.10465, pedigree (1,1,2,1,1)
  (same comment as for BOD5, Biological Oxygen Demand)
- Scandium [water, ground-, long-term]: 5.1569e-6 kg; lognormal variance with pedigree 0.33891, pedigree (1,1,2,1,1)
  (same comment as for BOD5, Biological Oxygen Demand)
- Calcium, ion [water, ground-]: 0.00011085 kg; lognormal variance with pedigree 0.18063, pedigree (1,1,2,1,1)
  (same comment as for Nickel, ion)
- Silicon [water, ground-]: 2.8007e-6 kg; lognormal variance with pedigree 0.3016, pedigree (1,1,2,1,1)
  (same comment as for Nickel, ion)
- Cadmium, ion [water, ground-, long-term]: 1.2437e-5 kg; lognormal variance with pedigree 0.30985, pedigree (1,1,2,1,1)
  (same comment as for BOD5, Biological Oxygen Demand)
- Selenium [water, ground-]: 4.0641e-9 kg; lognormal variance with pedigree 0.50995, pedigree (1,1,2,1,1)
  (same comment as for Nickel, ion)
- Cadmium, ion [water, ground-]: 4.215e-8 kg; lognormal variance with pedigree 0.43419, pedigree (1,1,2,1,1)
  (same comment as for Nickel, ion)
- Scandium [water, ground-]: 1.5318e-8 kg; lognormal variance with pedigree 0.46738, pedigree (1,1,2,1,1)
  (same comment as for Nickel, ion)
- Bromine [water, ground-]: 2.445e-10 kg; lognormal variance with pedigree 0.601, pedigree (1,1,2,1,1)
  (same comment as for Nickel, ion)
- Potassium, ion [water, ground-, long-term]: 0.00079824 kg; lognormal variance with pedigree 0.30129, pedigree (1,1,2,1,1)
  (same comment as for BOD5, Biological Oxygen Demand)
- Bromine [water, ground-, long-term]: 1.0811e-7 kg; lognormal variance with pedigree 0.47508, pedigree (1,1,2,1,1)
  (same comment as for BOD5, Biological Oxygen Demand)
- Potassium, ion [water, ground-]: 1.469e-6 kg; lognormal variance with pedigree 0.31627, pedigree (1,1,2,1,1)
  (same comment as for Nickel, ion)
- Boron [water, ground-]: 1.8721e-8 kg; lognormal variance with pedigree 0.45904, pedigree (1,1,2,1,1)
  (same comment as for Nickel, ion)
- Phosphate [water, ground-, long-term]: 0.00079021 kg; lognormal variance with pedigree 0.20742, pedigree (1,1,2,1,1)
  (same comment as for BOD5, Biological Oxygen Demand)
- Boron [water, ground-, long-term]: 2.306e-6 kg; lognormal variance with pedigree 0.8866, pedigree (1,1,2,1,1)
  (same comment as for BOD5, Biological Oxygen Demand)
- Phosphate [water, ground-]: 4.5927e-5 kg; lognormal variance with pedigree 0.2515, pedigree (1,1,2,1,1)
  (same comment as for Nickel, ion)
- BOD5, Biological Oxygen Demand [water, ground-]: 1.8144e-9 kg; lognormal variance with pedigree 0.32974, pedigree (1,1,2,1,1)
  (same comment as for Nickel, ion)
- Nickel, ion [water, ground-, long-term]: 1.5464e-5 kg; lognormal variance with pedigree 0.30265, pedigree (1,1,2,1,1)
  (same comment as for BOD5, Biological Oxygen Demand)

## Sampling procedure
Tailings model based on observed leachate concentrations in literature. Extrapolated to 60'000 years heeding chemical characteristics. Initial waste composition from various literature sources. Climate information for national copper deposits (identified from the USGS Major Mineral Deposits database) from literature as follows: global mean annual temperature and precipitation data from Fick and Hijmans (2017); global mean annual evapotranspiration data from Fekete et al. (2002).

References:
Fekete, B. M., Vorosmarty, C. J. & Grabs, W. (2002). High-resolution fields of global runoff combining observed river discharge and simulated water balances. Global Biogeochemical Cycles, 16, 15-1 - 15-10.
Fick, S. E. & Hijmans, R. J. (2017). Worldclim 2: New 1-km spatial resolution climate surfaces for global land areas. International Journal of Climatology, 37, 4302-4315.

## Extrapolations
Climate data collected for zinc-lead deposits globally and aggregated to reflect average climatic conditions of zinc-lead deposits worldwide. Initial tailings composition based on global average zinc-lead tailings composition, derived from literature data. Initial leachate concentration based on generic global average data also obtained from the literature.
