# pineapple production

Dataset: EcoSpold 2, unit process
Geography: GLO
Time period: 2010-01-01 to 2021-12-31
Technology level: current
Classification: ISIC rev.4 ecoinvent: 0122:Growing of tropical and subtropical fruits
Scenario: Business-as-Usual
System model: Allocation, cut-off by classification
Generated by: Franziska Stössel
Published in: Stoessel, Franziska; 2012
Database: ecoinvent
isCopyrightProtected: false
accessRestrictedTo: 1

## General comment
This dataset represents pineapple production.

Yield: 86 t / ha.
Duration of one cropping cycle: 24 months.
Field production.
The LCA study, from which this LCI has been derived, contains detailed descriptions of the system boundaries and the data sources used (Stoessel et al. 2012). The publication is published and freely available with comprehensive supporting information:
http://pubs.acs.org/doi/pdf/10.1021/es2030577
Franziska Stoessel, Ronnie Juraske, Stephan Pfister, Stefanie Hellweg. (2012) Life Cycle Inventory and Carbon and Water FoodPrint of Fruits and Vegetables: Application to a Swiss Retailer. Environmental Science & Technology 6(46) 3253-3262.
This activity was adapted to include the global average land use change (LUC) emissions according 2nd edition of the Quantis-modified tool developed by Blonk Consultants 'WFLDB-adapted-Blonk 2014 direct-land-use-change-assessment-tool_2015-05-18a.xlsx', tab. 'Country & land use unknown'. The size of the emission depends on (i) the relative crop expansion in all countries of the crop during the last 20 years and (ii) the corresponding, country specific land transformations. The current results are based on the average FAOSTAT data (harvested area) of 2009-2011 and 1989-1991. The weighted average is used which takes into account relative difference in crop expansion into primary forest, secondary forest, grassland, perennial and annual land.

## Included activities start
From maintenance of the orchards after harvest of the previous crop.

## Included activities end
This activity ends with harvest and storage.
The dataset includes a storage period of 0.6 month and it's use of electricity. And for the production, mulch films are included and disposed according to the disposal techniques used in the production country. The pesticide inputs are classified according to their chemical classes and the emmssions are assigned to the soil (100%). Mercury emissions are neglected due to a lack of data while other heavy metal emissions are included. The dataset doesn't include infrastructure for production and storage facilities. No transports for agricultural means of production from the regional storage to the farm are included.

## Technology
Production without production standard, but according to GAP

## Parameters
- fraction, irrigation water, to air: 0.586986 dimensionless; name fraction_IW_to_air; lognormal variance with pedigree 0.0409, pedigree (2,2,2,1,1)
  Literature value (Siebert, 2010) (Vionnet, S., Quantis Water Database - Technical Report, 2012).
- fraction, irrigation water, to ground water: 0.8 dimensionless; name fraction_IW_to_ground_water; lognormal variance with pedigree 0.0886, pedigree (4,3,1,1,4)
  Literature value (Doll, 2011) cross referenced with expert opinion.
- fraction, irrigation water to surface water: 0.2 dimensionless; name fraction_IW_to_surface_water; lognormal variance with pedigree 0.0886, pedigree (4,3,1,1,4)
  Literature value (Doll, 2011) cross referenced with expert opinion.

## Reference product
- pineapple: 1 kg; source Stoessel, Franziska; 2012; CPC 01318: Pineapples; By-product classification allocatable product
  production volume 2.31765e10 kg
    in kg / year (2010) including pineapples and pineapples for juice, juice concentrate and cand.
  property price 0.618 EUR2005
    Calculated from the trade statistics for the year 2005 published by the UN (COMTRADE database, accessed 20151105) as an average of 5 biggest importers of pineapple in the world; USA, BE, DE, IT and FR. Comtrade cathegory: 80430: Pineapples, fresh or dried.
  property carbon content 0.0639495
    carbon content on a dry matter basis (reserved; not for manual entry)
  properties: carbon content, non-fossil 0.0639495, water in wet mass 0.865 kg, wet mass 1 kg, water content 6.40741, carbon content, fossil 0, dry mass 0.135 kg, carbon allocation 0.00863318 kg

## Inputs from technosphere
- urea: 0 kg; source Stoessel, Franziska; 2012; pedigree (1,1,1,1,1)
  The exchange has been updated from 'urea, as N' into 'urea' and therefore its amount has been scaled (multiplied) from 0.0003 kg by 2.1438 kg of 'urea' per kg of 'urea, as N'. Original comment of the exchange is: substance is used in the pesticide section and the emissions are neglected
  properties: carbon content, fossil 0.2, dry mass 1 kg, wet mass 1 kg
- inorganic phosphorus fertiliser, as P2O5: 0 kg; source Stoessel, Franziska; 2012; pedigree (1,1,1,1,1)
  properties: wet mass 1 kg, dry mass 1 kg
- packaging, for fertilisers: 0.024254 kg; lognormal variance with pedigree 0.0592, pedigree (4,3,4,5,4)
  Total amount of active substance/s of fertilisers needed for the production of 'pineapple' is calculated to be circa 1.21E-02 kg. Fertiliser/s used in this dataset is/are: 'ammonium nitrate, as N', 'phosphate fertiliser, as P2O5', 'potassium sulfate, as K2O', 'urea, as N'. The total amount of active substance/s is doubled in order to account for the packaging of the dilluted product of fertiliser/s that is/are applied. Therefore, 2.43E-02 kg of packaging for fertilisers is justified with this exchange.
  properties: price 0.0642 EUR2005, dry mass 1 kg, heating value, net 25.01 MJ, carbon content, fossil 0.825301, wet mass 1 kg
  note on carbon content, fossil: Considering a chemical formula (C2H4)n for polyethylene, carbon content-fossil is calculated to be 0.856286 kg of Carbon per kg of dry mass.
- irrigation: 0.0176 m3; name water_irrigation_input; source Stoessel, Franziska; 2012; lognormal variance with pedigree 0.0198, pedigree (2,4,4,4,3)
  Average Costa Rica and Ghana
  properties: water content 9089.91, wet mass 1000 kg, dry mass 0.11 kg
- glyphosate: 5.23e-5 kg; source Stoessel, Franziska; 2012; lognormal variance with pedigree 0.0439, pedigree (3,3,5,3,2)
  properties: wet mass 1 kg, dry mass 1 kg, carbon content, fossil 0.214286
- triazine-compound, unspecified: 3.14e-5 kg; = tri1+tri2; source Stoessel, Franziska; 2012
  sum of compounds in this family
  properties: carbon content, fossil 0.475616, wet mass 1 kg, dry mass 1 kg
- packaging film, low density polyethylene: 0.00221 kg; source Stoessel, Franziska; 2012; lognormal variance with pedigree 0.0439, pedigree (3,3,5,3,2)
  properties: heating value, net 42.47 MJ, carbon content, fossil 0.857143, wet mass 1 kg, dry mass 1 kg
  note on carbon content, fossil: Polyethylene is formed out of a huge amount of ethylene monomers (C2H4) (ecoinvent v2.2 report 11_II). MW=28 g/mol
- potassium sulfate: 0 kg; source Stoessel, Franziska; 2012; pedigree (1,1,1,1,1)
  The exchange has been updated from 'potassium sulfate, as K2O' into 'potassium sulfate' and therefore its amount has been scaled (multiplied) from 0.0077 kg by 1.85 kg of 'potassium sulfate' per kg of 'potassium sulfate, as K2O'.
  properties: dry mass 1 kg, wet mass 1 kg
- fertilising, by broadcaster: 0.000291 ha; source Stoessel, Franziska; 2012; lognormal variance with pedigree 0.0439, pedigree (3,3,5,3,2)
  Fertilizing by broadcaster is used as a proxy for all the machinery work done in horticultural processes.
- electricity, low voltage: 0.0128 kWh; source Stoessel, Franziska; 2012; lognormal variance with pedigree 0.0439, pedigree (3,3,5,3,2)
- pesticide, unspecified: 3.9928e-5 kg; = unsp1+unsp2+unsp3; source Stoessel, Franziska; 2012; lognormal variance with pedigree 0.0439, pedigree (3,3,5,3,2)
  properties: dry mass 1 kg, carbon content, fossil 0.486978, wet mass 1 kg
  note on carbon content, fossil: Mean of C content in all pesticides whose formula has been documented in Sutter 2010
- organophosphorus-compound, unspecified: 0.000125 kg; = org1+org2; source Stoessel, Franziska; 2012
  sum of compounds in this family
  property carbon content, fossil 0.260898; name C_content_fossil
  property water content 0; name water_content
  property carbon content, non-fossil 0; name C_content_non_fossil
  property water in wet mass 0 kg; name WWM
  property dry mass 1 kg; name DM
  property wet mass 1 kg; name WM
- ammonium nitrate: 0 kg; source Stoessel, Franziska; 2012; pedigree (1,1,1,1,1)
  The exchange has been updated from 'ammonium nitrate, as N' into 'ammonium nitrate' and therefore its amount has been scaled (multiplied) from 0.0028 kg by 2.8573 kg of 'ammonium nitrate' per kg of 'ammonium nitrate, as N'.
  properties: wet mass 1 kg, dry mass 1 kg
- diphenylether-compound: 1.87e-9 kg; = diph1; source Stoessel, Franziska; 2012
  sum of compounds in this family
  properties: carbon content, fossil 0.560061, wet mass 1 kg, dry mass 1 kg
- packaging, for pesticides: 0.00049726 kg; lognormal variance with pedigree 0.0592, pedigree (4,3,4,5,4)
  Total amount of active substance/s of pesticides needed for the production of pineapple is calculated to be circa 2.49E-04 kg. Pesticide/s used in this dataset is/are: 'diphenylether-compound', 'glyphosate', 'organophosphorus-compound, unspecified', 'pesticide, unspecified', 'triazine-compound, unspecified'. The total amount of active substance/s is doubled in order to account for the packaging of the dilluted product of pesticide/s that is/are applied. Therefore, 4.97E-04 kg of packaging for pesticides is justified with this exchange.
  properties: heating value, net 25.97 MJ, carbon content, fossil 0.85714, price 0.0642 EUR2005, wet mass 1 kg, dry mass 1 kg
- urea: 4.19907e-5, 3.38725e-5, 0.000228705, 0.000267826 kg (4 entries); source Stoessel, Franziska; 2012; lognormal variance with pedigree 0.0819, pedigree (5,3,5,3,2)
  (same comment as for urea)
- inorganic phosphorus fertiliser, as P2O5: 5.226e-5, 5.31017e-6, 0.000189652, 2.64881e-6, 3.73028e-7, 1.02598e-5, 3.79298e-7, 6.12048e-6, 3.41838e-6, 1.25529e-5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 kg (30 entries); source Stoessel, Franziska; 2012; lognormal variance with pedigree 0.0439, pedigree (3,3,5,3,2)
- potassium sulfate: 0.00246892, 0.0117203 kg (2 entries); source Stoessel, Franziska; 2012; lognormal variance with pedigree 0.0439, pedigree (3,3,5,3,2)
  (same comment as for potassium sulfate)
- ammonium nitrate: 0.00197512, 0.00136982, 0.00105285, 0.00357413 kg (4 entries); source Stoessel, Franziska; 2012; lognormal variance with pedigree 0.0439, pedigree (3,3,5,3,2)
  (same comment as for ammonium nitrate)

## Inputs from nature
- Transformation, to permanent crop, irrigated, intensive [natural resource, land]: 0.1165 m2; source Stoessel, Franziska; 2012; lognormal variance with pedigree 0.0453, pedigree (3,3,5,3,2)
- Transformation, from permanent crop, irrigated, intensive [natural resource, land]: 0.1165 m2; source Stoessel, Franziska; 2012; lognormal variance with pedigree 0.0453, pedigree (3,3,5,3,2)
- Energy, gross calorific value, in biomass [natural resource, biotic]: 2.57963 MJ; lognormal variance with pedigree 0.0099, pedigree (2,3,4,3,1)
  Calculated value based on literature. The gross energy is calculated using following formula; gross energy (MJ) = crude protein (kg)*23.04 (MJ/kg)+crude fat (kg)*38.96 (MJ/kg)+crude fibre (kg)*17.95 (MJ/kg)+carbohydrates (kg)*17.17 (MJ/kg) (formula based on expert opinion, cross referenced; Diepenbrock, 2012, Energy Balance in Crop Production). The product composition of fruits and vegetables is extracted from the USDA National Nutrient Database for Standard Reference (http://ndb.nal.usda.gov/, accessed 20131114). Crude protein (g)= 5.4, crude fat (g)= 1.2, crude fibre (g)= 14, ash (g)= 2.2, water (g)= 860, carbohydrates (g)= 131.2. The gross energy per kg of DM is 19.82MJ. The calculated gross energy per kg of reference product is thus 2.58MJ.
- Occupation, permanent crop, irrigated, intensive [natural resource, land]: 0.233 m2*year; source Stoessel, Franziska; 2012; lognormal variance with pedigree 0.0453, pedigree (3,3,5,3,2)

## Emissions to nature
- Ametryn [soil, agricultural]: 1.63e-5 kg; name tri1; source Stoessel, Franziska; 2012; lognormal variance with pedigree 0.0777, pedigree (3,4,5,3,2)
- Nitrogen oxides [air, non-urban air or from high stacks]: 1.14627e-5 kg; source Thomas Nemecek 2011; lognormal variance with pedigree 0.0747, pedigree (3,4,5,3,2)
- Fosetyl-aluminium [soil, agricultural]: 3.49e-5 kg; name org1; source Stoessel, Franziska; 2012; lognormal variance with pedigree 0.0777, pedigree (3,4,5,3,2)
- Phosphate [water, ground-]: 1.63e-6 kg; source Stoessel, Franziska; 2012; lognormal variance with pedigree 0.0847, pedigree (3,4,5,3,2)
- Fenamiphos [soil, agricultural]: 9.01e-5 kg; name org2; source Stoessel, Franziska; 2012; lognormal variance with pedigree 0.0777, pedigree (3,4,5,3,2)
- Copper [soil, agricultural]: -9.058e-7 kg; source Thomas Nemecek 2011
- Hydramethylnon [soil, agricultural]: 3.48e-7 kg; name unsp2; source Stoessel, Franziska; 2012; lognormal variance with pedigree 0.0777, pedigree (3,4,5,3,2)
- Nitrate [water, ground-]: 0.00370671 kg; source Thomas Nemecek 2011; lognormal variance with pedigree 0.0847, pedigree (3,4,5,3,2)
- Bromacil [soil, agricultural]: 3.26e-5 kg; name unsp3; source Stoessel, Franziska; 2012; lognormal variance with pedigree 0.0777, pedigree (3,4,5,3,2)
- Hexazinone [soil, agricultural]: 1.51e-5 kg; name tri2; source Stoessel, Franziska; 2012; lognormal variance with pedigree 0.0777, pedigree (3,4,5,3,2)
- Water [water, surface water]: 0.00145381 m3; name water_to_water_surface; = water_irrigation_input*(1-fraction_IW_to_air)*fraction_IW_to_surface_water; lognormal variance with pedigree 0.0966, pedigree (4,3,4,1,4)
  Calculated value. See the parameters and their comments to understand the calculation.
  property fraction, origin: fresh water 1; name fraction_origin_fresh_water_Wsw
  property fraction, origin: salt water 0; name fraction_origin_salt_water_Wsw
- Nickel [soil, agricultural]: 2.43256e-8 kg; source Thomas Nemecek 2011; lognormal variance with pedigree 0.0847, pedigree (3,4,5,3,2)
- Glyphosate [soil, agricultural]: 5.23e-5 kg; source Stoessel, Franziska; 2012; lognormal variance with pedigree 0.0777, pedigree (3,4,5,3,2)
- Fluazifop-P-butyl [soil, agricultural]: 1.87e-9 kg; name diph1; source Stoessel, Franziska; 2012; lognormal variance with pedigree 0.0777, pedigree (3,4,5,3,2)
- Lead [soil, agricultural]: 6.67979e-7 kg; source Thomas Nemecek 2011; lognormal variance with pedigree 0.0847, pedigree (3,4,5,3,2)
- Cadmium [soil, agricultural]: 6.01595e-8 kg; source Thomas Nemecek 2011; lognormal variance with pedigree 0.0847, pedigree (3,4,5,3,2)
- Quizalofop-p-ethyl [soil, agricultural]: 1.74419e-5 kg; source Stoessel, Franziska; 2012; lognormal variance with pedigree 0.0847, pedigree (3,4,5,3,2)
- Chromium [soil, agricultural]: -1.70817e-7 kg; source Thomas Nemecek 2011
- Metalaxyl-M [soil, agricultural]: 6.98e-6 kg; name unsp1; source Stoessel, Franziska; 2012; lognormal variance with pedigree 0.0777, pedigree (3,4,5,3,2)
- Phosphorus [water, surface water]: 5.7e-6 kg; source Stoessel, Franziska; 2012; lognormal variance with pedigree 0.0847, pedigree (3,4,5,3,2)
- Dinitrogen monoxide [air, non-urban air or from high stacks]: 5.45844e-5 kg; source Thomas Nemecek 2011; lognormal variance with pedigree 0.0747, pedigree (3,4,5,3,2)
- Ammonia [air, non-urban air or from high stacks]: 6.77571e-5 kg; source Thomas Nemecek 2011; lognormal variance with pedigree 0.0527, pedigree (3,4,5,3,2)
- Carbon dioxide, from soil or biomass stock [air, non-urban air or from high stacks]: 0.0123274 kg; normal variance with pedigree 0.5452, pedigree (3,3,5,5,2)
  Global average LUC emissions according 2nd edition of the Quantis-modified tool developed by Blonk Consultants 'WFLDB-adapted-Blonk 2014 direct-land-use-change-assessment-tool_2015-05-18a.xlsx', tab. 'Country & land use unknown'. The emission are based on the relative change in production areas in all countries for a given crop. The weighted average is used which takes into acount relative difference in crop expansion into primary forest, secondary forest, grassland, perennial and annual land.
  Uncertainty: Uncertainty estimated based on IPCC 2006
- Water [water, ground-]: 0.00581524 m3; name water_to_water_ground; = water_irrigation_input*(1-fraction_IW_to_air)*fraction_IW_to_ground_water; lognormal variance with pedigree 0.0966, pedigree (4,3,4,1,4)
  Calculated value. See the parameters and their comments to understand the calculation.
  property fraction, origin: fresh water 1; name fraction_origin_fresh_water_Wgw
  property fraction, origin: unspecified 0; name fraction_origin_unspecified_Wgw
  property fraction, origin: salt water 0; name fraction_origin_salt_water_Wgw
- Water [air, unspecified]: 0.010331 m3; name water_to_air_unspecified; = water_irrigation_input*fraction_IW_to_air; lognormal variance with pedigree 0.0487, pedigree (2,2,4,1,1)
  Calculated value based on literature values and expert opinion. See comments in the parametres' comment field.
  property fraction, origin: unspecified 0; name fraction_origin_unspecified
  property fraction, origin: fresh water 1; name fraction_origin_fresh_water
  property fraction, origin: salt water 0; name fraction_origin_salt_water
- Zinc [soil, agricultural]: -4.68636e-7 kg; source Thomas Nemecek 2011

## Sampling procedure
The LCI is based on pineapple production information from different sources (peer reviewed journals, books, extension leaflets, personal information) and is well representative for a conventional production in their main production countries. Most probably it is representative for productions in other countries or farms which produces similarly.
Please refer to Stoessel et al. (2012) for more information: http://pubs.acs.org/doi/pdf/10.1021/es2030577
Franziska Stoessel, Ronnie Juraske, Stephan Pfister, Stefanie Hellweg. (2012) Life Cycle Inventory and Carbon and Water FoodPrint of Fruits and Vegetables: Application to a Swiss Retailer. Environmental Science & Technology 6(46) 3253-3262.

## Extrapolations
This dataset has been extrapolated from year 2010 to the year of the calculation (2021). The uncertainty has been adjusted accordingly.

## Review by Bo Weidema 2011-12-31
Infrastructure missing. Production slightly volume too large due to double-counting of pineapples for juice

## Review by Gregor Wernet 2011-12-31
The documentation on this dataset is quite poor. The dataset has been temporarily accepted since the data provider promised to provide more detailed information within the dataset and in a general document in the editorial section of the ecoinvent homepage.
