# treatment of wood ash mixture, pure, sanitary landfill

Dataset: EcoSpold 2, unit process
Geography: CH
Time period: 1994-01-01 to 2021-12-31
Technology level: current
Classification: EcoSpold01Categories: waste management/sanitary landfill
Classification: ISIC rev.4 ecoinvent: 3821:Treatment and disposal of non-hazardous waste
Tags: ConvertedDataset; Treatment
Scenario: Business-as-Usual
System model: Allocation, cut-off by classification
Generated by: Gabor Doka (obsolete)
Published in: Doka G. 2007
Database: ecoinvent
isCopyrightProtected: true
accessRestrictedTo: 1

## General comment
Inventoried waste contains 100% wood ash pure; .
waste composition (wet, in ppm): H2O n.a.; O 445010; H n.a.; C 12000; S 9200; N n.a.; P 9800; B n.a.; Cl 3200; Br n.a.; F n.a.; I n.a.; Ag n.a.; As 6.7; Ba n.a.; Cd 14.2; Co 18; Cr 194.9; Cu 163.2; Hg 0.1; Mn 19956; Mo 3.7; Ni 55.2; Pb 65; Sb n.a.; Se n.a.; Sn n.a.; V 39.5; Zn 1662; Be n.a.; Sc n.a.; Sr n.a.; Ti 1383; Tl n.a.; W n.a.; Si 82600; Fe 22833; Ca 284400; Al 20800; K 54500; Mg 32100; Na n.a.;
Share of carbon in waste that is biogenic 100%.
Overall degradability of waste during 100 years: 5%.
[This dataset was already contained in the ecoinvent database version 2. It was not individually updated during the transfer to ecoinvent version 3. Life Cycle Impact Assessment results may still have changed, as they are affected by changes in the supply chain, i.e. in other datasets. This dataset was generated following the ecoinvent quality guidelines for version 2. It may have been subject to central changes described in the ecoinvent version 3 change report (http://www.ecoinvent.org/database/ecoinvent-version-3/reports-of-changes/), and the results of the central updates were reviewed extensively. The changes added e.g. consistent water flows and other information throughout the database. The documentation of this dataset can be found in the ecoinvent reports of version 2, which are still available via the ecoinvent website. The change report linked above covers all central changes that were made during the conversion process.]

## Included activities end
Waste-specific short-term emissions to air via landfill gas incineration and landfill leachate. Burdens from treatment of short-term leachate (0-100a) in wastewater treatment plant (including WWTP sludge disposal in municipal incinerator). Long-term emissions from landfill to groundwater (after base lining failure).

## Geography
Technology encountered in Switzerland in 2000. Landfill includes base seal, leachate collection system, treatment of leachate in municipal wastewater treatment plant.

## Technology
Swiss municipal sanitary landfill for biogenic or untreated municipal waste ('reactive organic landfill'). Landfill gas and leachate collection system. Recultivation and monitoring for 150 years after closure.

## Reference product
- wood ash mixture, pure: -1 kg; name wood_ash_RP; By-product classification Waste; CPC 3928: Sawdust and wood waste and scrap
  production volume 1.50412e7 kg; name wood_ash_RP_PV; = 1.787E+09*0.008417
    Estimated. The regional production volume is extrapolated from the global production volume using the nominal GDP of 2005 (source: United Nations, http://data.un.org/Glossary.aspx?q=GDP+%28current+US%24%29, accessed 20130726 and 20130312).
    Gross domestic product (GDP) at current prices is GDP at prices of the current reporting period. Also known as nominal GDP.
  property heating value, net 0 MJ
    Non combustible products are assumed to have an LHV equal to zero (0).
  property price 0 EUR2005; name wood_ash_RP_price_EUR2005
    Waste products are assigned a price of zero as they are assumed to require further treatment.
  property carbon content 0.012
    carbon content on a dry matter basis (reserved; not for manual entry)
  properties: carbon content, non-fossil 0.012, water content 0, water in wet mass 0 kg, wet mass 1 kg, dry mass 1 kg, carbon content, fossil 0, carbon allocation 0.012 kg

## Inputs from technosphere
- sodium hydroxide, without water, in 50% solution state: 4.36e-8 kg; lognormal variance with pedigree 0.98, pedigree (1,1,5,1,1)
  burden from incineration of sludge from wastewater treatment of the short-term leachate (0-100a). uncertainty is calculated from uncertainties in waste composition and transfer coefficients in incinerator and uncertainty of waste decomposition and short-term leaching in sanitary landfill
  properties: heating value, net 3.03 MJ, dry mass 1 kg, wet mass 1 kg
- cement, unspecified: 8.9e-5 kg; lognormal variance with pedigree 0.22, pedigree (1,1,5,1,1)
  (same comment as for sodium hydroxide, without water, in 50% solution state)
  properties: dry mass 1 kg, wet mass 1 kg
- hydrochloric acid, without water, in 30% solution state: 1.34e-8 kg; lognormal variance with pedigree 0.39, pedigree (1,1,5,1,1)
  (same comment as for sodium hydroxide, without water, in 50% solution state)
  properties: dry mass 1 kg, wet mass 1 kg, heating value, net 3.32 MJ
- process-specific burdens, slag landfill: 0.00163 kg; lognormal variance with pedigree 0.21, pedigree (1,1,5,1,1)
  burden from incineration of sludge from wastewater treatment of the short-term leachate (0-100a). uncertainty is calculated from uncertainties in waste composition and transfer coefficients in incinerator and uncertainty of waste decomposition and short-term leaching in sanitary landfill;activityLink introduced to establish a direct link to the corresponding regional supply of this product
- electricity, for reuse in municipal waste incineration only: 0.000503 kWh; name E_el_prod_MSWI; lognormal variance with pedigree 0.39, pedigree (1,1,5,1,1)
  (same comment as for sodium hydroxide, without water, in 50% solution state)
- iron (III) chloride, without water, in 40% solution state: 0.000181 kg; lognormal variance with pedigree 0.93, pedigree (1,1,5,1,1)
  (same comment as for sodium hydroxide, without water, in 50% solution state)
  properties: dry mass 1 kg, wet mass 1 kg
- heat, for reuse in municipal waste incineration only: 0.00293 MJ; name E_th_prod_MSWI; lognormal variance with pedigree 0.2, pedigree (1,1,5,1,1)
  (same comment as for sodium hydroxide, without water, in 50% solution state)
- heat, district or industrial, natural gas: 0.001632 MJ; lognormal variance with pedigree 0.34, pedigree (5,5,5,5,5)
  burden from wastewater treatment of the short-term leachate (0-100a). Uncertainty calculated from unertainty of the waste composition of this waste, uncertainty in waste decomposition and short-term leaching in sanitary landfill
  properties: heating value, net 1 MJ
- waste graphical paper: -3.88e-5 kg; name waste_paper_ByP; lognormal variance with pedigree 0.2106, pedigree (5,5,5,5,5)
  (same comment as for heat, district or industrial, natural gas)
  production volume 583.598 kg; = ABS(waste_paper_ByP/ wood_ash_RP)* wood_ash_RP_PV
    Calculated from the production volume of wood ash mixture, pure, 0% water in proportion to the respective output amounts.
  property price 0 EUR2005; name waste_paper_ByP_price_EUR2005
  properties: dry mass 0.888 kg, wet mass 1 kg, heating value, net 14.12 MJ, water content 0.126126, carbon content, non-fossil 0.454955
  note on heating value, net: Value taken from the general comment of the treatment dataset.
- sewer grid, 5E9l/year, 110 km: 5.45e-10 km; lognormal variance with pedigree 0.2106, pedigree (5,5,5,5,5)
  (same comment as for heat, district or industrial, natural gas)
- waste plastic, mixture: -3.88e-5 kg; name waste_cement_ByP; lognormal variance with pedigree 0.2106, pedigree (5,5,5,5,5)
  (same comment as for heat, district or industrial, natural gas)
  production volume 583.598 kg; = ABS( waste_cement_ByP/ wood_ash_RP)* wood_ash_RP_PV
    (same comment as for waste graphical paper)
  property price 0 EUR2005; name waste_cement_ByP_price_EUR2005
  properties: dry mass 0.847 kg, wet mass 1 kg, water content 0.180638, carbon content, fossil 0.747344, heating value, net 30.79 MJ
  note on carbon content, fossil: C content in 1 kg DM was calculated using data in Tab A.2, ecoinvent v2.2 report 13_I
- heat, central or small-scale, other than natural gas: 0.0011844 MJ; lognormal variance with pedigree 0.34, pedigree (5,5,5,5,5)
  (same comment as for heat, district or industrial, natural gas)
  properties: heating value, net 1 MJ
- waste cement, hydrated: -0.000222 kg; name waste_plastic_ByP; lognormal variance with pedigree 0.22, pedigree (1,1,5,1,1)
  (same comment as for sodium hydroxide, without water, in 50% solution state)
  production volume 3339.14 kg; = ABS( waste_plastic_ByP/ wood_ash_RP)* wood_ash_RP_PV
    (same comment as for waste graphical paper)
  property price 0 EUR2005; name waste_plastic_ByP_price_EUR2005
  properties: wet mass 1 kg, dry mass 1 kg
- quicklime, milled, packed: 7.9e-9 kg; lognormal variance with pedigree 0.98, pedigree (1,1,5,1,1)
  (same comment as for sodium hydroxide, without water, in 50% solution state)
  properties: wet mass 1 kg, water content 0.010101, dry mass 0.99 kg
- chemical, inorganic: 2.23e-8 kg; lognormal variance with pedigree 0.39, pedigree (1,1,5,1,1)
  (same comment as for sodium hydroxide, without water, in 50% solution state)
  properties: carbon content, fossil 0.003, wet mass 1 kg, dry mass 1 kg
  note on carbon content, fossil: This dataset is an unweighted average of 20 inorganic substances (listed in Tab 88.1, ecoinvent v2.2 report 8, part II), being part of the top100 chemicals included in this database. The C-content has also been calculated as an unweighted average of the C content of the substances composing this dataset.
- process-specific burdens, sanitary landfill: 1 kg; lognormal variance with pedigree 0.04, pedigree (1,1,5,1,1)
  demands per kilogram waste. uncertainty is heeded in the module;activityLink introduced to establish a direct link to the corresponding regional supply of this product
- residual material landfill: 4.63e-13 unit; lognormal variance with pedigree 0.21, pedigree (1,1,5,1,1)
  (same comment as for sodium hydroxide, without water, in 50% solution state)
- wastewater treatment facility, capacity 5E9l/year: 1.42e-11 unit; lognormal variance with pedigree 0.2106, pedigree (5,5,5,5,5)
  (same comment as for heat, district or industrial, natural gas)
- municipal waste incineration facility: 8.74e-13 unit; lognormal variance with pedigree 0.2, pedigree (1,1,5,1,1)
  Burden from incineration of sludge from wastewater treatment of the short-term leachate (0-100a).
  Burden from incineration of sludge from wastewater treatment of the short-term leachate (0-100a).
- aluminium sulfate, powder: 3.51e-5 kg; lognormal variance with pedigree 1.06, pedigree (5,5,5,5,5)
  (same comment as for heat, district or industrial, natural gas)
  properties: wet mass 1 kg, dry mass 1 kg
- slag landfill: 2.9e-12 unit; lognormal variance with pedigree 0.21, pedigree (1,1,5,1,1)
  (same comment as for sodium hydroxide, without water, in 50% solution state)
- electricity, low voltage: 0.000631 kWh; lognormal variance with pedigree 0.31, pedigree (5,5,5,5,5)
  (same comment as for heat, district or industrial, natural gas)
- chemical, organic: 1.92e-7 kg; lognormal variance with pedigree 1.65, pedigree (1,1,5,1,1)
  (same comment as for sodium hydroxide, without water, in 50% solution state)
  properties: heating value, net 19.03 MJ, carbon content, fossil 0.628, wet mass 1 kg, dry mass 1 kg
  note on carbon content, fossil: This dataset is an unweighted average of 20 organic substances (listed in Tab 88.1, ecoinvent v2.2 report 8, part II), being part of the top100 chemicals included in this database. The C-content has also been calculated as an unweighted average of the C content of the substances composing this dataset.
- process-specific burdens, residual material landfill: 0.000222 kg; lognormal variance with pedigree 0.21, pedigree (1,1,5,1,1)
  (same comment as for process-specific burdens, slag landfill)
- process-specific burdens, municipal waste incineration: 0.0035 kg; lognormal variance with pedigree 0.2, pedigree (1,1,5,1,1)
  Burden from incineration of sludge from wastewater treatment of the short-term leachate (0-100a).
  Burden from incineration of sludge from wastewater treatment of the short-term leachate (0-100a).;activityLink introduced to establish a direct link to the corresponding regional supply of this product
- sanitary landfill facility: 5.56e-10 unit; lognormal variance with pedigree 0.04, pedigree (1,1,5,1,1)
  demands per kilogram waste. uncertainty is heeded in the module
  This exchange has an activity link directly to the producing activity because the product is primarily consumed in the same geographical area where it is produced.
- iron sulfate: 0.00013 kg; lognormal variance with pedigree 1.06, pedigree (5,5,5,5,5)
  (same comment as for heat, district or industrial, natural gas)
  properties: wet mass 1 kg, dry mass 1 kg

## Emissions to nature
- Calcium [air, urban air close to ground]: 3.03e-7 kg; lognormal variance with pedigree 0.53, pedigree (1,1,5,1,1)
  Emissions from short-term leachate treatment and incineration of resulting sludge. Uncertainty calculated depending on waste input and uncertainty of transfer coefficents in landfill, wastewater treatment and incineration model.
- Magnesium [water, ground-, long-term]: 0.0312 kg; lognormal variance with pedigree 0.27, pedigree (1,1,5,1,1)
  Emissions from long-term leachate (>100a) directly from MSW landfill and indirectly via incineration of treatement sludge from leachate treatement. Uncertainty calculated depending on waste input and uncertainty of long-term transfer coefficents in landfill.
- BOD5, Biological Oxygen Demand [water, surface water]: 3.47e-6 kg; lognormal variance with pedigree 1, pedigree (1,1,5,1,1)
  (same comment as for Calcium)
- Sulfate [water, ground-, long-term]: 0.0251 kg; lognormal variance with pedigree 0.42, pedigree (1,1,5,1,1)
  (same comment as for Magnesium)
- BOD5, Biological Oxygen Demand [water, ground-, long-term]: 0.000757 kg; lognormal variance with pedigree 0.87, pedigree (1,1,5,1,1)
  (same comment as for Magnesium)
- Nickel, ion [water, ground-, long-term]: 5.51e-5 kg; lognormal variance with pedigree 1.08, pedigree (1,1,5,1,1)
  (same comment as for Magnesium)
- Hydrogen chloride [air, non-urban air or from high stacks]: 5.81e-6 kg; lognormal variance with pedigree 1.13, pedigree (1,1,5,1,1)
  burden from direct release or incineration of landfill biogas. Uncertainty calculated from unertainty of the waste composition of this waste, uncertainty in waste decomposition and short-term leaching in sanitary landfill
- Copper, ion [water, ground-, long-term]: 0.000163 kg; lognormal variance with pedigree 0.94, pedigree (1,1,5,1,1)
  (same comment as for Magnesium)
- Iron, ion [water, ground-, long-term]: 0.00165 kg; lognormal variance with pedigree 2.03, pedigree (1,1,5,1,1)
  (same comment as for Magnesium)
- Sulfate [water, surface water]: 0.000635 kg; lognormal variance with pedigree 0.56, pedigree (1,1,5,1,1)
  Emissions from short-term leachate treatment. Uncertainty calculated depending on waste input and uncertainty of transfer coefficents in landfill and wastewater treatment.
- Copper [air, urban air close to ground]: 2.18e-13 kg; lognormal variance with pedigree 1.85, pedigree (1,1,5,1,1)
  (same comment as for Calcium)
- Mercury [water, surface water]: 1.08e-10 kg; lognormal variance with pedigree 2.4, pedigree (1,1,5,1,1)
  (same comment as for Calcium)
- Carbon monoxide, non-fossil [air, urban air close to ground]: 8.09e-7 kg; lognormal variance with pedigree 0.47, pedigree (1,1,5,1,1)
  (same comment as for Calcium)
- Molybdenum [water, ground-, long-term]: 1.46e-6 kg; lognormal variance with pedigree 1.64, pedigree (1,1,5,1,1)
  (same comment as for Magnesium)
- Chromium, ion [water, surface water]: 1.74e-10 kg; lognormal variance with pedigree 1.67, pedigree (1,1,5,1,1)
  (same comment as for Calcium)
- Sulfur dioxide [air, non-urban air or from high stacks]: 6e-5 kg; lognormal variance with pedigree 0.92, pedigree (1,1,5,1,1)
  (same comment as for Hydrogen chloride)
- Lead [water, ground-, long-term]: 6.5e-5 kg; lognormal variance with pedigree 1.06, pedigree (1,1,5,1,1)
  (same comment as for Magnesium)
- COD, Chemical Oxygen Demand [water, surface water]: 1.1e-5 kg; lognormal variance with pedigree 0.99, pedigree (1,1,5,1,1)
  (same comment as for Calcium)
- Cadmium [air, non-urban air or from high stacks]: 8.33e-10 kg; lognormal variance with pedigree 2.29, pedigree (1,1,5,1,1)
  (same comment as for Hydrogen chloride)
- Arsenic, ion [water, surface water]: 5.3e-8 kg; lognormal variance with pedigree 1.74, pedigree (1,1,5,1,1)
  (same comment as for Calcium)
- Vanadium [air, urban air close to ground]: 1.03e-11 kg; lognormal variance with pedigree 1.62, pedigree (1,1,5,1,1)
  (same comment as for Calcium)
- Molybdenum [water, surface water]: 1.15e-8 kg; lognormal variance with pedigree 1.88, pedigree (1,1,5,1,1)
  (same comment as for Calcium)
- Phosphate [water, surface water]: 2.96e-5 kg; lognormal variance with pedigree 0.93, pedigree (1,1,5,1,1)
  (same comment as for Calcium)
- Chromium VI [water, ground-, long-term]: 8.88e-7 kg; lognormal variance with pedigree 8.19, pedigree (1,1,5,1,1)
  (same comment as for Magnesium)
- Magnesium [air, non-urban air or from high stacks]: 2.48e-7 kg; lognormal variance with pedigree 1.56, pedigree (1,1,5,1,1)
  (same comment as for Hydrogen chloride)
- Manganese [water, ground-, long-term]: 0.0189 kg; lognormal variance with pedigree 0.31, pedigree (1,1,5,1,1)
  (same comment as for Magnesium)
- Nickel [air, non-urban air or from high stacks]: 4.01e-11 kg; lognormal variance with pedigree 2.68, pedigree (1,1,5,1,1)
  (same comment as for Hydrogen chloride)
- Mercury [air, urban air close to ground]: 0 kg; pedigree (1,1,1,1,1)
  (same comment as for Calcium)
- DOC, Dissolved Organic Carbon [water, ground-, long-term]: 0.00292 kg; lognormal variance with pedigree 0.87, pedigree (1,1,5,1,1)
  (same comment as for Magnesium)
- NMVOC, non-methane volatile organic compounds, unspecified origin [air, urban air close to ground]: 4.46e-10 kg; lognormal variance with pedigree 1.16, pedigree (1,1,5,1,1)
  (same comment as for Calcium)
- Magnesium [water, surface water]: 0.000894 kg; lognormal variance with pedigree 0.51, pedigree (1,1,5,1,1)
  (same comment as for Calcium)
- Carbon dioxide, non-fossil [air, non-urban air or from high stacks]: 0.0015 kg; lognormal variance with pedigree 0.58, pedigree (1,1,5,1,1)
  (same comment as for Hydrogen chloride)
- Vanadium [air, non-urban air or from high stacks]: 5.21e-11 kg; lognormal variance with pedigree 2.65, pedigree (1,1,5,1,1)
  (same comment as for Hydrogen chloride)
- Cadmium, ion [water, ground-, long-term]: 1.41e-5 kg; lognormal variance with pedigree 1.26, pedigree (1,1,5,1,1)
  (same comment as for Magnesium)
- Cobalt [air, urban air close to ground]: 4.52e-15 kg; lognormal variance with pedigree 1.66, pedigree (1,1,5,1,1)
  (same comment as for Calcium)
- Nickel, ion [water, surface water]: 9.73e-8 kg; lognormal variance with pedigree 1.59, pedigree (1,1,5,1,1)
  (same comment as for Calcium)
- Mercury [water, ground-, long-term]: 9.95e-8 kg; lognormal variance with pedigree 1.9, pedigree (1,1,5,1,1)
  (same comment as for Magnesium)
- Potassium [air, non-urban air or from high stacks]: 4.98e-7 kg; lognormal variance with pedigree 1.49, pedigree (1,1,5,1,1)
  (same comment as for Hydrogen chloride)
- Zinc, ion [water, surface water]: 1.22e-6 kg; lognormal variance with pedigree 1.17, pedigree (1,1,5,1,1)
  (same comment as for Calcium)
- Chromium [air, urban air close to ground]: 4.05e-15 kg; lognormal variance with pedigree 1.75, pedigree (1,1,5,1,1)
  (same comment as for Calcium)
- Molybdenum [air, urban air close to ground]: 1.92e-11 kg; lognormal variance with pedigree 1.92, pedigree (1,1,5,1,1)
  (same comment as for Calcium)
- Vanadium, ion [water, surface water]: 1.06e-7 kg; lognormal variance with pedigree 1.57, pedigree (1,1,5,1,1)
  (same comment as for Calcium)
- Phosphorus [air, urban air close to ground]: 1.74e-8 kg; lognormal variance with pedigree 0.97, pedigree (1,1,5,1,1)
  (same comment as for Calcium)
- DOC, Dissolved Organic Carbon [water, surface water]: 2.68e-6 kg; lognormal variance with pedigree 0.99, pedigree (1,1,5,1,1)
  (same comment as for Calcium)
- Nickel [air, urban air close to ground]: 2.73e-15 kg; lognormal variance with pedigree 1.71, pedigree (1,1,5,1,1)
  (same comment as for Calcium)
- Lead [water, surface water]: 2.1e-9 kg; lognormal variance with pedigree 1.87, pedigree (1,1,5,1,1)
  (same comment as for Calcium)
- Silicon [air, non-urban air or from high stacks]: 5.16e-8 kg; lognormal variance with pedigree 1.8, pedigree (1,1,5,1,1)
  (same comment as for Hydrogen chloride)
- Titanium [air, non-urban air or from high stacks]: 8.64e-10 kg; lognormal variance with pedigree 2.28, pedigree (1,1,5,1,1)
  (same comment as for Hydrogen chloride)
- Titanium, ion [water, ground-, long-term]: 0.00138 kg; lognormal variance with pedigree 0.66, pedigree (1,1,5,1,1)
  (same comment as for Magnesium)
- Vanadium, ion [water, ground-, long-term]: 1.15e-5 kg; lognormal variance with pedigree 1.51, pedigree (1,1,5,1,1)
  (same comment as for Magnesium)
- Chloride [water, ground-, long-term]: 0.00279 kg; lognormal variance with pedigree 0.55, pedigree (1,1,5,1,1)
  (same comment as for Magnesium)
- Particulates, < 2.5 um [air, non-urban air or from high stacks]: 2.86e-8 kg; lognormal variance with pedigree 0.88, pedigree (1,1,5,1,1)
  (same comment as for Hydrogen chloride)
- Zinc, ion [water, ground-, long-term]: 0.00137 kg; lognormal variance with pedigree 0.64, pedigree (1,1,5,1,1)
  (same comment as for Magnesium)
- Arsenic, ion [water, ground-, long-term]: 6.65e-6 kg; lognormal variance with pedigree 1.36, pedigree (1,1,5,1,1)
  (same comment as for Magnesium)
- Carbon dioxide, non-fossil [air, urban air close to ground]: 5.02e-5 kg; lognormal variance with pedigree 0.99, pedigree (1,1,5,1,1)
  (same comment as for Calcium)
- Cobalt [water, surface water]: 1.47e-7 kg; lognormal variance with pedigree 1.54, pedigree (1,1,5,1,1)
  (same comment as for Calcium)
- Calcium, ion [water, ground-, long-term]: 0.283 kg; lognormal variance with pedigree 0.08, pedigree (1,1,5,1,1)
  (same comment as for Magnesium)
- Calcium, ion [water, surface water]: 0.00167 kg; lognormal variance with pedigree 0.5, pedigree (1,1,5,1,1)
  (same comment as for Calcium)
- Arsenic [air, non-urban air or from high stacks]: 8.44e-10 kg; lognormal variance with pedigree 2.28, pedigree (1,1,5,1,1)
  (same comment as for Hydrogen chloride)
- Titanium, ion [water, surface water]: 1.75e-6 kg; lognormal variance with pedigree 1.19, pedigree (1,1,5,1,1)
  (same comment as for Calcium)
- Chromium VI [water, surface water]: 5.82e-8 kg; lognormal variance with pedigree 1.64, pedigree (1,1,5,1,1)
  (same comment as for Calcium)
- Magnesium [air, urban air close to ground]: 1.34e-7 kg; lognormal variance with pedigree 0.54, pedigree (1,1,5,1,1)
  (same comment as for Calcium)
- Chromium [air, non-urban air or from high stacks]: 2.78e-11 kg; lognormal variance with pedigree 2.72, pedigree (1,1,5,1,1)
  (same comment as for Hydrogen chloride)
- Phosphate [water, ground-, long-term]: 0.000205 kg; lognormal variance with pedigree 6.65, pedigree (1,1,5,1,1)
  (same comment as for Magnesium)
- Chloride [water, surface water]: 0.000519 kg; lognormal variance with pedigree 0.49, pedigree (1,1,5,1,1)
  (same comment as for Sulfate)
- Aluminium [water, ground-, long-term]: 0.0208 kg; lognormal variance with pedigree 0.32, pedigree (1,1,5,1,1)
  (same comment as for Magnesium)
- Zinc [air, urban air close to ground]: 4.44e-11 kg; lognormal variance with pedigree 1.24, pedigree (1,1,5,1,1)
  (same comment as for Calcium)
- Calcium [air, non-urban air or from high stacks]: 4.63e-7 kg; lognormal variance with pedigree 1.58, pedigree (1,1,5,1,1)
  (same comment as for Hydrogen chloride)
- Manganese [air, non-urban air or from high stacks]: 2.86e-7 kg; lognormal variance with pedigree 1.54, pedigree (1,1,5,1,1)
  (same comment as for Hydrogen chloride)
- TOC, Total Organic Carbon [water, surface water]: 2.79e-6 kg; lognormal variance with pedigree 0.99, pedigree (1,1,5,1,1)
  (same comment as for Calcium)
- Potassium, ion [water, surface water]: 0.00199 kg; lognormal variance with pedigree 0.44, pedigree (1,1,5,1,1)
  (same comment as for Sulfate)
- Methane, non-fossil [air, urban air close to ground]: 1.2e-7 kg; lognormal variance with pedigree 0.84, pedigree (1,1,5,1,1)
  (same comment as for Calcium)
- Aluminium [air, urban air close to ground]: 8.5e-8 kg; lognormal variance with pedigree 0.78, pedigree (1,1,5,1,1)
  (same comment as for Calcium)
- Cadmium [air, urban air close to ground]: 3.42e-12 kg; lognormal variance with pedigree 1.69, pedigree (1,1,5,1,1)
  (same comment as for Calcium)
- Aluminium [air, non-urban air or from high stacks]: 1.3e-8 kg; lognormal variance with pedigree 1.94, pedigree (1,1,5,1,1)
  (same comment as for Hydrogen chloride)
- Molybdenum [air, non-urban air or from high stacks]: 4.88e-12 kg; lognormal variance with pedigree 2.97, pedigree (1,1,5,1,1)
  (same comment as for Hydrogen chloride)
- Hydrogen sulfide [water, ground-, long-term]: 0.000655 kg; lognormal variance with pedigree 0.42, pedigree (1,1,5,1,1)
  (same comment as for Magnesium)
- Silicon [water, ground-, long-term]: 0.00159 kg; lognormal variance with pedigree 4.05, pedigree (1,1,5,1,1)
  (same comment as for Magnesium)
- Carbon monoxide, non-fossil [air, non-urban air or from high stacks]: 8.52e-8 kg; lognormal variance with pedigree 1.22, pedigree (1,1,5,1,1)
  (same comment as for Hydrogen chloride)
- Lead [air, non-urban air or from high stacks]: 6.38e-12 kg; lognormal variance with pedigree 2.91, pedigree (1,1,5,1,1)
  (same comment as for Hydrogen chloride)
- Manganese [air, urban air close to ground]: 3.06e-12 kg; lognormal variance with pedigree 0.64, pedigree (1,1,5,1,1)
  (same comment as for Calcium)
- Manganese [water, surface water]: 0.00058 kg; lognormal variance with pedigree 0.5, pedigree (1,1,5,1,1)
  (same comment as for Calcium)
- Cobalt [water, ground-, long-term]: 1.78e-5 kg; lognormal variance with pedigree 1.22, pedigree (1,1,5,1,1)
  (same comment as for Magnesium)
- Silicon [water, surface water]: 1.24e-5 kg; lognormal variance with pedigree 0.74, pedigree (1,1,5,1,1)
  (same comment as for Calcium)
- COD, Chemical Oxygen Demand [water, ground-, long-term]: 0.0032 kg; lognormal variance with pedigree 0.87, pedigree (1,1,5,1,1)
  (same comment as for Magnesium)
- Iron, ion [water, surface water]: 8e-6 kg; lognormal variance with pedigree 1.01, pedigree (1,1,5,1,1)
  (same comment as for Calcium)
- TOC, Total Organic Carbon [water, ground-, long-term]: 0.00292 kg; lognormal variance with pedigree 0.87, pedigree (1,1,5,1,1)
  (same comment as for Magnesium)
- Aluminium [water, surface water]: 3.12e-6 kg; lognormal variance with pedigree 0.86, pedigree (1,1,5,1,1)
  (same comment as for Calcium)
- Lead [air, urban air close to ground]: 6.33e-13 kg; lognormal variance with pedigree 1.94, pedigree (1,1,5,1,1)
  (same comment as for Calcium)
- Arsenic [air, urban air close to ground]: 1.69e-11 kg; lognormal variance with pedigree 1.78, pedigree (1,1,5,1,1)
  (same comment as for Calcium)
- NMVOC, non-methane volatile organic compounds, unspecified origin [air, non-urban air or from high stacks]: 1.61e-9 kg; lognormal variance with pedigree 0.62, pedigree (1,1,5,1,1)
  (same comment as for Hydrogen chloride)
- Copper [air, non-urban air or from high stacks]: 1.14e-11 kg; lognormal variance with pedigree 2.83, pedigree (1,1,5,1,1)
  (same comment as for Hydrogen chloride)
- Cadmium, ion [water, surface water]: 6.34e-8 kg; lognormal variance with pedigree 1.64, pedigree (1,1,5,1,1)
  (same comment as for Calcium)
- Titanium [air, urban air close to ground]: 1.7e-9 kg; lognormal variance with pedigree 1.23, pedigree (1,1,5,1,1)
  (same comment as for Calcium)
- Cobalt [air, non-urban air or from high stacks]: 7.23e-11 kg; lognormal variance with pedigree 2.61, pedigree (1,1,5,1,1)
  (same comment as for Hydrogen chloride)
- Copper, ion [water, surface water]: 1.04e-8 kg; lognormal variance with pedigree 1.77, pedigree (1,1,5,1,1)
  (same comment as for Calcium)
- Iron [air, non-urban air or from high stacks]: 3.92e-9 kg; lognormal variance with pedigree 2.1, pedigree (1,1,5,1,1)
  (same comment as for Hydrogen chloride)
- Zinc [air, non-urban air or from high stacks]: 8.75e-10 kg; lognormal variance with pedigree 2.28, pedigree (1,1,5,1,1)
  (same comment as for Hydrogen chloride)
- Iron [air, urban air close to ground]: 3.89e-9 kg; lognormal variance with pedigree 0.91, pedigree (1,1,5,1,1)
  (same comment as for Calcium)
- Mercury [air, non-urban air or from high stacks]: 1.37e-10 kg; lognormal variance with pedigree 2.52, pedigree (1,1,5,1,1)
  (same comment as for Hydrogen chloride)
- Methane, non-fossil [air, non-urban air or from high stacks]: 0.00023 kg; lognormal variance with pedigree 0.62, pedigree (1,1,5,1,1)
  (same comment as for Hydrogen chloride)
- Silicon [air, urban air close to ground]: 4.52e-7 kg; lognormal variance with pedigree 0.75, pedigree (1,1,5,1,1)
  (same comment as for Calcium)
- Potassium, ion [water, ground-, long-term]: 0.0525 kg; lognormal variance with pedigree 0.22, pedigree (1,1,5,1,1)
  (same comment as for Magnesium)

## Sampling procedure
Landfill model based on observed leachate concentrations in literature. Extrapolated to 60'000 years heeding chemical characteristics. Initial waste composition from various literature sources.

## Extrapolations
This dataset has been extrapolated from year 2000 to the year of the calculation (2021). The uncertainty has been adjusted accordingly.

## Review by Niels Jungbluth 2003-07-21
Passed. Calculation for standard deviation 95 of, i.e., infrastructure,
land occupation, transport services or other services can differ from
standard Pedigree approach used in this project and figures obtained by
this procedure.
