# acetic anhydride production, ketene route

Dataset: EcoSpold 2, unit process
Geography: RoW
Time period: 1981-01-01 to 2021-12-31
Technology level: current
Classification: EcoSpold01Categories: chemicals/organics
Classification: ISIC rev.4 ecoinvent: 2011:Manufacture of basic chemicals
Tags: ConvertedDataset
Scenario: Business-as-Usual
System model: Allocation, cut-off by classification
Share of production covered: 100 %
Generated by: Jürgen Sutter
Published in: Sutter, J. 2007
Database: ecoinvent
isCopyrightProtected: true
accessRestrictedTo: 1

## General comment
The process "acetic anhydride from ketene, at plant, RER" is modelled for the production of acetic anhydride from ketene in Europe. Raw materials and energy consumptions are modelled with literature data. The emissions are estimated. Infrastructure and transports are calculated with standard values.
[This dataset was already contained in the ecoinvent database version 2. It was not individually updated during the transfer to ecoinvent version 3. Life Cycle Impact Assessment results may still have changed, as they are affected by changes in the supply chain, i.e. in other datasets. This dataset was generated following the ecoinvent quality guidelines for version 2. It may have been subject to central changes described in the ecoinvent version 3 change report (http://www.ecoinvent.org/database/ecoinvent-version-3/reports-of-changes/), and the results of the central updates were reviewed extensively. The changes added e.g. consistent water flows and other information throughout the database. The documentation of this dataset can be found in the ecoinvent reports of version 2, which are still available via the ecoinvent website. The change report linked above covers all central changes that were made during the conversion process.]

## Included activities end
Production of acetic anhydride from ketene including materials, energy uses, infrastructure and emissions.

## Geography
The inventory is modelled for Europe.

## Technology
Reaction of ketene with acetic acid

## Time period
Time of publications

## Parameters
- fraction, cooling water, cooling pond system, to air: 0.032 dimensionless; name fraction_CW_CP_to_air; lognormal variance with pedigree 0.0413, pedigree (2,3,1,3,1)
  Calculated based on literature value (Scown, C.D., 2011, Water Footprint of U.S. Transportation Fuels and supplying information of the article) (Vionnet, S., Quantis Water Database - Technical Report, 2012).
- fraction, cooling water, once-through system, to air: 0.004 dimensionless; name fraction_CW_OT_to_air; lognormal variance with pedigree 0.0413, pedigree (2,3,1,3,1)
  (same comment as for fraction, cooling water, cooling pond system, to air)
- fraction, water, deionised, to air: 0.205 dimensionless; name fraction_WDI_to_air; = fraction_PW_to_air; lognormal variance with pedigree 0.092025, pedigree (4,4,3,2,4)
  Calculated value. See comment in the other parametres present in this dataset. Deionised water is considered to be always used as process water, thus process water fractions to air are applied to all deionised water input flows to calculate the amount of water consumed in the processes.
- fraction, process water, to air: 0.205 dimensionless; name fraction_PW_to_air; lognormal variance with pedigree 0.092025, pedigree (4,4,3,2,4)
  Literature value (Statistics Canada, 2007 & Shaffer, K.H., 2008, Consumptive water use in the Great Lakes Basin, USGS) (Vionnet, S., Quantis Water Database - Technical Report, 2012).
- fraction, cooling water, to air: 0.3875 dimensionless; name fraction_CW_to_air; = (0.5*fraction_CW_OT_to_air)+(0.5*fraction_CW_R_to_air); lognormal variance with pedigree 0.092025, pedigree (4,4,3,2,4)
  Calculated value based on literature value (see comments of the other parametres present in this dataset) and expert opinion. In the case when no industry/literature data are available about the type of cooling or directly fraction, cooling water, to air specific for the process a default assumption is applied. It is assumed that the once-through cooling system is used in 50% of all cases and recirculating system is used in another 50% of all cases.
- fraction, cooling water, recirculating system, to air: 0.771 dimensionless; name fraction_CW_R_to_air; lognormal variance with pedigree 0.0413, pedigree (2,3,1,3,1)
  (same comment as for fraction, cooling water, cooling pond system, to air)

## Reference product
- acetic anhydride: 1 kg; CPC 34120: Industrial monocarboxylic fatty acids; acid oils from refining; By-product classification allocatable product; CAS 108-24-7
  EcoSpold01Location=RER
  production volume 1.31798e9 kg
    Source: Catalyst Group Resources (2007): Syngas Production and Conversion to Products: A Strategic Assessment of the Technologies, Markets and Competitive Landscape. Springhouse. 75% of global market is assumed to be from the ketene route.
  property price 0.691 EUR2005
    Temporary price data. Calculated as 90% of purchasers price based on: Source: 28 August 2006 issue of Chemical Market Reporter (ICIS)
  property heating value, net 21.38 MJ
    LHV is calculated based on the elemental composition of the substance. Based on the CAS number of the substance (000108-24-7), the chemical formula of the substance is found to be: C4H6O3, (PubChem 2020).
    Reference: Kim, S., Chen, J., Cheng, T., Gindulyte, A., He, J., He, S., Li, Q., Shoemaker, B. A., Thiessen, P. A., Yu, B., Zaslavsky, L., Zhang, J., & Bolton, E. E. (2019). PubChem 2019 update: improved access to chemical data. Nucleic acids research, 47(D1), D1102–D1109. https://doi.org/10.1093/nar/gky1033
  property carbon content 0.470588
    carbon content on a dry matter basis (reserved; not for manual entry)
  properties: carbon content, fossil 0.470588, wet mass 1 kg, water in wet mass 0 kg, carbon content, non-fossil 0, water content 0, dry mass 1 kg, carbon allocation 0.470588 kg

## Inputs from technosphere
- water, deionised: 0.62 kg; name water_deionised_input; source Chauvel, A. 1989; lognormal variance with pedigree 0.0726, pedigree (1,3,5,5,1)
  Estimation.
  Further references:
  Naran Lala, 2004. Acetic anhydride plant plant. Naran Lala PVT Ltd., Gujarat, India. Retrieved 10.11.2004 from http://www.naranlala.com/clabs.htm
  Kim S., Overcash M.: Energy in chemical manufacturing processes: gate-to-gate information for life cycle assessment. In: Journal of Chemical Technology & Biotechnology vol. 78, no. 9: 995- 1005(11). 2003
  Estimation.
  Further references:
  Naran Lala, 2004. Acetic anhydride plant plant. Naran Lala PVT Ltd., Gujarat, India. Retrieved 10.11.2004 from http://www.naranlala.com/clabs.htm
  Kim S., Overcash M.: Energy in chemical manufacturing processes: gate-to-gate information for life cycle assessment. In: Journal of Chemical Technology & Biotechnology vol. 78, no. 9: 995- 1005(11). 2003
  EcoSpold01Location=CH
  Uncertainty: Chauvel 1989
  properties: wet mass 1 kg
- heat, district or industrial, natural gas: 0 MJ; pedigree (1,1,1,1,1)
  Uncertainty: Chauvel 1989
  properties: heating value, net 1 MJ
- chemical factory, organics: 4e-10 unit; lognormal variance with pedigree 0.448, pedigree (4,5,5,5,5)
  EcoSpold01Location=RER
  Estimation
  Uncertainty: Estimation
- electricity, medium voltage: 0 kWh; pedigree (1,1,1,1,1)
  Chauvel 1989
  EcoSpold01Location=UCTE
  Uncertainty: Chauvel 1989
- acetic acid, without water, in 98% solution state: 1.27 kg; lognormal variance with pedigree 0.0726, pedigree (1,3,5,5,1)
  EcoSpold01Location=RER
  Chauvel 1989
  Uncertainty: Chauvel 1989
  properties: dry mass 1 kg, heating value, net 14.6 MJ, wet mass 1 kg, carbon content, fossil 0.400016
  note on heating value, net: Based on literature, page 10, Althaus H.-J., Chudacoff M., Hischier R., Jungbluth N., Osses M. and Primas A. (2007) Life Cycle Inventories of Chemicals. Final report ecoinvent data v2.0 No. 8. EMPA, Swiss Centre for Life Cycle Inventories, Dübendorf, CH, Online-Version under: www.ecoinvent.org.
- heat, district or industrial, other than natural gas: 0 MJ; pedigree (1,1,1,1,1)
  EcoSpold01Location=RER
  Chauvel 1989
  Uncertainty: Chauvel 1989
  properties: heating value, net 1 MJ
- heat, district or industrial, natural gas: 0.117177, 7.6029 MJ (2 entries); lognormal variance with pedigree 0.0726, pedigree (1,3,5,5,1)
  Uncertainty: Chauvel 1989
- electricity, medium voltage: 0.004604, 0.00088285, 0.0148212, 0.215561, 0.0303835, 0.0989939 kWh (6 entries); lognormal variance with pedigree 0.0726, pedigree (1,3,5,5,1)
  Chauvel 1989
  EcoSpold01Location=UCTE
  Uncertainty: Chauvel 1989
- heat, district or industrial, other than natural gas: 0.00179421, 4.42458 MJ (2 entries); lognormal variance with pedigree 0.0726, pedigree (1,3,5,5,1)
  EcoSpold01Location=RER
  Chauvel 1989
  Uncertainty: Chauvel 1989

## Inputs from nature
- Water, cooling, unspecified natural origin [natural resource, in water]: 0.3725 m3; name water_cooling_UNO_input; source Chauvel, A. 1989; lognormal variance with pedigree 0.0726, pedigree (1,3,5,5,1)
  Estimation.
  Further references:
  Naran Lala, 2004. Acetic anhydride plant plant. Naran Lala PVT Ltd., Gujarat, India. Retrieved 10.11.2004 from http://www.naranlala.com/clabs.htm
  Estimation.
  Further references:
  Naran Lala, 2004. Acetic anhydride plant plant. Naran Lala PVT Ltd., Gujarat, India. Retrieved 10.11.2004 from http://www.naranlala.com/clabs.htm
  Uncertainty: Chauvel 1989

## Emissions to nature
- TOC, Total Organic Carbon [water, surface water]: 0.0162 kg; lognormal variance with pedigree 0.188, pedigree (4,5,5,5,5)
  Calculated from the water emissions
  Uncertainty: Calculated from the water emissions
- Acetic acid [air, urban air close to ground]: 0.00254 kg; lognormal variance with pedigree 0.188, pedigree (4,5,5,5,5)
  Estimation
  Uncertainty: Estimation
- COD, Chemical Oxygen Demand [water, surface water]: 0.0414 kg; lognormal variance with pedigree 0.188, pedigree (4,5,5,5,5)
  Calculated from the water emissions
  Uncertainty: Calculated from the water emissions
- Water [air, unspecified]: 0.144471 m3; name water_to_air_unspecified; lognormal variance with pedigree 0.0827, pedigree (2,2,5,5,1)
  Calculated value based on literature values and expert opinion. See comments in the parametres' comment field.
  property fraction, origin: fresh water 0.000879762; name fraction_origin_fresh_water
  property fraction, origin: unspecified 0.99912; name fraction_origin_unspecified
  property fraction, origin: salt water 0; name fraction_origin_salt_water
- BOD5, Biological Oxygen Demand [water, surface water]: 0.0414 kg; lognormal variance with pedigree 0.188, pedigree (4,5,5,5,5)
  Calculated from the water emissions
  Uncertainty: Calculated from the water emissions
- DOC, Dissolved Organic Carbon [water, surface water]: 0.0162 kg; lognormal variance with pedigree 0.188, pedigree (4,5,5,5,5)
  Calculated from the water emissions
  Uncertainty: Calculated from the water emissions
- Water [water, unspecified]: 0.228649 m3; name water_to_water_unspecified; lognormal variance with pedigree 0.0827, pedigree (2,2,5,5,1)
  (same comment as for Water)
  property fraction, origin: fresh water 0.0021557; name fraction_origin_fresh_water_Ww
  property fraction, origin: salt water 0; name fraction_origin_salt_water_Ww
  property fraction, origin: unspecified 0.997844; name fraction_origin_unspecified_Ww
  property carbon content, fossil 0; name C_content_fossil
  property water in wet mass 1000 kg; name WWM
  property wet mass 1000 kg; name WM
  property carbon content, non-fossil 0; name C_content_non_fossil
  property dry mass 0 kg; name DM
- Carbon dioxide, fossil [air, urban air close to ground]: 0.53422 kg; lognormal variance with pedigree 0.1786, pedigree (4,5,5,5,5)
  Calculated from the water treatment
  Uncertainty: Calculated from the water treatment
- Acetic acid [water, surface water]: 0.040471 kg; lognormal variance with pedigree 0.448, pedigree (4,5,5,5,5)
  Estimation
  Uncertainty: Estimation

## Sampling procedure
Literature data

## Extrapolations
Transports and emissions are modelled with standard methods. This dataset has been copied from an original dataset covering the geography RER. The uncertainty has been adjusted accordingly.

## Review by Roland Hischier 2007-09-01
passed.
