# petroleum and gas production, on-shore

Dataset: EcoSpold 2, unit process
Geography: NL
Time period: 2000-01-01 to 2021-12-31
Technology level: current
Classification: EcoSpold01Categories: natural gas/production
Classification: ISIC rev.4 ecoinvent: 0610:Extraction of crude petroleum
Tags: combined production
Scenario: Business-as-Usual
System model: Allocation, cut-off by classification
Share of production covered: 73 %
Generated by: Mireille Faist Emmenegger
Published in: Faist Emmenegger, Mireille 2015
Database: ecoinvent
isCopyrightProtected: true
accessRestrictedTo: 1

## General comment
This activity describes the combined on-shore extraction of petroleum and natural gas in the Netherlands and delivers the co-products "natural gas" and "crude oil".

## Included activities end
exploration and production of oil and gas on the Groningen and inland fields (onshore). Data doesn"t include combusted fuels for turbines, motors etc. It includes well testing (fuel requirements and emissions).

## Technology
Emissions and discharges from the offshore combined production in the Netherlands (Continental Shelf). The part of oil production is however small (about 2% of total in both on- and offshore production). No information on technology.

## Time period
Production from NAM decreased in the last years. No average is calculated.

## Parameters
- fraction, process water, to air: 0.15 dimensionless; name fraction_PW_to_air; lognormal variance with pedigree 0.092025, pedigree (4,4,3,2,4)
  Literature value. In case when no industry/process specific data are available, default evaporation fraction value is used. This value is 15% and is based on literature (Statistics Canada, 2007 & Shaffer, K.H., 2008, Consumptive water use in the Great Lakes Basin, USGS & Shiklomanov, 2003, World Water Resources at the Beginning of the 21st Century) and has been approved by an expert.
- fraction, tap water, to air: 0.15 dimensionless; name fraction_TW_to_air; = fraction_PW_to_air; lognormal variance with pedigree 0.092025, pedigree (4,4,3,2,4)
  Calculated value. See comment in the other parametres present in this dataset. Tap water is considered to be always used as process water, thus process water fractions to air are applied to all tap water input flows to calculate the amount of water consumed in the processes.

## Reference product
- petroleum: 1 kg; CPC 12010: Petroleum oils and oils obtained from bituminous minerals, crude; By-product classification allocatable product; CAS 8002-05-9
  production volume 1.7689e8 kg; name petroleum_PV
    kg of petroleum produced in the Netherlands in 2012. Approximated using OECD/IEA statistics (2013), reporting an average production of 51.7 thousand barrels per day in 2012. This includes both crude oil and natural gas liquids and may therefore be overestimated for petroleum production. Converted to kg assuming 1barrel = 158.987 liters, density of 0.88 kg/liter. It is further estimated that 33% are produced off-shore and 67% on-shore and that app. 9% of petroleum is produced in stand alone production activities and the rest is produced in activities where both natural gas and petroleum are produced. Reference(s): OECD/IEA, 2014. ENERGY SUPPLY SECURITY 2014. Part II. Chapter 4: Emergency response systems of individual IEA countries. The Netherlands. Retrieved online from https://www.iea.org/media/freepublications/security/EnergySupplySecurity2014_TheNetherlands.pdf, 31 August 2017.
  property amount in multioutput activity_kg 6.4722e8 kg; name petroleum_amount_MO_kg
  property price 0.192 EUR2005; name petroleum_price_EUR2005
    Temporary price data. Calculated as 90% of purchasers price based on: Crude oil prices from U.S. energy information administration_Independent statistics and analysis: Weekly All Countries Spot Price FOB Weighted by Estimated Export Volume (Dollars per Barrel) (http://tonto.eia.doe.gov/dnav/pet/pet_pri_wco_k_w.htm; accessed 06072010). Conversion factors - 0.159 m3/barrel with crude oil density of 853 kg/m3
  property carbon content 0.85
    carbon content on a dry matter basis (reserved; not for manual entry)
  properties: water in wet mass 0 kg, dry mass 1 kg, wet mass 1 kg, water content 0, carbon content, non-fossil 0, heating value, net 43.2 MJ, carbon content, fossil 0.85, carbon allocation 0.85 kg
- natural gas, high pressure: 0 m3; name natgas_high; CPC 12020: Natural gas, liquefied or in the gaseous state; By-product classification allocatable product; CAS 14493-06-2
  Amount was scaled to 1.
  production volume 0 m3; name natgas_high_PV
    m3 of natural gas produced on-shore in co-production with petroleum, in NL in 2012 (BP, 2014). Value converted from BP LHV (1 cubic meter natural gas in (BP, 2014) corresponds to 0.9 kg oil equivalent. 1 kg oil equivalent corresponds to 42 MJ) to ecoinvent standard LHV of 39MJ/m3. (The source does not specify if the cubic meters are standard or norm cubic meters. See 2015, Faist Emmenegger, Mireille, Del Duce, Andrea; Zah, Rainer, Update and extension of the inventory data for energy gases, 3 - SeparatePublication.) It is further estimated that 33% are produced off-shore and 67% on-shore (http://www.gaselectricpartnership.com/HOffshore%20Infield.pdf) and that app. 70% of natural gas is produced in stand alone production activities and the rest is produced in activities where both natural gas and petroleum are produced. Scaled from BP LHV to ecoinvent standard LHV. Refrence(s): BP (2014). Statistical Review of World Energy, June 2014. Retrieved online from http://www.bp.com/content/dam/bp/excel/energy-economics/statistical-review-2015/bp-statistical-review-of-world-energy-2015-workbook.xlsx, 30 August, 2017
  property heating value, net 39 MJ
    Literature value, Source: United Nations Statistics Division (2018) International Recommendations for Energy Statistics (IRES). Available at: http://unstats.un.org/unsd/statcom/doc11/BG-IRES.pdf.
  property price 0.166 EUR2005
    Temporary price data. Calculated as 90% of purchasers price based on: 2005 price for Europe-27 Import (US$ and kg) in UN Commodity Trade Statistics Database - Natural gas in gaseous state (http://data.un.org/Data.aspx?q=natural+gas&d=ComTrade&f=_l1Code%3a28%3bcmdCode%3a271121; accessed 4 January 2011), using density of natural gas of 0.8 kg/m3 for unit conversion.
  property amount in multioutput activity_m3 3.5e10 m3; name natgas_high_amount_MO_m3
  property carbon content 0.588095
    carbon content on a dry matter basis (reserved; not for manual entry)
  properties: carbon content, fossil 0.588095, water content 0, water in wet mass 0 kg, carbon content, non-fossil 0, wet mass 0.84 kg, dry mass 0.84 kg, carbon allocation 0.494 kg

## Inputs from technosphere
- hazardous waste, for underground deposit: -4.48328e-5 kg; name hazwaste; = (hazwaste_amount_MO_kg*(0.50* petroleum +0.50* natgas_high *0.84)/(0.50* 647220000 +0.50*35000000000 *0.84))*-1; lognormal variance with pedigree 0.0261, pedigree (1,1,4,3,3)
  Estimate based on Norwegian environmental report
  Uncertainty: N
  production volume 476743 kg; = hazwaste_amount_MO_kg*(0.5* petroleum_PV +0.5* natgas_high_PV *0.84)/(0.5* 647220000 +0.5*35000000000 *0.84)
    Calculated from the production volume of reference products
  property amount in multioutput activity_kg 1.3471e6 kg; name hazwaste_amount_MO_kg
  property price 0 EUR2005; name hazwaste_price_EUR2005
  properties: wet mass 1 kg, carbon content, fossil 0.554667, dry mass 1 kg
  note on carbon content, fossil: Tab A.6, ecoinvent v2.2 report 13_I, average hazardous waste composition was used, and referred to 0% water mass. No waste-specific emission are currently inventoried for underground deposits. Accordingly, no waste composition must be specified. For generic, average waste to underground deposit deposition in a 200 liter steel drum without cement solidification is assumed (ecoinvent v2.2 report 13_I).
- diesel, burned in diesel-electric generating set, 10MW: 0.00951402 MJ; name diesel_burned; = diesel_burned_amount_MO_MJ*(0.50* petroleum +0.50* natgas_high *0.84)/(0.50* 647220000 +0.50*35000000000 *0.84); lognormal variance with pedigree 0.0261, pedigree (1,2,4,1,3)
  Environmental report for 75% of gas produced in NL, standard module
  Uncertainty: E
  property amount in multioutput activity_MJ 2.8587e8 MJ; name diesel_burned_amount_MO_MJ
  properties: heating value, net 1 MJ
- municipal solid waste: -3.31482e-5 kg; name MSW; = (MSW_amount_MO_kg*(0.50* petroleum +0.50* natgas_high *0.84)/(0.50* 647220000 +0.50*35000000000 *0.84))*-1; lognormal variance with pedigree 0.0261, pedigree (1,1,4,3,3)
  Estimate based on Norwegian environmental report
  Uncertainty: N
  production volume 352491 kg; = MSW_amount_MO_kg*(0.5* petroleum_PV +0.5* natgas_high_PV *0.84)/(0.5* 647220000 +0.5*35000000000 *0.84)
    Calculated from the production volume of reference products
  property amount in multioutput activity_kg 996010 kg; name MSW_amount_MO_kg
  properties: water content 0.297017, heating value, net 11.74 MJ, carbon content, non-fossil 0.261655, dry mass 0.771 kg, carbon content, fossil 0.171549, wet mass 1 kg
  note on heating value, net: Value taken from the general comment of the treatment dataset.
  note on carbon content, non-fossil: MSW composition in tab 4.1, ecoinvent v2.2 report 13_I. C content referred to 1 kg DM
- low level radioactive waste: -1.99561e-7 m3; name low_level_waste; = (low_level_waste_amount_MO_m3*(1* petroleum +0*natgas_high *0.84)/(1* 647220000 +0*35000000000 *0.84))*-1; lognormal variance with pedigree 0.0261, pedigree (1,1,4,3,3)
  Estimate based on Norwegian environmental report
  Uncertainty: N
  production volume 35.3003 m3; = low_level_waste_amount_MO_m3*(1* petroleum_PV +0*natgas_high_PV *0.84)/(1* 647220000 +0*35000000000 *0.84)
    Calculated from the production volume of reference products
  property price 0 EUR2005; name low_level_waste_price_EUR2005
  property amount in multioutput activity_m3 129.16 m3; name low_level_waste_amount_MO_m3
  properties: wet mass 2500 kg, dry mass 2500 kg
- chemical, inorganic: 1.59609e-6 kg; name chem_inorg; = chem_inorg_amount_MO_kg*(0.50* petroleum +0.50* natgas_high *0.84)/(0.50* 647220000 +0.50*35000000000 *0.84); lognormal variance with pedigree 0.0081, pedigree (1,2,4,1,1)
  Environmental report for 75% of gas produced in NL
  Uncertainty: E
  property amount in multioutput activity_kg 47958 kg; name chem_inorg_amount_MO_kg
  properties: wet mass 1 kg, carbon content, fossil 0.003, dry mass 1 kg
  note on carbon content, fossil: This dataset is an unweighted average of 20 inorganic substances (listed in Tab 88.1, ecoinvent v2.2 report 8, part II), being part of the top100 chemicals included in this database. The C-content has also been calculated as an unweighted average of the C content of the substances composing this dataset.
- waste emulsion paint: -4.47562e-7 kg; name waste_em_paint; = (waste_em_paint_amount_MO_kg*(0.50* petroleum +0.50* natgas_high *0.84)/(0.50* 647220000 +0.50*35000000000 *0.84))*-1; lognormal variance with pedigree 0.0261, pedigree (1,1,4,3,3)
  Estimate based on Norwegian environmental report
  Uncertainty: N
  production volume 4759.29 kg; = waste_em_paint_amount_MO_kg*(0.5* petroleum_PV +0.5* natgas_high_PV *0.84)/(0.5* 647220000 +0.5*35000000000 *0.84)
    Calculated from the production volume of reference product
  property price 0 EUR2005; name waste_em_paint_price_EUR2005
  property amount in multioutput activity_kg 13448 kg; name waste_em_paint_amount_MO_kg
  properties: heating value, net 8.18 MJ, carbon content, fossil 0.27, dry mass 1 kg, wet mass 1 kg
  note on carbon content, fossil: Tab A.4, ecoinvent v2.2 report 13_I. C content has been calculated after data in the tables, and then referred to 1 kg DM
- sweet gas, burned in gas turbine: 0.192657 MJ; name sweet_gas_burned; = sweet_gas_burned_amount_MO_MJ*(0.50* petroleum +0.50* natgas_high *0.84)/(0.50* 647220000 +0.50*35000000000 *0.84); lognormal variance with pedigree 0.0261, pedigree (1,2,4,1,3)
  Environmental report for 75% of gas produced in NL, standard module
  Uncertainty: E
  property amount in multioutput activity_MJ 5.7888e9 MJ; name sweet_gas_burned_amount_MO_MJ
  properties: heating value, net 1 MJ, carbon content, fossil 0.589286, dry mass 0.0247059 kg, heating value, gross 1 MJ, wet mass 0.0247059 kg
- waste mineral oil: -3.72247e-5 kg; name waste_min_oil; = (waste_min_oil_amount_MO_kg*(0.50* petroleum +0.50* natgas_high *0.84)/(0.50* 647220000 +0.50*35000000000 *0.84))*-1; lognormal variance with pedigree 0.0261, pedigree (1,1,4,3,3)
  Estimate based on Norwegian environmental report
  Uncertainty: N
  production volume 395840 kg; = waste_min_oil_amount_MO_kg*(0.5* petroleum_PV +0.5* natgas_high_PV *0.84)/(0.5* 647220000 +0.5*35000000000 *0.84)
    Calculated from the production volume of reference products
  property amount in multioutput activity_kg 1.1185e6 kg; name waste_min_oil_amount_MO_kg
  property price 0 EUR2005; name waste_min_oil_price_EUR2005
  properties: heating value, net 34.7 MJ, dry mass 0.9 kg, wet mass 1 kg, water content 0.111111, carbon content, fossil 0.864444
  note on carbon content, fossil: Tab A.6, ecoinvent v2.2 report 13_I. C content has been calculated after data in the tables, and then referred to 1 kg DM
- waste wood, untreated: -7.21964e-6 kg; name waste_wood; = (waste_wood_amount_MO_kg*(0.50* petroleum +0.50* natgas_high *0.84)/(0.50* 647220000 +0.50*35000000000 *0.84))*-1; lognormal variance with pedigree 0.0261, pedigree (1,1,4,3,3)
  Estimate based on Norwegian environmental report
  Uncertainty: N
  production volume 76772.2 kg; = waste_wood_amount_MO_kg*(0.5* petroleum_PV +0.5* natgas_high_PV *0.84)/(0.5* 647220000 +0.5*35000000000 *0.84)
    Calculated from the production volume of reference products
  property price 0 EUR2005; name waste_wood_price_EUR2005
  property amount in multioutput activity_kg 216930 kg; name waste_wood_amount_MO_kg
  properties: water content 0.25, dry mass 0.8 kg, wet mass 1 kg, carbon content, non-fossil 0.48632, heating value, net 13.99 MJ
  note on carbon content, non-fossil: Tab A.4, ecoinvent v2.2 report 13_I. C content has been referred to 1 kg DM,
- electricity, medium voltage: 0.0138748 kWh; name electricity_MV; = electricity_MV_amount_MO_kWh*(0.50* petroleum +0.50* natgas_high *0.84)/(0.50* 647220000 +0.50*35000000000 *0.84); lognormal variance with pedigree 0.0261, pedigree (1,2,4,1,3)
  Environmental report for 75% of gas produced in NL, standard module
  Uncertainty: E
  property amount in multioutput activity_kWh 4.169e8 kWh; name electricity_MV_amount_MO_kWh
- onshore well, oil/gas: 1.42745e-6 m; name onshore_well; = onshore_well_amount_MO_m*(0.50* petroleum +0.50* natgas_high *0.84)/(0.50* 647220000 +0.50*35000000000 *0.84); lognormal variance with pedigree 0.0261, pedigree (1,2,4,1,3)
  Environmental report for 75% of gas produced in NL, standard module
  Uncertainty: E
  property amount in multioutput activity_m 42891 m; name onshore_well_amount_MO_m
- chemical, organic: 1.00451e-6 kg; name chem_org; = chem_org_amount_MO_kg*(0.453917532* petroleum +0.546082468*natgas_high *0.84)/(0.453917532* 647220000 +0.546082468*35000000000 *0.84); lognormal variance with pedigree 0.0081, pedigree (1,2,4,1,1)
  Environmental report for 75% of gas produced in NL
  Uncertainty: E
  property amount in multioutput activity_kg 36179 kg; name chem_org_amount_MO_kg
  properties: wet mass 1 kg, heating value, net 19.03 MJ, dry mass 1 kg, carbon content, fossil 0.628
  note on carbon content, fossil: This dataset is an unweighted average of 20 organic substances (listed in Tab 88.1, ecoinvent v2.2 report 8, part II), being part of the top100 chemicals included in this database. The C-content has also been calculated as an unweighted average of the C content of the substances composing this dataset.
- onshore petroleum field infrastructure: 1.37999e-10 unit; name onshore_petr_field; = onshore_petr_field_amount_MO_unit*(1* petroleum +0*natgas_high *0.84)/(1* 647220000 +0*35000000000 *0.84); lognormal variance with pedigree 0.3221, pedigree (3,4,4,3,1)
  Data for RU
  Uncertainty: D
  property amount in multioutput activity_unit 0.089316 unit; name onshore_petr_field_amount_MO_unit
- methanol: 3.46839e-5 kg; name CH4O_input; = CH4O_input_amount_MO_kg*(0.453917532* petroleum +0.546082468*natgas_high *0.84)/(0.453917532* 647220000 +0.546082468*35000000000 *0.84); lognormal variance with pedigree 0.0081, pedigree (1,2,4,1,1)
  Environmental report for 75% of gas produced in NL
  Uncertainty: E
  property amount in multioutput activity_kg 1.2492e6 kg; name CH4O_input_amount_MO_kg
  properties: dry mass 1 kg, carbon content, fossil 0.375, wet mass 1 kg, heating value, net 26.49 MJ
- onshore natural gas field infrastructure: 0 unit; name onshore_NG_field; = onshore_NG_field_amount_MO_unit*(0* petroleum +1*natgas_high *0.84)/(0* 647220000 +1*35000000000 *0.84); pedigree (1,1,1,1,1)
  Environmental report for 75% of gas produced in NL, standard module
  Uncertainty: E
  property amount in multioutput activity_unit 23.333 unit; name onshore_NG_field_amount_MO_unit
- ethylene glycol: 2.15095e-5 kg; name ethylene_glycol; = ethylene_glycol_amount_MO_kg*(0.453917532* petroleum +0.546082468*natgas_high *0.84)/(0.453917532* 647220000 +0.546082468*35000000000 *0.84); lognormal variance with pedigree 0.0081, pedigree (1,2,4,1,1)
  Environmental report for 75% of gas produced in NL
  Uncertainty: E
  property amount in multioutput activity_kg 774700 kg; name ethylene_glycol_amount_MO_kg
  properties: carbon content, fossil 0.387097, wet mass 1 kg, heating value, net 23.44 MJ, dry mass 1 kg
- spent antifreezer liquid: -1.01467e-7 kg; name spent_antifreezer; = (spent_antifreezer_amount_MO_kg*(0.50* petroleum +0.50* natgas_high *0.84)/(0.50* 647220000 +0.50*35000000000 *0.84))*-1; lognormal variance with pedigree 0.0261, pedigree (1,1,4,3,3)
  Estimate based on Norwegian environmental report
  Uncertainty: N
  production volume 1078.98 kg; = spent_antifreezer_amount_MO_kg*(0.5* petroleum_PV +0.5* natgas_high_PV *0.84)/(0.5* 647220000 +0.5*35000000000 *0.84)
    Calculated from the production volume of reference products
  property amount in multioutput activity_kg 3048.8 kg; name spent_antifreezer_amount_MO_kg
  property price 0 EUR2005; name spent_antifreezer_price_EUR2005
  properties: dry mass 0.482 kg, water content 1.07469, heating value, net 0.56 MJ, wet mass 1 kg, carbon content, fossil 0.431328
  note on carbon content, fossil: Tab A.7, ecoinvent v2.2 report 13_I. C content has been calculated after data in the tables, and then referred to 1 kg DM
- tap water: 0.00174725 kg; name tap_water_input; = tap_water_input_amount_MO_kg*(0.50* petroleum +0.50* natgas_high *0.84)/(0.50* 647220000 +0.50*35000000000 *0.84); lognormal variance with pedigree 0.0087, pedigree (2,2,4,1,1)
  Environmental report for 75% of gas produced in NL
  Uncertainty: E
  property amount in multioutput activity_kg 5.25e7 kg; name tap_water_input_amount_MO_kg
  properties: wet mass 1 kg, water content 2962.17, carbon content, fossil 0.00178991, dry mass 0.000337476 kg
  note on carbon content, fossil: Bicarbonate content is 2.93 mol/m3. CO2 content is 0.1 mol/m3 (ecoinvent v2.2 report 8, Tab 93.1).

## Inputs from nature
- Gas, natural, in ground [natural resource, in ground]: 1.62097e-5 m3; name gas_ground; = gas_ground_amount_MO_m3*(0.0000136* petroleum +0.9999864*natgas_high *0.84)/(0.0000136* 647220000 +0.9999864*35000000000 *0.84); lognormal variance with pedigree 0.0081, pedigree (1,2,4,1,1)
  Environmental report for 75% of gas produced in NL
  Uncertainty: E
  property amount in multioutput activity_m3 3.5041e10 m3; name gas_ground_amount_MO_m3
- Water, salt, sole [natural resource, in water]: 1.74725e-6 m3; name water_salt_sole_input; = water_salt_sole_input_amount_MO_m3*(0.50* petroleum +0.50* natgas_high *0.84)/(0.50* 647220000 +0.50*35000000000 *0.84); lognormal variance with pedigree 0.0087, pedigree (2,2,4,1,1)
  Environmental report for 75% of gas produced in NL
  Uncertainty: E
  property amount in multioutput activity_m3 52500 m3; name water_salt_sole_input_amount_MO_m3
- Water, salt, ocean [natural resource, in water]: 1.74725e-6 m3; name water_salt_ocean_input; = water_salt_ocean_input_amount_MO_m3*(0.50* petroleum +0.50* natgas_high *0.84)/(0.50* 647220000 +0.50*35000000000 *0.84); lognormal variance with pedigree 0.0087, pedigree (2,2,4,1,1)
  Environmental report for 75% of gas produced in NL
  Uncertainty: E
  property amount in multioutput activity_m3 52500 m3; name water_salt_ocean_input_amount_MO_m3
- Oil, crude, in ground [natural resource, in ground]: 1 kg; name oil_ground; = oil_ground_amount_MO_kg*(1* petroleum +0*natgas_high *0.84)/(1* 647220000 +0*35000000000 *0.84); lognormal variance with pedigree 0.0081, pedigree (1,2,4,1,1)
  Environmental report for 75% of gas produced in NL
  Uncertainty: E
  property amount in multioutput activity_kg 6.4722e8 kg; name oil_ground_amount_MO_kg
- Water, river [natural resource, in water]: 1.74725e-6 m3; name water_river_input; = water_river_input_amount_MO_m3*(0.50* petroleum +0.50* natgas_high *0.84)/(0.50* 647220000 +0.50*35000000000 *0.84); lognormal variance with pedigree 0.0087, pedigree (2,2,4,1,1)
  Environmental report for 75% of gas produced in NL
  Uncertainty: E
  property amount in multioutput activity_m3 52500 m3; name water_river_input_amount_MO_m3

## Emissions to nature
- Methane, chlorodifluoro-, HCFC-22 [air, non-urban air or from high stacks]: 9.51402e-8 kg; name HCFC; = HCFC_amount_MO_kg*(0.50* petroleum +0.50* natgas_high *0.84)/(0.50* 647220000 +0.50*35000000000 *0.84); lognormal variance with pedigree 0.0661, pedigree (1,2,4,1,3)
  Environmental report for 75% of gas produced in NL
  Uncertainty: E
  property amount in multioutput activity_kg 2858.7 kg; name HCFC_amount_MO_kg
- Carbon dioxide, fossil [air, non-urban air or from high stacks]: 0.00211404 kg; name CO2_fossil; = CO2_fossil_amount_MO_kg*(0.50* petroleum +0.50* natgas_high *0.84)/(0.50* 647220000 +0.50*35000000000 *0.84); lognormal variance with pedigree 0.0081, pedigree (1,2,4,1,1)
  Environmental report for 75% of gas produced in NL
  Uncertainty: E
  property amount in multioutput activity_kg 6.3521e7 kg; name CO2_fossil_amount_MO_kg
- Radon-222 [air, non-urban air or from high stacks]: 6.23019e-5 kBq; name Rd; = Rd_amount_MO_kBq*(0.50* petroleum +0.50* natgas_high *0.84)/(0.50* 647220000 +0.50*35000000000 *0.84); lognormal variance with pedigree 0.3761, pedigree (4,1,5,3,3)
  data calculated on the basis of gas composition
  Uncertainty: d
  property amount in multioutput activity_kBq 1.872e6 kBq; name Rd_amount_MO_kBq
- Water [air, unspecified]: 1.04835e-6 m3; name water_to_air_unspecified; = (tap_water_input/1000*fraction_TW_to_air)+(water_river_input*fraction_PW_to_air)+(water_salt_ocean_input*fraction_PW_to_air)+(water_salt_sole_input*fraction_PW_to_air); lognormal variance with pedigree 0.0487, pedigree (2,2,4,1,1)
  Calculated value based on literature values and expert opinion. See comments in the parametres" comment field.
  Amount was scaled to the amount of reference product.
  Calculated value based on literature values and expert opinion. See comments in the parametres" comment field.
  Amount was scaled to the amount of reference product.
  property fraction, origin: fresh water 0.5; name fraction_origin_fresh_water
  property fraction, origin: salt water 0.5; name fraction_origin_salt_water
  property amount in multioutput activity_m3 31500 m3; name water_to_air_unspecified_amount_MO_m3
  property fraction, origin: unspecified 0; name fraction_origin_unspecified
- Hydrocarbons, aromatic [air, non-urban air or from high stacks]: 2.78242e-5 kg; name hydroc_aromatic; = hydroc_aromatic_amount_MO_kg*(0.50* petroleum +0.50* natgas_high *0.84)/(0.50* 647220000 +0.50*35000000000 *0.84); lognormal variance with pedigree 0.0481, pedigree (1,2,4,1,1)
  Environmental report for 75% of gas produced in NL, reduced for combustion emissions
  Uncertainty: E
  property amount in multioutput activity_kg 836040 kg; name hydroc_aromatic_amount_MO_kg
- Mercury [air, non-urban air or from high stacks]: 1.78389e-10 kg; name Hg_air; = Hg_air_amount_MO_kg*(0.50* petroleum +0.50* natgas_high *0.84)/(0.50* 647220000 +0.50*35000000000 *0.84); lognormal variance with pedigree 0.0481, pedigree (1,2,4,1,1)
  Environmental report for 75% of gas produced in NL
  Uncertainty: E
  property amount in multioutput activity_kg 5.3601 kg; name Hg_air_amount_MO_kg
- Sulfur dioxide [air, non-urban air or from high stacks]: 1.29346e-6 kg; name SO2; = SO2_amount_MO_kg*(0.50* petroleum +0.50* natgas_high *0.84)/(0.50* 647220000 +0.50*35000000000 *0.84); lognormal variance with pedigree 0.0081, pedigree (1,2,4,1,1)
  Environmental report for 75% of gas produced in NL
  Uncertainty: E
  property amount in multioutput activity_kg 38865 kg; name SO2_amount_MO_kg
- Carbon monoxide, fossil [air, non-urban air or from high stacks]: 3.80568e-5 kg; name CO_fossil; = CO_fossil_amount_MO_kg*(0.50* petroleum +0.50* natgas_high *0.84)/(0.50* 647220000 +0.50*35000000000 *0.84); lognormal variance with pedigree 0.0081, pedigree (1,2,4,1,1)
  Environmental report for 75% of gas produced in NL
  Uncertainty: E
  property amount in multioutput activity_kg 1.1435e6 kg; name CO_fossil_amount_MO_kg
- Nitrogen oxides [air, non-urban air or from high stacks]: 6.84822e-7 kg; name NOx; = NOx_amount_MO_kg*(0.50* petroleum +0.50* natgas_high *0.84)/(0.50* 647220000 +0.50*35000000000 *0.84); lognormal variance with pedigree 0.0481, pedigree (1,2,4,1,1)
  Environmental report for 75% of gas produced in NL
  Uncertainty: E
  property amount in multioutput activity_kg 20577 kg; name NOx_amount_MO_kg
- Methane, fossil [air, non-urban air or from high stacks]: 0.000257595 kg; name CH4_fossil; = CH4_fossil_amount_MO_kg*(0.50* petroleum +0.50* natgas_high *0.84)/(0.50* 647220000 +0.50*35000000000 *0.84); lognormal variance with pedigree 0.0481, pedigree (1,2,4,1,1)
  UNFCCC 2014
  Uncertainty: E
  property amount in multioutput activity_kg 7.74e6 kg; name CH4_fossil_amount_MO_kg
- Methane, dichlorodifluoro-, CFC-12 [air, non-urban air or from high stacks]: 9.51402e-10 kg; name CFC; = CFC_amount_MO_kg*(0.50* petroleum +0.50* natgas_high *0.84)/(0.50* 647220000 +0.50*35000000000 *0.84); lognormal variance with pedigree 0.0661, pedigree (1,2,4,1,3)
  Environmental report for 75% of gas produced in NL
  Amount was scaled to the amount of reference product.
  Uncertainty: E
  property amount in multioutput activity_kg 28.587 kg; name CFC_amount_MO_kg
- Water [water, unspecified]: 5.94065e-6 m3; name water_to_water_unspecified; = (tap_water_input/1000)*(1-fraction_TW_to_air)+water_river_input*(1-fraction_PW_to_air)+water_salt_ocean_input*(1-fraction_PW_to_air)+water_salt_sole_input*(1-fraction_PW_to_air); lognormal variance with pedigree 0.0487, pedigree (2,2,4,1,1)
  (same comment as for Water)
  property amount in multioutput activity_m3 178500 m3; name water_to_water_unspecifie_amount_MO_m3_0
  property fraction, origin: unspecified 0; name fraction_origin_unspecified_Ww
  property dry mass 0 kg; name DM
  property fraction, origin: salt water 0.5; name fraction_origin_salt_water_Ww
  property water in wet mass 1000 kg; name WWM
  property carbon content, fossil 0; name C_content_fossil
  property wet mass 1000 kg; name WM
  property fraction, origin: fresh water 0.5; name fraction_origin_fresh_water_Ww
  property carbon content, non-fossil 0; name C_content_non_fossil
- Hydrocarbons, aliphatic, alkanes, unspecified [air, non-urban air or from high stacks]: 5.33294e-5 kg; name hydroc_aliph_alkane; = hydroc_aliph_alkane_amount_MO_kg*(0.50* petroleum +0.50* natgas_high *0.84)/(0.50* 647220000 +0.50*35000000000 *0.84); lognormal variance with pedigree 0.0481, pedigree (1,2,4,1,1)
  (same comment as for Hydrocarbons, aromatic)
  property amount in multioutput activity_kg 1.6024e6 kg; name hydroc_aliph_alkane_amount_MO_kg

## Sampling procedure
Data is based on environmental report. No information about the sampling procedure.

## Extrapolations
The data of the NAM report are collected for onshore and offshore production; they are allocated totally to the offshore production by emissions and discharges in the ocean. The other emissions are allocated to the onshore resp. offshore production on the basis of the energy content of the production. The emissions of turbines and motors of the exploitation are calculated on the basis of the Norwegian production and subtracted from the total. The described process contains only the remaining emissions (flaring, venting, well testing etc.). The drilling activity is based on the official statistical data for all Netherlands and is an average of the drilled meters cumulated on 20 years (1980-1999) and the related cumulated HC production specific for onshore production. Processing is included in the data. The dataset is based on the data published in Schori S, Frischknecht R (2012) Life Cycle Inventory of Natural Gas Supply (www.lc-inventories.ch). The emissions from flaring and venting of the natural gas production was updated based on the Dutch national inventory report (UNFCCC 2014b).

## Review by Emilia Moreno Ruiz 2017-09-06
PV adjusted
