# electricity production, wood, future

Dataset: EcoSpold 2, unit process
Geography: GLO
Time period: 2016-01-01 to 2030-12-31
Technology level: modern
Classification: ISIC rev.4 ecoinvent: 3530:Steam and air conditioning supply
Synonyms: consequential system model only; marginal
Tags: wood power; with true value
Scenario: Business-as-Usual
System model: Allocation, cut-off by classification
Generated by: Christian Bauer
Published in: Bauer, C. 2007
Database: ecoinvent
isCopyrightProtected: true
accessRestrictedTo: 1

## General comment
This dataset is used in the consequential system model only in order to supply the marginal electricity markets with electricity from biomass. Since electricity markets are implemented via the 'market override' feature, the annual production volume in this activity is zero. The dataset is based on an activity representing the production of heat and electricity with wood chips in a state-of-the-art (as of 2014) co-generation plant with a capacity of 6667 kW (referring to fuel input) in Switzerland; instead of co-generation, only electricity is produced in this activity - efficiency and other exchanges have been adjusted accordingly. The original technology corresponds to a modern unit to be installed in 2014 in Switzerland, which is equipped with an electrostatic precipitator for particulate matter (PM) emission reduction and an SNCR device for reduction of NOx emissions. Electricity is produced with an organic rankine cycle (ORC) steam generator. Emission control technology is state-of-the-art and the activity therefore can be regarded as representative for near future as well.
Wood chips are burned in a boiler at a temperature of 800-1300 °C under excess air conditions and turned into carbon dioxide and water. Energy is set free in form of heat. Burning takes place with the following steps:
1. Drying
2. degradation of the wood into carbon and gases
3. degradation of the carbon into gases
4. oxidation of the gases
These phases overlap. The produced heat can be used directly or for steam production in order to generate electricity with a turbine.
Emissions vary with quality of the combustion (temperatur, mixing of the combustion gases and the added fresh air, retention time of gases in the combustor), filter technologies and with the efficiency of the plant. Emission data in this dataset are taken from measurements and literature as well as from communication with experts.
CO2 emissions were calculated out of the carbon content of the wood used as combustible. Carbon emitted in carbon monoxide was subtracted from the result.
Key emissions factors for CO, NOx, CH4, NMVOC and particles were updated according to latest data.

## Included activities start
From wood chips ready to be burned.

## Included activities end
This activity ends with electricity produced.

This dataset includes the infrastructure, the wood input, the emissions to air and the disposal of the ashes. Also included are substances needed for operation: lubricating oil, organic chemicals, sodium chloride, chlorine and decarbonized water.

## Technology
Electric efficiency: 0.35
Total efficiency: 0.6

## Time period
representative for today and near future - to be used in the consequential system model for electricity supply from biomass.

## Parameters
- electrical efficiency: 0.36 dimensionless; name efficiency_electrical
  Electric efficiency, corresponding to annual operation including warm-up and cool-down.

## Reference product
- electricity, high voltage: 1 kWh; name electricity_out; = 1*efficiency_electrical/3.6; By-product classification allocatable product; CPC 17100: Electrical energy; pedigree (1,1,1,1,1)
  Electric efficiency referring to the LHV of the fuel input; efficiency assumed to be representative for modern technology today and in near future
  production volume 1 kWh
    This activity is only used in the consequential system model of the database using the 'market override' feature - therefore, the production volume indicated here is zero.
  property price 0.0977 EUR2005; name electricity_out_price_EUR2005
    Temporary price data. Calculated as 90% of purchasers price based on: 94% of the average price (to account for a 6% loss in transformation and transmission) for electricity for industrial consumersin 2005 (excluded taxes). From IEA.

## Inputs from technosphere
- wastewater, average: 0 m3; name sewage; source Bauer, C. 2007; pedigree (1,1,1,1,1)
  literature
  production volume 0 m3
    (same comment as for electricity, high voltage)
  property price 0 EUR2005; name sewage_price_EUR2005
  properties: dry mass 0.346837 kg, water content 2882.2, wet mass 1000 kg, carbon content, non-fossil 0.194039
  note on carbon content, non-fossil: 0.0673 kg TOC/m3 (Tab A.17, ecoinvent v2.2 report 13_I). TOC was considered as Total Carbon.
- chlorine, liquid: 0 kg; source Bauer, C. 2007; pedigree (1,1,1,1,1)
  literature
  properties: wet mass 1 kg, dry mass 1 kg
- wood chips, wet, measured as dry mass: 0 kg; pedigree (1,1,1,1,1)
  LHV of wood chips: 18.9 MJ/kg (dry mass)
  Calculated value.
  properties: carbon content, non-fossil 0.494, wet mass 2.1 kg, dry mass 1 kg, water content 1.1, heating value, net 10.84 MJ
  note on heating value, net: Value based on the dataset 'softwood forestry, mixed species, sustainable forest management'
- chemical, organic: 5.85e-5 kg; source Bauer, C. 2007; lognormal variance with pedigree 1.3021, pedigree (2,2,2,4,2)
  literature
  properties: heating value, net 19.03 MJ, carbon content, fossil 0.628, wet mass 1 kg, dry mass 1 kg
  note on carbon content, fossil: This dataset is an unweighted average of 20 organic substances (listed in Tab 88.1, ecoinvent v2.2 report 8, part II), being part of the top100 chemicals included in this database. The C-content has also been calculated as an unweighted average of the C content of the substances composing this dataset.
- sodium chloride, powder: 4.1e-5 kg; source Bauer, C. 2007; lognormal variance with pedigree 1.3021, pedigree (2,2,2,4,2)
  literature
  properties: wet mass 1 kg, dry mass 1 kg
- water, decarbonised: 0 kg; name water_decarbonised; source Bauer, C. 2007; pedigree (1,1,1,1,1)
  literature
  properties: wet mass 1 kg
- lubricating oil: 0 kg; name lubricating_oil; source Bauer, C. 2007; pedigree (1,1,1,1,1)
  literature
  properties: wet mass 1 kg, carbon content, fossil 0.75, dry mass 1 kg, heating value, net 40.2 MJ
  note on carbon content, fossil: Lubricating oil is produced from diesel. C-content/dry mass of fats and oils considered 75%, from: ecoinvent v2.2 report, n 15a, pg 40
  note on heating value, net: Literature value, Source: IPCC 2006, 2006 IPCC Guidelines for National Greenhouse Gas Inventories, Prepared by the National Greenhouse Gas Inventories Programme, Eggleston H.S., Buendia L., Miwa K., Ngara T. and Tanabe K. (eds). Published: IGES, Japan
- ammonia, anhydrous, liquid: 0 kg; source Bauer, C. 2007; pedigree (1,1,1,1,1)
  literature
  properties: dry mass 1 kg, wet mass 1 kg
- municipal solid waste: 0 kg; name municipal_waste; source Bauer, C. 2007; pedigree (1,1,1,1,1)
  literature
  production volume 0 kg
    (same comment as for electricity, high voltage)
  property price 0 EUR2005; name municipal_waste_price_EUR2005
  properties: wet mass 1 kg, carbon content, fossil 0.171549, water content 0.297017, carbon content, non-fossil 0.261655, heating value, net 11.74 MJ, dry mass 0.771 kg
  note on carbon content, fossil: MSW composition in tab 4.1, ecoinvent v2.2 report 13_I. C content referred to 1 kg DM
  note on heating value, net: Value taken from the general comment of the treatment dataset.
- NOx retained, by selective catalytic reduction: 0.0008 kg; source Thomas Nussbaumer 2014; lognormal variance with pedigree 1.3021, pedigree (2,2,2,4,2)
  expert estimation (see source)
  properties: wet mass 1 kg, dry mass 1 kg
- waste mineral oil: 0 kg; name waste_oil; source Bauer, C. 2007; pedigree (1,1,1,1,1)
  literature
  production volume 0 kg
    (same comment as for electricity, high voltage)
  property price 0 EUR2005; name waste_oil_price_EUR2005
  properties: dry mass 0.9 kg, wet mass 1 kg, water content 0.111111, carbon content, fossil 0.864444, heating value, net 34.7 MJ
  note on carbon content, fossil: Tab A.6, ecoinvent v2.2 report 13_I. C content has been calculated after data in the tables, and then referred to 1 kg DM
- dust collector, electrostatic precipitator, for industrial use: 2.5e-8 unit; = (20000/efficiency_electrical/5000)/(4000*20000/efficiency_electrical*20); lognormal variance with pedigree 1.3021, pedigree (2,2,2,4,2)
  calculated value: assuming 4000h/a operation time, 20a lifetime, 20MW net electric capacity and linear scaling of the 5MW furnace
- wood ash mixture, pure: 0 kg; name wood_ash; source Bauer, C. 2007; pedigree (1,1,1,1,1)
  literature
  production volume 0 kg
    (same comment as for electricity, high voltage)
  property price 0 EUR2005; name wood_ash_price_EUR2005
  properties: dry mass 1 kg, carbon content, non-fossil 0.012, wet mass 1 kg
- furnace, wood chips, with silo, 5000kW: 2.5e-8 unit; = (20000/efficiency_electrical/5000)/(4000*20000/efficiency_electrical*20); lognormal variance with pedigree 1.3021, pedigree (2,2,2,4,2)
  (same comment as for dust collector, electrostatic precipitator, for industrial use)
- wastewater, average: -2.45907e-6, -2.66025e-7, -5.1449e-6 m3 (3 entries); source Bauer, C. 2007; lognormal variance with pedigree 1.3021, pedigree (2,2,2,4,2)
  literature
  production volume 1 m3
- chlorine, liquid: 5.46752e-7, 2.73325e-6 kg (2 entries); source Bauer, C. 2007; lognormal variance with pedigree 1.3021, pedigree (2,2,2,4,2)
  literature
- wood chips, wet, measured as dry mass: 0.0105549, 0.00040157, 0.00117134, 0.516973 kg (4 entries); lognormal variance with pedigree 1.3021, pedigree (2,2,2,4,2)
  LHV of wood chips: 18.9 MJ/kg (dry mass)
  Calculated value.
- water, decarbonised: 0.00138461, 0.000338115, 6.81624e-5, 0.000224131, 0.000176318, 1.68539e-5, 0.000131938, 0.000343301, 2.14693e-7, 1.23734e-5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 kg (13 entries); source Bauer, C. 2007; lognormal variance with pedigree 1.3021, pedigree (2,2,2,4,2)
  literature
- lubricating oil: 5.7072e-6, 2.70928e-5 kg (2 entries); source Bauer, C. 2007; lognormal variance with pedigree 1.3021, pedigree (2,2,2,4,2)
  literature
- ammonia, anhydrous, liquid: 1.31872e-9, 8.81389e-9, 2.05159e-9, 3.98256e-9, 4.06493e-9, 1.866e-9, 1.53408e-8, 4.17415e-10, 4.41441e-8 kg (9 entries); source Bauer, C. 2007; lognormal variance with pedigree 1.3021, pedigree (2,2,2,4,2)
  literature
- municipal solid waste: -2.51037e-6, -1.53867e-8, -1.0767e-8, -4.27306e-8, -3.02208e-5 kg (5 entries); source Bauer, C. 2007; lognormal variance with pedigree 1.3021, pedigree (2,2,2,4,2)
  literature
  production volume 1 kg
- waste mineral oil: -9.00331e-6, -2.22886e-7, -2.35738e-5 kg (3 entries); source Bauer, C. 2007; lognormal variance with pedigree 1.3021, pedigree (2,2,2,4,2)
  literature
  production volume 1 kg
- wood ash mixture, pure: -0.00170334, -3.50147e-5, -0.00355164 kg (3 entries); source Bauer, C. 2007; lognormal variance with pedigree 1.3021, pedigree (2,2,2,4,2)
  literature
  production volume 1 kg

## Emissions to nature
All rows: lognormal variance with pedigree 1.3021, pedigree (2,2,2,4,2)
- Magnesium [air, urban air close to ground]: 3.6e-6 kg; source Bauer, C. 2007
  literature
- Lead [air, urban air close to ground]: 2.5e-7 kg; source Bauer, C. 2007
  literature
- Chlorine [air, urban air close to ground]: 1.8e-6 kg; source Bauer, C. 2007
  literature
- Benzene, ethyl- [air, urban air close to ground]: 3e-7 kg; source Bauer, C. 2007
  literature
- Dinitrogen monoxide [air, urban air close to ground]: 2.3e-5 kg; source Bauer, C. 2007
  literature
- Phenol, pentachloro- [air, urban air close to ground]: 8.1e-11 kg; source Bauer, C. 2007
  literature
- Bromine [air, urban air close to ground]: 6e-7 kg; source Bauer, C. 2007
  literature
- PAH, polycyclic aromatic hydrocarbons [air, urban air close to ground]: 1.11e-7 kg; source Bauer, C. 2007
  literature
- Water [air, non-urban air or from high stacks]: 0.000582 m3
  calculation based on water balance
- Nickel [air, urban air close to ground]: 6e-8 kg; source Bauer, C. 2007
  literature
- Carbon dioxide, non-fossil [air, urban air close to ground]: 0.96 kg; source Bauer, C. 2007
  literature
- Benzo(a)pyrene [air, urban air close to ground]: 5e-9 kg; source Bauer, C. 2007
  literature
- Arsenic [air, urban air close to ground]: 1e-8 kg; source Bauer, C. 2007
  literature
- Acetaldehyde [air, urban air close to ground]: 6.1e-7 kg; source Bauer, C. 2007
  literature
- Methane, non-fossil [air, urban air close to ground]: 1.2e-5 kg; source Thomas Nussbaumer 2014
  expert estimation (see source)
- Benzene, hexachloro- [air, urban air close to ground]: 7.2e-14 kg; source Bauer, C. 2007
  literature
- Chromium [air, urban air close to ground]: 3.96e-8 kg; source Bauer, C. 2007
  literature
- Benzene [air, urban air close to ground]: 9.1e-6 kg; source Bauer, C. 2007
  literature
- Ammonia [air, urban air close to ground]: 0.00017 kg; source Bauer, C. 2007
  literature
- Dioxins, measured as 2,3,7,8-tetrachlorodibenzo-p-dioxin [air, urban air close to ground]: 3.1e-13 kg; source Bauer, C. 2007
  literature
- Calcium [air, urban air close to ground]: 5.85e-5 kg; source Bauer, C. 2007
  literature
- Zinc [air, urban air close to ground]: 3e-6 kg; source Bauer, C. 2007
  literature
- Formaldehyde [air, urban air close to ground]: 1.3e-6 kg; source Bauer, C. 2007
  literature
- NMVOC, non-methane volatile organic compounds, unspecified origin [air, urban air close to ground]: 2.8e-5 kg; source Thomas Nussbaumer 2014
  expert estimation (see source)
- Manganese [air, urban air close to ground]: 1.7e-6 kg; source Bauer, C. 2007
  literature
- Potassium [air, urban air close to ground]: 0.000234 kg; source Bauer, C. 2007
  literature
- Toluene [air, urban air close to ground]: 3e-6 kg; source Bauer, C. 2007
  literature
- Mercury [air, urban air close to ground]: 3e-9 kg; source Bauer, C. 2007
  literature
- Sodium [air, urban air close to ground]: 1.3e-5 kg; source Bauer, C. 2007
  literature
- Nitrogen oxides [air, urban air close to ground]: 0.0008 kg; source Thomas Nussbaumer 2014
  expert estimation (see source)
- Phosphorus [air, urban air close to ground]: 3e-6 kg; source Bauer, C. 2007
  literature
- Hydrocarbons, aliphatic, unsaturated [air, urban air close to ground]: 3.1e-5 kg; source Bauer, C. 2007
  literature
- Copper [air, urban air close to ground]: 2.2e-7 kg; source Bauer, C. 2007
  literature
- Hydrocarbons, aliphatic, alkanes, unspecified [air, urban air close to ground]: 9.1e-6 kg; source Bauer, C. 2007
  literature
- Chromium VI [air, urban air close to ground]: 4e-10 kg; source Bauer, C. 2007
  literature
- Carbon monoxide, non-fossil [air, urban air close to ground]: 0.001 kg; source Thomas Nussbaumer 2014
  expert estimation (see source)
- m-Xylene [air, urban air close to ground]: 1.2e-6 kg; source Bauer, C. 2007
  literature
- Particulates, < 2.5 um [air, urban air close to ground]: 5e-5 kg; source Thomas Nussbaumer 2014
  expert estimation (see source)
- Sulfur dioxide [air, urban air close to ground]: 2.5e-5 kg; source Bauer, C. 2007
  literature
- Fluorine [air, urban air close to ground]: 5e-7 kg; source Bauer, C. 2007
  literature
- Cadmium [air, urban air close to ground]: 7e-9 kg; source Bauer, C. 2007
  literature

## Sampling procedure
literature, expert judgement, extrapolation

## Extrapolations
This dataset is based on a wood combustion combined heat and power generation dataset, originally valid for Switzerland.
