# glass cullet supply, for Saint-Gobain ISOVER SA

Dataset: EcoSpold 2, unit process
Geography: GLO
Time period: 2009-01-01 to 2021-12-31
Technology level: current
Classification: ISIC rev.4 ecoinvent: 3811:Collection of non-hazardous waste
Scenario: Business-as-Usual
System model: Allocation, cut-off by classification
Generated by: Bo Weidema
Database: ecoinvent
isCopyrightProtected: true
accessRestrictedTo: 1

## Reference product
- glass cullet, for Saint-Gobain ISOVER SA: 1 kg; By-product classification Recyclable; CPC 37111: Glass in the mass, in balls (except microspheres), rods or tubes, unworked; waste and scrap of glass
  production volume 1.49814e7 kg; = 2.03E+07*0.738
    production volume of Saint-Gobain ISOVER SA multiplied with the input of cullet per kg glass wool mat
  property price 0.08 EUR2005
    Estimated to be the same price as for glass cullet, sorted (Temporary price data. The price of the glass cullet, sorted is estimated to be two times higher than the price of the waste packaging glass, unsorted.).

## Inputs from technosphere
- glass cullet, sorted: 0, 0.330592, 0.669408 kg (3 entries)
  properties: dry mass 1 kg, wet mass 1 kg

## Extrapolations
This dataset has been extrapolated from year 2009 to the year of the calculation (2021). The uncertainty has been adjusted accordingly.

## Review by Emilia Moreno Ruiz 2013-07-22
correction of the glass cullet, sorted supply chain
