# biomethane production, high pressure from synthetic gas, wood, fixed bed technology

Dataset: EcoSpold 2, unit process
Geography: CH
Time period: 2008-01-01 to 2021-12-31
Technology level: current
Classification: EcoSpold01Categories: biomass/fuels
Classification: ISIC rev.4 ecoinvent: 3520:Manufacture of gas; distribution of gaseous fuels through mains
Scenario: Business-as-Usual
System model: Allocation, cut-off by classification
Share of production covered: 0 %
Generated by: Andrea Del Duce
Published in: Andrea Del Duce 2015
Database: ecoinvent
isCopyrightProtected: true
accessRestrictedTo: 1

## General comment
This datasets describes the production of methane from wood. The feedstock is first gasified and then methanised. This dataset describes methane production through a fixed bed technology. Gas composition (% mol.) of the gas is 96% CH4 (min.). Density is 0.752 kg/Nm3. Lower heating value of the gas is 34.4 MJ/Nm3. Process heat is supplied by methane combustion. Inventory refers to the net production of 1 Nm3 syngas. Net methane yield is 0.261 Nm3/kg of wood (dry matter) with a conversion efficiency (lower heating value of the methane/lower heating value of the required wood) of around 50%.
This dataset was not available in ecoinvent v2.2. It was created by taking the information in the ecoinvent report nr. 17 and developing a virtual process based on the information given there. It does not describe an existing plant.
[This dataset is meant to replace the following datasets:
- methane production, 96% by volume, from synthetic gas, wood, fixed bed technology, CH, 2000 - 2008
- methane production, 96% by volume, from synthetic gas, wood, fixed bed technology, GLO, 2000 - 2008
- methane production, 96% by volume, from synthetic gas, wood, fluidised technology, CH, 2000 - 2008
- methane production, 96% by volume, from synthetic gas, wood, fluidised technology, GLO, 2000 - 2008]

## Included activities start
The activity begins with the transport of the wood and other required auxiliaries to the production site.

## Included activities end
This process refers to the conversion of wood chips into synthetic methane (96% vol.) through gasification and subsequent methanation. It includes drying (down to 10-15% moisture) and further comminution of wood chips (down to a size of 30x30x30 mm), fixed bed gasification of the wood chips, treatment and conditioning of the resulting syngas to remove impurities and contaminants, methanation of the the syngas to methane, and compression of methane to natural gas network pressure (30-70 bar).

## Geography
Data was taken from the ecoinvent v2.2 report nr. 17 which was mostly based on data from Paul Scherrer Institut (PSI, Switzerland) .

## Technology
Gasification technology is fixed bed gasification.

## Time period
Data mainly from 2004, adapted from a fluidised technology pilot scale plant, future technology

## Parameters
- fraction, tap water, to air: 0.15 dimensionless; name fraction_TW_to_air; lognormal variance with pedigree 0.092025, pedigree (4,4,3,2,4)
- fraction, process water, to air: 0.15 dimensionless; name fraction_PW_to_air; lognormal variance with pedigree 0.092025, pedigree (4,4,3,2,4)

## Reference product
- biomethane, high pressure: 1 m3; CPC 17200: Coal gas, water gas, producer gas and similar gases, other than petroleum gases and other gaseous hydrocarbons; By-product classification allocatable product; CAS 74-82-8
  EcoSpold01Location=CH
  production volume 146730 m3; name rp_pv
    Very rough estimation based on production of wood gas as specified in the ecoinvent dataset "synthetic gas production, from wood, at fixed bed gasiefier", considering that approximately 4m3 of syngas are necessary to make 1m3 of maethane. Based on the comment in the dataset "synthetic gas production, from wood, at fixed bed gasiefier" which considers 2 pilot-scale plants.
  property price 0.144 EUR2005
    Temporary price data. Calculated as 90% of purchasers price based on: Same prices per energy output as natural gas, based on the proportional heating value (55.5 MJ/kg for methane; 54.8 MJ/kg for natural gas)
  property carbon content, non-fossil 0.695496
    Carbon content calculated from composition of the gas, 96% (in vol) methane, 2% (in vol) CO2 (Tab 13.3, ecoinvent v2.2 report 17). The composition in %vol was converted in % weight using density data of the different gases from tab 19.1, ecoinvent v2.2 report 17, part 19.
  property heating value, net 34.97 MJ
    Literature value, Source: United Nations Statistics Division (2018) International Recommendations for Energy Statistics (IRES). Available at: http://unstats.un.org/unsd/statcom/doc11/BG-IRES.pdf.
  property carbon content 0.695496
    carbon content on a dry matter basis (reserved; not for manual entry)
  properties: water content 0, carbon content, fossil 0, dry mass 0.752 kg, water in wet mass 0 kg, wet mass 0.752 kg, carbon allocation 0.523013 kg

## Inputs from technosphere
All rows: source Jungbluth N. 2007
- wood ash mixture, pure: -0.0362 kg; name woodash_out; lognormal variance with pedigree 0.0681, pedigree (4,5,3,3,4)
  EcoSpold01Location=CH
  Based on PSI data (Ecogas project) plus calculations, the data was taken from the fluidised technology described in the ecoinvent v2.2 report nr. 17 and adapted to fixed bed technology based on the specific process steps described in the report.
  Uncertainty: Based on PSI data (Ecogas project) plus calculations
  production volume 5311.63 kg; = woodash_out*rp_pv
    Based on data from ecoinvent report nr. 17 "Bioenergy".The formula multiplies the exchange output with the production volume of the reference product.
  property price 0 EUR2005; name woodash_out_price_EUR2005
  properties: dry mass 1 kg, carbon content, non-fossil 0.012, wet mass 1 kg
- waste mineral oil: -0.014622 kg; name wasteoil_out; lognormal variance with pedigree 0.0681, pedigree (4,5,3,3,4)
  (same comment as for wood ash mixture, pure)
  production volume 2145.49 kg; = wasteoil_out*rp_pv
    (same comment as for wood ash mixture, pure)
  property price 0 EUR2005; name wasteoil_out_price_EUR2005
  properties: dry mass 0.9 kg, heating value, net 34.7 MJ, carbon content, fossil 0.864444, water content 0.111111, wet mass 1 kg
  note on heating value, net: Value taken from the general comment of the treatment dataset.
  note on carbon content, fossil: Tab A.6, ecoinvent v2.2 report 13_I. C content has been calculated after data in the tables, and then referred to 1 kg DM
- nickel, class 1: 4.2942e-10 kg; lognormal variance with pedigree 0.0681, pedigree (4,5,3,3,4)
  Based on PSI data (Ecogas project) plus calculations, the data was taken from the fluidised technology described in the ecoinvent v2.2 report nr. 17 and adapted to fixed bed technology based on the specific process steps described in the report.
  EcoSpold01Location=GLO
  Uncertainty: Based on PSI data (Ecogas project) plus calculations
  properties: dry mass 1 kg, wet mass 1 kg
- sodium hydroxide, without water, in 50% solution state: 0.00328 kg; lognormal variance with pedigree 0.0781, pedigree (4,5,3,3,4)
  EcoSpold01Location=RER
  Calculation, based on 'heat, natural gas, at boiler modulating' (according to heat supply from methane).The data was taken from the fluidised technology described in the ecoinvent v2.2 report nr. 17 and adapted to fixed bed technology based on the specific process steps described in the report.
  Uncertainty: Calculation from a typical quality of untreated syngas from wood
  properties: heating value, net 3.03 MJ, wet mass 1 kg, dry mass 1 kg
- sulfuric acid: 0.013 kg; lognormal variance with pedigree 0.0781, pedigree (4,5,3,3,4)
  Calculation, based on 'heat, natural gas, at boiler modulating' (according to heat supply from methane).The data was taken from the fluidised technology described in the ecoinvent v2.2 report nr. 17 and adapted to fixed bed technology based on the specific process steps described in the report.
  EcoSpold01Location=RER
  Uncertainty: Calculation from a typical quality of untreated syngas from wood
  properties: wet mass 1 kg, dry mass 1 kg
- wastewater, from residence: -0.0010769 m3; name wastewater_out; lognormal variance with pedigree 0.0681, pedigree (4,5,3,3,4)
  (same comment as for wood ash mixture, pure)
  production volume 158.014 m3; = wastewater_out*rp_pv
    Based on data from ecoinvent report nr. 17 "Bioenergy". The formula multiplies the exchange output with the production volume of the reference product.
  property price 0 EUR2005; name wastewater_out_price_EUR2005
  properties: wet mass 1000 kg, carbon content, non-fossil 0.199421, dry mass 0.337476 kg, water content 2962.17
  note on carbon content, non-fossil: 0.0673 kg TOC/m3 (Tab A.17, ecoinvent v2.2 report 13_I). TOC was considered as Total Carbon.
- aluminium oxide, non-metallurgical: 4.2942e-10 kg; lognormal variance with pedigree 0.0681, pedigree (4,5,3,3,4)
  EcoSpold01Location=RER
  Based on PSI data (Ecogas project) plus calculations, the data was taken from the fluidised technology described in the ecoinvent v2.2 report nr. 17 and adapted to fixed bed technology based on the specific process steps described in the report.
  Uncertainty: Based on PSI data (Ecogas project) plus calculations
  properties: dry mass 1 kg, wet mass 1 kg
- electricity, low voltage: 0.00844 kWh; lognormal variance with pedigree 0.0781, pedigree (4,5,3,3,4)
  Calculation, based on 'heat, natural gas, at boiler modulating' (according to heat supply from methane).The data was taken from the fluidised technology described in the ecoinvent v2.2 report nr. 17 and adapted to fixed bed technology based on the specific process steps described in the report.
  EcoSpold01Location=UCTE
  Uncertainty: Calculation, based on 'heat, natural gas, at boiler modulating' (according to heat supply from methane)
- heat, central or small-scale, other than natural gas: 0.000613 MJ; lognormal variance with pedigree 0.0681, pedigree (4,5,3,3,4)
  Based on PSI data (Ecogas project) plus calculations, the data was taken from the fluidised technology described in the ecoinvent v2.2 report nr. 17 and adapted to fixed bed technology based on the specific process steps described in the report.
  properties: heating value, net 1 MJ
- wood chips, dry, measured as dry mass: 0.8412 kg; lognormal variance with pedigree 0.0781, pedigree (4,5,3,3,4)
  Yield based on PSI data (Ecogas project) plus calculations, distribution of wood qualities from IEA Task 33 CH report. The data was taken from the fluidised technology described in the ecoinvent v2.2 report nr. 17 and adapted to fixed bed technology based on the specific process steps described in the report.
  EcoSpold01Location=RER
  Uncertainty: Yield based on PSI data (Ecogas project) plus calculations, distribution of wood qualities from IEA Task 33 CH report
  properties: water content 0.4, dry mass 1 kg, carbon content, non-fossil 0.494, wet mass 1.4 kg, heating value, net 9.99 MJ
  note on carbon content, non-fossil: C content of dry mass is 0.494 kgC/kg dry wood (ecoinvent v2.2 report 9).
- wood chips, wet, measured as dry mass: 2.9874 kg; lognormal variance with pedigree 0.0781, pedigree (4,5,3,3,4)
  (same comment as for wood chips, dry, measured as dry mass)
  properties: wet mass 2.4 kg, water content 1.4, carbon content, non-fossil 0.494, heating value, net 10.84 MJ, dry mass 1 kg
  note on heating value, net: Value based on the dataset 'softwood forestry, mixed species, sustainable forest management'
- industrial furnace, natural gas: 2.1457e-8 unit; lognormal variance with pedigree 0.3781, pedigree (4,5,3,3,4)
  EcoSpold01Location=RER
  Calculation, based on 'heat, natural gas, at boiler modulating' (according to heat supply from methane).The data was taken from the fluidised technology described in the ecoinvent v2.2 report nr. 17 and adapted to fixed bed technology based on the specific process steps described in the report.
  Uncertainty: Calculation, based on 'heat, natural gas, at boiler modulating' (according to heat supply from methane)
- charcoal: 0.019805 kg; lognormal variance with pedigree 0.0681, pedigree (4,5,3,3,4)
  (same comment as for nickel, class 1)
  properties: carbon content, non-fossil 0.8, dry mass 1 kg, heating value, net 28.4 MJ, wet mass 1 kg
  note on heating value, net: Indicative value. Reference: Fuels - Higher and Lower Calorific Values, available at: https://www.engineeringtoolbox.com/fuels-higher-calorific-values-d_169.html
- tap water: 0.577 kg; name tap_water_input; lognormal variance with pedigree 0.0681, pedigree (4,5,3,3,4)
  (same comment as for wood ash mixture, pure)
  properties: carbon content, fossil 0.00178991, dry mass 0.000337476 kg, wet mass 1 kg, water content 2962.17
  note on carbon content, fossil: Bicarbonate content is 2.93 mol/m3. CO2 content is 0.1 mol/m3 (ecoinvent v2.2 report 8, Tab 93.1).
- zinc: 0.0018694 kg; lognormal variance with pedigree 0.0681, pedigree (4,5,3,3,4)
  Based on PSI data (Ecogas project) plus calculations, the data was taken from the fluidised technology described in the ecoinvent v2.2 report nr. 17 and adapted to fixed bed technology based on the specific process steps described in the report.
  EcoSpold01Location=RER
  Uncertainty: Based on PSI data (Ecogas project) plus calculations
  properties: dry mass 1 kg, wet mass 1 kg
- fatty acid methyl ester: 0.014622 kg; lognormal variance with pedigree 0.0681, pedigree (4,5,3,3,4)
  Based on PSI data (Ecogas project) plus calculations, the data was taken from the fluidised technology described in the ecoinvent v2.2 report nr. 17 and adapted to fixed bed technology based on the specific process steps described in the report.
  Uncertainty: Based on PSI data (Ecogas project) plus calculations
  properties: wet mass 1 kg, dry mass 1 kg, heating value, net 37.2 MJ, carbon content, fossil 0.041, carbon content, non-fossil 0.732
  note on heating value, net: Based on literature, report 17, page 439. Jungbluth, N., Chudacoff, M., Dauriat, A., Dinkel, F., Doka, G., Faist Emmenegger, M., Gnansounou, E., Kljun, N., Schleiss, K., Spielmann, M., Stettler, C., Sutter, J. 2007: Life Cycle Inventories of Bioenergy. ecoinvent report No. 17, Swiss Centre for Life Cycle Inventories, Dübendorf, CH.
- inert waste: -0.0888 kg; name inertwaste_out; lognormal variance with pedigree 0.0681, pedigree (4,5,3,3,4)
  (same comment as for wood ash mixture, pure)
  production volume 13029.6 kg; = inertwaste_out*rp_pv
    (same comment as for wood ash mixture, pure)
  property price 0 EUR2005; name inertwaste_out_price_EUR2005
  properties: dry mass 1 kg, wet mass 1 kg
- electricity, medium voltage: 0.8359 kWh; = 0.138+0.0609+0.137+0.5; lognormal variance with pedigree 0.0681, pedigree (4,5,3,3,4)
  EcoSpold01Location=CH
  Based on PSI data (Ecogas project) plus calculations, the data was taken from the fluidised technology described in the ecoinvent v2.2 report nr. 17 and adapted to fixed bed technology based on the specific process steps described in the report. The mathematical relation descibes the sum of the electricity requirements from the various processing steps as derived from the values in the ecoinvent v2.2 report nr. 17.
  Uncertainty: Based on PSI data (Ecogas project) plus calculations
- synthetic gas factory: 2.9022e-9 unit; lognormal variance with pedigree 0.3681, pedigree (4,5,3,3,4)
  Based on PSI data (Ecogas project) plus calculations
  EcoSpold01Location=CH
  Uncertainty: Calculation

## Emissions to nature
All rows: source Jungbluth N. 2007
- Acetaldehyde [air, urban air close to ground]: 7.66e-9 kg; lognormal variance with pedigree 0.1181, pedigree (4,5,3,3,4)
  Calculation, based on 'heat, natural gas, at boiler modulating' (according to heat supply from methane).The data was taken from the fluidised technology described in the ecoinvent v2.2 report nr. 17 and adapted to fixed bed technology based on the specific process steps described in the report.
  Uncertainty: Calculation, based on 'heat, natural gas, at boiler modulating' (according to heat supply from methane)
- Particulates, < 2.5 um [air, urban air close to ground]: 5.68e-5 kg; lognormal variance with pedigree 0.3781, pedigree (4,5,3,3,4)
  Calculation, based on 'heat, natural gas, at boiler modulating' (according to heat supply from methane).The data was taken from the fluidised technology described in the ecoinvent v2.2 report nr. 17 and adapted to fixed bed technology based on the specific process steps described in the report.
  Uncertainty: Calculation, based on 'heat, natural gas, at boiler modulating' (according to heat supply from methane), and PSI data
- Hydrocarbons, aliphatic, alkanes, unspecified [air, urban air close to ground]: 7.66e-5 kg; lognormal variance with pedigree 0.1081, pedigree (4,5,3,3,4)
  Based on PSI data from the Ecogas project
  Uncertainty: Based on PSI data from the Ecogas project
- Hydrocarbons, aliphatic, unsaturated [air, urban air close to ground]: 0.000261 kg; lognormal variance with pedigree 0.1081, pedigree (4,5,3,3,4)
  Based on PSI data (Ecogas project) plus calculations, the data was taken from the fluidised technology described in the ecoinvent v2.2 report nr. 17 and adapted to fixed bed technology based on the specific process steps described in the report.
  Uncertainty: Based on PSI data from the Ecogas project
- Carbon monoxide, non-fossil [air, urban air close to ground]: 0.00357 kg; lognormal variance with pedigree 0.7181, pedigree (4,5,3,3,4)
  (same comment as for Particulates, < 2.5 um)
- PAH, polycyclic aromatic hydrocarbons [air, urban air close to ground]: 1.003e-6 kg; lognormal variance with pedigree 0.3781, pedigree (4,5,3,3,4)
  (same comment as for Particulates, < 2.5 um)
- Nitrogen oxides [air, urban air close to ground]: 0.00217 kg; lognormal variance with pedigree 0.1181, pedigree (4,5,3,3,4)
  Based on PSI data (Ecogas project) plus calculations, the data was taken from the fluidised technology described in the ecoinvent v2.2 report nr. 17 and adapted to fixed bed technology based on the specific process steps described in the report.
  Uncertainty: Calculation, based on 'heat, natural gas, at boiler modulating' (according to heat supply from methane), and PSI data
- Mercury [air, urban air close to ground]: 2.299e-10 kg; lognormal variance with pedigree 0.7181, pedigree (4,5,3,3,4)
  Based on PSI data (Ecogas project) plus calculations, the data was taken from the fluidised technology described in the ecoinvent v2.2 report nr. 17 and adapted to fixed bed technology based on the specific process steps described in the report.
  Uncertainty: Calculation, based on 'heat, natural gas, at boiler modulating' (according to heat supply from methane)
- Dinitrogen monoxide [air, urban air close to ground]: 3.832e-6 kg; lognormal variance with pedigree 0.1181, pedigree (4,5,3,3,4)
  (same comment as for Acetaldehyde)
- Formaldehyde [air, urban air close to ground]: 7.66e-7 kg; lognormal variance with pedigree 0.1181, pedigree (4,5,3,3,4)
  (same comment as for Acetaldehyde)
- Sulfur dioxide [air, urban air close to ground]: 4.215e-6 kg; lognormal variance with pedigree 0.0781, pedigree (4,5,3,3,4)
  (same comment as for Acetaldehyde)
- Benzo(a)pyrene [air, urban air close to ground]: 7.66e-11 kg; lognormal variance with pedigree 0.3781, pedigree (4,5,3,3,4)
  (same comment as for Acetaldehyde)
- Carbon dioxide, non-fossil [air, urban air close to ground]: 5.092 kg; lognormal variance with pedigree 0.0587, pedigree (4,5,3,3,4)
  Calculation, based on 'heat, natural gas, at boiler modulating' (according to heat supply from methane).The data was taken from the fluidised technology described in the ecoinvent v2.2 report nr. 17 and adapted to fixed bed technology based on the specific process steps described in the report.
  Uncertainty: Calculation, to close carbon balance
- Methane, non-fossil [air, urban air close to ground]: 1.53e-5 kg; lognormal variance with pedigree 0.1181, pedigree (4,5,3,3,4)
  (same comment as for Mercury)
- Benzene [air, urban air close to ground]: 3.07e-6 kg; lognormal variance with pedigree 0.1181, pedigree (4,5,3,3,4)
  (same comment as for Acetaldehyde)
- Pentane [air, urban air close to ground]: 9.196e-6 kg; lognormal variance with pedigree 0.1181, pedigree (4,5,3,3,4)
  (same comment as for Acetaldehyde)
- Dioxins, measured as 2,3,7,8-tetrachlorodibenzo-p-dioxin [air, urban air close to ground]: 0 kg; pedigree (1,1,1,1,1)
  (same comment as for Acetaldehyde)
- NMVOC, non-methane volatile organic compounds, unspecified origin [air, urban air close to ground]: 5.135e-5 kg; lognormal variance with pedigree 0.1081, pedigree (4,5,3,3,4)
  (same comment as for Hydrocarbons, aliphatic, unsaturated)
- Acetic acid [air, urban air close to ground]: 1.15e-6 kg; lognormal variance with pedigree 0.1181, pedigree (4,5,3,3,4)
  (same comment as for Acetaldehyde)
- Toluene [air, urban air close to ground]: 1.533e-6 kg; lognormal variance with pedigree 0.1181, pedigree (4,5,3,3,4)
  (same comment as for Acetaldehyde)
- Propionic acid [air, urban air close to ground]: 1.533e-7 kg; lognormal variance with pedigree 0.1181, pedigree (4,5,3,3,4)
  (same comment as for Acetaldehyde)
- Butane [air, urban air close to ground]: 5.36e-6 kg; lognormal variance with pedigree 0.1181, pedigree (4,5,3,3,4)
  (same comment as for Acetaldehyde)
- Water [air, unspecified]: 0.005095 m3; name water_to_air_unspecified; lognormal variance with pedigree 0.0981, pedigree (4,5,3,3,4)
  Calculation, based on 'heat, natural gas, at boiler modulating' (according to heat supply from methane).The data was taken from the fluidised technology described in the ecoinvent v2.2 report nr. 17 and adapted to fixed bed technology based on the specific process steps described in the report. The dataset is not wtaer balanced. Specific information on the water balance was not found.
  property fraction, origin: fresh water 1; name fraction_origin_fresh_water
  property fraction, origin: unspecified 0; name fraction_origin_unspecified
  property fraction, origin: salt water 0; name fraction_origin_salt_water
- Propane [air, urban air close to ground]: 1.533e-6 kg; lognormal variance with pedigree 0.1181, pedigree (4,5,3,3,4)
  (same comment as for Acetaldehyde)

## Sampling procedure
Literaure: data from one source, pilot-to-demonstration plant operation data. The plant was however based on fluidised technology and was adapted to a fixed bed concept.

## Extrapolations
This dataset has been extrapolated from year 2016 to the year of the calculation (2021). The uncertainty has been adjusted accordingly.

## Review by Emilia Moreno Ruiz 2018-03-14
Input directed to Swiss producer with Activity Link
