# railway track construction

Dataset: EcoSpold 2, unit process
Geography: RoW
Time period: 1990-01-01 to 2021-12-31
Technology level: current
Classification: ISIC rev.4 ecoinvent: 4210:Construction of roads and railways
Classification: EcoSpold01Categories: transport systems/train
Scenario: Business-as-Usual
System model: Allocation, cut-off by classification
Generated by: Michael Spielmann (obsolete)
Published in: Spielmann M. 2007
Database: ecoinvent
isCopyrightProtected: true
accessRestrictedTo: 1

## General comment
Based on 'railway track construction, CH 2000'. All data is referred to meter*year. Life time of the rail track infrastructure is assumed to be 100 yrs. Inventory for a conventional gravel track bedding. Expenditures due to tunnel construction and bridge construction have been taken into account, according to the share of tunnels and bridges in the Swiss rail network. All data is referred to a two way track. Allocation between goods and passenger transport is not yet applied. For the maintenance and land use data, the inventory represents a conventional gravel track bedding. Expenditures due to tunnel construction and bridge construction have been taken into account, according to the share of tunnels and bridges in the Swiss rail network. Railway track disposal is included as well.

## Included activities start
Service starts with the material consumption due to the track bedding, substructure and catenary system. Service for the maintenance and land use starts with the electricty consumption.

## Included activities end
The inventory includes the construction of the rail track (track bedding, substructures, catenary system) as well as the construction of tunnels and bridges. Further components of rail track infrastructure, such as signalling infrastructure, train overtaking stations, sound insulation walls and buildings (stations, service garages) are not included in this study. Also land use is not considered, but accounted for in the maintenance and operation, railway track. For the maintenance and land use, the inventory includes the energy consumption required for the operation of the rail track as well as the operation of tunnels. The use and emissions to soil of herbicides (weed control) and lubricates (point maintenance) are taken into account. Also land transformation and occupation are accounted for. Disposal is included.

## Geography
Extrapolated from 'railway track construction, CH 2000'. Data refers to average conditions in Switzerland and a specific conditions in Germany

## Technology
Data represents current technologies
References:
SBB (2002) Umweltbericht 2000/2001. SBB, Bahnumweltzentrum, Bern, Online-Version under: www.sbb.ch/umwelt.
von Rozycki C., Koeser H. and Schwarz H. (2003) Ecology Profile of the German High-speed Rail Passenger Transport System, ICE. In: International Journal of Life Cycle Assessment, 8(2), pp. 83-91.
Oggier (2002) Entsorgung von Gleisaushub. pdf from http://www.sbb.ch/gs/pdf/umwelt_gleisaushub.pdf.

## Time period
Rail length is based on current statistical data (2000). The material consumption represents a situation in the early 1990ties and a recent high speed track in Germany

## Reference product
- railway track: 1 m*year; name RP_amount_1; By-product classification allocatable product; CPC 53212: Railways
  production volume 3.96633 m*year; name RP_PV_1
    This is a placeholder value that does not reflect real-world production volumes. This dataset does not currently require a real-world production volume to work in the database framework, and no actual data were collected yet. This has no negative effect on the results of the ecoinvent database.
  property price 32.1128 EUR2005
    Calculated based on inputs: The price of the product has been calculated as a sum of the values of the material and energy inputs for this product. This value is therefore a rough estimation. It may underestimate the real price since there are additional expenses when producing any product. These expences can include for example labour costs, treatment of waste materials and profit for the producer. Please consider carefully whether this level of data quality is acceptable for your application.

## Inputs from technosphere
- copper, cathode: 0.055 kg; source Elsener J. 1993; lognormal variance with pedigree 0.0626, pedigree (3,3,5,5,3)
  Calculated value based in Elsener & Strub (1993) and von Rozycki et al. (2003).
  Further references:
  von Rozycki C., Koeser H. and Schwarz H. (2003) Ecology Profile of the German High-speed Rail Passenger Transport System, ICE. In: International Journal of Life Cycle Assessment, 8(2), pp. 83-91.
  properties: wet mass 1 kg, dry mass 1 kg
- lubricating oil: 0.00753 kg; source SBB 2002; lognormal variance with pedigree 0.042, pedigree (1,1,5,5,1)
  Calculated value. In the year 2000 the 69697 litre of lubricates have been consumed for point maintenance. The majority of the employed lubricates are biodegradable (SBB, 2002). Maintenance and land use
  Uncertainty: e
  properties: heating value, net 40.2 MJ, carbon content, fossil 0.75, wet mass 1 kg, dry mass 1 kg
  note on heating value, net: Literature value, Source: IPCC 2006, 2006 IPCC Guidelines for National Greenhouse Gas Inventories, Prepared by the National Greenhouse Gas Inventories Programme, Eggleston H.S., Buendia L., Miwa K., Ngara T. and Tanabe K. (eds). Published: IGES, Japan
  note on carbon content, fossil: Lubricating oil is produced from diesel. C-content/dry mass of fats and oils considered 75%, from: ecoinvent v2.2 report, n 15a, pg 40
- gravel, crushed: 0 kg; source Elsener J. 1993; pedigree (1,1,1,1,1)
  (same comment as for copper, cathode)
  properties: dry mass 1 kg, wet mass 1 kg
- glyphosate: 0.0007 kg; source SBB 2002; lognormal variance with pedigree 0.042, pedigree (1,1,5,5,1)
  Calculated value. The use of herbicides in 2000 has been reported with 4.474 t SBB (2002). Maintenance and land use
  Uncertainty: e
  properties: dry mass 1 kg, carbon content, fossil 0.214286, wet mass 1 kg
- excavation, skid-steer loader: 1.2 m3; lognormal variance with pedigree 0.1826, pedigree (3,3,5,5,3)
  Literature value.
- diesel, burned in building machine: 9.5 MJ; lognormal variance with pedigree 0.1826, pedigree (3,3,5,5,3)
  Literature value.
  properties: heating value, net 1 MJ
- zinc: 0.006 kg; source Elsener J. 1993; lognormal variance with pedigree 0.0626, pedigree (3,3,5,5,3)
  (same comment as for copper, cathode)
  properties: wet mass 1 kg, dry mass 1 kg
- concrete, medium strength: 0 m3; source Elsener J. 1993; pedigree (1,1,1,1,1)
  (same comment as for copper, cathode)
  properties: water content 0.086758, wet mass 2380 kg, dry mass 2190 kg
- used railway track: -1 m*year; name BP_amount_1; lognormal variance with pedigree 0.064, pedigree (3,1,5,5,1)
  Uncertainty: o
  production volume 3.96633 m*year; = RP_PV_1 * (BP_amount_1 / RP_amount_1)
    Calculated from production volume of reference product using the relative outputs.
  property water in wet mass 0 kg; name WWM
  property wet mass 690 kg; name WM
  property carbon content, fossil 8.23188e-5; name C_content_fossil
  property water content 0; name water_content
  property carbon content, non-fossil 0; name C_content_non_fossil
  property dry mass 690 kg; name DM
- electricity, medium voltage: 0 kWh; source von Rozycki C. 2003; pedigree (1,1,1,1,1)
  3.99 kWh electricity is used during the construction of railway track. Literature value.
  59.1 kWh electricity is used during the maintenance of railway track. Literature value from von Rozycki et al. (2003).
  Uncertainty: P
- reinforcing steel: 13.5 kg; source Elsener J. 1993; lognormal variance with pedigree 0.0626, pedigree (3,3,5,5,3)
  (same comment as for copper, cathode)
  properties: carbon content, fossil 0.004, wet mass 1 kg, dry mass 1 kg
- steel, low-alloyed, hot rolled: 0.56 kg; source Elsener J. 1993; lognormal variance with pedigree 0.0626, pedigree (3,3,5,5,3)
  (same comment as for copper, cathode)
  properties: dry mass 1 kg, carbon content, fossil 0.005, wet mass 1 kg
  note on carbon content, fossil: Low alloyed steel composition given in Tab. 3.2 ecoinvent v2.2 report 10_partII. Steel assumed to have a C content of 0.5%
- gravel, crushed: 24.5682, 2.24921, 112.472, 431.71 kg (4 entries); source Elsener J. 1993; lognormal variance with pedigree 0.0626, pedigree (3,3,5,5,3)
  (same comment as for copper, cathode)
- concrete, medium strength: 0.00149914, 0.000548587, 0.00212642, 0.00156282, 0.000428626, 0.0369344 m3 (6 entries); source Elsener J. 1993; lognormal variance with pedigree 0.0626, pedigree (3,3,5,5,3)
  (same comment as for copper, cathode)
- electricity, medium voltage: 0.641725, 0.123055, 2.82554, 9.35487, 2.06584, 30.0458, 4.23497, 13.7982 kWh (8 entries); source von Rozycki C. 2003; lognormal variance with pedigree 0.0626, pedigree (3,3,5,5,3)
  (same comment as for electricity, medium voltage)

## Inputs from nature
All rows: source SBB 2002
- Transformation, from unspecified [natural resource, land]: 0.0508 m2; lognormal variance with pedigree 0.2541, pedigree (3,2,5,5,5)
  Calculated value based in oral communication with Müller Gleisbau and SBB (2002). Maintenance and land use
  Uncertainty: l
- Occupation, traffic area, rail/road embankment [natural resource, land]: 10.4 m2*year; lognormal variance with pedigree 0.1741, pedigree (3,2,5,5,5)
  (same comment as for Transformation, from unspecified)
- Transformation, to traffic area, rail network [natural resource, land]: 0.0266 m2; lognormal variance with pedigree 0.2541, pedigree (3,2,5,5,5)
  (same comment as for Transformation, from unspecified)
- Occupation, traffic area, rail network [natural resource, land]: 11.5 m2*year; lognormal variance with pedigree 0.1741, pedigree (3,2,5,5,5)
  (same comment as for Transformation, from unspecified)
- Transformation, to traffic area, rail/road embankment [natural resource, land]: 0.0242 m2; lognormal variance with pedigree 0.2541, pedigree (3,2,5,5,5)
  (same comment as for Transformation, from unspecified)

## Emissions to nature
- Oils, non-fossil [soil, unspecified]: 0.00753 kg; lognormal variance with pedigree 0.052, pedigree (1,1,5,5,1)
  Calculated value. Maintenance and land use
  Uncertainty: e
- Glyphosate [soil, industrial]: 0.0007 kg; source SBB 2002; lognormal variance with pedigree 0.052, pedigree (1,1,5,5,1)
  Calculated value based in SBB (2002). Maintenance and land use
  Uncertainty: e

## Sampling procedure
national statistics and literature studies

## Extrapolations
none This dataset has been copied from an original dataset covering the geography CH. The uncertainty has been adjusted accordingly.

## Review by Michael Spielmann (obsolete) 2003-07-09
passed. (selfvalidation)
