# heat and power co-generation unit construction, organic Rankine cycle, 3MW electrical

Dataset: EcoSpold 2, unit process
Geography: GLO
Time period: 2008-01-01 to 2021-12-31
Technology level: current
Classification: ISIC rev.4 ecoinvent: 4220:Construction of utility projects
Synonyms: ORC unit
Tags: Geothermal power; Infrastructure
Scenario: Business-as-Usual
System model: Allocation, cut-off by classification
Generated by: Christian Bauer
Database: ecoinvent
isCopyrightProtected: true
accessRestrictedTo: 1

## General comment
This dataset represents the construction of a binary cycle Organic Rankine Cycle unit with a capacity of 3 MWel and 30 MWth, inteded to be used in a geothermal Hot-Dry-Rock power plant.
In general, ORC units produce energy at low temperature (differences) and pressure by vapourizing an organic working fluid in the heat exchanger with the organic substance having a low boiling point and a high vapor pressure. Geothermal fluid inlet temperatures often range between 50-150°C and therefore do not provide enough steam to produce electric energy. The heat is transferred to a secondary (organic) working fluid, which is used in a cycle with nearly no losses. Only the working fluid comes into contact with the mechanical parts of the plants, but not the geothermal fluid itself, which extends the lifetime of those parts. In this dataset, perfluoropentane is chosen as working fluid.

The masses of different materials are based on data for a 1 MWel ORC unit in (Rogge 2004 - details on source see exchanges) and a 6.4 MWth ORC unit in (Bauer 2007). The dataset is mainly based on the 6.4 MWth unit and was adapted with the 1MWel unit for geothermal use.
Source of the image: Koehler, S. and Saadat, A. 2003. Thermodynamic Modeling of Binary Cycles. Looking for Best Case Scenarios. International Geothermal Conference, Reykjavik, September 2003. Session #1.
Scheme of a possible organic rankine cycle unit architecture.

1 Regenerator
2 Condenser
3 Turbine
4 electric generator
5 circulating pump
6 recuperator
7 evaporator
8 feed line district heat
9 return line distric heat
10 feed line thermic oil
11 return line thermic oil
Source of the image: Uni Bayreuth. Multitalent Organic Rankine Cycle. Stromerzeugung aus Abwärme und regenerativen Energien. Lehrstuhl für technische Thermodynamik und Transportprozesse. Prof. Dr.-Ing. Dieter Brüggemann.

## Included activities start
This dataset starts from the purchase of materials and energy needed to build the ORC unit.

## Included activities end
This activity ends with the constructed ORC unit.

This dataset includes
- materials and energy inputs
- decommissioning
- the building for the ORC unit
The unit includes an electricity generator, turbines, a compressor, a condenser, tubes and pipes for working fluid distribution within the cycle.

The dataset doesnt include the basement in concrete for the installation.
This dataset doesn't include
- land use. This should be included in the datasets the ORC unit is used in.
- any anticorrosive coating of the different parts of the ORC unit.

## Technology
ORC unit with a capacity of 3 MWel and 30 MWth. Perfluoropentane is used as circuit medium.

## Parameters
- extrapolation factor from Rogge (2004) to this dataset: 3 dimensionless; name extrapolation_rogge; = 3/1; lognormal variance with pedigree 0.0509, pedigree (5,4,2,3,3)
  Extrapolation factor for using Rogge (2004) as source. The values in this source are given for a 1MWe ORC unit, whereas this dataset is valid for a 3MWe ORC unit.
  Uncertainty: E
- extrapolation factor from Bauer (2007) to this dataset: 4.6875 dimensionless; name extrapolation_bauer; = 30/6.4; lognormal variance with pedigree 0.0907, pedigree (5,4,5,3,3)
  Extrapolation factor for using Bauer (2007) as source. The values in this source are given for a 6.4 MWth ORC unit, whereas this dataset is valid for a 30MWth ORC unit.
  Uncertainty: E
- building surface: 500 m2; name surface_building; lognormal variance with pedigree 0.0217, pedigree (4,3,1,3,3)
  Estimation
  Uncertainty: e

## Reference product
- heat and power co-generation unit, organic Rankine cycle, 3MW electrical: 1 unit; name RP_amount_1; CPC 53262: Power plants; By-product classification allocatable product
  production volume 4000 unit; name APV_ORC_unit
    Proxy - This value is a highly rough estimation and therefore shows a high uncertainty.
  property lifetime 20 year; name lifetime_orc_unit
  property price 110980 EUR2005
    Calculated based on inputs: The price of the product has been calculated as a sum of the values of the material and energy inputs for this product. This value is therefore a rough estimation. It may underestimate the real price since there are additional expenses when producing any product. These expences can include for example labour costs, treatment of waste materials and profit for the producer. Please consider carefully whether this level of data quality is acceptable for your application.

## Inputs from technosphere
- perfluoropentane: 900 kg; = 300* extrapolation_rogge; source Rogge S. 2004, p. p.94; lognormal variance with pedigree 0.1736, pedigree (2,5,5,5,5)
  Literature value/calculated value/estimation. According to (Rogge 2004), Perfluorpentan (C5F12) is used as working fluid. Its amount as well as the steel mass is estimated by upscaling the requirements in (Rogge 2004) by a factor of 2.5 (see parameters)
  properties: carbon content, fossil 0.0953262, heating value, net 6.32 MJ, dry mass 1 kg, wet mass 1 kg
- aluminium, cast alloy: 480 kg; name alu_cast; = 0.32*320* extrapolation_bauer; source Bauer, C. 2007, p. Tab. 8.1 p.50; lognormal variance with pedigree 0.212, pedigree (5,5,5,5,5)
  Literature value/calculated value. Use of aluminium in this dataset was originally modelled with a production mix dataset (ecoinvent version 2). There, the mix consisted out of 32% cast alloy aluminium and 68% wrought alloy aluminium. These values were multiplied with the original aluminium use of 320 kg and the extrapolation factor.
  properties: wet mass 1 kg, dry mass 1 kg
- building, hall: 166.667 m2; = surface_building/(lifetime_building/lifetime); lognormal variance with pedigree 0.04, pedigree (1,1,5,1,1)
  Estimation/calculated value. The total needed area of the building (500m2) is divided by 3 (60 years lifetime of the building divided by the lifetime of the ORC unit (20 years)) in order to standardize this exchange to 20 years.
  property lifetime 60 year; name lifetime_building
- sheet rolling, aluminium: 1500 kg; = alu_wrought+alu_cast; lognormal variance with pedigree 0.042, pedigree (2,2,5,3,2)
  calculated value.
- steel, low-alloyed, hot rolled: 117000 kg; name steel_low; = (11+4+3+4+1+16)*1000* extrapolation_rogge; source Rogge S. 2004, p. p.94; lognormal variance with pedigree 0.0453, pedigree (3,3,5,3,2)
  Literature value/estimation. The amount of the steel mass is estimated by upscaling the requirements in (Rogge 2004) by a factor of 2.5 (see parameters).
  Weights of the different ORC components:
  - evaporator: 11t
  - boiler: 4t
  - turbine: 3t
  - generator: 4t
  - pump of working fluid: 1t
  - condensator of the organic circulating fluid: 16t.
  properties: carbon content, fossil 0.005, wet mass 1 kg, dry mass 1 kg
  note on carbon content, fossil: Low alloyed steel composition given in Tab. 3.2 ecoinvent v2.2 report 10_partII. Steel assumed to have a C content of 0.5%
- sheet rolling, steel: 117000 kg; = steel_low; lognormal variance with pedigree 0.0453, pedigree (3,3,5,3,2)
  calculated value.
- sheet rolling, chromium steel: 2156.25 kg; = steel_chromium; lognormal variance with pedigree 0.042, pedigree (2,2,5,3,2)
  calculated value.
- polyethylene, high density, granulate: 1593.75 kg; name HDPE; = 340*extrapolation_bauer; source Bauer, C. 2007, p. Tab. 8.1 p.50; lognormal variance with pedigree 0.042, pedigree (2,2,5,3,2)
  Literature value/calculated value. The original value of 340 kg HDPE was extrapolated with a factor 5 (see parameters).
  properties: carbon content, fossil 0.857143, wet mass 1 kg, heating value, net 42.47 MJ, dry mass 1 kg
  note on carbon content, fossil: Polyethylene is formed out of a huge amount of ethylene monomers (C2H4) (ecoinvent v2.2 report 11_II). MW=28 g/mol
- stone wool: 421.875 kg; name rock_wool; = 90 *extrapolation_bauer; source Bauer, C. 2007, p. Tab. 8.1 p.50; lognormal variance with pedigree 0.0453, pedigree (3,3,5,3,2)
  Literature value/calculated value. The original value of 90 kg rock wool was extrapolated with a factor 5 (see parameters).
  properties: dry mass 1 kg, carbon content, fossil 0.015401, wet mass 1 kg
  note on carbon content, fossil: The chemical composition of the glass fibres used in the rock wool production is similar to the composition of naturally cooled volcano basalt and has a composition listed in Tab. 3.1 and 3.2 in ecoinvent v2.2 report 16, part XIV. Rock wool contains: a minimum of 96% mineral fibres,between 0.5 and 3.0 weight percent of phenolic resin depending on the specific product characteristics, and about 0.2 percent mineral oil (ecoinvent v2.2 report 16, part XIV). An average composition of 1.8% phenolic resin, 0.2% mineral oil, and 98% mineral fibres has been assumed and used to calculate C content of the rock wool
- wire drawing, copper: 1500 kg; = copper; lognormal variance with pedigree 0.042, pedigree (2,2,5,3,2)
  calculated value.
- heat, central or small-scale, other than natural gas: 1406.25 MJ; = 300 *extrapolation_bauer; source Rogge S. 2004; lognormal variance with pedigree 0.042, pedigree (2,2,5,3,2)
  Literature value/calculated value. The original value of 300 MJ heat was extrapolated with a factor 5 (see parameters).
  properties: heating value, net 1 MJ
- used perfluoropentane: -900 kg; name used_perfluoropentane; = (perfluoropentane)*-1
  Calculated value. The simplifying assumption is made that the scrap materials can be separated in pure form.
  production volume 3.6e6 kg; = APV_ORC_unit * (used_perfluoropentane / RP_amount_1)
    Calculated from production volume of reference product using the relative outputs.
  property price 0 EUR2005; name used_perfluoropentane_price_EUR2005
  property lifetime 20 year; name used_perfluoropentane_lifetime
  properties: dry mass 1 kg, carbon content, fossil 0.0953262, wet mass 1 kg, heating value, net 6.32 MJ
- electricity, medium voltage: 11250 kWh; = 2400* extrapolation_bauer; source Bauer, C. 2007, p. Tab. 8.1 p.50; lognormal variance with pedigree 0.218, pedigree (5,5,5,5,5)
  Literature value/calculated value. The original value of 2400 kWh electricity was extrapolated with a factor 5 (see parameters).
  Assumption: This amount of electricity use includes the energy for demolition, too. Material processing is considered seperately.
- waste concrete, not reinforced: 0 kg; name BP_amount_1
  (same comment as for used perfluoropentane)
  production volume 0 kg
    Calculated from production volume of reference product using the relative outputs.
  properties: lifetime 20 year, dry mass 1 kg, wet mass 1 kg
- scrap steel: 0 kg; name BP_amount_2
  (same comment as for used perfluoropentane)
  production volume 0 kg
    Calculated from production volume of reference product using the relative outputs.
  properties: lifetime 20 year, wet mass 1 kg, dry mass 1 kg
- copper, cathode: 1500 kg; name copper; = 320*extrapolation_bauer; source Bauer, C. 2007, p. Tab. 8.1 p.50; lognormal variance with pedigree 0.042, pedigree (2,2,5,3,2)
  Literature value/calculated value. The original value of 320 kg copper was extrapolated with a factor 5 (see parameters).
  properties: wet mass 1 kg, dry mass 1 kg
- waste mineral wool: 0 kg; name BP_amount_3
  (same comment as for used perfluoropentane)
  production volume 0 kg
    Calculated from production volume of reference product using the relative outputs.
  properties: wet mass 1 kg, dry mass 1 kg, lifetime 20 year
- aluminium, wrought alloy: 1020 kg; name alu_wrought; = 0.68*320* extrapolation_bauer; source Bauer, C. 2007, p. Tab. 8.1 p.50; lognormal variance with pedigree 0.212, pedigree (5,5,5,5,5)
  (same comment as for aluminium, cast alloy)
  properties: wet mass 1 kg, dry mass 1 kg
- scrap copper: 0 kg; name BP_amount_4
  (same comment as for used perfluoropentane)
  production volume 0 kg
    Calculated from production volume of reference product using the relative outputs.
  properties: lifetime 20 year, dry mass 1 kg, wet mass 1 kg
- steel, chromium steel 18/8, hot rolled: 2156.25 kg; name steel_chromium; = 460*extrapolation_bauer; source Bauer, C. 2007, p. Tab. 8.1 p.50; lognormal variance with pedigree 0.0453, pedigree (3,3,5,3,2)
  Literature value/calculated value. The original value of 460 kg chromium steel was extrapolated with a factor 5 (see parameters).
  properties: dry mass 1 kg, wet mass 1 kg, carbon content, fossil 0.0008
  note on carbon content, fossil: Stainless steel model is the grade 304 steel (18/8 stainless, 18% chromium 8% nickel; max. 0.08% C)
- waste polyethylene/polypropylene product: 0 kg; name BP_amount_5
  (same comment as for used perfluoropentane)
  production volume 0 kg
    Calculated from production volume of reference product using the relative outputs.
  properties: wet mass 1 kg, dry mass 0.847 kg, lifetime 20 year, heating value, net 42.47 MJ, water content 0.180638, carbon content, fossil 0.748045
  note on carbon content, fossil: Mixed various plastics was used to estimate the C content of this waste (Tab A.2, ecoinvent v2.2 report 13_I)
- scrap aluminium: 0 kg; name BP_amount_6
  (same comment as for used perfluoropentane)
  production volume 0 kg
    Calculated from production volume of reference product using the relative outputs.
  property lifetime 20 year; name lifetime
  properties: dry mass 1 kg, wet mass 1 kg
- concrete, normal: 66.9643 m3; name concrete; = 34000/2380*extrapolation_bauer; source Bauer, C. 2007, p. Tab. 8.1 p.50; lognormal variance with pedigree 0.042, pedigree (2,2,5,3,2)
  Literature value/calculated value. The original value of 34000 kg concrete for the foundation was divided by a density of 2380 kg/m3 and extrapolated with a factor 5 (see parameters).
  properties: wet mass 2380 kg, water content 0.086758, dry mass 2190 kg
- waste concrete, not reinforced: -4.38181, -0.0464286, -62.536 kg (3 entries)
  (same comment as for used perfluoropentane)
  production volume 267857 kg
- scrap steel: -29014, -36.7597, -90105.5 kg (3 entries)
  (same comment as for used perfluoropentane)
  production volume 4.76625e8 kg
- waste mineral wool: -122.283, -1.39534, -298.197 kg (3 entries)
  (same comment as for used perfluoropentane)
  production volume 1.6875e6 kg
- scrap copper: -475.812, -22.324, -1001.86 kg (3 entries)
  (same comment as for used perfluoropentane)
  production volume 6e6 kg
- waste polyethylene/polypropylene product: -447.037, -13.4144, -1133.3 kg (3 entries)
  (same comment as for used perfluoropentane)
  production volume 6.375e6 kg
- scrap aluminium: -475.812, -22.324, -1001.86 kg (3 entries)
  (same comment as for used perfluoropentane)
  production volume 6e6 kg
  properties: dry mass 1 kg, lifetime 20 year, wet mass 1 kg

## Sampling procedure
Literature

## Extrapolations
This dataset has been extrapolated from year 2008 to the year of the calculation (2021). The uncertainty has been adjusted accordingly.

## Review by Bo Weidema 2012-03-29
Passed.
Naming may need to be adjusted.

## Review by Carl Vadenbo 2012-03-29
The dataset was found to meet the data quality guidelines for the ecoinvent database on 2012-05-16.
