# aluminium hydroxide production

Dataset: EcoSpold 2, unit process
Geography: IAI Area, South America
Time period: 2015-01-01 to 2021-12-31
Technology level: current
Classification: ISIC rev.4 ecoinvent: 2011:Manufacture of basic chemicals
Classification: EcoSpold01Categories: chemicals/inorganics
Synonyms: Aluminiumtrihydrate; Al2O3*3H2O; hydragillite; Tonerdehydrat; diaspore; Bayerit; aluminium hydroxide; Hydragillit; Gibbsit; gibbsite; bayerite
Scenario: Business-as-Usual
System model: Allocation, cut-off by classification
Share of production covered: 84 %
Generated by: Linlin Wu
Published in: International Aluminium Insitute 2015
Database: ecoinvent
isCopyrightProtected: false
accessRestrictedTo: 1

## General comment
Data on Al(OH)3 extraction and calcination to Al2O3 was aggregated on original source (International ALuminium Institute 2015 LCI survey, IAI personnal communication in 2017). In- and outputs of Al(OH)3 are calculated according to the stoichiometry (1.530 kg Al(OH)3 --> 1.000 kg Al2O3 + 0.530 kg H2O). Separate energy data was provided by IAI for production of hydrate and calcination processes. The Al(OH)3 extraction process involves adding milled bauxite to a hot caustic soda (NaOH) solution, dissolving the aluminium-bearing minerals (gibbsite, böhmite and diaspore) present to form a sodium aluminate supersaturated solution or “pregnant liquor”. Flocculants are added to aid settling and the solution is progressively cooled causing aluminium hydroxide crystals to precipitate. Further information can be found at http://bauxite.world-aluminium.org/refining/process.html.
Two sources were used in the creation of this dataset: IAI 2015 Survey data (officially published in 2017); and original ecoinvent 2 data (Althaus, 2007) for exchanges unreported by IAI.

## Included activities start
Unit process starts with the unloading of the process materials to their storage areas on site.

## Included activities end
Includes transport of bauxite and other inputs to the calcination plant, the extraction of Al(OH)3 (grinding, digestion and precipitation) and the disposal of the wastes. Also includes maintenance and repair of plant and equipment and treatment of process air, liquids and solids.
The output of the original IAI dataset is smelter grade alumina. However, by removing the energy inputs for calcination, the intended output of this unit process is aluminium hydroxide.

## Geography
While IAI data are global in scope, flows not reported by IAI and taken from anterior ecoinvent v2 dataset are based on European data.

## Technology
Average technology for the global aluminium industry.

## Parameters
- aluminia, production volume, south america: 1.3212e10 kg; name al2o3_productionvolume_sa_2015
- molar mass, aluminion oxyde: 102 kg; name M_Al2O3; lognormal variance with pedigree 0.0007, pedigree (1,2,1,1,1)
- alumina, production volume, 2010: 8.5e10 kg; name al2o3_productionvolume_2010; lognormal variance with pedigree 0.0007, pedigree (2,2,1,1,1)
  Smelter grade alumina. As reported in IAI 2013.
- alumina, production volume: 1.15247e11 kg; name al2o3_productionvolume_2015
- molar mass of aluminium hydroxide: 78 kg; name M_Al_OH_3
- Aluminium hydroxide used in alumina production: 90 % (obsolete); name Al_OH_3_for_Al2O3; lognormal variance with pedigree 0.0566, pedigree (4,5,5,1,1)
  Used to estimate global production volumes, readily available for Al2O3 but not for Al(OH)3.
  Uncertainty: Value cited in ecoinvent 2 report 5 (Althaus, 2007) without citation. Value also found on internet, but not in official documents.

## Reference product
- aluminium hydroxide: 1 kg; name aluminiumHydroxideAmount; By-product classification allocatable product; CPC 34231: Chemical elements n.e.c.; inorganic acids except phosphoric, nitric and sulphonitric; inorganic oxygen compoun[…]; CAS 14762-49-3
  EcoSpold01Location=RER
  Dry mass
  production volume 2.24518e10 kg; name aluminiumHydroxideProductionVolume; = al2o3_productionvolume_sa_2015*(2* M_Al_OH_3/ M_Al2O3)*(1/(Al_OH_3_for_Al2O3/100))
    Production volume calculated using the production volume of alumina, assuming that 90% of aluminium hydroxide is used for the production of alumina.
  property water content 0.11; name aluminiumHydroxideAmount_water_content
  property water in wet mass 0.11 kg; name aluminiumHydroxideAmount_WWM
  property gallium content 0; name aluminiumHydroxideAmount_Ga_content
    gallium content on a dry matter basis
  property price 0.42 EUR2005; name aluminiumHydroxideAmount_price_EUR2005
    Calculated value based on data from United Nations Commodity Trade Statistics Database (comtrade.un.org). UN comtrade category: 281830 Aluminium hydroxide. Year 2005. Using exchange rate of 1EURO = 1.209 USD. Average of price of import into 5 main markets (EU, US, JP, IN and CN).
  property carbon content, non-fossil 0; name aluminiumHydroxid_C_content_non_fossil_0
    biogene carbon content on a dry matter basis
  property wet mass 1.11 kg; name aluminiumHydroxideAmount_WM
  property dry mass 1 kg; name aluminiumHydroxideAmount_DM
  property carbon content, fossil 0; name aluminiumHydroxideAmo_C_content_fossil_0
    fossil carbon content on a dry matter basis
  property carbon content 0
    carbon content on a dry matter basis (reserved; not for manual entry)
  properties: carbon allocation 0 kg

## Inputs from technosphere
- quicklime, milled, loose: 0.008 kg; source International Aluminium Insitute 2015; lognormal variance with pedigree 0.0027, pedigree (1,2,3,1,1)
  IAI 2015 data,collected as calcined lime
  EcoSpold01Location=CH
  properties: wet mass 1 kg, water content 0.010101, dry mass 0.99 kg
- heat, district or industrial, other than natural gas: 0.00405508 MJ; = kgFuel_Input_LFO* Net_Heat_Value_LFO*42.7/ fuel_use_LFO; source International Aluminium Insitute 2015; lognormal variance with pedigree 0.0033, pedigree (2,2,3,1,1)
  Diesel combustion. As reported by IAI 2015 Energy survey
  property fuel input in physical units, kg 0.0001 kg; name kgFuel_Input_LFO
  property heating value, net 1 MJ; name Net_Heat_Value_LFO
  property Corresponding fuel use 1.053 MJ; name fuel_use_LFO
  note on Corresponding fuel use: Lower heating value of the fuel input related to the heat/electricity output. Based on an assumed efficiency of 95%.
- heat, district or industrial, natural gas: 0.310769 MJ; = Net_Heat_Value_ng*40.4 *m3fuel_use_ng /fuel_use_ng; source International Aluminium Insitute 2015; lognormal variance with pedigree 0.0033, pedigree (2,2,3,1,1)
  Natural Gas.As reported by IAI 2015 Energy survey
  property heating value, net 1 MJ; name Net_Heat_Value_ng
  property Corresponding fuel use 1.04 MJ; name fuel_use_ng
  property fuel input in physical units, m3 0.008 m3; name m3fuel_use_ng
  note on heating value, net: net (lower) heating (calorific) value. Based on European average as reported in Classen et al (2009)
  note on Corresponding fuel use: Lower heating value of the fuel input related to the heat/electricity output, based on an efficiency of 96%
- redmud from bauxite digestion: -0.481 kg; name redmudAmount; source International Aluminium Insitute 2015; lognormal variance with pedigree 0.0027, pedigree (1,2,3,1,1)
  EcoSpold01Location=CH
  2015 data. Water content was not specified in IAI datasets.
  Uncertainty: Uncertainty higher due to the 40% water content source (Althaus et al., 2000)
  production volume 1.07993e10 kg; = aluminiumHydroxideProductionVolume* redmudAmount/ aluminiumHydroxideAmount
    Calculated from the production volume of aluminium hydroxide in proportion to the respective output amounts.
  property carbon content, non-fossil 0; name redmudAmount_C_content_non_fossil
  property wet mass 1.334 kg; name redmudAmount_WM
  property carbon content, fossil 0; name redmudAmount_C_content_fossil
  property price 0 EUR2005; name redmudAmount_price_EUR2005
  property water content 0.334; name redmudAmount_water_content
  property water in wet mass 0.334 kg; name redmudAmount_WWM
  property dry mass 1 kg; name redmudAmount_DM
- aluminium hydroxide factory: 1.64e-11 unit; source Classen M. 2009; lognormal variance with pedigree 0.51, pedigree (5,5,5,5,5)
  Rough guess
  EcoSpold01Location=RER
  Uncertainty: rough guess
- heat, district or industrial, other than natural gas: 1.29472 MJ; = Net_Heat_Value_Coal*28.9 * kgFuel_Input_Coal / fuel_use_Coal; source International Aluminium Insitute 2015; lognormal variance with pedigree 0.0033, pedigree (2,2,3,1,1)
  EcoSpold01Location=RER
  Coal.IAI 2015 data.
  property fuel input in physical units, kg 0.056 kg; name kgFuel_Input_Coal
  property heating value, net 1 MJ; name Net_Heat_Value_Coal
  property Corresponding fuel use 1.25 MJ; name fuel_use_Coal
  note on heating value, net: net (lower) heating (calorific) value of industrial hard coal
  note on Corresponding fuel use: Lower heating value of the fuel input related to the heat/electricity output, assuming an eficiency of 80%
- sodium hydroxide, without water, in 50% solution state: 0.062 kg; source International Aluminium Insitute 2015; lognormal variance with pedigree 0.0027, pedigree (1,2,3,1,1)
  IAI 2015 data. Sodium hydroxide used (as 100% caustic soda)
  EcoSpold01Location=RER
  properties: heating value, net 3.03 MJ, dry mass 1 kg, wet mass 1 kg
- electricity, medium voltage: 0 kWh; source International Aluminium Insitute 2015; pedigree (1,1,1,1,1)
  As reported by IAI energy survey (2015), reporting rate is 82% by production
- inert waste, for final disposal: -0.00047 kg; name inertWaste; source International Aluminium Insitute 2015; lognormal variance with pedigree 0.0032, pedigree (1,3,3,1,1)
  EcoSpold01Location=CH
  IAI 2015 data. recycled by products are excluded, only landfilled waste.
  production volume 1.05523e7 kg; = aluminiumHydroxideProductionVolume * inertWaste/aluminiumHydroxideAmount
    (same comment as for redmud from bauxite digestion)
  property price 0 EUR2005; name inertWaste_price_EUR2005
  properties: wet mass 1 kg, water content 0.00502513, dry mass 0.995 kg
- bauxite: 1.565 kg; source International Aluminium Insitute 2015; lognormal variance with pedigree 0.0081, pedigree (1,2,3,1,1)
  IAI 2015 data. Reported on a wet mass basis, dry mass is estimated as 88%
  property water in wet mass 0.12 kg; name WWM
  property dry mass 0.88 kg; name DM
  property carbon content, non-fossil 0; name C_content_non_fossil
  property carbon content, fossil 0; name C_content_fossil
  property water content 0.136364; name water_content; = (WM-DM)/DM
  property wet mass 1 kg; name WM
- heat, district or industrial, other than natural gas: 1.59544 MJ; = kgFuel_Input_HFO* Net_Heat_Value_HFO*40.0/ fuel_use_HFO; source International Aluminium Insitute 2015; lognormal variance with pedigree 0.0033, pedigree (2,2,3,1,1)
  Heavy Oil.As reported by IAI 2015 energy survey
  property Corresponding fuel use 1.053 MJ; name fuel_use_HFO
  property fuel input in physical units, kg 0.042 kg; name kgFuel_Input_HFO
  property heating value, net 1 MJ; name Net_Heat_Value_HFO
- electricity, medium voltage: 0.00502377, 0.0380738, 0.00790242 kWh (3 entries); source International Aluminium Insitute 2015; lognormal variance with pedigree 0.0027, pedigree (1,2,3,1,1)
  As reported by IAI energy survey (2015), reporting rate is 82% by production

## Inputs from nature
- Occupation, unspecified [natural resource, land]: 4.9e-10 m2*year; source International Aluminium Insitute 2015; lognormal variance with pedigree 0.0427, pedigree (1,2,5,1,2)
  IAI 2015 data. Reported as Land occupation
- Water, unspecified natural origin [natural resource, in water]: 0.00139 m3; source International Aluminium Insitute 2015; lognormal variance with pedigree 0.0027, pedigree (1,2,3,1,1)
  IAI 2015 data.

## Emissions to nature
- Mercury [air, unspecified]: 1.3e-7 kg; source International Aluminium Insitute 2015; lognormal variance with pedigree 0.6526, pedigree (1,3,3,1,1)
  IAI 2015 data.
- DOC, Dissolved Organic Carbon [water, unspecified]: 1.8e-5 kg; source Classen M. 2009; lognormal variance with pedigree 0.0807, pedigree (1,3,5,3,1)
  Values come from the former ecoinvent dataset (Althaus, 2009)
  Uncertainty: ;
- Sulfur dioxide [air, unspecified]: 0.001726 kg; source International Aluminium Insitute 2015; lognormal variance with pedigree 0.0027, pedigree (1,2,3,1,1)
  IAI 2015 data.
- Water [air, urban air close to ground]: 0.0006 m3; source International Aluminium Insitute 2015; lognormal variance with pedigree 0.2106, pedigree (5,5,5,5,5)
  IAI data reported as "Fresh Water consumption"
- BOD5, Biological Oxygen Demand [water, unspecified]: 4.59e-5 kg; source Classen M. 2009; lognormal variance with pedigree 0.0807, pedigree (1,3,5,3,1)
  Values come from the former ecoinvent dataset (Althaus, 2009)
  Uncertainty: ;
- Water [water, surface water]: 0.001375 m3; source International Aluminium Insitute 2015; lognormal variance with pedigree 0.0421, pedigree (1,2,3,1,1)
  IAI 2015 data.
- Sodium, ion [water, unspecified]: 0.00128 kg; source Classen M. 2009; lognormal variance with pedigree 0.0807, pedigree (1,3,5,3,1)
  Values come from the former ecoinvent dataset (Althaus, 2009)
- Particulates, > 10 um [air, unspecified]: 0.0001108 kg; = PM_total_2 *PM_greater_10um; source International Aluminium Insitute 2015; lognormal variance with pedigree 0.5327, pedigree (2,2,3,1,1)
  Total amount from IAI survey, distributed among three class sizes using CEPMEIP database emission factors for Production of primary aluminium. Abatement level: medium.
  property total particulates 0.000554 kg; name PM_total_2
  property ratio pf particulates greater than 10 microns 0.2; name PM_greater_10um; = (4-3.2)/4
- COD, Chemical Oxygen Demand [water, unspecified]: 4.59e-5 kg; source Classen M. 2009; lognormal variance with pedigree 0.0807, pedigree (1,3,5,3,1)
  Values come from the former ecoinvent dataset (Althaus, 2009)
- Oils, unspecified [water, unspecified]: 0.00178 kg; source International Aluminium Insitute 2015; lognormal variance with pedigree 0.0421, pedigree (1,2,3,1,1)
  IAI 2015 data.
- Particulates, > 2.5 um, and < 10um [air, unspecified]: 0.00024376 kg; = PM_total_3 * PM_btw_2_5_and_10um; source International Aluminium Insitute 2015; lognormal variance with pedigree 0.00271, pedigree (2,2,3,1,1)
  (same comment as for Particulates, > 10 um)
  property ratio of particulates between 2.5 and 10 microns 0.44; name PM_btw_2_5_and_10um; = (3.2-1.44)/4
  property total particulates 0.000554 kg; name PM_total_3
- Suspended solids, unspecified [water, unspecified]: 1e-5 kg; source International Aluminium Insitute 2015; lognormal variance with pedigree 0.0426, pedigree (1,3,3,1,1)
  IAI 2015 data.
- Nitrogen oxides [air, unspecified]: 0.000651 kg; source International Aluminium Insitute 2015; lognormal variance with pedigree 0.0406006, pedigree (1,3,5,1,1)
  IAI 2015 Data,
- TOC, Total Organic Carbon [water, unspecified]: 1.8e-5 kg; source Classen M. 2009; lognormal variance with pedigree 0.0807, pedigree (1,3,5,3,1)
  Values come from the former ecoinvent dataset (Althaus, 2009)
  Uncertainty: ;
- Particulates, < 2.5 um [air, unspecified]: 0.00019944 kg; = PM_total_1* PM2_5; source International Aluminium Insitute 2015; lognormal variance with pedigree 0.0028, pedigree (2,2,3,1,1)
  (same comment as for Particulates, > 10 um)
  property total particulates 0.000554 kg; name PM_total_1
  property ratio of total particulates less than 2.5 microns 0.36; name PM2_5; = 1.44/4
- Mercury [water, unspecified]: 7e-10 kg; source International Aluminium Insitute 2015; lognormal variance with pedigree 0.0421, pedigree (1,2,3,1,1)
  IAI 2015 data.

## Sampling procedure
2015 LCI Survey Data was collected by the IAI in Feb - July 2016 with analysis and data verification taking place Aug - Dec 2016.

## Extrapolations
This dataset has been extrapolated from year 2015 to the year of the calculation (2021). The uncertainty has been adjusted accordingly.
