# rare earth tailings, from bastnaesite and monazite ore, Recycled Content cut-off

Dataset: EcoSpold 2, unit process
Geography: GLO
Time period: 2021-01-01 to 2021-12-31
Technology level: current
Scenario: Business-as-Usual
System model: Allocation, cut-off by classification
Generated by: [System]
isCopyrightProtected: true
accessRestrictedTo: 1

## Reference product
- rare earth tailings, from bastnaesite and monazite ore: 1 kg; CPC 39: Wastes or scraps; By-product classification Recyclable
  property magnesium content 0.0309993
    The composition of the rare earth tailings is taken from Table 2 of the following publication: Zhang, B., Xue, X., Huang, X., Yang, H., & Chen, G. (2019). Study on recycling and leaching valuable elements from Bayan Obo tailings. Metall. Res. Technol., 116(1), 114. doi:10.1051/metal/2018040. The calculation of the individual contents of each compound in the tailings is based on the subtotal masses of the elements in each compound. The subtotal masses are calculated using the molecular weight calculator. (Source: https://www.lenntech.com/calculators/molecular/molecular-weight-calculator.htm). The content of MgO in the tailings is: 5.14%. The subtotal masses of MgO are: Mg:60.31%, O:39.7%.In the abovementioned publication, neither data on the water content of the tailings are available, nor specific water loss during roasting is reported. For that reason, the reported elemental contents of the rare earth tailings (i.e properties) refer to the dry mass of the tailings.
  property thorium content 0.000184548
    The composition of the rare earth tailings is taken from Table 2 of the following publication: Zhang, B., Xue, X., Huang, X., Yang, H., & Chen, G. (2019). Study on recycling and leaching valuable elements from Bayan Obo tailings. Metall. Res. Technol., 116(1), 114. doi:10.1051/metal/2018040. The calculation of the individual contents of each compound in the tailings is based on the subtotal masses of the elements in each compound. The subtotal masses are calculated using the molecular weight calculator. (Source: https://www.lenntech.com/calculators/molecular/molecular-weight-calculator.htm). The content of ThO2 in the tailings is: 0.021%. The subtotal masses of ThO2 are: Th:87.88%, O:12.12%. In the abovementioned publication, neither data on the water content of the tailings are available, nor specific water loss during roasting is reported. For that reason, the reported elemental contents of the rare earth tailings (i.e properties) refer to the dry mass of the tailings.
  property calcium content 0.083477
    The composition of the rare earth tailings is taken from Table 2 of the following publication: Zhang, B., Xue, X., Huang, X., Yang, H., & Chen, G. (2019). Study on recycling and leaching valuable elements from Bayan Obo tailings. Metall. Res. Technol., 116(1), 114. doi:10.1051/metal/2018040. The calculation of the individual contents of each compound in the tailings is based on the subtotal masses of the elements in each compound. The subtotal masses are calculated using the molecular weight calculator. (Source: https://www.lenntech.com/calculators/molecular/molecular-weight-calculator.htm). The content of CaO in the tailings is: 11.68%. The subtotal masses of CaO are: Ca:71.47%, O:28.53%. In the abovementioned publication, neither data on the water content of the tailings are available, nor specific water loss during roasting is reported. For that reason, the reported elemental contents of the rare earth tailings (i.e properties) refer to the dry mass of the tailings.
  property barium content 0.0282114
    The composition of the rare earth tailings is taken from Table 2 of the following publication: Zhang, B., Xue, X., Huang, X., Yang, H., & Chen, G. (2019). Study on recycling and leaching valuable elements from Bayan Obo tailings. Metall. Res. Technol., 116(1), 114. doi:10.1051/metal/2018040. The calculation of the individual contents of each compound in the tailings is based on the subtotal masses of the elements in each compound. The subtotal masses are calculated using the molecular weight calculator. (Source: https://www.lenntech.com/calculators/molecular/molecular-weight-calculator.htm). The content of BaO in the tailings is: 3.15%. The subtotal masses of BaO are: Ba:89.56%, O:10.43%. In the abovementioned publication, neither data on the water content of the tailings are available, nor specific water loss during roasting is reported. For that reason, the reported elemental contents of the rare earth tailings (i.e properties) refer to the dry mass of the tailings.
  property scandium content 0.0001956
    The composition of the rare earth tailings is taken from Table 2 of the following publication: Zhang, B., Xue, X., Huang, X., Yang, H., & Chen, G. (2019). Study on recycling and leaching valuable elements from Bayan Obo tailings. Metall. Res. Technol., 116(1), 114. doi:10.1051/metal/2018040. The calculation of the individual contents of each compound in the tailings is based on the subtotal masses of the elements in each compound. The subtotal masses are calculated using the molecular weight calculator. (Source: https://www.lenntech.com/calculators/molecular/molecular-weight-calculator.htm). The content of Sc2O3 in the tailings is: 0.03%. The subtotal masses of Sc2O3 are: Sc:65.2%, O:34.8%. In the abovementioned publication, neither data on the water content of the tailings are available, nor specific water loss during roasting is reported. For that reason, the reported elemental contents of the rare earth tailings (i.e properties) refer to the dry mass of the tailings.
  property sodium content 0.0166905
    The composition of the rare earth tailings is taken from Table 2 of the following publication: Zhang, B., Xue, X., Huang, X., Yang, H., & Chen, G. (2019). Study on recycling and leaching valuable elements from Bayan Obo tailings. Metall. Res. Technol., 116(1), 114. doi:10.1051/metal/2018040. The calculation of the individual contents of each compound in the tailings is based on the subtotal masses of the elements in each compound. The subtotal masses are calculated using the molecular weight calculator. (Source: https://www.lenntech.com/calculators/molecular/molecular-weight-calculator.htm). The content of Na2O in the tailings is: 2.25%. The subtotal masses of Na2O are: Na:74.18%, O:25.81%. In the abovementioned publication, neither data on the water content of the tailings are available, nor specific water loss during roasting is reported. For that reason, the reported elemental contents of the rare earth tailings (i.e properties) refer to the dry mass of the tailings.
  property potassium content 0.00771993
    The composition of the rare earth tailings is taken from Table 2 of the following publication: Zhang, B., Xue, X., Huang, X., Yang, H., & Chen, G. (2019). Study on recycling and leaching valuable elements from Bayan Obo tailings. Metall. Res. Technol., 116(1), 114. doi:10.1051/metal/2018040. The calculation of the individual contents of each compound in the tailings is based on the subtotal masses of the elements in each compound. The subtotal masses are calculated using the molecular weight calculator. (Source: https://www.lenntech.com/calculators/molecular/molecular-weight-calculator.htm). The content of K2O in the tailings is: 0.93%. The subtotal masses of K2O are: K:83.01%, O:16.98%. In the abovementioned publication, neither data on the water content of the tailings are available, nor specific water loss during roasting is reported. For that reason, the reported elemental contents of the rare earth tailings (i.e properties) refer to the dry mass of the tailings.
  property phosphorus content 0.00379668
    The composition of the rare earth tailings is taken from Table 2 of the following publication: Zhang, B., Xue, X., Huang, X., Yang, H., & Chen, G. (2019). Study on recycling and leaching valuable elements from Bayan Obo tailings. Metall. Res. Technol., 116(1), 114. doi:10.1051/metal/2018040. The calculation of the individual contents of each compound in the tailings is based on the subtotal masses of the elements in each compound. The subtotal masses are calculated using the molecular weight calculator. (Source: https://www.lenntech.com/calculators/molecular/molecular-weight-calculator.htm). The content of P2O5 in the tailings is: 0.87%. The subtotal masses of P2O5 are: P:43.64%, O:56.36%. In the abovementioned publication, neither data on the water content of the tailings are available, nor specific water loss during roasting is reported. For that reason, the reported elemental contents of the rare earth tailings (i.e properties) refer to the dry mass of the tailings.
  property fluorine content 0.0314
    The composition of the rare earth tailings is taken from Table 2 of the following publication: Zhang, B., Xue, X., Huang, X., Yang, H., & Chen, G. (2019). Study on recycling and leaching valuable elements from Bayan Obo tailings. Metall. Res. Technol., 116(1), 114. doi:10.1051/metal/2018040. The calculation of the individual contents of each compound in the tailings is based on the subtotal masses of the elements in each compound. The subtotal masses are calculated using the molecular weight calculator. (Source: https://www.lenntech.com/calculators/molecular/molecular-weight-calculator.htm). The content of F in the tailings is: 3.14%. In the abovementioned publication, neither data on the water content of the tailings are available, nor specific water loss during roasting is reported. For that reason, the reported elemental contents of the rare earth tailings (i.e properties) refer to the dry mass of the tailings.
  property iron content 0.1574
    The composition of the rare earth tailings is taken from Table 2 of the following publication: Zhang, B., Xue, X., Huang, X., Yang, H., & Chen, G. (2019). Study on recycling and leaching valuable elements from Bayan Obo tailings. Metall. Res. Technol., 116(1), 114. doi:10.1051/metal/2018040. The calculation of the individual contents of each compound in the tailings is based on the subtotal masses of the elements in each compound. The subtotal masses are calculated using the molecular weight calculator. (Source: https://www.lenntech.com/calculators/molecular/molecular-weight-calculator.htm). The total content of Fe in the tailings is: 15.74%. Only the total Fe in the tailings is considered here, meaning that the content of FeO in the tailings that is reported in the abovementioned publication (as one part of the total iron content) has been omitted to avoid double counting. However the oxygen content of the FeO has been considered in the calculation of oxygen content. FeO content in the tailings is 2.38%. Subtotal masses of FeO are: Fe:77.74%, O:22.27% (see property comment of oxygen). In the abovementioned publication, neither data on the water content of the tailings are available, nor specific water loss during roasting is reported. For that reason, the reported elemental contents of the rare earth tailings (i.e properties) refer to the dry mass of the tailings.
  property sulfur content 0.0215
    The composition of the rare earth tailings is taken from Table 2 of the following publication: Zhang, B., Xue, X., Huang, X., Yang, H., & Chen, G. (2019). Study on recycling and leaching valuable elements from Bayan Obo tailings. Metall. Res. Technol., 116(1), 114. doi:10.1051/metal/2018040. The calculation of the individual contents of each compound in the tailings is based on the subtotal masses of the elements in each compound. The subtotal masses are calculated using the molecular weight calculator. (Source: https://www.lenntech.com/calculators/molecular/molecular-weight-calculator.htm). The content of S in the tailings is: 2.15%. In the abovementioned publication, neither data on the water content of the tailings are available, nor specific water loss during roasting is reported. For that reason, the reported elemental contents of the rare earth tailings (i.e properties) refer to the dry mass of the tailings. In the abovementioned publication, neither data on the water content of the tailings are available, nor specific water loss during roasting is reported. For that reason, the reported elemental contents of the rare earth tailings (i.e properties) refer to the dry mass of the tailings.
  property oxygen content 0.265915
    Oxygen content in the tailings is calculated as the sum of oxygen contents of each individual compound present in the rare earth tailings. The oxygen content in each compound is calculated by multiplying the amount of chemical compound content in the tailings with the subtotal mass of oxygen in the compound using the molecular weight calculator. (Source: <https://www.lenntech.com/calculators/molecular/molecular-weight-calculator.htm>). The oxygen content of each compound is provided on the properties comment field of the respective compound. For reasons explained in the comment section of the iron content, even though the iron content of FeO compound is not taken into account, the oxygen content is nevertheless considered. Feo content in the tailings is 2.38% and the subtotal mass of oxygen in that compound is 22.27%. In the abovementioned publication, neither data on the water content of the tailings are available, nor specific water loss during roasting is reported. For that reason, the reported elemental contents of the rare earth tailings (i.e properties) refer to the dry mass of the tailings.
  property manganese content 0.011616
    The composition of the rare earth tailings is taken from Table 2 of the following publication: Zhang, B., Xue, X., Huang, X., Yang, H., & Chen, G. (2019). Study on recycling and leaching valuable elements from Bayan Obo tailings. Metall. Res. Technol., 116(1), 114. doi:10.1051/metal/2018040. The calculation of the individual contents of each compound in the tailings is based on the subtotal masses of the elements in each compound. The subtotal masses are calculated using the molecular weight calculator. (Source: https://www.lenntech.com/calculators/molecular/molecular-weight-calculator.htm). The content of MnO in the tailings is: 1.5%. The subtotal masses of MnO are: Mn:77.44%, O:22.55%. In the abovementioned publication, neither data on the water content of the tailings are available, nor specific water loss during roasting is reported. For that reason, the reported elemental contents of the rare earth tailings (i.e properties) refer to the dry mass of the tailings.
  property titanium content 0.00647244
    The composition of the rare earth tailings is taken from Table 2 of the following publication: Zhang, B., Xue, X., Huang, X., Yang, H., & Chen, G. (2019). Study on recycling and leaching valuable elements from Bayan Obo tailings. Metall. Res. Technol., 116(1), 114. doi:10.1051/metal/2018040. The calculation of the individual contents of each compound in the tailings is based on the subtotal masses of the elements in each compound. The subtotal masses are calculated using the molecular weight calculator. (Source: https://www.lenntech.com/calculators/molecular/molecular-weight-calculator.htm). The content of TiO2 in the tailings is: 1.08%. The subtotal masses of TiO2 are: Ti:59.93%, O:40.06%. In the abovementioned publication, neither data on the water content of the tailings are available, nor specific water loss during roasting is reported. For that reason, the reported elemental contents of the rare earth tailings (i.e properties) refer to the dry mass of the tailings.
  property aluminium content 0.0118563
    The composition of the rare earth tailings is taken from Table 2 of the following publication: Zhang, B., Xue, X., Huang, X., Yang, H., & Chen, G. (2019). Study on recycling and leaching valuable elements from Bayan Obo tailings. Metall. Res. Technol., 116(1), 114. doi:10.1051/metal/2018040. The calculation of the individual contents of each compound in the tailings is based on the subtotal masses of the elements in each compound. The subtotal masses are calculated using the molecular weight calculator. (Source: https://www.lenntech.com/calculators/molecular/molecular-weight-calculator.htm). The content of Al2O3 in the tailings is: 2.24%. The subtotal masses of Al2O3 are: Al:52.93%, O:47.08%. In the abovementioned publication, neither data on the water content of the tailings are available, nor specific water loss during roasting is reported. For that reason, the reported elemental contents of the rare earth tailings (i.e properties) refer to the dry mass of the tailings.
  property silicon content 0.155491
    The composition of the rare earth tailings is taken from Table 2 of the following publication: Zhang, B., Xue, X., Huang, X., Yang, H., & Chen, G. (2019). Study on recycling and leaching valuable elements from Bayan Obo tailings. Metall. Res. Technol., 116(1), 114. doi:10.1051/metal/2018040. The calculation of the individual contents of each compound in the tailings is based on the subtotal masses of the elements in each compound. The subtotal masses are calculated using the molecular weight calculator. (Source: https://www.lenntech.com/calculators/molecular/molecular-weight-calculator.htm). The content of SiO2 in the tailings is: 33.26%. The subtotal masses of SiO2 are: Si:46.75%, O:53.26%. In the abovementioned publication, neither data on the water content of the tailings are available, nor specific water loss during roasting is reported. For that reason, the reported elemental contents of the rare earth tailings (i.e properties) refer to the dry mass of the tailings.
  property niobium content 0.0025164
    The composition of the rare earth tailings is taken from Table 2 of the following publication: Zhang, B., Xue, X., Huang, X., Yang, H., & Chen, G. (2019). Study on recycling and leaching valuable elements from Bayan Obo tailings. Metall. Res. Technol., 116(1), 114. doi:10.1051/metal/2018040. The calculation of the individual contents of each compound in the tailings is based on the subtotal masses of the elements in each compound. The subtotal masses are calculated using the molecular weight calculator. (Source: https://www.lenntech.com/calculators/molecular/molecular-weight-calculator.htm). The content of Nb2O5 in the tailings is: 0.36%. The subtotal masses of Nb2O5 are: Nb:69.9%, O:30.1%. In the abovementioned publication, neither data on the water content of the tailings are available, nor specific water loss during roasting is reported. For that reason, the reported elemental contents of the rare earth tailings (i.e properties) refer to the dry mass of the tailings.
  property carbon content 0
    carbon content on a dry matter basis (reserved; not for manual entry)
  properties: carbon content, fossil 0, water content 0, carbon content, non-fossil 0, dry mass 1 kg, wet mass 1 kg, water in wet mass 0 kg, carbon allocation 0 kg
