# treatment of waste reinforced concrete, sorting plant

Dataset: EcoSpold 2, unit process
Geography: CH
Time period: 1994-01-01 to 2021-12-31
Technology level: current
Classification: ISIC rev.4 ecoinvent: 3830:Materials recovery
Classification: EcoSpold01Categories: waste management/recycling
Tags: ConvertedDataset; Treatment
Scenario: Business-as-Usual
System model: Allocation, cut-off by classification
Generated by: Gabor Doka (obsolete)
Published in: Doka G. 2007
Database: ecoinvent
isCopyrightProtected: true
accessRestrictedTo: 1

## General comment
The waste contains 0.97kg inert material (GSD=100.1%) and 0.03kg steel (GSD=107.9%). Waste density is 2300 kg/m3.
[This dataset was already contained in the ecoinvent database version 2. It was not individually updated during the transfer to ecoinvent version 3. Life Cycle Impact Assessment results may still have changed, as they are affected by changes in the supply chain, i.e. in other datasets. This dataset was generated following the ecoinvent quality guidelines for version 2. It may have been subject to central changes described in the ecoinvent version 3 change report (http://www.ecoinvent.org/database/ecoinvent-version-3/reports-of-changes/), and the results of the central updates were reviewed extensively. The changes added e.g. consistent water flows and other information throughout the database. The documentation of this dataset can be found in the ecoinvent reports of version 2, which are still available via the ecoinvent website. The change report linked above covers all central changes that were made during the conversion process.]

## Included activities end
energy for dismantling, particulate matter emissions from dismantling and handling, machines for handling in sorting plant, electricity demand for sorting plant, transport to dismantling facilities, final disposal of waste material,

## Geography
Specific to the technology mix encountered in Switzerland in late 1990ies

## Technology
Building demolition with skid-steer loaders. Dry sorting plant for building wastes with pre-sorting of mixed waste, crushing and manual sorting.

## Reference product
- waste reinforced concrete: -1 kg; name RP; By-product classification Waste; CPC 39: Wastes or scraps
  production volume 2.42667e8 kg; name RP_PV; = 2600000000/3*0.28
    Estimated value. Word production of concrete amounts to 25 billion tonnes (WBCSD 2009). The waste generation is estimated to be 15% (taken from the estimated value for gypsum, source: WRAP "International practice in plasterboard recycling: Canada", n.d). 1/3 of total waste is assumed to be concrete not reinforced, 1/3 concrete reinforced, and 1/3 concrete. From ecoinvent version 2, 41% of waste goes to landfill, 41% goes directly to recycling, and 18% is first sorted and then sent to disposal or recycled.
    WBCSD (2009) Recycling concrete. The Cement Sustainability Initiative. Retrieved from: http://www.wbcsdcement.org/index.php/en/publications, accessed 3 May 2016
    WRAP(n.d.) International practice in plasterboard recycling: Canada. Retrieved from: http://www.wrap.org.uk/sites/files/wrap/Case%20study%20-%20Plasterboard%20recycling%20in%20Canada.pdf, accessed 3 May 2016
  property price 0 EUR2005; name RP_price_EUR2005
    Waste products are assigned a price of zero as they are assumed to require further treatment.
  property carbon content 0
    carbon content on a dry matter basis (reserved; not for manual entry)
  properties: dry mass 0.99418 kg, water in wet mass 0.00582 kg, wet mass 1 kg, water content 0.00585407, carbon content, non-fossil 0, carbon content, fossil 0, carbon allocation 0 kg

## Inputs from technosphere
- electricity, low voltage: 0.0037 kWh; lognormal variance with pedigree 0.05, pedigree (1,1,5,1,1)
  demand in sorting plant. Uncertainty from range in literature
- sorting facility, for construction waste: 1e-10 unit; lognormal variance with pedigree 0.04, pedigree (1,1,5,1,1)
  Uncertainty heeded in exchanges, 1kg = 1kg
  This exchange has an activity link directly to the producing activity because the product is primarily consumed in the same geographical area where it is produced.
- excavation, hydraulic digger: 0.000483 m3; lognormal variance with pedigree 0.05, pedigree (1,1,5,1,1)
  handling in sorting plant. Uncertainty from range in literature
- inert waste: -0.388 kg; name inert_waste; lognormal variance with pedigree 0.08, pedigree (1,1,5,1,1)
  disposed masses. Uncertainty calculated from uncertainty in transfer coefficients and uncertainty of waste fractions
  production volume 9.41547e7 kg; = inert_waste*RP_PV/ABS(RP)
    Calculated from the production volume of waste reinforced concrete in proportion to the respective output amounts.
  property price 0 EUR2005; name inert_waste_price_EUR2005
  properties: dry mass 1 kg, wet mass 1 kg
- diesel, burned in building machine: 0.0612 MJ; lognormal variance with pedigree 0.11, pedigree (1,1,5,1,1)
  energy for demolition. Uncertainty from range in (DAFSTB 1996)
  properties: heating value, net 1 MJ

## Emissions to nature
- Particulates, > 2.5 um, and < 10um [air, urban air close to ground]: 6.34e-5 kg; lognormal variance with pedigree 0.1813, pedigree (2,3,5,3,1)
  Emission from dismantling and handling. from one extrapolated PM10 emission factor and generic PM fractions from measurements
- Particulates, < 2.5 um [air, urban air close to ground]: 1.66e-5 kg; lognormal variance with pedigree 0.3613, pedigree (2,3,5,3,1)
  (same comment as for Particulates, > 2.5 um, and < 10um)
- Particulates, > 10 um [air, urban air close to ground]: 8.35e-5 kg; lognormal variance with pedigree 0.0913, pedigree (2,3,5,3,1)
  (same comment as for Particulates, > 2.5 um, and < 10um)

## Sampling procedure
waste-specific calculation based on literature data

## Extrapolations
This dataset has been extrapolated from year 2002 to the year of the calculation (2021). The uncertainty has been adjusted accordingly.

## Review by Niels Jungbluth 2003-05-22
Passed. Calculation for standard deviation 95 of transport services differs from standard Pedigree approach in this project and figure obtained by this procedure (2.09). Uncertainty for estimation of distance is not included.
