# printed wiring board production, mounted mainboard, mobile device, double-sided, Pb free

Dataset: EcoSpold 2, unit process
Geography: GLO
Time period: 2014-01-01 to 2021-12-31
Technology level: current
Classification: ISIC rev.4 ecoinvent: 2610:Manufacture of electronic components and boards
Scenario: Business-as-Usual
System model: Allocation, cut-off by classification
Generated by: Johannes Müller
Database: ecoinvent
isCopyrightProtected: true
accessRestrictedTo: 1

## General comment
This activity represents the production of 1kg of printed wiring board (PWB) for use in mobile devices. It contains the mounting(soldering) of components on the PWB. Production of the components are included through the respective datasets. kg was chosen as a unit for the dataset to be scalable. The board is populated with various components (RAM, solid state memory, processing units, transistors, capacitors, diodes, varistors). Both sides of the PWB are populated. The values of the dataset stem from an LCA on the Fairphone 1 and are condensed from three datasets: "Phone PCB Production", "Phone Capacitor, Diode, Varistors & Transistor Production" and "Phone Integrated Circuit Production".
Source: Güvendik, M. (2014). From smartphone to futurephone: assessing the environmental impacts of different circular economy scenarios of a smartphone using LCA.

## Included activities start
From reception of materials and auxiliares at the factory gate.

## Included activities end
The activity includes the materials, processes and energy use (included through "mounting, surface mount technology, Pb-free solder") for the production of a printed wiring board, mainboard used in mobile phones. Data on factory, disposal and packaging are not included.

## Geography
Geography GLO was chosen because the dataset aims to represent the production of an average electronic device.

## Technology
Literature source points to manufacturing in China. The dataset includes the process of soldering the components to the printed wiring board with "mounting, surface mount technology, Pb-free solder".

## Time period
Data for composition are from 2014 but represent current technology.

## Parameters
- Weight of tablet printed wiring board: 0.00676991 kg; name area_pwb_tablet
  Weighted Average. Calculated from different sources.
  Sources:
  - Hischier, R., Achachlouei, M. A. and Hilty, L. M. (2014) ‘Evaluating the sustainability of electronic media: Strategies for life cycle inventory data collection and their implications for LCA results’, Environmental Modelling and Software, 56(Lci), pp. 27–36. doi: 10.1016/j.envsoft.2014.01.001.
  - Hischier, R. et al. (2015) ‘Grey Energy and Environmental Impacts of ICT Hardware’, in ICT Innovations for Sustainability. Springer, pp. 171–189. doi: 10.1007/978-3-319-09228-7.
  - Apple Inc. (2014) 9.7-inch iPad Pro Environmental Report. Available at: http://www.apple.com/environment/reports/.
  - Apple Inc. (2019) iPad Environmental report.
  - Apple Inc. (2017) iPad Environmental Report.
  - Apple Inc. (2017) 10.5-inch iPad Pro Environmental Report.
  - Apple Inc. (2017) 12.9-inch iPad Pro Environmental Report.
- Weight of smartphone printed wiring board: 0.00295768 kg; name area_pwb_smartphone
  Literature Value. Source: Güvendik, M. (2014). From smartphone to futurephone: assessing the environmental impacts of different circular economy scenarios of a smartphone using LCA.

## Reference product
- printed wiring board, mounted mainboard, mobile device, double-sided, Pb free: 1 m2; By-product classification allocatable product; CPC 47160: Electronic integrated circuits
  production volume 5.16214e6 m2; = 1415500000 * area_pwb_smartphone + area_pwb_tablet * 144100000
    PV of tablets * area of PWB in Tablets + PV of smartphones * area of PWB in Smartphone
    PV of tablets:
    Source: IDC Worldwide Quarterly PCD Tracker (2020, January 30). Worldwide Tablet Shipments Continue to Decline in Q4 2019, According to IDC [Press Release]. Retrieved from https://www.idc.com/getdoc.jsp?containerId=prUS45959420
    PV of smartphone:
    Units sold from 4Q18: 383E6, 1Q19: 311E6, 2Q19:346.3E6, 3Q19:375.2E6. Source: Trendforce Corp, (2019, January 29). Global Smartphone Market Cooling in 2019 with a YoY Decline of 10% in Production Volume, Says TrendForce [Press Release]. Retrieved from https://press.trendforce.com/press/20190129-3208.html, Trendforce Corp, (2019, May 16). Apple Fell to Number Three in 1Q19, While a Worsening US-China Trade Dispute May Add Insult to Injury, Says TrendForce [Press Release]. Retrieved from https://press.trendforce.com/press/20190516-3245.html, Trendforce Corp, (2019, November 28). Global Smartphone Production Volume Grows 9.2% in 3Q19, with Minor Projected Decline in 4Q19, Says TrendForce [Press Release]. Retrieved from https://press.trendforce.com/press/20191128-3313.html
  property price 16474.7 EUR2005
    Calculated based on inputs: The price of the product has been calculated as a sum of the values of the material and energy inputs for this product. This value is therefore a rough estimation. It may underestimate the real price since there are additional expenses when producing any product. These expences can include for example labour costs, treatment of waste materials and profit for the producer. Please consider carefully whether this level of data quality is acceptable for your application.
  property carbon content 0.102905
    carbon content on a dry matter basis (reserved; not for manual entry)
  properties: wet mass 4.336 kg, carbon content, fossil 0.102905, carbon content, non-fossil 0, water in wet mass 0 kg, dry mass 4.336 kg, water content 0, carbon allocation 0.446198 kg

## Inputs from technosphere
- integrated circuit, logic type: 0.208122 kg; lognormal variance with pedigree 0.0138, pedigree (2,4,4,5,2)
  Literature Value. Represents processing units. Scaled to result in a dataset with area 1m2.
  properties: wet mass 1 kg, carbon content, fossil 0.221701, dry mass 1 kg
- transistor, surface-mounted: 0.00761421 kg; lognormal variance with pedigree 0.0138, pedigree (2,4,4,5,2)
  Literature Value. 16 Transistors Transistor, SMD (surface mount device) type . Scaled to result in a dataset with weight of 1kg.
  properties: dry mass 1 kg, carbon content, fossil 0.083636, wet mass 1 kg
- capacitor, tantalum-, for through-hole mounting: 0.00862944 kg; lognormal variance with pedigree 0.0138, pedigree (2,4,4,5,2)
  Literature Value. Tantalum Capacitor. Scaled to result in a dataset with area 1m2.
  properties: carbon content, fossil 0.181224, dry mass 1 kg, wet mass 1 kg
- capacitor, for surface-mounting: 0.256853 kg; lognormal variance with pedigree 0.0138, pedigree (2,4,4,5,2)
  Literature Value. Scaled to result in a dataset with area 1m2.
  properties: dry mass 1 kg, wet mass 1 kg
- wafer, fabricated, for integrated circuit: 0.31137 m2; lognormal variance with pedigree 0.2106, pedigree (5,5,5,5,5)
  Measured Value. Additional die area not accounted for in 'integrated circuit, logic type' and 'integrated circuit, memory type'. Measured IC's from iPhone 12, assumed die/package ratio: 0.8
  properties: wet mass 0.7 kg, dry mass 0.7 kg
- resistor, surface-mounted: 0.0840664 kg
  Literature Value. Scaled to result in a dataset with area 1m2.
  properties: carbon content, fossil 0.00893558, wet mass 1 kg, dry mass 1 kg
- integrated circuit, memory type: 0.330964 kg; lognormal variance with pedigree 0.0138, pedigree (2,4,4,5,2)
  Literature Value. Represents RAM and memory. Scaled to result in a dataset with area 1m2.
  properties: wet mass 1 kg, carbon content, fossil 0.113389, dry mass 1 kg
- diode, glass-, for surface-mounting: 0.263959 kg; lognormal variance with pedigree 0.0138, pedigree (2,4,4,5,2)
  Literature Value. Diodes and Varistors. Scaled to result in a dataset with area 1m2.
  properties: wet mass 1 kg, dry mass 1 kg, carbon content, fossil 0.00928779
- mounting, surface mount technology, Pb-free solder: 2 m2; = 2*pwb_surface; lognormal variance with pedigree 0.0138, pedigree (2,4,4,5,2)
  Literature Value. PWB mounting on both sides. Scaled to result in a dataset with area 1m2.
- printed wiring board, for surface mounting, Pb free surface: 1 m2; name pwb_surface; lognormal variance with pedigree 0.0138, pedigree (2,4,4,5,2)
  Literature Value. Scaled to result in a dataset with area 1m2.
  properties: wet mass 3.26 kg, dry mass 3.26 kg, carbon content, fossil 0.109783

## Sampling procedure
In the study (Güvendik, 2014), the printed wiring boards were dismanteled and the components identified and weighed.

## Extrapolations
This dataset has been extrapolated from year 2020 to the year of the calculation (2021). The uncertainty has been adjusted accordingly.
