# steatite quarry operation

Dataset: EcoSpold 2, unit process
Geography: RoW
Time period: 2011-10-01 to 2021-09-30
Technology level: current
Classification: ISIC rev.4 ecoinvent: 0810:Quarrying of stone, sand and clay
Synonyms: soapstone
Scenario: Business-as-Usual
System model: Allocation, cut-off by classification
Share of production covered: 100 %
Generated by: Geneviève Martineau
Database: ecoinvent
isCopyrightProtected: true
accessRestrictedTo: 1

## General comment
This datasets represents the production of steatite rock in a Quebec mine. Data quality indicators adjusted accordingly.

## Included activities start
Starts from the delivery on site of the material and energy inputs.

## Included activities end
This activity ends with the production of either finished steatite products (polished plates and blocks) or raw stones (25% of steatite is sold as finished products, 75% as raw stones).
The dataset includes the whole manufacturing process from extracting to transforming steatite into polished plates and blocks: on-site processes (transport, machinery, energy use, etc.), and plant infrastructure.
The dataset doesn"t include the amount of water used during sawing; it is assumed that all water is extracted from and returned to surface waters.

## Geography
representative of Quebec production. Data quality indicators adjusted accordingly.

## Technology
representative of Quebec production

## Reference product
- steatite: 1 kg; = total_annual_extraction; CPC 16390: Other minerals n.e.c.; By-product classification allocatable product; ISIC rev.4 ecoinvent 239:Manufacture of non-metallic mineral products n.e.c.; CAS 63210-56-0
  Estimated value, from company.
  production volume 5.6968e8 kg; name ProdVol
    World production of Steatite (2012)
  property price 0.13 EUR2005; name steatite_price_EUR2005
    Calculated value based on data from United Nations Commodity Trade Statistics Database (comtrade.un.org). UN comtrade category: 252610 Natural steatite, not crushed or powdered. Year 2005. Using exchange rate of 1EURO = 1.209 USD. Average of price of import into 5 main markets (EU, US, JP, IN and CN).
  property dry mass 1 kg; name steatite_DM
  property water in wet mass 0 kg; name steatite_WWM
  property water content 0; name steatite_water_content
  property wet mass 1 kg; name steatite_WM
  property carbon content, non-fossil 0; name steatite_C_content_non_fossil
    biogene carbon content on a dry matter basis
  property carbon content, fossil 0; name steatite_C_content_fossil
    fossil carbon content on a dry matter basis
  property carbon content 0
    carbon content on a dry matter basis (reserved; not for manual entry)
  properties: carbon allocation 0 kg

## Inputs from technosphere
- diesel, burned in building machine: 4.84229 MJ; = diesel_consumption*density_diesel*LHV_diesel*42.8*UnitConversion(1, 'm3', 'l'); lognormal variance with pedigree 0.008, pedigree (1,1,4,1,1)
  Estimated value, based on fuel consumption (measured value). Annual consumption. Machinery on site: 2 trucks, 1 loader and 1 mechanical digger.
  Uncertainty: C
  property density 0.84 kg/l; name density_diesel
  property heating value, net 1 MJ; name LHV_diesel
  property fuel input in physical units, m3 43.1 m3; name diesel_consumption
  note on density: Density value. Value Taken from Table 5.1 of report "Overview and methodology, Data quality guideline for the ecoinvent database version 3" (ecoinvent report No. 1 (v3), 2011).
  note on heating value, net: Net (lower) heating (calorific) value. Value Taken from Table 5.1 of report "Overview and methodology, Data quality guideline for the ecoinvent database version 3" (ecoinvent report No. 1 (v3), 2011).
- electricity, medium voltage: 0 kWh; pedigree (1,1,1,1,1)
  Measured value. Annual electricity consumption, including electrical lifts, sawing and polishing of finished products.
- mine infrastructure, steatite: 6.25e-8 unit; = 1/lifetime; lognormal variance with pedigree 0.008, pedigree (1,1,4,1,1)
  Calculated value.
  Uncertainty: C
  property total surface 122500 m2; name total_surface
  property lifetime 50 year; name lifetime
  property annual production 320000 kg; name total_annual_extraction
  property lifetime capacity [kg] 1.6e7 kg; name lifetime_capacity; = lifetime*total_annual_extraction
  note on annual production: Measured value. Net total quantity of mineral extracted annualy.
  note on lifetime capacity [kg]: Estimated value, considering a constant annual production over the entire lifetime of the site.
- electricity, medium voltage: 4.22208e-5, 8.09612e-6, 0.0001859, 6.59974e-5, 0.000135917, 0.00197679, 0.000626614, 0.00027863, 0.000804832 kWh (9 entries); lognormal variance with pedigree 0.0086, pedigree (1,1,4,1,1)
  (same comment as for electricity, medium voltage)

## Inputs from nature
- Steatite, in ground [natural resource, in ground]: 1 kg; = steatite; lognormal variance with pedigree 0.008, pedigree (1,1,4,1,1)
  Calculated value.
  Uncertainty: C

## Sampling procedure
Data collected, through questionnaire, from the only steatite producer in Quebec. Data quality indicators adjusted accordingly.
