# treatment of bagasse, from sugarcane, in heat and power co-generation unit, 6400kW thermal

Dataset: EcoSpold 2, unit process
Geography: CO
Time period: 2014-01-01 to 2021-12-31
Technology level: current
Classification: ISIC rev.4 ecoinvent: 3530:Steam and air conditioning supply
Classification: EcoSpold01Categories: waste management/others
Tags: with true value
Scenario: Business-as-Usual
System model: Allocation, cut-off by classification
Generated by: Germán Santa María
Published in: Suppen, N. 2017
Database: ecoinvent
isCopyrightProtected: true
accessRestrictedTo: 1

## General comment
This dataset represents the treatment of bagasse, from sugarcane by combustion in a heat and power cogeneration unit in Colombia. Emission factors have been copied from "heat and power co-generation, wood chips, 6400kW thermal" GLO dataset accessed on 19/11/2017. Only total net electricity generation was adapted, heat to electricity ratio and other parameters have been copied from the GLO dataset. Emissions of CO2 and CO are based on carbon content of bagasse. Electricity and heat generation are based on lower heating value of bagasse and efficiency of the cogen unit.

## Included activities start
From reception of bagasse at the cogeneration plant

## Included activities end
This module describes the combustion of bagasse, from sugarcane. Included are the infrastructure, the bagasse input, the emissions to air and the disposal of the ashes. Also included are substances needed for operation: lubricating oil, ammonia, organic chemicals, sodium chloride, chlorine and decarbonized water.

## Geography
This dataset corresponds to the production of electricity and heat from sugarcane bagasse cogeneration power plants in Colombia. Exchanges and parameters are extrapolated from cogeneration with wood chips in power plants in Switzerland.

## Technology
based on dataset wood chips, burned in cogen 6400 kWh

## Time period
The Annual Production Volume is valid for the year 2014.

## Parameters
- fraction, cooling water, cooling pond system, to air: 0.032 dimensionless; name fraction_CW_CP_to_air; lognormal variance with pedigree 0.0413, pedigree (2,3,1,3,1)
  Calculated based on literature value (Scown, C.D., 2011, Water Footprint of U.S. Transportation Fuels and supplying information of the article) (Vionnet, S., Quantis Water Database - Technical Report, 2012).
- fraction, cooling water, recirculating system, to air: 0.771 dimensionless; name fraction_CW_R_to_air; lognormal variance with pedigree 0.0413, pedigree (2,3,1,3,1)
  (same comment as for fraction, cooling water, cooling pond system, to air)
- fraction, cooling water, to air: 0.3875 dimensionless; name fraction_CW_to_air; = (0.5*fraction_CW_OT_to_air)+(0.5*fraction_CW_R_to_air); lognormal variance with pedigree 0.092025, pedigree (4,4,3,2,4)
  Calculated value based on literature value (see comments of the other parametres present in this dataset) and expert opinion. In the case when no industry/literature data are available about the type of cooling or directly fraction, cooling water, to air specific for the process a default assumption is applied. It is assumed that the once-through cooling system is used in 50% of all cases and recirculating system is used in another 50% of all cases.
- total net electricity: 4.4171e8 kWh; name totalElectricity; lognormal variance with pedigree 0.0012, pedigree (2,1,1,1,1)
  Literature value/statistics for Colombian sugarcane bagasse co-generation power plants that provide electricity to the national interconnected network.
  Taken from XM National Statistics for Colombia in 2014. URL: http://informacioninteligente10.xm.com.co/oferta/Paginas/HistoricoOferta.aspx accessed 21/07/2017 File: "Generacion_(kWh)_2014"
- fraction, water, decarbonised, to air: 0.3875 dimensionless; name fraction_WDC_to_air; = fraction_CW_to_air; lognormal variance with pedigree 0.092025, pedigree (4,4,3,2,4)
  Calculated value. See comments in the other parametres present in this dataset. Decarbonised water is considered to be always used as cooling water, thus cooling water fractions to air are applied to all carbonised water input flows to calculate the amount of water consumed in the processes.
- fraction, cooling water, once-through system, to air: 0.004 dimensionless; name fraction_CW_OT_to_air; lognormal variance with pedigree 0.0413, pedigree (2,3,1,3,1)
  (same comment as for fraction, cooling water, cooling pond system, to air)

## Reference product
- heat, district or industrial, other than natural gas: 1 MJ; name heat_output; = bagasse_input*(-1)*15.4*0.787*(77/100); source Bauer, C. 2007; By-product classification allocatable product; CPC 17300: Steam and hot water; pedigree (1,1,1,1,1)
  Heat production is calculated based on heat efficiency of cogen unit (77%), lower calorific value of bagasse (15.4 MJ/kg dry mass) and dry mass of bagasse (0.787 w/w)
  production volume 1.53053e10 MJ; = bagasse_input_annual_production * heat_output
    Calculated from production volume of reference product using the relative outputs.
  property exergy 0.169678 MJ; name heat_output_exergy
    allocation factor for electricity (=1) vs. heat, where heat is calculated as the termodynamic mean temperature Tm = (Tfeed-Treturn)/ln(Tfeed/Treturn), relative to the application temperature (Tu, typically = 293 K), i.e. (Tm-Tu)/Tm
  property true value relation 0.169678; name heat_output_true_value_relation
    property to calculate "true value" from
  property price 0.0106 EUR2005; name heat_output_price_EUR2005
    Average European district heat price from Ecoheatcool and Euroheat 2005-2006, Ecoheat Work package 1: The European heat market. Final report. 10.6 EUR/GJ i s the price of district heat. http://www.solarthermalworld.org/files/Ecoheatcool%20WP1%20Web.pdf?download
  property true value 0.0776742; name heat_output_true_value
    allocation property applied in "true value" allocation // value calculated from true value relation
  properties: heating value, net 1 MJ
- bagasse, from sugarcane: 0 kg; By-product classification allocatable product; CPC 39141: Bagasse
  production volume 0 kg; name bagasse_input_annual_production; = totalElectricity/ electricity_output
    Calculated from total net electricity and electricity energy output
  property dry mass 0.787 kg; name bagasse_input_DM
  property carbon content, non-fossil 0.443; name bagasse_input_C_content_non_fossil
    biogene carbon content on a dry matter basis
    C content (dry matter basis) is 44.3% (Tab 16.24, ecoinvent v2.2 report 17)
  property price 0.01 EUR2005; name bagasse_input_price_EUR2005
    Temporary price data. Calculated as 90% of purchasers price based on: Source: ecoinvent report 17, page 380
  property carbon content 0.443
    carbon content on a dry matter basis (reserved; not for manual entry)
  properties: water content 0.270648, water in wet mass 0.213 kg, wet mass 1 kg, carbon content, fossil 0, heating value, net 15.4 MJ, carbon allocation 0.348641 kg
- electricity, high voltage: 0 kWh; name electricity_output; source Bauer, C. 2007; By-product classification allocatable product; CPC 17100: Electrical energy; pedigree (1,1,1,1,1)
  Electricity production is calculated based on lower calorific value of bagasse (15.4 MJ/kg dry matter), the dry matter content (0.787kg DM/kg fresh bagasse) and the electric efficiency of the cogen unit (8%).
  Note: 1 kWh= 3.6 MJ
  The electric effiency of the specific cogen unit can be found in the report for wood energy (see source).
  production volume 4.4171e8 kWh; name electricity_annual_production; = totalElectricity
  property price 0.0977 EUR2005; name electricity_output_price_EUR2005
  property true value relation 3.6; name electricity_output_true_value_relation
  property exergy 3.6 MJ; name electricity_output_exergy
  property true value 0.0475611; name electricity_output_true_value

## By-products
- electricity, high voltage: 0 kWh; source Bauer, C. 2007; By-product classification allocatable product; CPC 17100: Electrical energy; pedigree (1,1,1,1,1)
  (same comment as for electricity, high voltage)
  production volume 0 kWh; name electricity_annual_production; = totalElectricity
    (same comment as for total net electricity)

## Inputs from technosphere
- chemical, organic: 4.64159e-6 kg; = (5.74E-06* heat_output)/0.767; source Bauer, C. 2007; lognormal variance with pedigree 0.0346, pedigree (2,4,3,5,3)
  EcoSpold01Location=GLO
  value adapted from dataset "wood chips, burned in cogen 6400kWh".
  In the original dataset, 5.74E-6 kg of chemical, organic are used to produce 0.767MJ end heat.
  Uncertainty: etha+ project Alcosuisse, industrial data
  properties: heating value, net 19.03 MJ, wet mass 1 kg, dry mass 1 kg, carbon content, fossil 0.628
  note on carbon content, fossil: This dataset is an unweighted average of 20 organic substances (listed in Tab 88.1, ecoinvent v2.2 report 8, part II), being part of the top100 chemicals included in this database. The C-content has also been calculated as an unweighted average of the C content of the substances composing this dataset.
- sodium chloride, powder: 3.31542e-6 kg; = (4.1E-06* heat_output)/0.767; source Bauer, C. 2007; lognormal variance with pedigree 0.034, pedigree (4,4,3,5,1)
  value adapted from dataset "wood chips, burned in cogen 6400kWh".
  In the original dataset, 4.1E-6 kg of water are used to produce 0.767MJ end heat.
  EcoSpold01Location=RER
  Uncertainty: Adapted from the dataset 'wood chips, in cogen 6400kWth, wood', according to actual water, carbon and energy content of the fuel (wood chips u=40%)
  properties: wet mass 1 kg, dry mass 1 kg
- water, decarbonised: 0.000636399 kg; name water_decarbonised_input; = (0.000787* heat_output)/0.767; source Bauer, C. 2007; lognormal variance with pedigree 0.034, pedigree (4,4,3,5,1)
  value adapted from dataset "wood chips, burned in cogen 6400kWh".
  In the original dataset, 0.000787 kg of water are used to produce 0.767MJ end heat.
  value adapted from dataset "wood chips, burned in cogen 6400kWh".
  In the original dataset, 0.000787 kg of water are used to produce 0.767MJ end heat.
  EcoSpold01Location=RER
  Uncertainty: Adapted from the dataset 'wood chips, in cogen 6400kWth, wood', according to actual water, carbon and energy content of the fuel (wood chips u=40%)
  properties: wet mass 1 kg
- heat and power co-generation unit, 6400kW thermal, components for electricity only: 7.7957e-10 unit; = heat_output/(0.85*20*4.68E7); source Bauer, C. 2007; lognormal variance with pedigree 0.334, pedigree (4,4,3,5,1)
  The demanded infrastructure is calculated as:
  demanded infrastrucutre (unit/MJend) = MJend energy (MJ)/(capacity utilzation rate * Lifetime (y) * capacity (MJ/unit*y)
  The capacity for the cogen unit is 4,67E7 MJ/y. The lifetime is 20 years. The capacity utilization rate is 0.85.
  EcoSpold01Location=CH
  Uncertainty: Adapted from the dataset 'wood chips, in cogen 6400kWth, wood', according to actual water, carbon and energy content of the fuel (wood chips u=40%)
- heat and power co-generation unit, 6400kW thermal, building: 1.94893e-10 unit; = heat_output/(0.85*80*4.68E7); source Bauer, C. 2007; lognormal variance with pedigree 0.334, pedigree (4,4,3,5,1)
  The demanded infrastructure is calculated as:
  demanded infrastrucutre (unit/MJend) = MJend energy (MJ)/(capacity utilzation rate * Lifetime (y) * capacity (MJ/unit*y)
  The capacity for the cogen unit is 4,67E7 MJ/y. The lifetime is 80 years. The capacity utilization rate is 0.85.
  EcoSpold01Location=CH
  Uncertainty: Adapted from the dataset 'wood chips, in cogen 6400kWth, wood', according to actual water, carbon and energy content of the fuel (wood chips u=40%)
- municipal solid waste: -2.65234e-6 kg; name municipal_waste_output; = ((3.28E-06* heat_output)/0.767)*-1; lognormal variance with pedigree 0.034, pedigree (4,4,3,5,1)
  value adapted from dataset "wood chips, burned in cogen 6400kWh".
  In the original dataset, 3.28E-6 kg of municipal solid waste are produced for 0.767MJ end heat.
  EcoSpold01Location=CH
  Uncertainty: Adapted from the dataset 'wood chips, in cogen 6400kWth, wood', according to actual water, carbon and energy content of the fuel (wood chips u=40%)
  production volume 65451.4 kg; = municipal_waste_output* bagasse_input_annual_production
    Calculated from production volume of reference product using the relative outputs.
  property price 0 EUR2005; name municipal_waste_output_price_EUR2005
  properties: water content 0.297017, carbon content, fossil 0.171549, dry mass 0.771 kg, wet mass 1 kg, carbon content, non-fossil 0.261655, heating value, net 11.74 MJ
  note on carbon content, fossil: MSW composition in tab 4.1, ecoinvent v2.2 report 13_I. C content referred to 1 kg DM
  note on heating value, net: Value taken from the general comment of the treatment dataset.
- heat and power co-generation unit, 6400kW thermal, common components for heat+electricity: 7.7957e-10 unit; = heat_output/(0.85*20*4.68E7); source Bauer, C. 2007; lognormal variance with pedigree 0.334, pedigree (4,4,3,5,1)
  EcoSpold01Location=CH
  The demanded infrastructure is calculated as:
  demanded infrastrucutre (unit/MJend) = MJend energy (MJ)/(capacity utilzation rate * Lifetime (y) * capacity (MJ/unit*y)
  The capacity for the cogen unit is 4,67E7 MJ/y. The lifetime is 20 years. The capacity utilization rate is 0.85.
  Uncertainty: Adapted from the dataset 'wood chips, in cogen 6400kWth, wood', according to actual water, carbon and energy content of the fuel (wood chips u=40%)
- chlorine, liquid: 2.65234e-7 kg; = (3.28E-07* heat_output)/0.767; source Bauer, C. 2007; lognormal variance with pedigree 0.034, pedigree (4,4,3,5,1)
  value adapted from dataset "wood chips, burned in cogen 6400kWh".
  In the original dataset, 3.28E-7 kg of chlorine are used to produce 0.767MJ end heat.
  EcoSpold01Location=RER
  Uncertainty: Adapted from the dataset 'wood chips, in cogen 6400kWth, wood', according to actual water, carbon and energy content of the fuel (wood chips u=40%)
  properties: dry mass 1 kg, wet mass 1 kg
- wood ash mixture, pure: -0.000523044 kg; name wood_ash_output; = ((1/100)* bagasse_input*(-1)*0.787)*-1; lognormal variance with pedigree 0.0666, pedigree (4,5,5,5,3)
  for wood chips it is estimated that 1% of the dry mass is converted in ash. This is also assumed for bagasse.
  production volume 1.29071e7 kg; = bagasse_input_annual_production * wood_ash_output
    Calculated from production volume of reference product using the relative outputs.
  property carbon content, non-fossil 0.012; name wood_ash_output_C_content_non_fossil
  property price 0 EUR2005; name wood_ash_output_price_EUR2005
  properties: dry mass 1 kg, wet mass 1 kg
  note on carbon content, non-fossil: biogene carbon content on a dry matter basis Tab A.9, ecoinvent v2.2 report 13_I.
- waste mineral oil: -2.65234e-6 kg; name waste_oil_output; = ((3.28E-06* heat_output)/0.767)*-1; lognormal variance with pedigree 0.034, pedigree (4,4,3,5,1)
  EcoSpold01Location=CH
  value adapted from dataset "wood chips, burned in cogen 6400kWh".
  In the original dataset, 3.28E-6 kg of waste mineral oil are produced for 0.767MJ end heat.
  Uncertainty: Adapted from the dataset 'wood chips, in cogen 6400kWth, wood', according to actual water, carbon and energy content of the fuel (wood chips u=40%)
  production volume 65451.4 kg; = (municipal_waste_output*-1)* bagasse_input_annual_production
    Calculated from production volume of reference product using the relative outputs.
  property price 0 EUR2005; name waste_oil_output_price_EUR2005
  properties: heating value, net 34.7 MJ, carbon content, fossil 0.864444, dry mass 0.9 kg, water content 0.111111, wet mass 1 kg
  note on carbon content, fossil: Tab A.6, ecoinvent v2.2 report 13_I. C content has been calculated after data in the tables, and then referred to 1 kg DM
- bagasse, from sugarcane: 0.0664605 kg
  production volume 1.64004e9 kg
  properties: water content 0.270648, wet mass 1 kg, heating value, net 15.4 MJ
  note on carbon content, non-fossil: biogene carbon content on a dry matter basis C content (dry matter basis) is 44.3% (Tab 16.24, ecoinvent v2.2 report 17)

## Emissions to nature
- Sodium [air, urban air close to ground]: 1.2324e-6 kg; = 1.53E-06* bagasse_input*(-1)*15.4*0.787; source Bauer, C. 2007; lognormal variance with pedigree 0.684, pedigree (4,4,3,5,1)
  calculated from the emission factor (kg/MJ input) given for cogen 6400kW.
  Uncertainty: Adapted from the dataset 'wood chips, in cogen 6400kWth, wood', according to actual water, carbon and energy content of the fuel (wood chips u=40%)
- Benzene, hexachloro- [air, urban air close to ground]: 6.82249e-15 kg; = 8.47E-15* bagasse_input*(-1)*15.4*0.787; source Bauer, C. 2007; lognormal variance with pedigree 0.334, pedigree (4,4,3,5,1)
  (same comment as for Sodium)
- Dioxins, measured as 2,3,7,8-tetrachlorodibenzo-p-dioxin [air, urban air close to ground]: 2.94003e-14 kg; = 3.65E-14* bagasse_input*(-1)*15.4*0.787; source Bauer, C. 2007; lognormal variance with pedigree 0.334, pedigree (4,4,3,5,1)
  (same comment as for Sodium)
- Water [water, unspecified]: 3.89794e-7 m3; name water_to_water_unspecified; = (water_decarbonised_input/1000)*(1-fraction_WDC_to_air); lognormal variance with pedigree 0.098025, pedigree (4,4,4,2,4)
  Calculated value based on literature values and expert opinion. See comments in the parametres' comment field.
  property fraction, origin: fresh water 1; name fraction_origin_fresh_water_Ww
  property fraction, origin: salt water 0; name fraction_origin_salt_water_Ww
  property fraction, origin: unspecified 0; name fraction_origin_unspecified_Ww
- Zinc [air, urban air close to ground]: 2.84337e-7 kg; = 3.53E-07* bagasse_input*(-1)*15.4*0.787; source Bauer, C. 2007; lognormal variance with pedigree 0.684, pedigree (4,4,3,5,1)
  (same comment as for Sodium)
- Cadmium [air, urban air close to ground]: 6.63723e-10 kg; = 8.24E-10* bagasse_input*(-1)*15.4*0.787; source Bauer, C. 2007; lognormal variance with pedigree 0.684, pedigree (4,4,3,5,1)
  calculated from the emission factor (kg/MJ input) given for cogen 6400kW.
  Uncertainty: Adapted from the dataset 'wood chips, in cogen 6400kWth, wood', according to actual water, carbon and energy content of the fuel (pressed sorghum bagasse)
- Dinitrogen monoxide [air, urban air close to ground]: 2.18287e-6 kg; = 2.71E-06* bagasse_input*(-1)*15.4*0.787; source Bauer, C. 2007; lognormal variance with pedigree 0.074, pedigree (4,4,3,5,1)
  (same comment as for Sodium)
- Mercury [air, urban air close to ground]: 2.84337e-10 kg; = 3.53E-10* bagasse_input*(-1)*15.4*0.787; source Bauer, C. 2007; lognormal variance with pedigree 0.684, pedigree (4,4,3,5,1)
  (same comment as for Sodium)
- Phenol, pentachloro- [air, urban air close to ground]: 7.67631e-12 kg; = 9.53E-12* bagasse_input*(-1)*15.4*0.787; source Bauer, C. 2007; lognormal variance with pedigree 0.074, pedigree (4,4,3,5,1)
  (same comment as for Sodium)
- Water [air, unspecified]: 2.46605e-7 m3; name water_to_air_unspecified; = (water_decarbonised_input/1000)*fraction_WDC_to_air; lognormal variance with pedigree 0.098025, pedigree (4,4,4,2,4)
  (same comment as for Water)
  property fraction, origin: unspecified 0; name fraction_origin_unspecified
  property fraction, origin: salt water 0; name fraction_origin_salt_water
  property fraction, origin: fresh water 1; name fraction_origin_fresh_water
- Chlorine [air, urban air close to ground]: 1.70764e-7 kg; = 2.12E-07* bagasse_input*(-1)*15.4*0.787; source Bauer, C. 2007; lognormal variance with pedigree 0.074, pedigree (4,4,3,5,1)
  (same comment as for Cadmium)
- Benzene [air, urban air close to ground]: 8.61873e-7 kg; = 1.07E-6* bagasse_input*(-1)*15.4*0.787; source Bauer, C. 2007; lognormal variance with pedigree 0.074, pedigree (4,4,3,5,1)
  (same comment as for Sodium)
- Copper [air, urban air close to ground]: 2.08622e-8 kg; = 2.59E-08* bagasse_input*(-1)*15.4*0.787; source Bauer, C. 2007; lognormal variance with pedigree 0.684, pedigree (4,4,3,5,1)
  (same comment as for Sodium)
- Fluorine [air, urban air close to ground]: 4.73627e-8 kg; = 5.88E-08* bagasse_input*(-1)*15.4*0.787; source Bauer, C. 2007; lognormal variance with pedigree 0.074, pedigree (4,4,3,5,1)
  (same comment as for Cadmium)
- Nickel [air, urban air close to ground]: 5.68675e-9 kg; = 7.06E-09* bagasse_input*(-1)*15.4*0.787; source Bauer, C. 2007; lognormal variance with pedigree 0.684, pedigree (4,4,3,5,1)
  (same comment as for Sodium)
- m-Xylene [air, urban air close to ground]: 1.13574e-7 kg; = 1.41E-07* bagasse_input*(-1)*15.4*0.787; source Bauer, C. 2007; lognormal variance with pedigree 0.074, pedigree (4,4,3,5,1)
  (same comment as for Sodium)
- Particulates, < 2.5 um [air, urban air close to ground]: 5.78341e-5 kg; = 7.18E-05* bagasse_input*(-1)*15.4*0.787; source Bauer, C. 2007; lognormal variance with pedigree 0.334, pedigree (4,4,3,5,1)
  (same comment as for Sodium)
- Chromium [air, urban air close to ground]: 3.75358e-9 kg; = 4.66E-09* bagasse_input*(-1)*15.4*0.787; source Bauer, C. 2007; lognormal variance with pedigree 0.684, pedigree (4,4,3,5,1)
  (same comment as for Sodium)
- Sulfur dioxide [air, urban air close to ground]: 2.00567e-6 kg; = 2.49E-06* bagasse_input*(-1)*15.4*0.787; source Bauer, C. 2007; lognormal variance with pedigree 0.034, pedigree (4,4,3,5,1)
  (same comment as for Cadmium)
- Arsenic [air, urban air close to ground]: 9.50476e-10 kg; = 1.18E-09* bagasse_input*(-1)*15.4*0.787; source Bauer, C. 2007; lognormal variance with pedigree 0.684, pedigree (4,4,3,5,1)
  (same comment as for Sodium)
- Hydrocarbons, aliphatic, alkanes, unspecified [air, urban air close to ground]: 8.61873e-7 kg; = 1.07E-06* bagasse_input*(-1)*15.4*0.787; source Bauer, C. 2007; lognormal variance with pedigree 0.074, pedigree (4,4,3,5,1)
  (same comment as for Cadmium)
- Manganese [air, urban air close to ground]: 3.41527e-7 kg; = 4.24E-07* bagasse_input*(-1)*15.4*0.787; source Bauer, C. 2007; lognormal variance with pedigree 0.684, pedigree (4,4,3,5,1)
  (same comment as for Sodium)
- Acetaldehyde [air, urban air close to ground]: 5.78341e-8 kg; = 7.18E-08* bagasse_input*(-1)*15.4*0.787; source Bauer, C. 2007; lognormal variance with pedigree 0.074, pedigree (4,4,3,5,1)
  (same comment as for Sodium)
- Nitrogen oxides [air, urban air close to ground]: 9.18257e-5 kg; = 1.14E-04* bagasse_input*(-1)*15.4*0.787; source Bauer, C. 2007; lognormal variance with pedigree 0.074, pedigree (4,4,3,5,1)
  (same comment as for Sodium)
- Lead [air, urban air close to ground]: 2.00567e-8 kg; = 2.49E-08* bagasse_input*(-1)*15.4*0.787; source Bauer, C. 2007; lognormal variance with pedigree 0.684, pedigree (4,4,3,5,1)
  (same comment as for Sodium)
- Benzo(a)pyrene [air, urban air close to ground]: 4.73627e-10 kg; = 5.88E-10* bagasse_input*(-1)*15.4*0.787; source Bauer, C. 2007; lognormal variance with pedigree 0.334, pedigree (4,4,3,5,1)
  (same comment as for Sodium)
- PAH, polycyclic aromatic hydrocarbons [air, urban air close to ground]: 1.05519e-8 kg; = 1.31E-08* bagasse_input*(-1)*15.4*0.787; source Bauer, C. 2007; lognormal variance with pedigree 0.334, pedigree (4,4,3,5,1)
  (same comment as for Sodium)
- Formaldehyde [air, urban air close to ground]: 1.2324e-7 kg; = 1.53E-07* bagasse_input*(-1)*15.4*0.787; source Bauer, C. 2007; lognormal variance with pedigree 0.5526, pedigree (2,1,3,1,5)
  calculated from the emission factor (kg/MJ input) given for cogen 6400kW.
- Potassium [air, urban air close to ground]: 2.21509e-5 kg; = 2.75E-05* bagasse_input*(-1)*15.4*0.787; source Bauer, C. 2007; lognormal variance with pedigree 0.684, pedigree (4,4,3,5,1)
  (same comment as for Sodium)
- Bromine [air, urban air close to ground]: 5.68675e-8 kg; = 7.06E-08* bagasse_input*(-1)*15.4*0.787; source Bauer, C. 2007; lognormal variance with pedigree 0.684, pedigree (4,4,3,5,1)
  (same comment as for Sodium)
- Magnesium [air, urban air close to ground]: 3.41527e-7 kg; = 4.24E-07* bagasse_input*(-1)*15.4*0.787; source Bauer, C. 2007; lognormal variance with pedigree 0.684, pedigree (4,4,3,5,1)
  (same comment as for Sodium)
- Chromium VI [air, urban air close to ground]: 3.79385e-11 kg; = 4.71E-11* bagasse_input*(-1)*15.4*0.787; source Bauer, C. 2007; lognormal variance with pedigree 0.684, pedigree (4,4,3,5,1)
  (same comment as for Sodium)
- Methane, non-fossil [air, urban air close to ground]: 3.79385e-7 kg; = 4.71E-07* bagasse_input*(-1)*15.4*0.787; source Bauer, C. 2007; lognormal variance with pedigree 0.074, pedigree (4,4,3,5,1)
  (same comment as for Sodium)
- NMVOC, non-methane volatile organic compounds, unspecified origin [air, urban air close to ground]: 5.68675e-7 kg; = 7.06E-07* bagasse_input*(-1)*15.4*0.787; source Bauer, C. 2007; lognormal variance with pedigree 0.074, pedigree (4,4,3,5,1)
  (same comment as for Sodium)
- Carbon dioxide, non-fossil [air, urban air close to ground]: 0.0849505 kg; name carbon_dioxide; = ((0.34864* bagasse_input*-1) - ( carbon_monoxide*(12/28))-(0.0012*(wood_ash_output*-1)))*( carbon_dioxide_MW/12); lognormal variance with pedigree 0.004, pedigree (1,1,3,5,1)
  It is assumed that all carbon content in bagasse leaves the system as emissions (CO and CO2) and ash (wood ash). The CO2 emissions are calculated by substracting the amount of C in the bagasse to the amount of carbon that leaves the system as CO (7mg/MJend) and ash (1.2E-3kg/kg ash). The rest of C is assumed to leave the system as CO2. The calculations are done using the molecular weight (MW) and carbon content with the following steps:
  mass of C in input bagasse=(0.34864kgC/1kg bagasse)* mass input bagasse
  mass of C as CO = output emissions CO (kg) * MWC / MWCO
  mass of C as ash = carbon content in ash (kg/kg) * output ash (kg)
  emissions of C as CO2= mass of C in input bagasse - mass of C as CO - mass of C in ash
  emissions of CO2=emissions of C as CO2 * (MW CO2/MW C)
  Note: molecular weight of C is 12 g/mol
  Uncertainty: Adapted from the dataset 'wood chips, in cogen 6400kWth, wood', according to actual water, carbon and energy content of the fuel (wood chips u=40%)
  property molecular weight 44 g/mol; name carbon_dioxide_MW
- Hydrocarbons, aliphatic, unsaturated [air, urban air close to ground]: 2.94003e-6 kg; = 3.65E-06* bagasse_input*(-1)*15.4*0.787; source Bauer, C. 2007; lognormal variance with pedigree 0.074, pedigree (4,4,3,5,1)
  (same comment as for Sodium)
- Toluene [air, urban air close to ground]: 2.84337e-7 kg; = 3.53E-07* bagasse_input*(-1)*15.4*0.787; source Bauer, C. 2007; lognormal variance with pedigree 0.074, pedigree (4,4,3,5,1)
  (same comment as for Sodium)
- Benzene, ethyl- [air, urban air close to ground]: 2.84337e-8 kg; = 3.53E-08* bagasse_input*(-1)*15.4*0.787; source Bauer, C. 2007; lognormal variance with pedigree 0.074, pedigree (4,4,3,5,1)
  (same comment as for Sodium)
- Ammonia [air, urban air close to ground]: 1.6432e-6 kg; = 2.04E-06* bagasse_input*(-1)*15.4*0.787; source Bauer, C. 2007; lognormal variance with pedigree 0.044, pedigree (4,4,3,5,1)
  (same comment as for Sodium)
- Phosphorus [air, urban air close to ground]: 2.84337e-7 kg; = 3.53E-07* bagasse_input*(-1)*15.4*0.787; source Bauer, C. 2007; lognormal variance with pedigree 0.074, pedigree (4,4,3,5,1)
  (same comment as for Sodium)
- Calcium [air, urban air close to ground]: 5.54176e-6 kg; = 6.88E-06* bagasse_input*(-1)*15.4*0.787; source Bauer, C. 2007; lognormal variance with pedigree 0.684, pedigree (4,4,3,5,1)
  (same comment as for Sodium)
- Carbon monoxide, non-fossil [air, urban air close to ground]: 4.34158e-6 kg; name carbon_monoxide; = 7E-06*15.4*0.787*(77/100); source Bauer, C. 2007; lognormal variance with pedigree 0.684, pedigree (4,4,3,5,1)
  It is assumed that 7 mg of CO are produced per MJend. To calculate this, the calorific value of bagasse, the dry matter content and calorific efficiency of the cogen are used.
  Uncertainty: Adapted from the dataset 'wood chips, in cogen 6400kWth, wood', according to actual water, carbon and energy content of the fuel (wood chips u=40%)
  property molecular weight 28 g/mol; name carbon_monoxide_MW

## Extrapolations
Exchanges and parameters are extrapolated from a dataset valid for Switzerland.Uncertainty has been adjusted accordingly.

## Review by Christopher Oberschelp 2017-11-21
Well-documented dataset. Main exchanges look plausible. Comparison with similar datasets may show remaining deviations.
