# desulfurisation of lignite flue gas

Dataset: EcoSpold 2, unit process
Geography: GLO
Time period: 1985-01-01 to 2021-12-31
Technology level: current
Classification: EcoSpold01Categories: lignite/power plants
Classification: ISIC rev.4 ecoinvent: 3510:Electric power generation, transmission and distribution
Synonyms: Wet scrubber; DeSOx
Tags: ConvertedDataset
Scenario: Business-as-Usual
System model: Allocation, cut-off by classification
Generated by: Christian Bauer
Published in: Röder, A. 2007
Database: ecoinvent
isCopyrightProtected: true
accessRestrictedTo: 1

## General comment
This dataset represents the flue gas desulfurisation process of a lignite power plant per 1 kg SOx retained. The efficiency of the desulfurisation is 90%.
[This dataset was already contained in the ecoinvent database version 2. It was not individually updated during the transfer to ecoinvent version 3. Life Cycle Impact Assessment results may still have changed, as they are affected by changes in the supply chain, i.e. in other datasets. This dataset was generated following the ecoinvent quality guidelines for version 2. It may have been subject to central changes described in the ecoinvent version 3 change report (http://www.ecoinvent.org/database/ecoinvent-version-3/reports-of-changes/), and the results of the central updates were reviewed extensively. The changes added e.g. consistent water flows and other information throughout the database. The documentation of this dataset can be found in the ecoinvent reports of version 2, which are still available via the ecoinvent website. The change report linked above covers all central changes that were made during the conversion process.]

## Included activities start
Desulfurisation process starting with the operation of a lignite power plant.

## Included activities end
This activity ends with 1 kg retained SOx resulting from the flue gas desulfurisation process of a coal power plant. The dataset includes the materials. The dataset doesn’t include the waste water emissions and the solid waste and doesn’t include the gypsum as a byproduct. The waste water is used for keeping wet the ash from the operation of the plant and is disposed with the bottom ash and fly ash (Gerhard et al. 1989). 100% of the radioactive elements K-40, Ra-226, Pb-214, Bi-214, Ac-228, Pb-212, Bi-212 and Tl-208 are separated with the bottom ash and fly ash (Merz et al. 1989).

References:
Gebhard G., Lukas W., Bambauer H.U. (1989) Stabilisierung von Rückständen aus der Braunkohleentschwefelung. In: VGB Kraftwerkstechnik 69, Heft 4, 1989, s.384-392.
Merz E., Kroth K., Scholz W., Holzapfel Th. (1989) Radioaktivitätsmessung an Gips aus Rauchgasentschwefelungsanlagen (REA) und Aktivitätsbilanzierung des Rauchgasentschwefelungsprozesses eines mit rheinischer Braunkohle befeuerten Grosskraftwerkes. In: VGB Kraftwerkstechnik 69, Heft 11, s.1114-1118.

## Geography
Data for an average European desulfurisation plant.

## Technology
About 85% of the installed capacity of desulphurization plants are installed as scrubber with lime or limestone (Vernon et al. 1990). Due to the relevance of lignite power plants in the western states of Germany, the current proportion of desulfurisation with limestone is assumed with 100%. The additional consumption of electricity and heat for the desulfurisation process is taken into account in the net efficiency.
The process steps are the detergent treatment, the absorption of flue gas components in the scrubbing suspension, the oxidation to sulfate (HSO3- to SO4-), the neutralization of the water suspension by the addition of limestone, crystallization of the gypsum, separation of the gypsum crystal from the mother liquor, calcination, pelleting or briquetting of gypsum for further use (IPP 1990, Baum 1988).
With limestone (CaCO3), the gases SO2, SO3, HCl and HF are absorbed in a scrubbing solution. Limestone has a low reactivity, but is preferred compared with quicklime (CaO) and slaked lime (Ca(OH)2 for economic reasons (IIP 1990). The de-dusted flue gas is either cooled in a pre-scrubber or directly cooled in the absorber. There, the hydrogen halides, the residual dust particulates and up to 20% of the SO2 are washed out. The suspension from the pre-scrubber can also be removed separately. Thus, mixing with the gypsum can be prevented. Droplet separators retain entrained liquid droplets and the clean gas is reheated and discharged through the chimney. By air intake oxidation is encouraged in the scrubber sump to form the gypsum.
The pH-value, the ratio of the absorption liquid to the amount of exhaust gas and the concentration of absorption liquid significantly affect the separation efficiency. In (Hövelmann 1987) an efficiency of 95% is quantified. In other sources, this value is estimated at 80%. In the EU a value of 90% is obligatory, which can be achieved with a scrubber with limestone.
References:
Vernon J.L., Soud H.N. (1990) FGD installations on coal-fired plants. IEA Coal Research, London.
IIP Karlsruhe, Ministerium für Umwelt Baden-Württemberg (1990) Entsorgung von Reststoffen aus der Rauchgasreinigung; Teil 2: TA Luft-Feuerungsanlagen. Karlsruhe.
Baum F. (1988) Luftreinhaltung in der Praxis. München, Deutschland.
Hövelmann A. (1987) Neue Entsorgungsprobleme kohlegefeuerter Kraftwerke. Jül-2172, KFA Jülich.

## Parameters
- annual production volume, electricity: 1.903e12 kWh; name apv_electricity; lognormal variance with pedigree 0.0412, pedigree (2,1,5,1,1)
  Literature value. Electricity prodcution with lignite in electricity only and heat and power plants worldwide in 2012.
  IEA/OECD. 2014. Electricity Information 2014. International Energy Agency (IEA), Paris Cedex (FR).
  Uncertainty: Even if this value has a very low uncertainty, the pedigree value for the time period was put to 5 in order to account for the use of 2012 data for the period 1985-2000.
- fraction, water, decarbonised, to air: 0.3875 dimensionless; name fraction_WDC_to_air; = fraction_CW_to_air; lognormal variance with pedigree 0.092025, pedigree (4,4,3,2,4)
  Calculated value. See comments in the other parametres present in this dataset. Decarbonised water is considered to be always used as cooling water, thus cooling water fractions to air are applied to all carbonised water input flows to calculate the amount of water consumed in the processes.
- SOx, retained, in hard coal flue gas desulfurisation: 0.0088 kg/kWh; name sox_retained_lignite
  Calculated value. From "electricity production, lignite, GLO 2015)". Weighted average from all figures from countries in ecoinvent version 2 (AT, FR, BA, BG, CS, CZ, DE, ES, GR, HU, MK, PL, RO, SI, SK) and the new countries for version 3 (AU, CA, ID, IN, RU, TH, TR, TW, UA). Weighting was made with net electricity production 2008 in these countries (Itten&Frischknecht 2012).
- fraction, cooling water, recirculating system, to air: 0.771 dimensionless; name fraction_CW_R_to_air; lognormal variance with pedigree 0.0413, pedigree (2,3,1,3,1)
  Calculated based on literature value (Scown, C.D., 2011, Water Footprint of U.S. Transportation Fuels and supplying information of the article) (Vionnet, S., Quantis Water Database - Technical Report, 2012).
- fraction, cooling water, cooling pond system, to air: 0.032 dimensionless; name fraction_CW_CP_to_air; lognormal variance with pedigree 0.0413, pedigree (2,3,1,3,1)
  (same comment as for fraction, cooling water, recirculating system, to air)
- fraction, cooling water, to air: 0.3875 dimensionless; name fraction_CW_to_air; = (0.5*fraction_CW_OT_to_air)+(0.5*fraction_CW_R_to_air); lognormal variance with pedigree 0.092025, pedigree (4,4,3,2,4)
  Calculated value based on literature value (see comments of the other parametres present in this dataset) and expert opinion. In the case when no industry/literature data are available about the type of cooling or directly fraction, cooling water, to air specific for the process a default assumption is applied. It is assumed that the once-through cooling system is used in 50% of all cases and recirculating system is used in another 50% of all cases.
- fraction, cooling water, once-through system, to air: 0.004 dimensionless; name fraction_CW_OT_to_air; lognormal variance with pedigree 0.0413, pedigree (2,3,1,3,1)
  (same comment as for fraction, cooling water, recirculating system, to air)

## Reference product
- SOx retained, in lignite flue gas desulfurisation: 1 kg; name RP_amount_1; CPC 34231: Chemical elements n.e.c.; inorganic acids except phosphoric, nitric and sulphonitric; inorganic oxygen compoun[…]; By-product classification allocatable product
  EcoSpold01Location=GLO
  production volume 1.67464e10 kg; name apv_SOx; = apv_electricity* sox_retained_lignite
    Calculated value.
    The dataset "electricity production, lignite, GLO 2015" provides the value of 0.0088 kg of SOx retained in hard coal flue-gas desulfurisation per kWh of electricity produced and the annual production volume of hard coal electricity amounted to Value Value 1.6744E+12 kWh.
  property price 0.2386 EUR2005
    Calculated based on inputs: The price of the product has been calculated as a sum of the values of the material and energy inputs for this product. This value is therefore a rough estimation. It may underestimate the real price since there are additional expenses when producing any product. These expences can include for example labour costs, treatment of waste materials and profit for the producer. Please consider carefully whether this level of data quality is acceptable for your application.
  property carbon content 0
    carbon content on a dry matter basis (reserved; not for manual entry)
  properties: carbon content, non-fossil 0, wet mass 1 kg, dry mass 1 kg, carbon content, fossil 0, water in wet mass 0 kg, water content 0, carbon allocation 0 kg

## Inputs from technosphere
- waste gypsum: 0 kg; name BP_amount_1
  Literature value. Ecoinvent 2 report 6 VI pag. 125 table 9.33. Tab. 9.32 (Verschiedene REA-Bilanzen aus diversen Quellen) and Tab. 9.33, p.126f in Röder et al. (2007): REA-Massenbilanz pro kg reduziertes SO2, REA-Nass nach Tab. 9.33, REA-Nass Brk-D (Nass-Entschwefelung der westdeutschen Braunkohlekraftwerke). The tables are compilations of different sources for wet flue-gas desulfurisation mass-balances. Tab.9.33 shows the mass balance values chosen for this dataset.
  production volume 0 kg
    Calculated from production volume of reference product using the relative outputs.
  property price 0 EUR2005; name BP_amount_1_price_EUR2005
  properties: dry mass 0.806 kg, wet mass 1 kg, water content 0.240695
- lime: 0 kg; source Gebhard G. 1989; pedigree (1,1,1,1,1)
  Estimation. The reaction equation of the limestone process is CaCO3 + 2H2O + SO2 + _O2 -> CaSO4 • 2H2O + CO2. For lime processes stoichiometrically only 0.9 kg of lime per kg of SO2 is necessary and no additional CO2 is produced. CO2 already escaped during the calcination of lime.
  Further references:
  Uerpmann E.-P. (1990) Betriebserfahrungen mit nasser Rauchgasentschwefelung in Braunkohlekraftwerken. In: VGB-Seminar Rauchgasreinigung und Reststoffentsorgung in Kraftwerken, Industrie- und Heizkraftwerken. Cottbus, Deutschland.
  EcoSpold01Location=CH
  properties: carbon content, fossil 0.120005, dry mass 1 kg, wet mass 1 kg
- water, decarbonised: 0 kg; name water_decarbonised_input; source Gebhard G. 1989; pedigree (1,1,1,1,1)
  Estimation. The water for the desulfurisation process does not need to meet any higher demands and corresponds to the quality of cooling water.
  Further references:
  Uerpmann E.-P. (1990) Betriebserfahrungen mit nasser Rauchgasentschwefelung in Braunkohlekraftwerken. In: VGB-Seminar Rauchgasreinigung und Reststoffentsorgung in Kraftwerken, Industrie- und Heizkraftwerken. Cottbus, Deutschland.
  Estimation. The water for the desulfurisation process does not need to meet any higher demands and corresponds to the quality of cooling water.
  Further references:
  Uerpmann E.-P. (1990) Betriebserfahrungen mit nasser Rauchgasentschwefelung in Braunkohlekraftwerken. In: VGB-Seminar Rauchgasreinigung und Reststoffentsorgung in Kraftwerken, Industrie- und Heizkraftwerken. Cottbus, Deutschland.
  EcoSpold01Location=RER
  properties: wet mass 1 kg
- wastewater, average: 0 m3; name BP_amount_2
  (same comment as for waste gypsum)
  production volume 0 m3
    Calculated from production volume of reference product using the relative outputs.
  property price 0 EUR2005; name BP_amount_2_price_EUR2005
  properties: carbon content, non-fossil 0.194039, water content 2882.2, wet mass 1000 kg, dry mass 0.346837 kg
  note on carbon content, non-fossil: 0.0673 kg TOC/m3 (Tab A.17, ecoinvent v2.2 report 13_I). TOC was considered as Total Carbon.
- waste gypsum: -0.952797, -0.0450396, -3.10216 kg (3 entries)
  (same comment as for waste gypsum)
  production volume 6.86602e10 kg
- lime: 0.159004, 1.841 kg (2 entries); source Gebhard G. 1989; lognormal variance with pedigree 0.0641, pedigree (3,4,5,3,1)
  (same comment as for lime)
- water, decarbonised: 1.75936, 0.429626, 0.0866104, 0.284792, 0.224038, 0.0214154, 0.167646, 0.436215, 0.000272799, 0.0157222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 kg (13 entries); source Gebhard G. 1989; lognormal variance with pedigree 0.0641, pedigree (3,4,5,3,1)
  (same comment as for water, decarbonised)
- wastewater, average: -0.000749907, -8.11259e-5, -0.00156897 m3 (3 entries)
  (same comment as for waste gypsum)
  production volume 4.01914e7 m3

## Emissions to nature
- Carbon dioxide, fossil [air, non-urban air or from high stacks]: 0.7 kg; source Gebhard G. 1989; lognormal variance with pedigree 0.0641, pedigree (3,4,5,3,1)
  Estimation. The reaction equation of the limestone process is CaCO3 + 2H2O + SO2 + _O2 -> CaSO4 • 2H2O + CO2. For lime processes stoichiometrically only 0.9 kg of lime per kg of SO2 is necessary and no additional CO2 is produced. CO2 already escaped during the calcination of lime.
  Further references:
  Uerpmann E.-P. (1990) Betriebserfahrungen mit nasser Rauchgasentschwefelung in Braunkohlekraftwerken. In: VGB-Seminar Rauchgasreinigung und Reststoffentsorgung in Kraftwerken, Industrie- und Heizkraftwerken. Cottbus, Deutschland.
- Water [air, unspecified]: 0.003875 m3; name water_to_air_unspecified; = (water_decarbonised_input/1000*fraction_WDC_to_air); lognormal variance with pedigree 0.0807, pedigree (2,2,5,1,1)
  Calculated value based on literature values and expert opinion. See comments in the parametres' comment field.
  property fraction, origin: salt water 0; name fraction_origin_salt_water
  property fraction, origin: unspecified 0; name fraction_origin_unspecified
  property fraction, origin: fresh water 1; name fraction_origin_fresh_water
- Water [water, unspecified]: 0.006125 m3; name water_to_water_unspecified; = (water_decarbonised_input/1000)*(1-fraction_WDC_to_air); lognormal variance with pedigree 0.0807, pedigree (2,2,5,1,1)
  (same comment as for Water)
  property water in wet mass 1000 kg; name WWM
  property fraction, origin: salt water 0; name fraction_origin_salt_water_Ww
  property carbon content, fossil 0; name C_content_fossil
  property fraction, origin: fresh water 1; name fraction_origin_fresh_water_Ww
  property dry mass 0 kg; name DM
  property fraction, origin: unspecified 0; name fraction_origin_unspecified_Ww
  property carbon content, non-fossil 0; name C_content_non_fossil
  property wet mass 1000 kg; name WM

## Sampling procedure
Based on literature.

## Extrapolations
This dataset has been extrapolated from year 2000 to the year of the calculation (2021). The uncertainty has been adjusted accordingly.

## Review by Hans-Jörg Althaus 2003-07-04
passed

## Review by Roland Hischier 2011-09-23
Transfer of documentation done.
