# ammonium bicarbonate production

Dataset: EcoSpold 2, unit process
Geography: RER
Time period: 1995-01-01 to 2021-12-31
Technology level: current
Classification: ISIC rev.4 ecoinvent: 2012:Manufacture of fertilizers and nitrogen compounds
Synonyms: AMMONIUM BICARBONATE; Monoammonium carbonate; Ammonium acid carbonate; Ammonium hydrogencarbonate; 1066-33-7; Ammonium hydrogen carbonate
Scenario: Business-as-Usual
System model: Allocation, cut-off by classification
Generated by: Maggie Osses
Published in: Althaus H.-J. 2007
Database: ecoinvent
isCopyrightProtected: true
accessRestrictedTo: 1

## General comment
This dataset represents the production of 1 kg of ammonium bicarbonate (100%). Ammonium bicarbonate is a white powder with a faint odour of ammonia. It is mainly used as an expanding agent for certain baked goods and in buffer solutions for neutralization of acids when additional anions are undesirable. Further uses include an ammonization agent for the humic acid in turf, a nitrogen source for yeast cultures, and blowing agents for foam rubber and poly (vinyl chloride). Minor uses include smelling salts and formaldehyde binders in laminates. Data for consumption of energy have been provided by a manufacturer. Consumption of raw materials is estimated on stoechiometry assuming an efficiency of 95%.
References:
Althaus H.-J., Chudacoff M., Hischier R., Jungbluth N., Osses M. and Primas A. (2007) Life Cycle Inventories of Chemicals. ecoinvent report No. 8, v2.0. EMPA Dübendorf, Swiss Centre for Life Cycle Inventories, Dübendorf, CH.
Zapp, K.-H., Wostbrock, K.-H., Schäfer, M., Sato, K., Seiter, H., Zwick, W., Creutziger, R. and Leiter, H. 2000. Ammonium Compounds. Ullmann's Encyclopedia of Industrial Chemistry.

## Included activities start
The activity starts when the raw materials enter the process.

## Included activities end
This activity takes into account the consumption of raw materials, energy, as well as the use of infrastructure. No by-product is generated in the process. Auxiliaries, solid wastes, emissions to air and water (except emission of waste-heat) are not included due to the lack of data.

## Geography
Data concerning energy have been provided by a European manufacturing company. No further information is available on the location and characteristics of this manufacturer. Therefore, the representativeness of these values for the European ammonium bicarbonate industry is unknown.

## Technology
Ammonium bicarbonate is produced basically from ammonia and carbon dioxide. It is best produced in an aqueous solution.
Reference(s):
Althaus H.-J., Chudacoff M., Hischier R., Jungbluth N., Osses M. and Primas A. (2007) Life Cycle Inventories of Chemicals. ecoinvent report No. 8, v2.0. EMPA Dübendorf, Swiss Centre for Life Cycle Inventories, Dübendorf, CH.
Zapp, K.-H., Wostbrock, K.-H., Schäfer, M., Sato, K., Seiter, H., Zwick, W., Creutziger, R. and Leiter, H. 2000. Ammonium Compounds. Ullmann's Encyclopedia of Industrial Chemistry.

## Time period
Values based on data from the early 1990s.

## Parameters
- fraction, process water, to air: 0.205 dimensionless; name fraction_PW_to_air; lognormal variance with pedigree 0.092025, pedigree (4,4,3,2,4)
  Literature value (Statistics Canada, 2007 & Shaffer, K.H., 2008, Consumptive water use in the Great Lakes Basin, USGS) (Vionnet, S., Quantis Water Database - Technical Report, 2012).

## Reference product
- ammonium bicarbonate: 1 kg; name RP; By-product classification allocatable product; CPC 34240: Phosphates of triammonium; salts and peroxysalts of inorganic acids and metals n.e.c.; CAS 1066-33-7
  Ammonium bicarbonate is a white powder with a faint odour of ammonia. It is mainly used as an expanding agent for certain baked goods and in buffer solutions for neutralization of acids when additional anions are undesirable. Further uses include an ammonization agent for the humic acid in turf, a nitrogen source for yeast cultures, and blowing agents for foam rubber and poly (vinyl chloride). Minor uses include smelling salts and formaldehyde binders in laminates.
  References:
  Althaus H.-J., Chudacoff M., Hischier R., Jungbluth N., Osses M. and Primas A. (2007) Life Cycle Inventories of Chemicals. ecoinvent report No. 8, v2.0. EMPA Dübendorf, Swiss Centre for Life Cycle Inventories, Dübendorf, CH.
  Zapp, K.-H., Wostbrock, K.-H., Schäfer, M., Sato, K., Seiter, H., Zwick, W., Creutziger, R. and Leiter, H. 2000. Ammonium Compounds. Ullmann's Encyclopedia of Industrial Chemistry.
  production volume 1.74e7 kg; name RP_PV
    Estimated value. The European production volume is extrapolated from the global production volume based on reports from Cefic (European Chemical Industry Council), and the American Chemistry Council.
    According to Cefic (2016) the Global sales of chemicals in the year 2015 was 3 534 billion euros. The reported share of sales per regions are: EU28 14.7%; Other Europe (Switzerland, Norway, Turkey, Russia and Ukraine) 2.7%; NAFTA (US, Canada and Mexico) 16.5%; Latin America 3.8%; China 39.9%; Japan 3.9%; Republic of Korea 3.2%; India 2.2%; Rest of Asia 11.9%; Rest of the World 1.3%. Cefic also reports the US total sales, 518.7 billion euros of the global 3 534 billion euros (14.7%). The same share is reported from the American Chemistry Council (2016), according to this source the USA sales account for 15% of global sales for the year 2016.
    According to 'Ullmann's encyclopedia of industrial chemistry' the global production of ammonium bicarbonate for the year of 1997 was 100000 tonnes. Since no data were found for the European production this value was scaled accordingly.
    Reference(s):
    Cefic 2016. Facts and figures 2016 of the European chemical industry. Accessible at: http://www.cefic.org/Facts-and-Figures/Chemicals-Industry-Profile/
    American Chemistry Council 2016. Outlook: U.S. Chemical Industry Continues to Outpace Industrial Output; Accounts for More Than One-Half of Construction Spending by Manufacturing Sector. Accessible at: https://www.americanchemistry.com/Media/PressReleasesTranscripts/ACC-news-releases/US-Chemical-Industry-Continues-to-Outpace-Industrial-Output.html
    Zapp, K.-H., Wostbrock, K.-H., Schäfer, M., Sato, K., Seiter, H., Zwick, W., Creutziger, R. and Leiter, H. 2000. Ammonium Compounds. Ullmann's Encyclopedia of Industrial Chemistry.
  property heating value, net 12.27 MJ
    LHV is calculated based on the elemental composition of the substance. Based on the CAS number of the substance (001066-33-7), the chemical formula of the substance is found to be: CH5NO3, (PubChem 2020).
    Reference: Kim, S., Chen, J., Cheng, T., Gindulyte, A., He, J., He, S., Li, Q., Shoemaker, B. A., Thiessen, P. A., Yu, B., Zaslavsky, L., Zhang, J., & Bolton, E. E. (2019). PubChem 2019 update: improved access to chemical data. Nucleic acids research, 47(D1), D1102–D1109. https://doi.org/10.1093/nar/gky1033
  property price 0.3 EUR2005
    Estimated price. Price estimated from website https://www.alibaba.com/showroom/ammonium+bicarbonate.html?fsb=y&IndexArea=product_en&CatId=&SearchText=ammonium+bicarbonate&isGalleryList=G, accessed 27 June 2019
  property carbon content 0.151899
    carbon content on a dry matter basis (reserved; not for manual entry)
  properties: water content 0, water in wet mass 0 kg, wet mass 1 kg, carbon content, fossil 0.151899, dry mass 1 kg, carbon content, non-fossil 0, carbon allocation 0.151899 kg

## Inputs from technosphere
- carbon dioxide, liquid: 0.586 kg; lognormal variance with pedigree 0.1786, pedigree (4,5,5,5,5)
  Estimation based on stoechiometry with a 95% yield.
  Uncertainty: e
  properties: wet mass 1 kg, carbon content, fossil 0.272727, dry mass 1 kg, heating value, net 8.27 MJ
- chemical factory, organics: 4e-10 unit; lognormal variance with pedigree 0.349225, pedigree (2,3,5,2,3)
  Calculated based on literature data published by the industry. For this activity, no information was readily available concerning infrastructure and land-use. Therefore, the infrastructure is estimated based on data from two chemical factories, the BASF site of Ludwigshafen and the chemical factory in Gendorf (which are both located in Germany), which produce a wide range of chemical substances. Based on this data, the following assumptions are made: the built area amounts to about 4.2 ha, the plant has an average output of 50'000 t/a and a lifespan of fifty years. The estimated infrastructure amount is therefore 4.00 E-10 units per kg of produced chemical.
  References:
  Althaus H.-J., Chudacoff M., Hischier R., Jungbluth N., Osses M. and Primas A. (2007) Life Cycle Inventories of Chemicals. ecoinvent report No. 8, v2.0. EMPA Dübendorf, Swiss Centre for Life Cycle Inventories, Dübendorf, CH.
  Gendorf (2000) Umwelterklärung 2000, Werk Gendorf. Werk Gendorf, Burgkirchen.
- electricity, medium voltage: 0.323 kWh; lognormal variance with pedigree 0.282, pedigree (3,5,5,5,5)
  Data from a manufacturing company.
  Uncertainty: d
- ammonia, anhydrous, liquid: 0.227 kg; lognormal variance with pedigree 0.1786, pedigree (4,5,5,5,5)
  Estimation based on stoechiometry with a 95% yield.
  Uncertainty: e
  properties: wet mass 1 kg, dry mass 1 kg

## Inputs from nature
- Water, unspecified natural origin [natural resource, in water]: 0.00024 m3; name water_UNO_input; lognormal variance with pedigree 0.188, pedigree (4,5,5,5,5)
  Estimation based on stoechiometry with a 95% yield.
  Uncertainty: e

## Emissions to nature
- Water [air, unspecified]: 2.46e-6 m3; = water_UNO_input*0.05*fraction_PW_to_air; lognormal variance with pedigree 0.0807, pedigree (2,2,5,1,1)
  Calculated as a fraction of the water input that is not incorporated into the product. For more details, refer to the mathematical relation and the parameters.
  property fraction, origin: salt water 0; name fraction_origin_salt_water
  property fraction, origin: unspecified 1; name fraction_origin_unspecified
  property fraction, origin: fresh water 0; name fraction_origin_fresh_water
- Water [water, unspecified]: 9.54e-6 m3; = water_UNO_input*0.05*(1-fraction_PW_to_air); lognormal variance with pedigree 0.0807, pedigree (2,2,5,1,1)
  (same comment as for Water)
  property fraction, origin: fresh water 0; name fraction_origin_fresh_water_Ww
  property carbon content, fossil 0; name C_content_fossil
  property wet mass 1000 kg; name WM
  property water in wet mass 1000 kg; name WWM
  property dry mass 0 kg; name DM
  property fraction, origin: unspecified 1; name fraction_origin_unspecified_Ww
  property fraction, origin: salt water 0; name fraction_origin_salt_water_Ww
  property carbon content, non-fossil 0; name C_content_non_fossil

## Sampling procedure
Data based on industrial data as well as estimations based on stoichiometric calculations.

## Extrapolations
This dataset has been extrapolated from year 1995 to the year of the calculation (2021). The uncertainty has been adjusted accordingly.

## Review by Gregor Wernet 2017-08-04
This dataset was additionally reviewed in a separate review process by Eric Johnson of Atlantic Consulting as well as Emilia Moreno Ruiz and Gregor Wernet of ecoinvent.
