# treatment of scrap printed wiring boards, shredding and separation

Dataset: EcoSpold 2, unit process
Geography: CA-QC
Time period: 2005-01-01 to 2021-12-31
Technology level: current
Classification: EcoSpold01Categories: waste management/recycling
Classification: ISIC rev.4 ecoinvent: 3830:Materials recovery
Tags: Treatment; recontextualization
Scenario: Business-as-Usual
System model: Allocation, cut-off by classification
Generated by: Pascal Lesage
Published in: Hischier R. 2007
Database: ecoinvent
isCopyrightProtected: true
accessRestrictedTo: 1

## General comment
Child dataset exchanges identical to GLO dataset. Created to enable linking to regional markets (e.g. for electricity). Data quality indicators adjusted accordingly.
[This dataset was already contained in the ecoinvent database version 2. It was not individually updated during the transfer to ecoinvent version 3. Life Cycle Impact Assessment results may still have changed, as they are affected by changes in the supply chain, i.e. in other datasets. This dataset was generated following the ecoinvent quality guidelines for version 2. It may have been subject to central changes described in the ecoinvent version 3 change report (http://www.ecoinvent.org/database/ecoinvent-version-3/reports-of-changes/), and the results of the central updates were reviewed extensively. The changes added e.g. consistent water flows and other information throughout the database. The documentation of this dataset can be found in the ecoinvent reports of version 2, which are still available via the ecoinvent website. The change report linked above covers all central changes that were made during the conversion process.]

## Included activities end
This dataset represents the treatment of printed wiring boards (PWB) from electric and electronic devices for the recovery of precious metals in a metallurgical process. It includes infrastructure, energy consumption, and an estimation of the efforts for transportation. The process has no emissions to air / water.

## Technology
Weighting, shredding and sampling of Printed Wiring Boards in a current preparation plant.

## Parameters
- world gross domestic product 2011: 7e13 USD(2011); name worldGDP2011; lognormal variance with pedigree 0.0006, pedigree (1,1,1,1,1)
  World Gross domestic product for 2011, expressed in 2011 USD. Source: World Bank.
- Quebec gross domestic product 2011: 3.11e11 USD(2011); name quebecGDP2011; lognormal variance with pedigree 0.0006, pedigree (1,1,1,1,1)
  Quebec Gross domestic product for 2011, expressed in 2011 USD. Source: Institut de la statistique du Québec. Converted from CAD to USD using a yearly average exchange rate of 0.989 CAD/USD (Source: bank of Canada).

## Reference product
- used printed wiring boards: -1 kg; CPC 39990: Other wastes n.e.c.; By-product classification Waste
  production volume 0.00444286 kg
    Gross approximation of Quebec production volume using relative value of Quebec GDP to world GDP
  property carbon content, non-fossil 0.000960142
    Composition of printed wiring boards used to calculate C content
  property price 0 EUR2005
    Waste products are assigned a price of zero as they are assumed to require further treatment.
  property carbon content, fossil 0.193742
    Composition of printed wiring boards used to calculate C content
  property carbon content 0.194702
    carbon content on a dry matter basis (reserved; not for manual entry)
  properties: water content 0, water in wet mass 0 kg, dry mass 1 kg, wet mass 1 kg, carbon allocation 0.194702 kg

## By-products
- electronics scrap: 0 kg; By-product classification Recyclable; CPC 39: Wastes or scraps
  production volume 0 kg
    Calculated from the production volume of used printed wiring boards in proportion to the respective output amounts.
  property carbon content, non-fossil 0.0045566
    Carbon content assumed equal with the intermediate exchange of "electronic component, passive, unspecified"
  property price 16.1 EUR2005
    Temporary price data. Calculated as 90% of purchasers price based on: 2005 import prices (total trades (USD) divided by total weight (kg) in biggest economies of the world: EU27, USA, Brasil, China, India, Japan and Russia) from UN Commodity Trade Statistics Database (http://data.un.org/Explorer.aspxDatabase [Accessed 2011.06.20]). Commodity: Waste/scrap, precious metals except pure gold/platinum
  property carbon content, fossil 0.317311
    (same comment as for electronics scrap)
  property carbon content 0.321868
    carbon content on a dry matter basis (reserved; not for manual entry)
  properties: water in wet mass 0 kg, water content 0, dry mass 1 kg, wet mass 1 kg, carbon allocation 0.321868 kg

## Inputs from technosphere
- manual treatment facility, waste electric and electronic equipment: 4e-10 unit; lognormal variance with pedigree 0.5761, pedigree (4,5,5,3,5)
  Rough estimation of infrastructure
  Uncertainty: r
- electricity, medium voltage: 0.04 kWh; lognormal variance with pedigree 0.0767, pedigree (4,3,5,3,3)
  Estimation, based on information in Huisman (2003)
  Uncertainty: e
- electronics scrap: -1 kg
  production volume 0.00444286 kg
  properties: carbon content, non-fossil 0.0045566, dry mass 1 kg, wet mass 1 kg, price 16.1 EUR2005, carbon content, fossil 0.317311
  note on carbon content, non-fossil: Carbon content assumed equal with the intermediate exchange of "electronic component, passive, unspecified"

## Sampling procedure
Company information & own estimation

## Extrapolations
This dataset has been extrapolated from year 2005 to the year of the calculation (2021). The uncertainty has been adjusted accordingly.
