# pea seed production, for sowing

Dataset: EcoSpold 2, unit process
Geography: CH
Time period: 1999-01-01 to 2021-12-31
Technology level: current
Classification: EcoSpold01Categories: agricultural means of production/seed
Classification: ISIC rev.4 ecoinvent: 0164:Seed processing for propagation
Scenario: Business-as-Usual
System model: Allocation, cut-off by classification
Share of production covered: 0 %
Generated by: Thomas Nemecek
Published in: Nemecek, T. 2007
Database: ecoinvent
isCopyrightProtected: true
accessRestrictedTo: 1

## General comment
Refers to 1 kg of pea seed (fresh weight), with a maximum water content of 13%
[This dataset was already contained in the ecoinvent database version 2. It was not individually updated during the transfer to ecoinvent version 3. Life Cycle Impact Assessment results may still have changed, as they are affected by changes in the supply chain, i.e. in other datasets. This dataset was generated following the ecoinvent quality guidelines for version 2. It may have been subject to central changes described in the ecoinvent version 3 change report (http://www.ecoinvent.org/database/ecoinvent-version-3/reports-of-changes/), and the results of the central updates were reviewed extensively. The changes added e.g. consistent water flows and other information throughout the database. The documentation of this dataset can be found in the ecoinvent reports of version 2, which are still available via the ecoinvent website. The change report linked above covers all central changes that were made during the conversion process.]

## Included activities start
This activity start after the harvest of the crop.

## Included activities end
The seed produced at the farm is treated in the processing centre (pre-cleaning, cleaning, eventually drying, chemical dressing (for integrated production) and bag filling), stored and afterwards transported to the regional storage centre. No data on wastewater production were available.

## Technology
Refers to average seed processing

## Time period
Date of the major data sources.

## Reference product
- pea seed, for sowing: 1 kg; By-product classification allocatable product; CPC 01260: Vegetable seeds, except beet seeds
  EcoSpold01Location=CH
  production volume 1.16077e6 kg
    0.065 kg seed per kg crop applied to FAO production data for 'peas, dry'. Entire Swiss production volume minus the organic share.
  property price 2.13295 EUR2005
    Calculated based on inputs: The price of the product has been calculated as a sum of the values of the material and energy inputs for this product. This value is therefore a rough estimation. It may underestimate the real price since there are additional expenses when producing any product. These expences can include for example labour costs, treatment of waste materials and profit for the producer. Please consider carefully whether this level of data quality is acceptable for your application.
  property dry mass 0.87 kg; name DM
  property carbon content, non-fossil 0.469421; name C_content_non_fossil
    biogene carbon content on a dry matter basis
    Composition data obtained from Peas, split, mature seeds, raw, in (http://www.nal.usda.gov/fnic/foodcomp/search/). First, composition data were refered to 1 kg dry mass. Then, C-contents were calculated considering a C-content/dry mass of 46% in carbohydrates (including fibres), 53% in proteins and 75% in fats. All data from "Evolutionary and Biochemical Aspects", A.D. Kay and T. Vrede (in Global Ecology, 2010, Elsevier B.V., S.E. Jørgensen Ed.).
  property energy content 16.0776 MJ; name energy_content
    as gross calorific value (when relevant)
  property carbon content 0.469421
    carbon content on a dry matter basis (reserved; not for manual entry)
  properties: water in wet mass 0.13 kg, water content 0.149425, carbon content, fossil 0, wet mass 1 kg, carbon allocation 0.408396 kg

## Inputs from technosphere
- protein pea, Swiss integrated production: 0.5 kg; lognormal variance with pedigree 0.0581, pedigree (1,1,5,3,3)
  See "01_crop production - seed production & processing_v1.0.pdf" - pdf-document on the dedicated talk page of ecoinvent (www.ecoinvent.org/documentation)
  EcoSpold01Location=CH
  properties: carbon content, non-fossil 0.469421, water content 0.149425, dry mass 0.87 kg, wet mass 1 kg
  note on carbon content, non-fossil: Composition data obtained from Peas, split, mature seeds, raw, in (http://www.nal.usda.gov/fnic/foodcomp/search/). First, composition data were refered to 1 kg dry mass. Then, C-contents were calculated considering a C-content/dry mass of 46% in carbohydrates (including fibres), 53% in proteins and 75% in fats. All data from "Evolutionary and Biochemical Aspects", A.D. Kay and T. Vrede (in Global Ecology, 2010, Elsevier B.V., S.E. Jørgensen Ed.).
- packaging, for pesticides: 0.0032 kg; lognormal variance with pedigree 0.0912, pedigree (4,3,5,5,4)
  Total amount of active substance/s of pesticides needed for the production of pea seed, for sowing is calculated to be circa 1.60E-03 kg. Pesticide/s used in this dataset is/are: 'pesticide, unspecified'. The total amount of active substance/s is doubled in order to account for the packaging of the dilluted product of pesticide/s that is/are applied. Therefore, 3.20E-03 kg of packaging for pesticides is justified with this exchange.
  properties: dry mass 1 kg, price 0.0642 EUR2005, heating value, net 25.97 MJ, carbon content, fossil 0.85714, wet mass 1 kg
- pesticide, unspecified: 0.0016 kg; lognormal variance with pedigree 0.0507, pedigree (2,2,5,1,1)
  (same comment as for protein pea, Swiss integrated production)
  properties: carbon content, fossil 0.486978, dry mass 1 kg, wet mass 1 kg
  note on carbon content, fossil: Mean of C content in all pesticides whose formula has been documented in Sutter 2010
- protein pea: 0.5 kg; lognormal variance with pedigree 0.0581, pedigree (1,1,5,3,3)
  See "01_crop production - seed production & processing_v1.0.pdf" - pdf-document on the dedicated talk page of ecoinvent (www.ecoinvent.org/documentation)
  properties: wet mass 1 kg, dry mass 0.87 kg, carbon content, non-fossil 0.469421, water content 0.149425
- building, multi-storey: 2e-5 m3; lognormal variance with pedigree 0.410625, pedigree (5,3,5,2,1)
  EcoSpold01Location=RER
  See "01_crop production - seed production & processing_v1.0.pdf" - pdf-document on the dedicated talk page of ecoinvent (www.ecoinvent.org/documentation)
- electricity, low voltage: 0.058 kWh; lognormal variance with pedigree 0.1226, pedigree (5,3,5,5,1)
  EcoSpold01Location=CH
  See "01_crop production - seed production & processing_v1.0.pdf" - pdf-document on the dedicated talk page of ecoinvent (www.ecoinvent.org/documentation)

## Inputs from nature
- Occupation, construction site [natural resource, land]: 8e-6 m2*year; lognormal variance with pedigree 0.160625, pedigree (5,3,5,2,1)
  (same comment as for protein pea)
- Occupation, industrial area [natural resource, land]: 0.0002 m2*year; lognormal variance with pedigree 0.160625, pedigree (5,3,5,2,1)
  (same comment as for protein pea)
- Transformation, to industrial area [natural resource, land]: 4e-6 m2; lognormal variance with pedigree 0.220625, pedigree (5,3,5,2,1)
  (same comment as for protein pea)
- Transformation, from unspecified [natural resource, land]: 4e-6 m2; lognormal variance with pedigree 0.220625, pedigree (5,3,5,2,1)
  (same comment as for protein pea)

## Sampling procedure
Data based on a literature, expert information and enquiry of seed processing plants.

## Extrapolations
This dataset has been extrapolated from year 2002 to the year of the calculation (2021). The uncertainty has been adjusted accordingly.

## Review by Roland Hischier 2003-06-03
Passed.

## Review by Bo Weidema 2012-01-19
passed
