# wood chipping, mobile chipper, at forest road

Dataset: EcoSpold 2, unit process
Geography: RER
Time period: 2012-01-01 to 2021-12-31
Technology level: current
Classification: ISIC rev.4 ecoinvent: 0220:Logging
Tags: Swiss brush-up completed
Scenario: Business-as-Usual
System model: Allocation, cut-off by classification
Generated by: Frank Werner
Database: ecoinvent
isCopyrightProtected: true
accessRestrictedTo: 1

## General comment
The inventory refers to 1 productive machine hour (PMS) - referring to the operational time of the machine including breaks up to 15 minutes - of a mobile chipper mounted on a lorry

## Included activities start
Service beginning with the transport of the machinery to the logging site.

## Included activities end
Includes the input of machinery infrastructure, the input of diesel fuel, lubricants/greases as well as their disposal, and the emissions into air from diesel consumption. Wood is not included in the dataset.

## Geography
Emission profile according to European legislation

## Technology
Average european technology

## Parameters
- share of EURO IIIb: 0.5 dimensionless; name EURO_IIIb; = 1-EURO_IIIa; lognormal variance with pedigree 0.719098, pedigree (1,1,1,1,1)
  assuming that the relevant share of forest machinery belongs to vehicle types tier EURO IIIa and EURO IIIb as define in the Guideline 97/68/EG by the European Commission.
- engine power: 475 kW; name EP; lognormal variance with pedigree 0.5526, pedigree (3,3,1,1,1)
  according to Jirousek et al. 2007
- share of EURO IIIa: 0.5 dimensionless; name EURO_IIIa; lognormal variance with pedigree 0.592, pedigree (5,4,1,1,1)
  assuming that the relevant share of foresassuming that the relevant share of forest machinery belongs to vehicle types tier EURO IIIa and EURO IIIb as define in the Guideline 97/68/EG by the European Commission.
- lifetime of machine, productive machine hours: 15000 hour; name total_PMH; lognormal variance with pedigree 0.5526, pedigree (3,3,1,1,1)
  according to Spielmann et al. 2007
- diesel consumption: 70 l/hour; name diesel_consumption; lognormal variance with pedigree 0.592, pedigree (5,4,1,1,1)
  according to Jirousek et al. 2007 (see general comments field for total of evaulated literature)
- load factor: 0.5 dimensionless; name LF; lognormal variance with pedigree 0.5526, pedigree (3,3,1,1,1)
  according to Lambrecht et al. 2004

## Reference product
- wood chipping, chipper, mobile, diesel, at forest road: 1 hour; CPC 8614: Support and operation services to forestry and logging; By-product classification allocatable product
  production volume 1.74052e7 hour; name p_harvesting; = 5000*total_PMH/71707302*16641109
    annual production volume of machinery: 5000 times productive machine hour corrected for relation of RER/GLO GDP
  property price 36.4611 EUR2005
    Calculated based on inputs: The price of the product has been calculated as a sum of the values of the material and energy inputs for this product. This value is therefore a rough estimation. It may underestimate the real price since there are additional expenses when producing any product. These expences can include for example labour costs, treatment of waste materials and profit for the producer. Please consider carefully whether this level of data quality is acceptable for your application.

## Inputs from technosphere
- diesel, low-sulfur: 58.8 kg; name m_diesel; = diesel_consumption*0.84; source Jirsousek R. 2007; lognormal variance with pedigree 0.033, pedigree (1,1,4,1,1)
  Density of diesel: 0.84 kg/l
  property water content 0; name water_content
  property carbon content, non-fossil 0; name C_content_non_fossil
  property water in wet mass 0 kg; name WWM
  property carbon content, fossil 0.865; name C_content_fossil
  properties: UVEK_link_1 740, dry mass 1 kg, UVEK_relative_amount_1 1, heating value, net 42.8 MJ, wet mass 1 kg
  note on UVEK_link_1: to be used only in special submissions in coordination with ecoinvent and the Swiss FOEN
- chipper, mobile, diesel: 6.66667e-5 unit; = 1/total_PMH; source Spielmann, M. 2007; lognormal variance with pedigree 0.558, pedigree (1,1,4,1,1)
  assuming a service life of 15000 PMH (according to Spielmann et al. 2007)
- transport, freight, lorry 16-32 metric ton, EURO5: 217.5 metric ton*km; = 29000/1000*60/8; source Spielmann, M. 2007; lognormal variance with pedigree 0.3926, pedigree (3,3,5,1,1)
  transport of forest machinery calculated for the weight of the machinery, transported over 25 km and 8 productive machine hours (PMH) per day
  properties: UVEK_relative_amount_1 1, UVEK_link_1 4388
- waste mineral oil: 0 kg; name w_mineral_oil; source Klvac R. 2003; pedigree (1,1,1,1,1)
  hydraulic oil and engine oil/grease; adjusted for water content of waste oil
  production volume 0 kg
    Calculated from production volume of reference product using the relative outputs.
  property water content 0.111111; name WC_oil
  property dry mass 0.9 kg; name DM_oil
  properties: heating value, net 34.7 MJ, carbon content, fossil 0.864444, UVEK_link_1 1113, wet mass 1 kg, UVEK_relative_amount_1 -1
  note on heating value, net: Value taken from the general comment of the treatment dataset.
- lubricating oil: 0.9245 kg; name m_lubricating_oil; = (0.781+0.294)*0.86; source Klvac R. 2003; lognormal variance with pedigree 0.0662, pedigree (2,3,5,1,1)
  hydraulic oil and engine oil/grease; estimate based on Klvac et al. (2003); value per l converted to kg
  properties: UVEK_link_1 2866, carbon content, fossil 0.75, dry mass 1 kg, UVEK_relative_amount_1 1, heating value, net 40.2 MJ, wet mass 1 kg
  note on heating value, net: Literature value, Source: IPCC 2006, 2006 IPCC Guidelines for National Greenhouse Gas Inventories, Prepared by the National Greenhouse Gas Inventories Programme, Eggleston H.S., Buendia L., Miwa K., Ngara T. and Tanabe K. (eds). Published: IGES, Japan
- waste mineral oil: -1.00241, -0.0248156 kg (2 entries); source Klvac R. 2003; lognormal variance with pedigree 0.0342, pedigree (2,3,4,1,1)
  hydraulic oil and engine oil/grease; adjusted for water content of waste oil
  production volume 1.78791e7 kg
  properties: heating value, net 34.7 MJ, carbon content, fossil 0.864444, UVEK_link_1 1113, wet mass 1 kg, water content 0.111111, UVEK_relative_amount_1 -1, dry mass 0.9 kg

## Emissions to nature
- Particulates, > 2.5 um, and < 10um [air, non-urban air or from high stacks]: 0.00106855 kg; = (EURO_IIIa* EP* LF*(IF(EP>130;0.2;0.3))+EURO_IIIb* EP* LF*(IF(EP>130;0.025;0.025)))/1000/(0.0000943+0.00000628+0.00000419)*0.00000419; source Lambrecht U. 2004; lognormal variance with pedigree 0.358, pedigree (1,1,4,1,1)
  emission model calculating hourly specific emissions as "engine power x load factor x base emission factor" as proposed by Lambrecht et al. (2004) and applied in Spielmann et al. (2007); values for base emission factors for particles for mobile machine classes EURO IIIa and EUROIIIb are taken from European Directive 2004/ 26/EC. The proportional distribution accross particle classes is made based on the ecoinvent v3 dataset "Diesel, burned in building machine/GLO".
- Carbon monoxide, fossil [air, unspecified]: 0.654326 kg; = m_diesel*0.00026*42.8; source Kellenberger D. 2007; lognormal variance with pedigree 0.208, pedigree (1,1,4,1,1)
  value per MJ taken from ecoinvent 3.4 dataset "diesel, burned in building machine, GLO 2001" converted to input of diesel as mass (42.8 MJ/kg lower heating value)
- Nitrogen oxides [air, non-urban air or from high stacks]: 0.653125 kg; = (EURO_IIIa* EP* LF*(IF(EP>130;3.5;3.5))+EURO_IIIb* EP* LF*(IF(EP>130;2;3.3)))/1000; source Lambrecht U. 2004; lognormal variance with pedigree 0.208, pedigree (1,1,4,1,1)
  emission model calculating hourly specific emissions as "engine power x load factor x base emission factor" as proposed by Lambrecht et al. (2004) and applied in Spielmann et al. (2007); values for base emission factors for NOx for mobile machine class EUROIIIb are taken from the European Directive 2004/ 26/EC; for mobile machine class EURO IIIa values for base emission factors for NOx are calculated based on an assumed reduction of VOC emissions as compared to "Tier 2" limit for VOC of 1.0 g/kWh (following Spielmann et al. 2007).
  property dry mass 1 kg; name DM
- Particulates, > 10 um [air, non-urban air or from high stacks]: 0.00160154 kg; = (EURO_IIIa* EP* LF*(IF(EP>130;0.2;0.3))+EURO_IIIb* EP* LF*(IF(EP>130;0.025;0.025)))/1000/(0.0000943+0.00000628+0.00000419)*0.00000628; source Lambrecht U. 2004; lognormal variance with pedigree 0.208, pedigree (1,1,4,1,1)
  (same comment as for Particulates, > 2.5 um, and < 10um)
- Cadmium [air, unspecified]: 5.88894e-7 kg; = m_diesel*0.000000000234*42.8; source Kellenberger D. 2007; lognormal variance with pedigree 0.808, pedigree (1,1,4,1,1)
  (same comment as for Carbon monoxide, fossil)
- Dinitrogen monoxide [air, unspecified]: 0.00704659 kg; = m_diesel*0.0000028*42.8; source Kellenberger D. 2007; lognormal variance with pedigree 0.208, pedigree (1,1,4,1,1)
  (same comment as for Carbon monoxide, fossil)
- Dioxins, measured as 2,3,7,8-tetrachlorodibenzo-p-dioxin [air, unspecified]: 3.5233e-12 kg; = m_diesel*0.0000000000000014*42.8; source Kellenberger D. 2007; lognormal variance with pedigree 0.558, pedigree (1,1,4,1,1)
  (same comment as for Carbon monoxide, fossil)
- Ammonia [air, unspecified]: 0.00117527 kg; = m_diesel*0.000000467*42.8; source Kellenberger D. 2007; lognormal variance with pedigree 0.208, pedigree (1,1,4,1,1)
  (same comment as for Carbon monoxide, fossil)
- Methane, fossil [air, non-urban air or from high stacks]: 0.0019665 kg; = (EURO_IIIa* EP* LF*(IF(EP>130;0.012;0.012))+EURO_IIIb* EP* LF*(IF(EP>130;0.00456;0.00456)))/1000; source Lambrecht U. 2004; lognormal variance with pedigree 0.208, pedigree (1,1,4,1,1)
  emission model calculating hourly specific emissions as "engine power x load factor x base emission factor" as proposed by Lambrecht et al. (2004) and applied in Spielmann et al. (2007); values for base emission factors for VOC for mobile machinery classes EURO IIIa and EURO IIIb are taken from European Directive 2004/ 26/EC, of which 2.4% are assumed to be methane.
- Selenium [air, unspecified]: 5.88894e-7 kg; = m_diesel*0.000000000234*42.8; source Kellenberger D. 2007; lognormal variance with pedigree 0.808, pedigree (1,1,4,1,1)
  (same comment as for Carbon monoxide, fossil)
- NMVOC, non-methane volatile organic compounds, unspecified origin [air, non-urban air or from high stacks]: 0.0799187 kg; name nmvoc; = (EURO_IIIa* EP* LF*(IF(EP>130;0.488;0.488))+EURO_IIIb* EP* LF*(IF(EP>130;0.185;0.185)))/1000; source Lambrecht U. 2004; lognormal variance with pedigree 0.208, pedigree (1,1,4,1,1)
  emission model calculating hourly specific emissions as "engine power x load factor x base emission factor" as proposed by Lambrecht et al. (2004) and applied in Spielmann et al. (2007); values for base emission factors for VOC for vehicle classes EURO IIIa and EURO IIIb are taken from Guideline 97/68/EG, of which 97.6% are assumed to be NMVOC.
- Nickel [air, unspecified]: 4.12729e-6 kg; name nickel; = m_diesel*0.00000000164*42.8; source Kellenberger D. 2007; lognormal variance with pedigree 0.808, pedigree (1,1,4,1,1)
  (same comment as for Carbon monoxide, fossil)
- Zinc [air, unspecified]: 5.88894e-5 kg; = m_diesel*0.0000000234*42.8; source Kellenberger D. 2007; lognormal variance with pedigree 0.808, pedigree (1,1,4,1,1)
  (same comment as for Carbon monoxide, fossil)
- Particulates, < 2.5 um [air, non-urban air or from high stacks]: 0.0240487 kg; = (EURO_IIIa* EP* LF*(IF(EP>130;0.2;0.3))+EURO_IIIb* EP* LF*(IF(EP>130;0.025;0.025)))/1000/(0.0000943+0.00000628+0.00000419)*0.0000943; source Lambrecht U. 2004; lognormal variance with pedigree 0.558, pedigree (1,1,4,1,1)
  (same comment as for Particulates, > 2.5 um, and < 10um)
- Carbon dioxide, fossil [air, non-urban air or from high stacks]: 183.715 kg; = m_diesel*0.073*42.8; source Kellenberger D. 2007; lognormal variance with pedigree 0.033, pedigree (1,1,4,1,1)
  calculated from diesel input as 3.113 kg CO2/kg diesel as inventoried in the ecoinvent dataset diesel, burned in building machine
- Copper [air, unspecified]: 9.99106e-5 kg; = m_diesel*0.0000000397*42.8; source Kellenberger D. 2007; lognormal variance with pedigree 0.208, pedigree (1,1,4,1,1)
  (same comment as for Carbon monoxide, fossil)
- Benzo(a)pyrene [air, unspecified]: 1.76416e-6 kg; = m_diesel*0.000000000701*42.8; source Kellenberger D. 2007; lognormal variance with pedigree 0.558, pedigree (1,1,4,1,1)
  (same comment as for Carbon monoxide, fossil)
- PAH, polycyclic aromatic hydrocarbons [air, unspecified]: 0.000197556 kg; name pah; = m_diesel*0.0000000785*42.8; source Kellenberger D. 2007; lognormal variance with pedigree 0.558, pedigree (1,1,4,1,1)
  (same comment as for Carbon monoxide, fossil)

## Sampling procedure
Material and fuel input from literature sources (see general comments field); air-borne emissions taken from existing dataset on diesel consumption in building machines or - where emission levels beyond applicable European legislation - estimated with emissions model based on emission limits established in European Directive 2004/ 26/EC for non-road mobile machinery types EURO IIIa and IIIb (according to Lambrecht et al 2004 and e.g. applied in Spielmann et al. 2007).

## Extrapolations
This dataset has been extrapolated from year 2012 to the year of the calculation (2021). The uncertainty has been adjusted accordingly.
