# electric kettle production

Dataset: EcoSpold 2, unit process
Geography: GLO
Time period: 2014-01-01 to 2021-12-31
Technology level: current
Classification: ISIC rev.4 ecoinvent: 2750:Manufacture of domestic appliances
Synonyms: kettle; kettle for boiling water
Scenario: Business-as-Usual
System model: Allocation, cut-off by classification
Generated by: Viachaslau Filimonau
Published in: Marcinkowski, A. 2017
Database: ecoinvent
isCopyrightProtected: true
accessRestrictedTo: 1

## General comment
This activity represents the production and disposal of an average electric kettle which is approximately 1.5 kg in mass. It has the envisaged lifetime of 4 years and is manufactured in Europe. The figures on material inputs from technosphere and electricity required to produce an average electric kettle are taken from Marcinkowski and Zych 2017. The figure on the annual production volume is assumed to be equal to the annual amount of kettle sales as taken from Bounds 2017.

## Included activities start
This activity starts with the reception of materials at the factory

## Included activities end
The activity includes the processes of material and energy use in manufacturing an average electric kettle. The inventory additionally accounts for disposal of all materials. Packaging is not included.

## Geography
Geography GLO was chosen because the dataset aims to represent the production of an average electric kettle. The literature sources used refer to manufacturing in Europe.

## Time period
The literature sources used refer to primary data from 2014. The end period is assumed to be 2017, the year when the study was published, which represents current technology.

## Reference product
- electric kettle: 1 unit; name RP_amount_1; CPC 88744: Consumer electronics manufacturing services; By-product classification allocatable product
  production volume 1.74e8 unit; name RP_PV_1
    Figure is based on the volume of annual kettle sales as outlined in Bounds 2017
  property price 60 EUR2005; name RP_amount_1_price_EUR2005
    Estimated value. The price is taken from MediaWorld, a shop for electronics, website (retrieved from: https://www.mediaworld.it/mw/SearchDisplay?searchTerm=bollitore&categoryId=&search=WCS&storeId=20000&catalogId=20000&langId=-4&pageSize=25&beginIndex=0&sType=SimpleSearch&resultCatEntryType=2&showResultsPage=true&searchSource=Q&pageView=, accessed 13Feb2018). The range of prices varies greatly from 30 to over 150 euros. A representative price of 60 was chosen. The choice is based on the most common price for an average appliance, and accounting for profit margins. According to an article from Blokhin "What profit margin is average for a company in the electronics sector?" (Source: Investopedia, retrieved from: https://www.investopedia.com/ask/answers/051215/what-profit-margin-average-company-electronics-sector.asp, 13Feb2018) the average profit margin made in the electronics sector in 2015 was of 9%.
  property lifetime capacity [l] 3360 l
    The source reports the function of the kettle to be boiling 3360 liters of water for the lifetime of 4 years. Source: Marcinkowski and Zych 2017, 2017, Marcinkowski, A., Zych, K., Environmental performance of kettle production: Product Life Cycle Assessment, Management Systems in Production Enginee, 25, 4, 255-261, 1 - Article, Marcinkowski, A., and Zych, K., 2017. Environmental performance of kettle production: Product Life Cycle Assessment. Management Systems in Production Engineering, 25(4), 255-261
  property weight 1.5 kg; name weight
    Source: Marcinkowski and Zych 2017, 2017, Marcinkowski, A., Zych, K., Environmental performance of kettle production: Product Life Cycle Assessment, Management Systems in Production Enginee, 25, 4, 255-261, 1 - Article, Marcinkowski, A., and Zych, K., 2017. Environmental performance of kettle production: Product Life Cycle Assessment. Management Systems in Production Engineering, 25(4), 255-261
  property lifetime 4 year
    (same comment as for electric kettle)

## Inputs from technosphere
- brass: 0 kg; pedigree (1,1,1,1,1)
  Data from Marcinkowski and Zych 2017. In terms of outputs assumed to have gone to scrap copper.
  properties: dry mass 1 kg, wet mass 1 kg
- waste, from silicon wafer production: -0.026629 kg; name BP_amount_7; = (silicone)*-1; lognormal variance with pedigree 0.0053, pedigree (1,4,3,3,2)
  Data from Marcinkowski and Zych 2017. The amount is set equal to the input amount for the respective material.
  production volume 4.63345e6 kg; = RP_PV_1 * (BP_amount_7 / RP_amount_1)
    Calculated from production volume of reference product using the relative outputs.
  property price 0 EUR2005; name BP_amount_7_price_EUR2005
  properties: carbon content, fossil 0.0347496, dry mass 1 kg, wet mass 1 kg
- nickel smelter slag: -0.070938 kg; name BP_amount_2; = (nickel)*-1; lognormal variance with pedigree 0.0053, pedigree (1,4,3,3,2)
  (same comment as for waste, from silicon wafer production)
  production volume 1.23432e7 kg; = RP_PV_1 * (BP_amount_2 / RP_amount_1)
    Calculated from production volume of reference product using the relative outputs.
  property price 0 EUR2005; name BP_amount_2_price_EUR2005
  properties: dry mass 1.5 kg, wet mass 1.5 kg, carbon content, fossil 0.00345
- polyvinylidenchloride, granulate: 0 kg; name PVC; pedigree (1,1,1,1,1)
  Data from Marcinkowski and Zych 2017
  properties: carbon content, fossil 0.387097, wet mass 1 kg, dry mass 1 kg, heating value, net 10.01 MJ
- plastic processing factory: 1.11111e-9 unit; = 1/900000000; lognormal variance with pedigree 0.3047, pedigree (1,4,3,3,2)
  Used here in place of infrastructure based on the amount of the largest contributor to the final product mass (polypropylene). This is an estimated value. According to the technology comment of the dataset 'Plastic processing factory construction, GLO' [accessed 19.01.2018], the life time of the tanks is assumed to be 50 years and the annual production is 27000 t/a. Thus, the estimated lifetime output of the factory is 27000 x 50 = 1350000. As the coffee machine mass is 1.5 kg, then the number of coffee machines produced during the lifetime of the factory is 1350000 / 0.0015 = 900000000 units. The calculation of the infrastructure is therefore 1/life time capacity = 1/900000000 unit.
- scrap steel: 0 kg; name BP_amount_3; pedigree (1,1,1,1,1)
  Data from Marcinkowski and Zych 2017. The amount is set equal to the input amount for the respective material. Also contains scrap chromium.
  production volume 0 kg
    Calculated from production volume of reference product using the relative outputs.
  property price 0 EUR2005; name BP_amount_3_price_EUR2005
  properties: wet mass 1 kg, dry mass 1 kg
- waste polyethylene: 0 kg; name BP_amount_8; pedigree (1,1,1,1,1)
  (same comment as for waste, from silicon wafer production)
  production volume 0 kg
    Calculated from production volume of reference product using the relative outputs.
  property price 0 EUR2005; name BP_amount_8_price_EUR2005
  properties: heating value, net 42.47 MJ, carbon content, fossil 0.825301, wet mass 1 kg, dry mass 1 kg
  note on heating value, net: Value taken from the general comment of the treatment dataset.
  note on carbon content, fossil: C content in 1 kg DM was calculated using data in Tab A.1, ecoinvent v2.2 report 13_I
- waste textile, soiled: 0 kg; name BP_amount_5; pedigree (1,1,1,1,1)
  (same comment as for waste, from silicon wafer production)
  production volume 0 kg
    Calculated from production volume of reference product using the relative outputs.
  property price 0 EUR2005; name BP_amount_5_price_EUR2005
  properties: wet mass 1 kg, dry mass 1 kg, heating value, net 14.45 MJ
- scrap copper: 0 kg; name BP_amount_4; pedigree (1,1,1,1,1)
  Data from Marcinkowski and Zych 2017. The amount is set equal to the input amount for the respective material. Also contains scrap brass.
  production volume 0 kg
    Calculated from production volume of reference product using the relative outputs.
  property price 0 EUR2005; name BP_amount_4_price_EUR2005
  properties: wet mass 1 kg, dry mass 1 kg
- polyethylene, low density, granulate: 0.00136 kg; name PE; lognormal variance with pedigree 0.0053, pedigree (1,4,3,3,2)
  Data from Marcinkowski and Zych 2017
  properties: wet mass 1 kg, heating value, net 42.47 MJ, dry mass 1 kg, carbon content, fossil 0.857143
- textile, jute: 0.000503 kg; name textile; lognormal variance with pedigree 0.0053, pedigree (1,4,3,3,2)
  Data from Marcinkowski and Zych 2017
  properties: wet mass 1 kg, dry mass 1 kg, carbon content, non-fossil 0.490909, heating value, net 14.87 MJ
- copper, cathode: 0.017046 kg; name copper; lognormal variance with pedigree 0.0053, pedigree (1,4,3,3,2)
  Data from Marcinkowski and Zych 2017
  properties: wet mass 1 kg, dry mass 1 kg
- chromium: 0.017734 kg; lognormal variance with pedigree 0.0053, pedigree (1,4,3,3,2)
  Data from Marcinkowski and Zych 2017. In terms of outputs assumed to have gone to scrap steel.
  properties: wet mass 1 kg, dry mass 1 kg
- polypropylene, granulate: 0.758319 kg; name PP; lognormal variance with pedigree 0.0053, pedigree (1,4,3,3,2)
  Data from Marcinkowski and Zych 2017
  properties: wet mass 1 kg, heating value, net 32.78 MJ, carbon content, fossil 0.857143, dry mass 1 kg
  note on heating value, net: Value extracted from "treatment of waste polypropylene, open burning"
- steel, low-alloyed, hot rolled: 0.547818 kg; name steel; lognormal variance with pedigree 0.0053, pedigree (1,4,3,3,2)
  Data from Marcinkowski and Zych 2017. The resultant number combines the amount of stanless steel and regular steel.
  properties: dry mass 1 kg, carbon content, fossil 0.005, wet mass 1 kg
  note on carbon content, fossil: Low alloyed steel composition given in Tab. 3.2 ecoinvent v2.2 report 10_partII. Steel assumed to have a C content of 0.5%
- waste polypropylene: 0 kg; name BP_amount_1; pedigree (1,1,1,1,1)
  (same comment as for waste, from silicon wafer production)
  production volume 0 kg
    Calculated from production volume of reference product using the relative outputs.
  property price 0 EUR2005; name BP_amount_1_price_EUR2005
  properties: carbon content, fossil 0.825208, heating value, net 32.78 MJ, dry mass 1 kg, wet mass 1 kg
  note on heating value, net: Value assumed for all polypropylene products. Source: Phyllis2, database for (treated) biomass, algae, feedstocks for biogas production and biochar, https://phyllis.nl/Biomass/View/1186, ECN.TNO
- silicone product: 0 kg; name silicone; pedigree (1,1,1,1,1)
  Data from Marcinkowski and Zych 2017
  properties: carbon content, fossil 0.324324, wet mass 1 kg, dry mass 1 kg, heating value, net 9.83 MJ
- electricity, low voltage: 0.013889 kWh; lognormal variance with pedigree 0.0053, pedigree (1,4,3,3,2)
  Data from Marcinkowski and Zych 2017
- nickel, class 1: 0.070938 kg; name nickel; lognormal variance with pedigree 0.0053, pedigree (1,4,3,3,2)
  Data from Marcinkowski and Zych 2017.
  properties: wet mass 1 kg, dry mass 1 kg
- waste polyvinylchloride: 0 kg; name BP_amount_6; pedigree (1,1,1,1,1)
  (same comment as for waste, from silicon wafer production)
  production volume 0 kg
    Calculated from production volume of reference product using the relative outputs.
  property price 0 EUR2005; name BP_amount_6_price_EUR2005
  properties: heating value, net 21.51 MJ, carbon content, fossil 0.440882, wet mass 1 kg, dry mass 1 kg
- compressed air, 800 kPa gauge: 0 m3; pedigree (1,1,1,1,1)
  Data from Marcinkowski and Zych 2017
- brass: 5.1515e-5, 0.0102515 kg (2 entries); lognormal variance with pedigree 0.0053, pedigree (1,4,3,3,2)
  (same comment as for brass)
- polyvinylidenchloride, granulate: 0.0264629, 0.0535841 kg (2 entries); lognormal variance with pedigree 0.0053, pedigree (1,4,3,3,2)
  Data from Marcinkowski and Zych 2017
- scrap steel: -0.137709, -0.000174473, -0.427668 kg (3 entries); lognormal variance with pedigree 0.0053, pedigree (1,4,3,3,2)
  (same comment as for scrap steel)
  production volume 9.8406e7 kg
- waste polyethylene: -0.000130906, -1.00921e-5, -4.1684e-6, -3.95829e-6, -0.000151043, -1.68399e-6, -7.6325e-7, -0.00105738 kg (8 entries); lognormal variance with pedigree 0.0053, pedigree (1,4,3,3,2)
  (same comment as for waste, from silicon wafer production)
  production volume 236640 kg
- waste textile, soiled: -7.41759e-6, -0.000495582 kg (2 entries); lognormal variance with pedigree 0.0053, pedigree (1,4,3,3,2)
  (same comment as for waste, from silicon wafer production)
  production volume 87522 kg
- scrap copper: -0.00867532, -0.000407027, -0.0182667 kg (3 entries); lognormal variance with pedigree 0.0053, pedigree (1,4,3,3,2)
  (same comment as for scrap copper)
  production volume 4.75873e6 kg
- waste polypropylene: -0.0729918, -0.00562724, -0.00232425, -0.00220709, -0.0842197, -0.00093897, -0.000425579, -0.589584 kg (8 entries); lognormal variance with pedigree 0.0053, pedigree (1,4,3,3,2)
  (same comment as for waste, from silicon wafer production)
  production volume 1.31948e8 kg
- silicone product: 0.0087733, 0.0178557 kg (2 entries); lognormal variance with pedigree 0.0053, pedigree (1,4,3,3,2)
  Data from Marcinkowski and Zych 2017
- waste polyvinylchloride: -0.0077049, -0.000594002, -0.000245344, -0.000232977, -0.0088901, -9.91163e-5, -4.49234e-5, -0.0622356 kg (8 entries); lognormal variance with pedigree 0.0053, pedigree (1,4,3,3,2)
  (same comment as for waste, from silicon wafer production)
  production volume 1.39282e7 kg
- compressed air, 800 kPa gauge: 0.000173537, 0.000426463 m3 (2 entries); lognormal variance with pedigree 0.0053, pedigree (1,4,3,3,2)
  Data from Marcinkowski and Zych 2017

## Sampling procedure
Manufacturing data are taken from Mascinkowski and Zych 2017. Data on the annual production volume are taken from Bounds 2017. Sources: Marcinkowski, A., and Zych, K., 2017. Environmental performance of kettle production: Product Life Cycle Assessment. Management Systems in Production Engineering, 25(4), 255-261. Bounds, A., 2017. Kettle safety control company to list in UK. Financial Times, 25 July 2017. Available from: https://www.ft.com/content/4918a718-711b-11e7-aca6-c6bd07df1a3c (Accessed 20 January 2018).

## Extrapolations
This dataset has been extrapolated from year 2017 to the year of the calculation (2021). The uncertainty has been adjusted accordingly.
