# slag landfill construction

Dataset: EcoSpold 2, unit process
Geography: CH
Time period: 1995-01-01 to 2021-12-31
Technology level: current
Classification: EcoSpold01Categories: waste management/municipal incineration
Classification: ISIC rev.4 ecoinvent: 4290:Construction of other civil engineering projects
Tags: ConvertedDataset
Scenario: Business-as-Usual
System model: Allocation, cut-off by classification
Generated by: Gabor Doka (obsolete)
Published in: Doka G. 2007
Database: ecoinvent
isCopyrightProtected: true
accessRestrictedTo: 1

## General comment
slag compartment for bottom ash from municipal solid waste incinerator. The compartment is a sealed-off part of a sanitary landfill. 375'000 m3 volume. Construction phase is 5 years; use phase is 30 years; aftercare phase is 75 years. Average waste density 1500 kg/m3.
[This dataset was already contained in the ecoinvent database version 2. It was not individually updated during the transfer to ecoinvent version 3. Life Cycle Impact Assessment results may still have changed, as they are affected by changes in the supply chain, i.e. in other datasets. This dataset was generated following the ecoinvent quality guidelines for version 2. It may have been subject to central changes described in the ecoinvent version 3 change report (http://www.ecoinvent.org/database/ecoinvent-version-3/reports-of-changes/), and the results of the central updates were reviewed extensively. The changes added e.g. consistent water flows and other information throughout the database. The documentation of this dataset can be found in the ecoinvent reports of version 2, which are still available via the ecoinvent website. The change report linked above covers all central changes that were made during the conversion process.]

## Included activities end
infrastructure materials for landfill construction, operation and aftercare. Including access road.

## Geography
Specific to the technology encountered in Switzerland in 2000. Well applicable to modern landfilling practices in Europe, North America or Japan.

## Technology
Slag compartment for MSWI bottom ash as part of a Swiss sanitary landfill. With base seal, leachate collection system. Recultivation and monitoring for 75 years after closure.

## Parameters
- fraction, process water, to air: 0.15 dimensionless; name fraction_PW_to_air; lognormal variance with pedigree 0.092025, pedigree (4,4,3,2,4)
  Literature value. In case when no industry/process specific data are available, default evaporation fraction value is used. This value is 15% and is based on literature (Statistics Canada, 2007 & Shaffer, K.H., 2008, Consumptive water use in the Great Lakes Basin, USGS & Shiklomanov, 2003, World Water Resources at the Beginning of the 21st Century) and has been approved by an expert.
- fraction, tap water, to air: 0.15 dimensionless; name fraction_TW_to_air; = fraction_PW_to_air; lognormal variance with pedigree 0.092025, pedigree (4,4,3,2,4)
  Calculated value. See comment in the other parametres present in this dataset. Tap water is considered to be always used as process water, thus process water fractions to air are applied to all tap water input flows to calculate the amount of water consumed in the processes.

## Reference product
- slag landfill: 1 unit; By-product classification allocatable product; CPC 53290: Other civil engineering works
  EcoSpold01Location=CH
  production volume 0.0336675 unit
    This is a placeholder value that does not reflect real-world production volumes. This dataset does not currently require a real-world production volume to work in the database framework, and no actual data were collected yet. This has no negative effect on the results of the ecoinvent database. The placeholder value of this activity was scaled according to the nominal GDP of 2005 (source: United Nations, http://data.un.org/Glossary.aspx?q=GDP+%28current+US%24%29, accessed 20130726) to reflect an appropriate share of the global production volume, which is also a placeholder value.
  property price 2.71316e6 EUR2005
    Calculated based on inputs: The price of the product has been calculated as a sum of the values of the material and energy inputs for this product. This value is therefore a rough estimation. It may underestimate the real price since there are additional expenses when producing any product. These expences can include for example labour costs, treatment of waste materials and profit for the producer. Please consider carefully whether this level of data quality is acceptable for your application.

## Inputs from technosphere
All rows: lognormal variance with pedigree 0.3512, pedigree (2,3,5,1,1)
- tap water: 697000 kg; name tap_water_input
  EcoSpold01Location=RER
  Uncertainty: & basic uncertainty of 3;
  properties: carbon content, fossil 0.00178991, dry mass 0.000337476 kg, water content 2962.17, wet mass 1 kg
  note on carbon content, fossil: Bicarbonate content is 2.93 mol/m3. CO2 content is 0.1 mol/m3 (ecoinvent v2.2 report 8, Tab 93.1).
- steel, chromium steel 18/8, hot rolled: 1140 kg
  EcoSpold01Location=RER
  Uncertainty: & basic uncertainty of 3;
  properties: wet mass 1 kg, dry mass 1 kg, carbon content, fossil 0.0008
  note on carbon content, fossil: Stainless steel model is the grade 304 steel (18/8 stainless, 18% chromium 8% nickel; max. 0.08% C)
- synthetic rubber: 33.5 kg
  EcoSpold01Location=RER
  Uncertainty: & basic uncertainty of 3;
  properties: heating value, net 26.42 MJ, dry mass 1 kg, carbon content, fossil 0.871949, wet mass 1 kg
  note on carbon content, fossil: EPDM (Ethylene-propene-diene terpolymer) rubber is a terpolymer of ethylene, propene, and a diene with the residual unsaturated portion of the diene in the side chain (ecoinvent v2.2 report 7-part XX & Ullmann). Chemical formula (deduced from Evidences of Solvent-Induced Miscibility in Polychloroprene-co-Ethylene-Propene Diene Terpolymer Blends, Dubey et al., Journal of Applied Polymer Science, 2009, 111:1884–1891): C20H35
- cast iron: 553 kg
  EcoSpold01Location=RER
  Uncertainty: & basic uncertainty of 3;
  properties: carbon content, fossil 0.04, dry mass 1 kg, wet mass 1 kg
  note on carbon content, fossil: Cast iron is made by remelting pig iron in small furnaces (e.g. cupola furnaces or electric arc furnaces) and poured into moulds to make castings. It usually contains 2% to 6% carbon (ecoinvent v2.2 report 10_partII). An average content of 4% was considered
- polyvinylchloride, emulsion polymerised: 10.6979 kg
  EcoSpold01Location=RER
  Uncertainty: & basic uncertainty of 3;
  properties: dry mass 1 kg, wet mass 1 kg, carbon content, fossil 0.387097, heating value, net 21.5 MJ
  note on carbon content, fossil: Monomer is vynyl chloride, C2H3Cl (ecoinvent v2.2 report 11_II). MW=62 g/mol
- excavation, skid-steer loader: 163000 m3
  activityLink introduced to establish a direct link to the corresponding regional supply of this product
  EcoSpold01Location=RER
  Uncertainty: & basic uncertainty of 3;
- polyethylene, high density, granulate: 244000 kg
  EcoSpold01Location=RER
  Uncertainty: & basic uncertainty of 3;
  properties: heating value, net 42.47 MJ, carbon content, fossil 0.857143, dry mass 1 kg, wet mass 1 kg
  note on carbon content, fossil: Polyethylene is formed out of a huge amount of ethylene monomers (C2H4) (ecoinvent v2.2 report 11_II). MW=28 g/mol
- gravel, round: 7.44e7 kg
  EcoSpold01Location=CH
  Uncertainty: & basic uncertainty of 3;
  properties: dry mass 1 kg, wet mass 1 kg
- reinforcing steel: 3270 kg
  EcoSpold01Location=RER
  Uncertainty: & basic uncertainty of 3;
  properties: dry mass 1 kg, wet mass 1 kg, carbon content, fossil 0.004
- extrusion, plastic film: 161000 kg
  EcoSpold01Location=RER
  activityLink introduced to establish a direct link to the corresponding regional supply of this product
  Uncertainty: & basic uncertainty of 3;
- polyvinylchloride, suspension polymerised: 73.1021 kg
  EcoSpold01Location=RER
  Uncertainty: & basic uncertainty of 3;
  properties: dry mass 1 kg, wet mass 1 kg, heating value, net 21.5 MJ, carbon content, fossil 0.387097
- concrete, sole plate and foundation: 53.6 m3
  EcoSpold01Location=CH
  Uncertainty: & basic uncertainty of 3;
  properties: water content 0.0816327, wet mass 2385 kg, dry mass 2205 kg
- excavation, hydraulic digger: 163000 m3
  (same comment as for extrusion, plastic film)
- polypropylene, granulate: 83.8 kg
  EcoSpold01Location=RER
  Uncertainty: & basic uncertainty of 3;
  properties: carbon content, fossil 0.857143, heating value, net 32.78 MJ, dry mass 1 kg, wet mass 1 kg
  note on carbon content, fossil: Polypropylene is formed by the polymerisation of propylene, C3H6 (ecoinvent v2.2 report 11_II)
  note on heating value, net: Value extracted from "treatment of waste polypropylene, open burning"
- sand: 25100 kg
  EcoSpold01Location=CH
  Uncertainty: & basic uncertainty of 3;
  properties: wet mass 1 kg, dry mass 1 kg
- pitch: 1.05e6 kg
  EcoSpold01Location=CH
  Uncertainty: & basic uncertainty of 3;
  properties: heating value, net 28 MJ, dry mass 1 kg, carbon content, fossil 0.83, wet mass 1 kg
- diesel, burned in building machine: 681000 MJ
  EcoSpold01Location=GLO
  Uncertainty: & basic uncertainty of 3;
  properties: heating value, net 1 MJ

## Inputs from nature
- Transformation, from pasture, man made [natural resource, land]: 3750 m2; lognormal variance with pedigree 0.1712, pedigree (2,3,5,1,1)
  Uncertainty: & basic uncertainty of 2;
- Transformation, to traffic area, road network [natural resource, land]: 3750 m2; lognormal variance with pedigree 0.1712, pedigree (2,3,5,1,1)
  Uncertainty: & basic uncertainty of 2;
- Occupation, traffic area, road network [natural resource, land]: 412000 m2*year; lognormal variance with pedigree 0.0912, pedigree (2,3,5,1,1)
  Uncertainty: & basic uncertainty of 1.5;

## Emissions to nature
- Water [air, unspecified]: 104.55 m3; name water_to_air_unspecified; = (tap_water_input/1000*fraction_TW_to_air); lognormal variance with pedigree 0.0807, pedigree (2,2,5,1,1)
  Calculated value based on literature values and expert opinion. See comments in the parametres' comment field.
  property fraction, origin: fresh water 1; name fraction_origin_fresh_water
  property fraction, origin: unspecified 0; name fraction_origin_unspecified
  property fraction, origin: salt water 0; name fraction_origin_salt_water
- Water [water, unspecified]: 592.45 m3; name water_to_water_unspecified; = (tap_water_input/1000)*(1-fraction_TW_to_air); lognormal variance with pedigree 0.0807, pedigree (2,2,5,1,1)
  (same comment as for Water)
  property fraction, origin: salt water 0; name fraction_origin_salt_water_Ww
  property fraction, origin: fresh water 1; name fraction_origin_fresh_water_Ww
  property fraction, origin: unspecified 0; name fraction_origin_unspecified_Ww
  property carbon content, non-fossil 0; name C_content_non_fossil
  property dry mass 0 kg; name DM
  property wet mass 1000 kg; name WM
  property carbon content, fossil 0; name C_content_fossil
  property water in wet mass 1000 kg; name WWM

## Sampling procedure
data from one literature source on sanitary landfill, adapted to features of this landfill type

## Extrapolations
This dataset has been extrapolated from year 1995 to the year of the calculation (2021). The uncertainty has been adjusted accordingly.

## Review by Niels Jungbluth 2003-08-06
Passed.
