# thermo-mechanical pulp production

Dataset: EcoSpold 2, unit process
Geography: RER
Time period: 1993-01-01 to 2021-12-31
Technology level: current
Classification: ISIC rev.4 ecoinvent: 1701:Manufacture of pulp, paper and paperboard
Classification: EcoSpold01Categories: paper & cardboard/pulps
Synonyms: wood-containing pulp
Tags: ConvertedDataset
Scenario: Business-as-Usual
System model: Allocation, cut-off by classification
Generated by: Roland Hischier
Published in: Hischier R. 2007
Database: ecoinvent
isCopyrightProtected: true
accessRestrictedTo: 1

## General comment
This dataset characterises the average production of mechanical pulp following a refiner process with thermal pre-treatment (TMP) in Europe. Bleaching has not been included because mechanical pulps cannot be brightened effectively by oxidative and reductive bleaching.
During mechanical defibration, lignin is plasticised and remains in the pulp. This makes mechanical pulp weaker but with higher light-scattering coefficients and opacity than chemical pulp (sulfate and sulfite pulp). Mechanical pulps are mainly used for short-life printing papers, hygienic paper and board.
PULP MARKET: Of the total pulp production in Europe the largest part is sulfate /kraft-pulp, making up about 70% of total pulp production. Thermo-mechanical pulp is a type of mechanical pulp, which makes up around 25-28% of total pulp production, of which in turn the largest part, about 85%, is thermo-mechanical pulp and the rest chemi-thermomechanical pulp. Only a part of pulp production is sold on the market, the majority is produced at integrated pulp mills which directly process it further into (paper-) products. For mechanical pulp the share of market pulp is small, much in 2016 was 9%, the other 92% is integrated pulp.
The SOURCES of information for this dataset are (1) the former Swiss life cycle inventories of packing materials of the Swiss Environmental Agency (BUWAL) (Habersatter et al., 1998), (2) a study from the Swiss Federal Laboratories for Materials Science and Technology (EMPA) comparing printed and electronic media (Reichart & Hischier, 2001), (3) a German inventory on graphical paper commissioned by the UBA (Tiedemann et al., 2000), (4) a report of the Swedish EPA about the Swedish pulp and paper industry (Naturvardsverket, 2001), (5) the European IPPC documentation for the paper and pulp industry, which also contains information on Best Available Techniques (BAT) and the description and quantification of the present situation of the pulp and paper industry (European Commission, 2000) and (6) the theoretical description of Patt et al. (1993).
Reference(s):
Habersatter K., Fecker I., Dall'Acqua S., Fawer M., Fallscheer F., Förster R., Maillefer C., Ménard M., Reusser L., Som C., Stahel U. and Zimmermann P. (1998) Ökoinventare für Verpackungen. BUWAL Schriftenreihe Umwelt Nr. 250. 2nd Edition. BUWAL, Bern.
Reichart I. and Hischier R. (2001) Vergleich der Umweltbelastungen bei Benut-zung elektronischer und gedruckter Medien. EMPA-Bericht Nr. 253. EMPA, St. Gallen.
Tiedemann et al., 2000. Tiedemann A., Böttcher Tiedemann C., Buschardt A., Georgi B., Giersberg G., Goosmann G., Gregor H.-D., Mehlhorn B., Modi A., Neitzel H., Oels H.-J., Schmitz S. and Suhr M. (2000) Ökobilanzen für graphische Papiere. Texte 22/00. Umweltbundesamt, Berlin.
Naturvardsverket, 2001. Naturvardsverket (2001) Skogsindustrins utsläpp - avfallsmängder och energiförbrukning 2000. Report 5154. Naturvardsverket (Swedish EPA), Stockholm.
European Commission, 2000. European Commission (2000) Integrated Pollution Prevention and Control (IPPC) - Reference Document on Best Available Techniques in the Pulp and Pa-per Industry. Institute for Prospective Technological Studies, Sevilla.
Patt R., Kordsachia O., Süttinger R., Ohtani Y., Hoesch J. F., Ehrler P., Eich-inger R., Holik H., Hamm U., Rohmann M. E., Mummenhoff P., Petermann E., Miller R. F., Frank D., Wilken R., Baumgarten H. L. and Rentrop G.-H. (1993) Paper and Pulp. In: Ullmann's Encyclopedia of Industrial Chemistry, Vol. A.18. VCH Publisher Inc.

## Included activities start
The activity starts with the transport of the wood to the pulp factory.

## Included activities end
The process includes transports to the pulp mill, raw material handling, pulping, drying, recovery cycles of chemicals and internal wastewater treatment. The activity ends when the thermo-mechanical pulp is ready to be sold.

## Geography
The dataset represents the average thermo-mechanical pulp production in Europe. Data are sourced from various European providers, for example, in Switzerland and Germany.

## Technology
Modern average technology.

## Time period
Data gathered between 2000-2002.

## Parameters
- fraction, process water, to air: 0.231923 dimensionless; name fraction_PW_to_air; lognormal variance with pedigree 0.092025, pedigree (4,4,3,2,4)
  Literature value (Statistics Canada, 2007 & Shaffer, K.H., 2008, Consumptive water use in the Great Lakes Basin, USGS) (Vionnet, S., Quantis Water Database - Technical Report, 2012).
- fraction, cooling water, to air: 0.3875 dimensionless; name fraction_CW_to_air; = (0.5*fraction_CW_OT_to_air)+(0.5*fraction_CW_R_to_air); lognormal variance with pedigree 0.092025, pedigree (4,4,3,2,4)
  Calculated value based on literature value (see comments of the other parametres present in this dataset) and expert opinion. In the case when no industry/literature data are available about the type of cooling or directly fraction, cooling water, to air specific for the process a default assumption is applied. It is assumed that the once-through cooling system is used in 50% of all cases and recirculating system is used in another 50% of all cases.
- fraction, cooling water, cooling pond system, to air: 0.032 dimensionless; name fraction_CW_CP_to_air; lognormal variance with pedigree 0.0413, pedigree (2,3,1,3,1)
  Calculated based on literature value (Scown, C.D., 2011, Water Footprint of U.S. Transportation Fuels and supplying information of the article) (Vionnet, S., Quantis Water Database - Technical Report, 2012).
- fraction, cooling water, once-through system, to air: 0.004 dimensionless; name fraction_CW_OT_to_air; lognormal variance with pedigree 0.0413, pedigree (2,3,1,3,1)
  (same comment as for fraction, cooling water, cooling pond system, to air)
- fraction, cooling water, recirculating system, to air: 0.771 dimensionless; name fraction_CW_R_to_air; lognormal variance with pedigree 0.0413, pedigree (2,3,1,3,1)
  (same comment as for fraction, cooling water, cooling pond system, to air)

## Reference product
- thermo-mechanical pulp: 1 kg; CPC 321: Pulp, paper and paperboard; By-product classification allocatable product
  EcoSpold01Location=RER
  production volume 7.701e8 kg; name apv; = 906000000*0.85
    The total production volume of mechanical pulp in Europe in 2016 was 10100000 tonnes, of which the largest part, 9240000 tonnes were integrated pulp and 906000 tonnes were market pulp (CEPI, 2018). Of the total mechancial pulp, the largest part, around 85% is thermomechanical pulp, the remaining 15% are chemi-thermomechanical pulp (FAO, 2018). This dataset represents only market thermo-mechanical pulp. The respective production volume was calculated multiplying the amount of market mechanical pulp with the fraction of thermo-mechanical pulp in mechanical pulp (85%).
    Reference(s):
    Confederation of European Paper Industries (CEPI), 2018, personal correspondence, 04.07.2018 (CEPI publishes the total annual pulp production volumes per type of pulp in "Key Statistics 2016", accessible at http://www.cepi.org/system/files/public/documents/publications/statistics/2017/KeyStatistics2016_Final.pdf (last accessed July 2018)).
    FAO, 2018, FAOSTAT, Forestry Production and Trade, data retrieved from http://www.fao.org/faostat/en/#data/FO, 4.7.2018
  property price 0.286 EUR2005
    Export prices for the World+ according to: http://faostat.fao.org/site/626/DesktopDefault.aspx?PageID=626#ancor downloaded 5 May 2009; calculated as export value divided by export volume.
  property carbon content, non-fossil 0.494
    C content of dry mass is 0.494 kgC/kg dry wood (ecoinvent v2.2 report 6_IX & ecoinvent v2.2 report 9). No other C containing products in the formulation of the pulp.
  property heating value, net 14.97 MJ
    LHV is calculated based on the Carbon content of the product. More details can be found on the respective documentation.
  property carbon content 0.494
    carbon content on a dry matter basis (reserved; not for manual entry)
  properties: dry mass 1 kg, water content 0, wet mass 1 kg, carbon content, fossil 0, water in wet mass 0 kg, carbon allocation 0.494 kg

## Inputs from technosphere
- sodium silicate, spray powder, 80%: 0.0164 kg; lognormal variance with pedigree 0.0413, pedigree (2,3,5,3,1)
  EcoSpold01Location=RER
  Average data from German LCA study
  Uncertainty: average data from German LCA study
  properties: wet mass 1 kg, dry mass 1 kg
- chemical, inorganic: 0.00453 kg; lognormal variance with pedigree 0.0413, pedigree (2,3,5,3,1)
  EcoSpold01Location=GLO
  Average data from German LCA study
  Uncertainty: average data from German LCA study
  properties: carbon content, fossil 0.003, wet mass 1 kg, dry mass 1 kg
  note on carbon content, fossil: This dataset is an unweighted average of 20 inorganic substances (listed in Tab 88.1, ecoinvent v2.2 report 8, part II), being part of the top100 chemicals included in this database. The C-content has also been calculated as an unweighted average of the C content of the substances composing this dataset.
- municipal solid waste: -0.00057 kg; name a_msw; lognormal variance with pedigree 0.0413, pedigree (2,3,5,3,1)
  Average swedish data from SE-EPA
  EcoSpold01Location=CH
  Uncertainty: average swedish data from SE-EPA
  production volume 438957 kg; = a_msw*apv
    Calculated from the production volume of thermo-mechanical pulp in proportion to the respective output amounts.
  properties: heating value, net 11.74 MJ, carbon content, fossil 0.171549, dry mass 0.771 kg, wet mass 1 kg, carbon content, non-fossil 0.261655, water content 0.297017
  note on heating value, net: Value taken from the general comment of the treatment dataset.
  note on carbon content, fossil: MSW composition in tab 4.1, ecoinvent v2.2 report 13_I. C content referred to 1 kg DM
- wood ash mixture, pure: 0 kg; name a_woodash; pedigree (1,1,1,1,1)
  (same comment as for municipal solid waste)
  production volume 0 kg
    (same comment as for municipal solid waste)
  property price 0 EUR2005; name a_woodash_price_EUR2005
  properties: dry mass 1 kg, wet mass 1 kg, carbon content, non-fossil 0.012
- hydrogen peroxide, without water, in 50% solution state: 0.0286 kg; lognormal variance with pedigree 0.0413, pedigree (2,3,5,3,1)
  (same comment as for sodium silicate, spray powder, 80%)
  properties: heating value, net 7.13 MJ, wet mass 1 kg, dry mass 1 kg
- waste graphical paper: -7.4e-5 kg; name a_wgp; lognormal variance with pedigree 0.0413, pedigree (2,3,5,3,1)
  EcoSpold01Location=CH
  Average swedish data from SE-EPA
  Uncertainty: average swedish data from SE-EPA
  production volume 56987.4 kg; = a_wgp*apv
    (same comment as for municipal solid waste)
  property price 0 EUR2005; name a_wgp_price_EUR2005
  properties: dry mass 0.888 kg, wet mass 1 kg, water content 0.126126, carbon content, non-fossil 0.454955, heating value, net 14.12 MJ
- sodium hydroxide, without water, in 50% solution state: 0.0142 kg; lognormal variance with pedigree 0.0413, pedigree (2,3,5,3,1)
  Average data from German LCA study
  EcoSpold01Location=RER
  Uncertainty: average data from German LCA study
  properties: dry mass 1 kg, wet mass 1 kg, heating value, net 3.03 MJ
- heat, district or industrial, other than natural gas: 0.117116 MJ; lognormal variance with pedigree 0.0413, pedigree (2,3,5,3,1)
  Average data from a recent newsprint LCA study
  EcoSpold01Location=RER
  Uncertainty: average data from a recent newsprint LCA study
  properties: heating value, net 1 MJ
- waste plastic, mixture: -0.000233 kg; name a_wpm; lognormal variance with pedigree 0.0413, pedigree (2,3,5,3,1)
  (same comment as for municipal solid waste)
  production volume 179433 kg; = a_wpm*apv
    (same comment as for municipal solid waste)
  property price 0 EUR2005; name a_wpm_price_EUR2005
  properties: water content 0.180638, carbon content, fossil 0.747344, dry mass 0.847 kg, wet mass 1 kg, heating value, net 30.79 MJ
  note on carbon content, fossil: C content in 1 kg DM was calculated using data in Tab A.2, ecoinvent v2.2 report 13_I
- scrap steel: 0 kg; name a_ssteel; pedigree (1,1,1,1,1)
  (same comment as for waste graphical paper)
  production volume 0 kg
    (same comment as for municipal solid waste)
  property price 0 EUR2005; name a_ssteel_price_EUR2005
  properties: dry mass 1 kg, wet mass 1 kg
- heat, district or industrial, natural gas: 0.062035 MJ; lognormal variance with pedigree 0.0413, pedigree (2,3,5,3,1)
  (same comment as for heat, district or industrial, other than natural gas)
  properties: heating value, net 1 MJ
- waste wood, untreated: -0.400013 kg; name a_ww; = (1.3E-05 + 0.4)*-1; lognormal variance with pedigree 0.0413, pedigree (2,3,5,3,1)
  EcoSpold01Location=CH
  Average swedish data from SE-EPA (1.3E-05) + 0.4 to balance wood input.
  Uncertainty: average swedish data from SE-EPA
  production volume 3.0805e8 kg; = a_ww*apv
    (same comment as for municipal solid waste)
  property price 0 EUR2005; name a_ww_price_EUR2005
  properties: carbon content, non-fossil 0.48632, dry mass 0.8 kg, heating value, net 13.99 MJ, water content 0.25, wet mass 1 kg
  note on carbon content, non-fossil: Tab A.4, ecoinvent v2.2 report 13_I. C content has been referred to 1 kg DM,
- electricity, medium voltage: 2.156 kWh; lognormal variance with pedigree 0.0413, pedigree (2,3,5,3,1)
  Average data from several LCA studies
  EcoSpold01Location=NORDEL
  Uncertainty: average data from several LCA studies
- waste textile, soiled: -2.41e-5 kg; name a_wtex; lognormal variance with pedigree 0.0413, pedigree (2,3,5,3,1)
  (same comment as for municipal solid waste)
  production volume 18559.4 kg; = a_wtex*apv
    (same comment as for municipal solid waste)
  property price 0 EUR2005; name a_wtex_price_EUR2005
  properties: water content 0.333333, wet mass 1 kg, dry mass 0.75 kg, heating value, net 14.45 MJ, carbon content, non-fossil 0.570519
  note on carbon content, non-fossil: C content of 1 kg DM was calculated after data in Tab A.4, ecoinvent v2.2 report 13_I,
- pulp factory: 5e-11 unit; lognormal variance with pedigree 0.448, pedigree (4,5,5,5,5)
  EcoSpold01Location=RER
  Assumption;activityLink introduced to establish a direct link to the corresponding regional supply of this product
  Uncertainty: assumption
- residual softwood, wet: 0.003044 m3; lognormal variance with pedigree 0.0413, pedigree (2,3,5,3,1)
  Average data from several LCA studies
  EcoSpold01Location=RER
  Uncertainty: average data from several LCA studies
  properties: water content 0.7, carbon content, non-fossil 0.494, dry mass 450 kg, wet mass 765 kg, heating value, net 5962.7 MJ
  note on carbon content, non-fossil: C content of dry mass is 0.494 kgC/kg dry wood (ecoinvent v2.2 report 9)
- wood ash mixture, pure: -0.00220468, -4.53204e-5 kg (2 entries); lognormal variance with pedigree 0.0413, pedigree (2,3,5,3,1)
  (same comment as for municipal solid waste)
  production volume 1.73272e6 kg
- scrap steel: -2.58672e-5, -3.27729e-8 kg (2 entries); lognormal variance with pedigree 0.0413, pedigree (2,3,5,3,1)
  (same comment as for waste graphical paper)
  production volume 19945.6 kg

## Inputs from nature
- Water, cooling, unspecified natural origin [natural resource, in water]: 0.0052 m3; name water_cooling_UNO_input; source Byers, W. 2003; lognormal variance with pedigree 0.0513, pedigree (2,3,5,3,1)
  Calculated based on literature (Byers, W., 2003, Industrial Water Management; Fibria, 2010, Sustainability Report_pulp from eucalyptus), (Vionnet, S., Quantis Water Database - Technical Report, 2012). It includes the main processes: wood washing and screening, evaporation, recausticizing, bleach plant chemical preparation and pulp dryer.
  property wet mass 1000 kg; name WM
  property carbon content, non-fossil 0; name C_content_non_fossil
  property carbon content, fossil 0.0104329; name C_content_fossil
  property water in wet mass 999.89 kg; name WWM
  property water content 9081.65; name water_content
  property dry mass 0.1101 kg; name DM
- Water, unspecified natural origin [natural resource, in water]: 0.0078 m3; name water_UNO_input; source Byers, W. 2003; lognormal variance with pedigree 0.052625, pedigree (3,3,5,2,1)
  Average swedish data from SE-EPA
  Calculated based on literature (Byers, W., 2003, Industrial Water Management; Fibria, 2010, Sustainability Report_pulp from eucalyptus), (Vionnet, S., Quantis Water Database - Technical Report, 2012). It includes the main processes: wood washing and screening, evaporation, recausticizing, bleach plant chemical preparation and pulp dryer.
  Uncertainty: average swedish data from SE-EPA

## Emissions to nature
- Nitrogen oxides [air, urban air close to ground]: 0.00155 kg; lognormal variance with pedigree 0.0813, pedigree (2,3,5,3,1)
  Average swedish data from SE-EPA
  Uncertainty: average swedish data from SE-EPA
- TOC, Total Organic Carbon [water, surface water]: 0.00158 kg; lognormal variance with pedigree 0.0907, pedigree (1,3,5,3,1)
  Data from former Swiss LCA of packaging
  Uncertainty: data from former Swiss LCA of packaging
- Phosphorus [water, surface water]: 1e-5 kg; lognormal variance with pedigree 0.0813, pedigree (2,3,5,3,1)
  Average data from several LCA studies
  Uncertainty: average data from several LCA studies
- Suspended solids, unspecified [water, surface water]: 0.00124 kg; lognormal variance with pedigree 0.0813, pedigree (2,3,5,3,1)
  Average data from several LCA studies
  Uncertainty: average data from several LCA studies
- DOC, Dissolved Organic Carbon [water, surface water]: 0.00158 kg; lognormal variance with pedigree 0.0907, pedigree (1,3,5,3,1)
  Calculated as equal to TOC.
  Uncertainty: data from former Swiss LCA of packaging
- Water [air, unspecified]: 0.003824 m3; name water_to_air_unspecified; = (water_cooling_UNO_input*fraction_CW_to_air)+(water_UNO_input*fraction_PW_to_air); lognormal variance with pedigree 0.0807, pedigree (2,2,5,1,1)
  Calculated value based on literature values and expert opinion. See comments in the parametres' comment field.
  property fraction, origin: unspecified 1; name fraction_origin_unspecified
  property fraction, origin: salt water 0; name fraction_origin_salt_water
  property fraction, origin: fresh water 0; name fraction_origin_fresh_water
- Nitrogen [water, surface water]: 6e-5 kg; lognormal variance with pedigree 0.0813, pedigree (2,3,5,3,1)
  Average data from several LCA studies
  Uncertainty: average data from several LCA studies
- COD, Chemical Oxygen Demand [water, surface water]: 0.00437 kg; lognormal variance with pedigree 0.0813, pedigree (2,3,5,3,1)
  Average data from several LCA studies
  Uncertainty: average data from several LCA studies
- Water [water, unspecified]: 0.009176 m3; name water_to_water_unspecified; = water_cooling_UNO_input*(1-fraction_CW_to_air)+water_UNO_input*(1-fraction_PW_to_air); lognormal variance with pedigree 0.0807, pedigree (2,2,5,1,1)
  (same comment as for Water)
  property fraction, origin: unspecified 1; name fraction_origin_unspecified_Ww
  property fraction, origin: fresh water 0; name fraction_origin_fresh_water_Ww
  property fraction, origin: salt water 0; name fraction_origin_salt_water_Ww
- BOD5, Biological Oxygen Demand [water, surface water]: 0.0009 kg; lognormal variance with pedigree 0.0813, pedigree (2,3,5,3,1)
  Average data from several LCA studies
  Uncertainty: average data from several LCA studies

## Sampling procedure
Data were collected from literature and industry data.

## Extrapolations
This dataset has been extrapolated from year 2000 to the year of the calculation (2021). The uncertainty has been adjusted accordingly.

## Review by Hans-Jörg Althaus 2003-08-06
Passed
