# retention aid production, for paper production

Dataset: EcoSpold 2, unit process
Geography: RoW
Time period: 2000-01-01 to 2021-12-31
Technology level: current
Classification: EcoSpold01Categories: chemicals/organics
Classification: ISIC rev.4 ecoinvent: 2011:Manufacture of basic chemicals
Tags: ConvertedDataset
Scenario: Business-as-Usual
System model: Allocation, cut-off by classification
Generated by: Roland Hischier
Published in: Hischier R. 2007
Database: ecoinvent
isCopyrightProtected: true
accessRestrictedTo: 1

## General comment
The functional unit represent 1 kg of retention aids. Very large uncertainty of the process data due to the weak data on the process.
[This dataset was already contained in the ecoinvent database version 2. It was not individually updated during the transfer to ecoinvent version 3. Life Cycle Impact Assessment results may still have changed, as they are affected by changes in the supply chain, i.e. in other datasets. This dataset was generated following the ecoinvent quality guidelines for version 2. It may have been subject to central changes described in the ecoinvent version 3 change report (http://www.ecoinvent.org/database/ecoinvent-version-3/reports-of-changes/), and the results of the central updates were reviewed extensively. The changes added e.g. consistent water flows and other information throughout the database. The documentation of this dataset can be found in the ecoinvent reports of version 2, which are still available via the ecoinvent website. The change report linked above covers all central changes that were made during the conversion process.]

## Included activities end
Raw material approximated by acrylic acid; estimation of energy demand and infrastructure of the plant (approximation). Further inputs, solid wastes and emissions omitted.

## Geography
Data used has no specific geographical origin (raw material represented by typical example). Data are used as European average data.

## Technology
data represents a rough estimation of the production process

## Reference product
- retention aid, for paper production: 1 kg; CPC 34: Basic chemicals; By-product classification allocatable product
  EcoSpold01Location=RER
  production volume 2.67763 kg
    This is a placeholder value that does not reflect real-world production volumes. This dataset does not currently require a real-world production volume to work in the database framework, and no actual data were collected yet. This has no negative effect on the results of the ecoinvent database.
  property heating value, net 15.15 MJ
    LHV is calculated based on the Carbon content of the product. More details can be found on the respective documentation.
  property price 1.52572 EUR2005
    Calculated based on inputs: The price of the product has been calculated as a sum of the values of the material and energy inputs for this product. This value is therefore a rough estimation. It may underestimate the real price since there are additional expenses when producing any product. These expences can include for example labour costs, treatment of waste materials and profit for the producer. Please consider carefully whether this level of data quality is acceptable for your application.
  property carbon content, non-fossil 0
    The functional unit represents 1 kg of retention aids. Raw material approximated by acrylic acid (ecoinvent v2.2 report 11-III, pg 297). Acrylic acid formula is C3H4O2.
  property carbon content, fossil 0.5
    (same comment as for retention aid, for paper production)
  property carbon content 0.5
    carbon content on a dry matter basis (reserved; not for manual entry)
  properties: wet mass 1 kg, water in wet mass 0 kg, dry mass 1 kg, water content 0, carbon allocation 0.5 kg

## Inputs from technosphere
- heat, district or industrial, natural gas: 0 MJ; pedigree (1,1,1,1,1)
  Estimated with data from a chemical plant
  EcoSpold01Location=RER
  Uncertainty: estimated with data from a chemical plant
  properties: heating value, net 1 MJ
- acrylic acid: 1.05 kg; lognormal variance with pedigree 0.158, pedigree (5,5,5,5,3)
  EcoSpold01Location=RER
  Estimation - approximation with typical educt
  Uncertainty: estimation - approximation with typical educt
  properties: wet mass 1 kg, heating value, net 21.88 MJ, carbon content, fossil 0.5, dry mass 1 kg
- chemical factory, organics: 4e-10 unit; lognormal variance with pedigree 0.5, pedigree (5,5,5,5,5)
  EcoSpold01Location=RER
  Estimation
  Uncertainty: estimation
- electricity, medium voltage: 0 kWh; pedigree (1,1,1,1,1)
  Estimated with data from a chemical plant
  EcoSpold01Location=UCTE
  Uncertainty: estimated with data from a chemical plant
- heat, district or industrial, natural gas: 0.0303564, 1.96964 MJ (2 entries); lognormal variance with pedigree 0.21, pedigree (5,5,5,5,4)
  (same comment as for heat, district or industrial, natural gas)
- electricity, medium voltage: 0.00419753, 0.000804905, 0.0135127, 0.19653, 0.027701, 0.090254 kWh (6 entries); lognormal variance with pedigree 0.21, pedigree (5,5,5,5,4)
  (same comment as for electricity, medium voltage)

## Sampling procedure
Process data based on estimation. Energy demand based on approximation from large chemical plant.

## Extrapolations
This dataset has been copied from an original dataset covering the geography RER. The uncertainty has been adjusted accordingly.

## Review by Hans-Jörg Althaus 2003-07-02
passed
