# petrol production, low-sulfur

Dataset: EcoSpold 2, unit process
Geography: CH
Time period: 2005-01-01 to 2021-12-31
Technology level: current
Classification: EcoSpold01Categories: oil/fuels
Classification: ISIC rev.4 ecoinvent: 1920:Manufacture of refined petroleum products
Tags: ConvertedDataset
Scenario: Business-as-Usual
System model: Allocation, cut-off by classification
Generated by: Niels Jungbluth
Published in: Jungbluth, N. 2007
Database: ecoinvent
isCopyrightProtected: true
accessRestrictedTo: 1

## General comment
Estimation for the conversion of refinery production to low-sulphur petrol with a sulphur content < 50ppm (Today 150ppm). A additional energy use of 6% has been estimated. Data for additional emissions and additional infrastructure were not available.
[This dataset was already contained in the ecoinvent database version 2. It was not individually updated during the transfer to ecoinvent version 3. Life Cycle Impact Assessment results may still have changed, as they are affected by changes in the supply chain, i.e. in other datasets. This dataset was generated following the ecoinvent quality guidelines for version 2. It may have been subject to central changes described in the ecoinvent version 3 change report (http://www.ecoinvent.org/database/ecoinvent-version-3/reports-of-changes/), and the results of the central updates were reviewed extensively. The changes added e.g. consistent water flows and other information throughout the database. The documentation of this dataset can be found in the ecoinvent reports of version 2, which are still available via the ecoinvent website. The change report linked above covers all central changes that were made during the conversion process.]

## Included activities end
additional energy use for production, no process specific emissions and material use.

## Geography
Estimation for the European situation.

## Technology
Different technologies might be used to reduce the sulphur content, e.g. better catalysts, new hydrodesulphurisation process, higher storage capacities, separate transport systems.

## Time period
Time of publications and information in the literature

## Reference product
- petrol, low-sulfur: 1 kg; By-product classification allocatable product; CPC 333: Petroleum oils and oils obtained from bituminous materials, other than crude; preparations n.e.c. containing by […]; CAS 86290-81-5
  EcoSpold01Location=CH
  production volume 1.0764e9 kg
    Not known.
    Calculated from an input of 4.6E+9 kg crude petroleum and the corresponding output relations of the refinery dataset, assuming all petrol to be low-sulfur as required by regulation
  property heating value, net 42.5 MJ
    Based on literature, page 611, Report 17: Jungbluth, N., Chudacoff, M., Dauriat, A., Dinkel, F., Doka, G., Faist Emmenegger, M., Gnansounou, E., Kljun, N., Schleiss, K., Spielmann, M., Stettler, C., Sutter, J. 2007: Life Cycle Inventories of Bioenergy. ecoinvent report No. 17, Swiss Centre for Life Cycle Inventories, Dübendorf, CH.
  property price 0.71 EUR2005
    Average calculated from All Grades, Areas and Formulations in USA for 2005. Source: http://www.eia.gov/oil_gas/petroleum/data_publications/wrgp/mogas_history.html
  property carbon content 0.865
    carbon content on a dry matter basis (reserved; not for manual entry)
  properties: dry mass 1 kg, carbon content, non-fossil 0, carbon content, fossil 0.865, wet mass 1 kg, water in wet mass 0 kg, water content 0, carbon allocation 0.865 kg

## Inputs from technosphere
- heavy fuel oil, burned in refinery furnace: 0.0387 MJ; lognormal variance with pedigree 0.3686, pedigree (4,3,5,1,1)
  EcoSpold01Location=CH
  Estimation 6% of refinery energy use, basic uncertainity = 3 based on literature
  Uncertainty: Estimation 6% of refinery energy use, basic uncertainity = 3 based on literature
  properties: wet mass 0.0242718 kg, carbon content, fossil 0.849, dry mass 0.0242718 kg
- petrol, unleaded: 0 kg; pedigree (1,1,1,1,1)
  EcoSpold01Location=CH
  Input
  Uncertainty: Input
  properties: heating value, net 43.2 MJ, carbon content, fossil 0.865, wet mass 1 kg, dry mass 1 kg
  note on heating value, net: Assumed equal to "petroleum". LHV for petroleum: Based on literature, page 7, Report6, part 4
- heat, district or industrial, other than natural gas: 0.167 MJ
  Estimation 6% of refinery energy use, basic uncertainity = 3 based on literature
  properties: heating value, net 1 MJ
- electricity, medium voltage: 0.00171 kWh; lognormal variance with pedigree 0.3686, pedigree (4,3,5,1,1)
  (same comment as for heavy fuel oil, burned in refinery furnace)
- petrol, unleaded: 1 kg; lognormal variance with pedigree 0.2106, pedigree (5,5,5,5,5)
  EcoSpold01Location=CH
  Input
  Uncertainty: Input

## Sampling procedure
Literature data with calculations based on refinery models.

## Extrapolations
This dataset has been extrapolated from year 2005 to the year of the calculation (2021). The uncertainty has been adjusted accordingly.

## Review by Emilia Moreno Ruiz 2018-02-14
Direct activity link to producers added.

## Review by Michael Spielmann (obsolete) 2003-07-04
passed.
