# vegetable oil refinery construction

Dataset: EcoSpold 2, unit process
Geography: GLO
Time period: 2004-01-01 to 2021-12-31
Technology level: current
Classification: ISIC rev.4 ecoinvent: 4290:Construction of other civil engineering projects
Classification: EcoSpold01Categories: food industry/processing
Tags: ConvertedDataset
Scenario: Business-as-Usual
System model: Allocation, cut-off by classification
Generated by: Emilia Moreno Ruiz
Database: ecoinvent
isCopyrightProtected: true
accessRestrictedTo: 1

## General comment
Sugar refinery construction is used as a proxy for this process. This datasets presents infrastructure of vegetable oil refinery, which transforms vegetable oil, crude to vegetable oil, refined.
This dataset is approximated from the dataset 'sugar refinery construction'. It is not recommended for use if the impact of this dataset is significantly high.

## Included activities end
This process includes land use and occupation, buildings and facilities of a what is considered to be a typical vegetable oil refinery. Energy use for construction and related emissions and/or waste effluents is not included.

## Technology
Vegetable oils refinary consists of usually an administration building, storage halls, tanks, filters, heat exchangers and other metal or concrete structures.

## Parameters
- utilisation rate: 0.9 dimensionless; name utilization_rate; lognormal variance with pedigree 0.0086, pedigree (4,1,1,1,1)

## Reference product
- vegetable oil refinery: 1 unit; name vegetable_oil_refinery; CPC 53269: Other constructions for manufacturing; By-product classification allocatable product
  production volume 4.78247 unit; name vegetable_oil_refinery_PV; = ((3.023E12*(1-0.198))/lifetime_capacity_kg)/lifetime
    According to literature (FAO Statistics, http://faostat.fao.org/site/636/DesktopDefault.aspx?PageID=636#ancor) the total amount of vegetable oil, crude produced since 1960 till 2010 is 3.023E+12kg. According to literature (USDA, http://usda.mannlib.cornell.edu/MannUsda/viewDocumentInfo.do?documentID=1290) the amount of vegetable oil, crude which is later on used for non-food uses is 19.5%, thus remaining 80.5% is refined and used in food production. In total it would take 266 vegetable oil refineries (with a lifetime of 50 years and production volume of 500 tones/day) to produce the amount of vegetable oil, refined which was during past 50 years produced.
  property price 3.58394e6 EUR2005; name vegetable_oil_refinery_price_EUR2005
    Calculated based on inputs: The price of the product has been calculated as a sum of the values of the material and energy inputs for this product. This value is therefore a rough estimation. It may underestimate the real price since there are additional expenses when producing any product. These expences can include for example labour costs, treatment of waste materials and profit for the producer. Please consider carefully whether this level of data quality is acceptable for your application.
  property lifetime 50 year; name lifetime
  property lifetime capacity [kg] 1.01389e10 kg; name lifetime_capacity_kg; = (1/utilization_rate)*500*365*1000*lifetime
    According to literature (World Bank, 1999, The Indian Oilseed Complex, http://books.google.ch/books?id=cAmzHYm7kHoC&pg=PA151&dq=edible+oil+refinery+plant+infrastructure+area&hl=en&sa=X&ei=x65MT729L7HN4QSYmszJAg&redir_esc=y#v=onepage&q=edible%20oil%20refinery%20plant%20infrastructure%20area&f=false) the average size European vegetable oil refinery produce 500 tones/day of refined vegetable oil. Taking into acount the utilization rate of 90% the capacity of such a refinery is in reality (1/0.9*500=) 555 tones/day.

## Inputs from technosphere
- zinc: 95556 kg; lognormal variance with pedigree 0.1726, pedigree (4,4,5,5,5)
  based on sugar refinery construction dataset
  Uncertainty: A
  properties: wet mass 1 kg, dry mass 1 kg
- cement, Portland: 0 kg
  properties: dry mass 1 kg, wet mass 1 kg
- electricity, medium voltage: 16444 kWh; lognormal variance with pedigree 0.1726, pedigree (4,4,5,5,5)
  based on sugar refinery construction dataset
  Uncertainty: A
- concrete, normal: 13789 m3; lognormal variance with pedigree 0.1726, pedigree (4,4,5,5,5)
  based on sugar refinery construction dataset
  Uncertainty: A
  properties: water content 0.086758, wet mass 2380 kg, dry mass 2190 kg
- waste concrete, not reinforced: 0 kg; name waste_concrete_not_reinforced; pedigree (1,1,1,1,1)
  based on sugar refinery construction dataset
  Uncertainty: A
  production volume 0 kg
    Calculated from the production volume of sugar refinery in proportion to the respective output amounts.
  property price 0 EUR2005; name waste_concrete_not_reinfor_price_EUR2005
  properties: wet mass 1 kg, dry mass 1 kg
- copper, cathode: 40000 kg; lognormal variance with pedigree 0.1726, pedigree (4,4,5,5,5)
  based on sugar refinery construction dataset
  Uncertainty: A
  properties: wet mass 1 kg, dry mass 1 kg
- diesel, burned in building machine: 135560 MJ; lognormal variance with pedigree 0.1726, pedigree (4,4,5,5,5)
  based on sugar refinery construction dataset
  Uncertainty: A
  properties: heating value, net 1 MJ
- steel, low-alloyed, hot rolled: 185560 kg; lognormal variance with pedigree 0.1726, pedigree (4,4,5,5,5)
  based on sugar refinery construction dataset
  Uncertainty: A
  properties: wet mass 1 kg, carbon content, fossil 0.005, dry mass 1 kg
  note on carbon content, fossil: Low alloyed steel composition given in Tab. 3.2 ecoinvent v2.2 report 10_partII. Steel assumed to have a C content of 0.5%
- steel, chromium steel 18/8, hot rolled: 161110 kg; lognormal variance with pedigree 0.1726, pedigree (4,4,5,5,5)
  based on sugar refinery construction dataset
  Uncertainty: A
  properties: wet mass 1 kg, dry mass 1 kg, carbon content, fossil 0.0008
  note on carbon content, fossil: Stainless steel model is the grade 304 steel (18/8 stainless, 18% chromium 8% nickel; max. 0.08% C)
- nickel, class 1: 35556 kg; lognormal variance with pedigree 0.1726, pedigree (4,4,5,5,5)
  based on sugar refinery construction dataset
  Uncertainty: A
  properties: wet mass 1 kg, dry mass 1 kg
- steel, unalloyed: 438890 kg; lognormal variance with pedigree 0.1726, pedigree (4,4,5,5,5)
  based on sugar refinery construction dataset
  Uncertainty: A
  properties: wet mass 1 kg, carbon content, fossil 0.0025, dry mass 1 kg
  note on carbon content, fossil: Unalloyed steels or carbon steels are those in which the level of an individual element in no case reaches or exceeds the limiting concentration given in Tab. 3.1 ecoinvent v2.2 report 10_partII. Assumed to have a C content of 0.25%
- waste concrete, not reinforced: -1.98484e6, -21030.9, -2.83271e7 kg (3 entries); lognormal variance with pedigree 0.1726, pedigree (4,4,5,5,5)
  based on sugar refinery construction dataset
  Uncertainty: A
  production volume 3.0333e7 kg

## Inputs from nature
- Occupation, industrial area [natural resource, land]: 2.08333e6 m2*year; lognormal variance with pedigree 0.212, pedigree (4,4,5,5,5)
  based on sugar refinery construction dataset
  Uncertainty: A
- Transformation, to industrial area [natural resource, land]: 41667 m2; lognormal variance with pedigree 0.292, pedigree (4,4,5,5,5)
  based on sugar refinery construction dataset
  Uncertainty: A
- Transformation, from unspecified [natural resource, land]: 41667 m2; lognormal variance with pedigree 0.292, pedigree (4,4,5,5,5)
  based on sugar refinery construction dataset
  Uncertainty: A
- Occupation, construction site [natural resource, land]: 208330 m2*year; lognormal variance with pedigree 0.262, pedigree (4,4,5,5,5)
  based on sugar refinery construction dataset
  Uncertainty: A

## Extrapolations
This dataset has been extrapolated from year 2008 to the year of the calculation (2021). The uncertainty has been adjusted accordingly.

## Review by Bo Weidema 2012-03-07
Accepted without review, as temporary dataset to avoid delay of upload of other datasets that depend on this dataset. A version for normal review will be submitted later.
