# titanium tetrachloride production

Dataset: EcoSpold 2, unit process
Geography: CN
Time period: 2020-01-01 to 2024-12-31
Technology level: current
Classification: ISIC rev.4 ecoinvent: 2420:Manufacture of basic precious and other non-ferrous metals
Scenario: Business-as-Usual
System model: Allocation, cut-off by classification
Generated by: Gao Feng
Published in: Gao Feng 2018
Database: ecoinvent
isCopyrightProtected: true
accessRestrictedTo: 1

## General comment
This dataset refers to the production of 1 kg of titanium tetrachloride (TiCl4) from high-grade titanium slag in China.
TiCl4 is normally produced from rutile and in some cases from a mix of ilmenite concentrate, rutile and high-grade slag. Due to scarcity of natural rutile resources in China, the high-grade titanium slag is considered as the principal input. The dataset is based on the publication from Gao et al (2018).
Table 2 of the Gao et al (2018) publication, provides cradle-to-gate data for the production of 1 ton of Ti sponge. For this dataset, only the data provided in the column ''chlorination and refining'' in table 2 of the abovementioned publication were taken into account here, because the chlorination and refining process is the sole process for the production of TiCl4. The amount of high-grade titanium slag, which serves as the principal input for the production of TiCl4 has been estimated.
Reference:
Gao, F., Nie, Z., Yang, D., Sun, B., Liu, Y., Gong, X., & Wang, Z. (2018). Environmental impacts analysis of titanium sponge production using Kroll process in China. Journal of Cleaner Production, 174, 771-779. doi:https://doi.org/10.1016/j.jclepro.2017.09.240.

## Included activities start
The activity starts with the processing of titania slag that contains approximately 94% TiO2.

## Included activities end
The activity ends with the production of titanium tetrachloride.

## Allocation
No allocation is applied.

## Geography
Dataset valid for the entire corresponding region. Since China is the major producer of pure titanium metal, it is assumed that China is also the major producer of titanium tetrachloride.

## Technology
During the chlorination and refining process, titania slag is mixed with petroleum coke and placed in a chlorination furnace between 1073 and 1173 K, resulting in the production of crude titanium tetrachloride (TiCl4). The crude TiCl4 is refined further with reaction of the process being: 2TiO2 + 4Cl2 + 3C -> 2TiCl4 + 2CO + CO2. Titanium tetrachloride is used for the production of the pure titanium metal (titanium sponge). The data are assumed to be valid on average for 5 years after the publication of that article.

## Time period
Data are considered representative of current production practices.

## Reference product
- hydrochloric acid, without water, in 30% solution state: 1 kg; name bp1; = 0.2*((513/1000)/3.9626); By-product classification allocatable product; CPC 34: Basic chemicals; CAS 7647-01-0; pedigree (1,1,1,1,1)
  The original amount of hydrochloric acid (20% concentration) produced as a byproduct from the chlorination and refining process is 513 kg and represents the amount of hydrochloric acid (20% concentration) produced per 1 metric ton of titanium sponge. This original value (along with the concentration of the byproduct) is taken from Table 2 in Gao et al. (2018).
  It was adjusted to represent the production of 1 kg of TiCl4 (first by dividing by 1000 and by dividing again by 3.9626), based on the fact that for the production of 1 kg of Ti sponge, 3.9626 kg of TiCl4 are needed based on the following reaction: TiCl4 + 2Mg ->Ti + 2MgCl2. For more information about this equation, refer to the titanium sponge production dataset.
  Because this ecoinvent exchange refers to pure hydrochloric acid, the value is multiplied by 0.2 to ensure the same purity as the reported byproduct.
  Reference:
  Gao, F., Nie, Z., Yang, D., Sun, B., Liu, Y., Gong, X., & Wang, Z. (2018). Environmental impacts analysis of titanium sponge production using Kroll process in China. Journal of Cleaner Production, 174, 771-779. doi:https://doi.org/10.1016/j.jclepro.2017.09.240.
  production volume 8.721e6 kg; = PVRP*bp1
    Calculated from production volume of reference product using the relative outputs.
  property price 0.127 EUR2005; name bp1_price_EUR2005
    Temporary price data. Calculated as 90% of purchasers price based on: 2004 Import/Export data (total trades (USD) divided by total weight (kg) in EU27, USA, China, Japan and India) from UN Commodity Trade Statistics Database (http://data.un.org/Explorer.aspxDatabase [Accessed 2 July 2010]). Commodity: Hydrogen chloride (hydrochloric acid).
  property heating value, net 3.32 MJ
    LHV is calculated based on the elemental composition of the substance. Based on the CAS number of the substance (007647-01-0), the chemical formula of the substance is found to be: HCl, (PubChem 2020).
    Reference: Kim, S., Chen, J., Cheng, T., Gindulyte, A., He, J., He, S., Li, Q., Shoemaker, B. A., Thiessen, P. A., Yu, B., Zaslavsky, L., Zhang, J., & Bolton, E. E. (2019). PubChem 2019 update: improved access to chemical data. Nucleic acids research, 47(D1), D1102–D1109. https://doi.org/10.1093/nar/gky1033
  property carbon content 0
    carbon content on a dry matter basis (reserved; not for manual entry)
  property true value 0.0032883; name bp1_true_value
    allocation property applied in "true value" allocation // value calculated from revenue
  properties: carbon content, non-fossil 0, water content 0, water in wet mass 0 kg, dry mass 1 kg, carbon content, fossil 0, wet mass 1 kg, carbon allocation 0 kg
- titanium tetrachloride: 0 kg; CPC 342: Basic inorganic chemicals n.e.c.; By-product classification allocatable product; CAS 7550-45-0
  production volume 3.36821e8 kg; name PVRP; = 3.9626*85000000
    The production volume is expressed in kg and is based on the fact that for the production of 1 kg of titanium sponge, 3.9626 kg of TiCl4 are required as an input (stoichiometric equation of the reduction and distillation process: TiCl4 + 2Mg ->Ti + 2MgCl2). The Chinese annual production (2019) of titanium sponge is 85000000 kg. Source: https://pubs.usgs.gov/periodicals/mcs2021/mcs2021-titanium.pdf
  property price 1.1087 EUR2005
    Calculated based on inputs: The price of the product has been calculated as a sum of the values of the material and energy inputs for this product. This value is therefore a rough estimation. It may underestimate the real price since there are additional expenses when producing any product. These expences can include for example labour costs, treatment of waste materials and profit for the producer. Please consider carefully whether this level of data quality is acceptable for your application.
  property chlorine content 0.7476
    The titanium and chlorine contents are based on the subtotal masses of titanium and chlorine in the titanium tetrachloride compound. Those masses are: Ti: 25.24% and Cl:74.76%. The previously mentioned values are taken from the following source: https://www.lenntech.com/calculators/molecular/molecular-weight-calculator.htm
  property titanium content 0.2524
    (same comment as for titanium tetrachloride)
  property carbon content 0
    carbon content on a dry matter basis (reserved; not for manual entry)
  property true value 1.1087
    allocation property applied in "true value" allocation // value calculated from revenue
  properties: water content 0, dry mass 1 kg, carbon content, non-fossil 0, water in wet mass 0 kg, wet mass 1 kg, carbon content, fossil 0, carbon allocation 0 kg

## Inputs from technosphere
- heat, district or industrial, other than natural gas: 4.21632 MJ; = ((3530/1000)*30.4+(851/1000)*45.8)/3.9626; lognormal variance with pedigree 0.001225, pedigree (1,3,1,2,1)
  This exchange represents the amount of heat produced from the combustion of hard coal (3530 kg) and crude oil (851 kg) in the chlorination and refining process for the production of 1 metric ton of titanium sponge.
  These values were taken from Gao et al. (2018) and were adjusted to represent the production of 1 kg of TiCl4 (first by dividing by 1000 and by dividing again by 3.9626), based on the fact that for the production of 1 kg of Ti sponge, 3.9626 kg of TiCl4 are needed based on the following reaction: TiCl4 + 2Mg ->Ti + 2MgCl2. For more information about this equation, refer to the titanium sponge production dataset.
  Therefore the amounts of hard coal and crude oil required per 1 kg of TiCl4 are 0.890823497 kg and 0.214756599 kg respectively.
  The thermal energy from each source is calculated by multiplying the gross calorific value of each fuel (45.8 MJ/kg for crude oil and 30.4 MJ/kg for hard coal according toTable 5.1, chapter 5.6.3, page 35 of the data quality guidelines of Ecoinvent version 3) with the amount of each fuel as mentioned above. The thermal energies from each source are summed to obtain the reported value.
  Reference:
  Gao, F., Nie, Z., Yang, D., Sun, B., Liu, Y., Gong, X., & Wang, Z. (2018). Environmental impacts analysis of titanium sponge production using Kroll process in China. Journal of Cleaner Production, 174, 771-779. doi:https://doi.org/10.1016/j.jclepro.2017.09.240.
  properties: corresponding fuel use, propane, furnace >100kW 1.05263 MJ, heating value, net 1 MJ
  note on corresponding fuel use, propane, furnace >100kW: Lower heating value of the fuel input related to the heat/electricity output, taken directly from ecoinvent v3.0 dataset "heat production, natural gas, at industrial furnace >100kW, GLO 2000".
- sodium hydroxide, without water, in 50% solution state: 0.130276 kg; = ((4520/1000)/3.9626); lognormal variance with pedigree 0.001225, pedigree (1,3,1,2,1)
  The amount of sodium hydroxide required in the chlorination and refining process is 4520 kg per metric ton of titanium sponge.
  This value was taken from Gao et al. (2018) and was adjusted to represent the production of 1 kg of TiCl4 (first by dividing by 1000 and by dividing again by 3.9626), based on the fact that for the production of 1 kg of Ti sponge, 3.9626 kg of TiCl4 are needed based on the following reaction: TiCl4 + 2Mg ->Ti + 2MgCl2. For more information about this equation, refer to the titanium sponge production dataset.
  Reference:
  Gao, F., Nie, Z., Yang, D., Sun, B., Liu, Y., Gong, X., & Wang, Z. (2018). Environmental impacts analysis of titanium sponge production using Kroll process in China. Journal of Cleaner Production, 174, 771-779. doi:https://doi.org/10.1016/j.jclepro.2017.09.240.
  properties: heating value, net 3.03 MJ, dry mass 1 kg, wet mass 1 kg
- tap water: 0.0126817 kg; name water_input; = (440/1000)/3.9626; lognormal variance with pedigree 0.001225, pedigree (1,3,1,2,1)
  The amount of water required in the chlorination and refining process is 440 kg per metric ton of titanium sponge.
  This value was taken from Gao et al. (2018) and was adjusted to represent the production of 1 kg of TiCl4 (first by dividing by 1000 and by dividing again by 3.9626), based on the fact that for the production of 1 kg of Ti sponge, 3.9626 kg of TiCl4 are needed based on the following reaction: TiCl4 + 2Mg ->Ti + 2MgCl2. For more information about this equation, refer to the titanium sponge production dataset.
  Reference:
  Gao, F., Nie, Z., Yang, D., Sun, B., Liu, Y., Gong, X., & Wang, Z. (2018). Environmental impacts analysis of titanium sponge production using Kroll process in China. Journal of Cleaner Production, 174, 771-779. doi:https://doi.org/10.1016/j.jclepro.2017.09.240.
  properties: water content 2962.17, wet mass 1 kg, carbon content, fossil 0.00178991, dry mass 0.000337476 kg
  note on carbon content, fossil: Bicarbonate content is 2.93 mol/m3. CO2 content is 0.1 mol/m3 (ecoinvent v2.2 report 8, Tab 93.1).
- titania slag, 94% titanium dioxide: 0.0511516 kg; = 0.421/0.94; lognormal variance with pedigree 0.001225, pedigree (1,3,1,2,1)
  The amount of high-grade titanium slag is based on the following: i) on the stoichiometric equation: 2TiO2 + 4Cl2 + 3C -> 2TiCl4 + 2CO + CO2 (chlorination and refining process), meaning that for the production of1 kg of TiCl4, 0.421 kg of TiO2 are required. Due to the 94% TiO2 content in the slag, the amount is also divided by 0.94.
  properties: titanium content 0.563342, dry mass 1 kg, wet mass 1 kg
  note on titanium content: The titanium content of the high-grade titanium slag is based on the following facts: i) The TiO2 content of the slag is assumed to be 94% (Source: Liao, W., Heijungs, R., & Huppes, G. (2012). Thermodynamic resource indicators in LCA: a case study on the titania produced in Panzhihua city, southwest China. The International Journal of Life Cycle Assessment, 17(8), 951-961. doi:10.1007/s11367-012-0429-4) and ii) the titanium content in TiO2 is 59.93% (Source: https://www.lenntech.com/calculators/molecular/molecular-weight-calculator.htm).
- electricity, medium voltage: 0.0734963 kWh; = ((2550/1000)/3.9626); lognormal variance with pedigree 0.001225, pedigree (1,3,1,2,1)
  The amount of electricity required in the chlorination and refining process is 2550 kWh per metric ton of titanium sponge.
  This value was taken from Gao et al. (2018) and was adjusted to represent the production of 1 kg of TiCl4 (first by dividing by 1000 and by dividing again by 3.9626), based on the fact that for the production of 1 kg of Ti sponge, 3.9626 kg of TiCl4 are needed based on the following reaction: TiCl4 + 2Mg ->Ti + 2MgCl2. For more information about this equation, refer to the titanium sponge production dataset.
  Reference:
  Gao, F., Nie, Z., Yang, D., Sun, B., Liu, Y., Gong, X., & Wang, Z. (2018). Environmental impacts analysis of titanium sponge production using Kroll process in China. Journal of Cleaner Production, 174, 771-779. doi:https://doi.org/10.1016/j.jclepro.2017.09.240.
- wastewater from pig iron production: -1.26817e-5 m3; name bp3; = (water_input/1000)*-1; lognormal variance with pedigree 6.00063, pedigree (1,3,1,2,1)
  This exchange is not present on the Gao et al publication and has been considered here to account for the water output that should stem from the input of tap water. The value of wastewater has been considered equal to that of the water input (tap water).
  production volume 37400 m3; = PVRP * bp3
    Calculated from production volume of reference product using the relative outputs.
  property price 0 EUR2005; name bp3_price_EUR2005
  properties: wet mass 1000 kg, carbon content, fossil 1.2149e-5, dry mass 0.337476 kg, water content 2962.17
- petroleum coke: 0.0187632 kg; = (651/1000)/3.9626; lognormal variance with pedigree 0.001225, pedigree (1,3,1,2,1)
  The amount of petroleum coke required in the chlorination and refining process is 651 kg per metric ton of titanium sponge.
  This value was taken from Gao et al. (2018) and was adjusted to represent the production of 1 kg of TiCl4 (first by dividing by 1000 and by dividing again by 3.9626), based on the fact that for the production of 1 kg of Ti sponge, 3.9626 kg of TiCl4 are needed based on the following reaction: TiCl4 + 2Mg ->Ti + 2MgCl2. For more information about this equation, refer to the titanium sponge production dataset.
  Reference:
  Gao, F., Nie, Z., Yang, D., Sun, B., Liu, Y., Gong, X., & Wang, Z. (2018). Environmental impacts analysis of titanium sponge production using Kroll process in China. Journal of Cleaner Production, 174, 771-779. doi:https://doi.org/10.1016/j.jclepro.2017.09.240.
  properties: heating value, net 35 MJ, dry mass 1 kg, wet mass 1 kg, carbon content, fossil 0.885
- chemical factory, organics: 4.56841e-11 unit; lognormal variance with pedigree 0.3112, pedigree (3,3,1,4,3)
  This infrastructural input has been assumed for compliance with the Ecoinvent Guidelines and was not originally present in the publication, on which this dataset was based. The chemical factory is assumed to have an average output of 50'000 t/a and a lifespan of fifty years.
- chlorine, for reuse in titanium tetrachloride production: 0.0386965 kg; = ((2962.6 - 1620)/1000)/3.9626; lognormal variance with pedigree 0.003225, pedigree (3,3,1,2,1)
  The stoichiometric amount of Cl2 is based on the following equations:
  i) 2TiO2 + 4Cl2 + 3C -> 2TiCl4 + 2CO + CO2. This is the chlorination and refining process, where approximately 0.7476 kg of Cl2 are required as an input for the production of 1 kg of TiCl4)
  ii) TiCl4 + 2Mg -> Ti + 2MgCl2. This is the reduction and distillation process. This means that for the production of 1 kg of Ti sponge, 3.9626 kg of TiCl4 are required as input, meaning that 2.9626 kg of Cl2 are needed as input for the production of 1 kg of Ti sponge.
  However, in the Kroll process for titanium sponge production, approximately 45.3% of the chlorine is recovered through the electrolysis of magnesium chloride (MgCl2 -> Mg + Cl2) and reused as input to the chlorination and refining process. This exchange represents the chlorine that is recovered from the electrolysis process.
  In the end, the chlorine input was adjusted to represent the production of 1 kg of TiCl4 (first by dividing by 1000 and by dividing again by 3.9626).
  Finally, the liquid chlorine is assumed as input instead of gaseous, since the it is usually transported in liquid form which requires compression that is not considered in the gaseous chlorine exchange. As a result, it is assumed that liquid chlorine is transformed to the required gaseous form onsite.
  Reference:
  Gao, F., Nie, Z., Yang, D., Sun, B., Liu, Y., Gong, X., & Wang, Z. (2018). Environmental impacts analysis of titanium sponge production using Kroll process in China. Journal of Cleaner Production, 174, 771-779. doi:https://doi.org/10.1016/j.jclepro.2017.09.240).
  properties: wet mass 1 kg, dry mass 1 kg
- heat, district or industrial, natural gas: 0.106396 MJ; = ((91.6/1000)/3.9626)*40.3; lognormal variance with pedigree 0.001225, pedigree (1,3,1,2,1)
  The amount of natural gas required in the chlorination and refining process is 91.6 m3 per metric ton of titanium sponge.
  This value was taken from Gao et al. (2018) and was adjusted to represent the production of 1 kg of TiCl4 (first by dividing by 1000 and by dividing again by 3.9626), based on the fact that for the production of 1 kg of Ti sponge, 3.9626 kg of TiCl4 are needed based on the following reaction: TiCl4 + 2Mg ->Ti + 2MgCl2. For more information about this equation, refer to the titanium sponge production dataset.
  Therefore the amount of natural gas required per 1 kg of TiCl4 is 0.023115986 m3. The thermal energy from natural gas is calculated by multiplying this value by the gross calorific value of natural gas (40.3 MJ/m3 according toTable 5.1, chapter 5.6.3, page 35 of the data quality guidelines of Ecoinvent version 3).
  Reference:
  Gao, F., Nie, Z., Yang, D., Sun, B., Liu, Y., Gong, X., & Wang, Z. (2018). Environmental impacts analysis of titanium sponge production using Kroll process in China. Journal of Cleaner Production, 174, 771-779. doi:https://doi.org/10.1016/j.jclepro.2017.09.240.
  properties: heating value, net 1 MJ
- basic oxygen furnace slag: -0.132582 kg; name bp2; = (((4600/1000)/3.9626))*-1; lognormal variance with pedigree 0.001225, pedigree (1,3,1,2,1)
  This value is considered as a proxy for the production of spent alkali liquor as a byproduct based on the Xiong et al (2010) publication, which describes the production of TiCl4 in a facility in Panzihua (same geography as the one from the publication, on which this dataset is based). The original amount of spent alkali liquor produced from the chlorination and refining process is 4.60E+03 kg and represents the amount of spent alkali liquor produced per 1 metric ton of titanium sponge. This value is taken from Table 2 of Gao et al. (2018) and was adjusted to represent the production of 1 kg of TiCl4 (first by dividing by 1000 and by dividing again by 3.9626), based on the fact that for the production of 1 kg of Ti sponge, 3.9626 kg of TiCl4 are needed based on the following reaction: TiCl4 + 2Mg ->Ti + 2MgCl2. For more information about this equation, refer to the titanium sponge production dataset.
  References:
  Xiong, S.-f., Yuan, Z.-f., Xu, C., & Xi, L. (2010). Composition of off-gas produced by combined fluidized bed chlorination for preparation of TiCl4. Transactions of Nonferrous Metals Society of China, 20(1), 128-134. doi:https://doi.org/10.1016/S1003-6326(09)60109-6
  the following publication: Gao, F., Nie, Z., Yang, D., Sun, B., Liu, Y., Gong, X., & Wang, Z. (2018). Environmental impacts analysis of titanium sponge production using Kroll process in China. Journal of Cleaner Production, 174, 771-779. doi:https://doi.org/10.1016/j.jclepro.2017.09.240.
  production volume 3.91e8 kg; = PVRP * bp2
    Calculated from production volume of reference product using the relative outputs.
  property price 0 EUR2005; name bp2_price_EUR2005
  properties: dry mass 0.995 kg, aluminium content 0.0101034, calcium content 0.324525, oxygen content 0.329259, silicon content 0.0600014, manganese content 0.0250783, iron content 0.182475, wet mass 1 kg, vanadium content 0.00554358, water content 0.00502513, magnesium content 0.0350101, phosphorus content 0.0102096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
  note on aluminium content: The value of 'aluminium content' is documented in Turner & Symeonidis, 2020. Reference: Turner David & Symeonidis Avraam, 2020, Life cycle inventories of the treatment of iron and steelmaking by-products, ecoinvent association, Zürich, Switzerland
  note on calcium content: The value of 'calcium content' is documented in Turner & Symeonidis, 2020. Reference: Turner David & Symeonidis Avraam, 2020, Life cycle inventories of the treatment of iron and steelmaking by-products, ecoinvent association, Zürich, Switzerland
  note on oxygen content: The value of 'oxygen content' is documented in Turner & Symeonidis, 2020. Reference: Turner David & Symeonidis Avraam, 2020, Life cycle inventories of the treatment of iron and steelmaking by-products, ecoinvent association, Zürich, Switzerland
  note on silicon content: The value of 'silicon content' is documented in Turner & Symeonidis, 2020. Reference: Turner David & Symeonidis Avraam, 2020, Life cycle inventories of the treatment of iron and steelmaking by-products, ecoinvent association, Zürich, Switzerland
  note on manganese content: The value of 'manganese content' is documented in Turner & Symeonidis, 2020. Reference: Turner David & Symeonidis Avraam, 2020, Life cycle inventories of the treatment of iron and steelmaking by-products, ecoinvent association, Zürich, Switzerland
  note on iron content: The value of 'iron content' is documented in Turner & Symeonidis, 2020. Reference: Turner David & Symeonidis Avraam, 2020, Life cycle inventories of the treatment of iron and steelmaking by-products, ecoinvent association, Zürich, Switzerland
  note on vanadium content: The value of 'vanadium content' is documented in Turner & Symeonidis, 2020. Reference: Turner David & Symeonidis Avraam, 2020, Life cycle inventories of the treatment of iron and steelmaking by-products, ecoinvent association, Zürich, Switzerland
  note on magnesium content: The value of 'magnesium content' is documented in Turner & Symeonidis, 2020. Reference: Turner David & Symeonidis Avraam, 2020, Life cycle inventories of the treatment of iron and steelmaking by-products, ecoinvent association, Zürich, Switzerland
  note on phosphorus content: The value of 'phosphorus content' is documented in Turner & Symeonidis, 2020. Reference: Turner David & Symeonidis Avraam, 2020, Life cycle inventories of the treatment of iron and steelmaking by-products, ecoinvent association, Zürich, Switzerland
- chlorine, liquid: 0.0466917 kg; = ((1620/1000)/3.9626); lognormal variance with pedigree 0.001225, pedigree (1,3,1,2,1)
  The stoichiometric amount of Cl2 is based on the following equations:
  i) 2TiO2 + 4Cl2 + 3C -> 2TiCl4 + 2CO + CO2. This is the chlorination and refining process, where approximately 0.7476 kg of Cl2 are required as an input for the production of 1 kg of TiCl4)
  ii) TiCl4 + 2Mg -> Ti + 2MgCl2. This is the reduction and distillation process. This means that for the production of 1 kg of Ti sponge, 3.9626 kg of TiCl4 are required as input, meaning that 2.9626 kg of Cl2 are needed as input for the production of 1 kg of Ti sponge.
  However, in the Kroll process for titanium sponge production, approximately 45.3% of the chlorine is recovered through the electrolysis of magnesium chloride (MgCl2 -> Mg + Cl2) and reused as input to the chlorination and refining process, meaning that only 54.7% of the stoichiometric input needs to be supplied externally (1620 kg required as reported in Table 2 in Gao et al. (2018), compared to 2962.6 kg needed as input for the production of 1 metric ton of Ti sponge).
  In the end, the chlorine input was adjusted to represent the production of 1 kg of TiCl4 (first by dividing by 1000 and by dividing again by 3.9626).
  Finally, the liquid chlorine is assumed as input instead of gaseous, since the it is usually transported in liquid form which requires compression that is not considered in the gaseous chlorine exchange. As a result, it is assumed that liquid chlorine is transformed to the required gaseous form onsite.
  Reference:
  Gao, F., Nie, Z., Yang, D., Sun, B., Liu, Y., Gong, X., & Wang, Z. (2018). Environmental impacts analysis of titanium sponge production using Kroll process in China. Journal of Cleaner Production, 174, 771-779. doi:https://doi.org/10.1016/j.jclepro.2017.09.240).
  properties: dry mass 1 kg, wet mass 1 kg

## Emissions to nature
- Carbon monoxide, fossil [air, low population density, long-term]: 0.0168656 kg; lognormal variance with pedigree 0.650625, pedigree (1,3,1,2,1)
  The direct carbon monoxide emissions are included here.The amount of CO is based on the following: i) on the stoichiometric equation: 2TiO2 + 4Cl2 + 3C -> 2TiCl4 + 2CO + CO2 (chlorination and refining process), meaning that for the production of1 kg of TiCl4, 0.1477 kg CO are emitted in the air. Non-carbon emissions from the burning of petroleum coke have not been taken into consideration.
- Carbon dioxide, fossil [air, low population density, long-term]: 0.0132496 kg; lognormal variance with pedigree 0.001225, pedigree (1,3,1,2,1)
  The direct carbon dioxide emissions are included here. The amount of CO2 is based on the stoichiometric equation: 2TiO2 + 4Cl2 + 3C = 2TiCl4 + 2CO + CO2 (chlorination and refining process), meaning that for the production of1 kg of TiCl4, 0.116 kg CO2 are emitted in the air. Non-carbon emissions from the burning of petroleum coke have not been taken into consideration.

## Sampling procedure
The individual exchanges have been taken from the column ''chlorination and refining'' of table 2 of Gao et al. (2018).

Special attention was given to the chlorine input due to the fact that part of the chlorine is recycled from the electrolysis of magnesium chloride (MgCl2 -> Mg + Cl2), which is produced during the titanium sponge production. The rest of the chlorine is obtained from an external source, which is assumed to be brought to the site in liquid form.

The fuels (raw coal, natural gas and crude oil) have been linked with the respective ecoinvent heat production datasets (check exchange comments). Calculation of the thermal energy is also available in the respective comments. The individual emissions listed in table 2 (CO2, SO2, NOx, CO, CH4, N2O, NMVOC, As, Cd, Cr, Hg, Ni, Pb, V, Zn and Particulates) are not considered here because they represent indirect emissions from heat (from natural gas, crude oil and hard coal) and electricity production that are already modelled in the energy production datasets. Therefore, those emissions are not included in order to avoid double counting.

However, the direct carbon monoxide & dioxide emissions are included here based on the stoichiometric equations of the chlorination and refining process (more information on exchange comment section of each emission), as these are direct process emissions. Non-carbon emissions from the burning of petroleum coke have not been taken into consideration, therefore the emission profile resulting from the burning of coke is not fully included.

The high-grade titanium slag used as the primary input was assumed to contain 94% TiO2 (data on the high-grade slag come from the same region as used in the Gao et al publication (Liao et al. 2021). Its amount is calculated based on the stoichiometric equation: 2TiO2 + 4Cl2 + 3C -> 2TiCl4 + 2CO + CO2 (for more info consult the respective exchange comment).

Finally, the spent alkali liquor produced as a byproduct according to Gao et al (2018) has been approximated as blast furnace slag. This approximation is based on the work of Xiong et al (2010), that describes the production of TiCl4 from titanium slag in the Panzhihua city (as in the publication from Gao et al 2018), where the main output from the carbochlorination process seems to be furnace slag (Xiong et al. 2010).

References:
Gao, F., Nie, Z., Yang, D., Sun, B., Liu, Y., Gong, X., & Wang, Z. (2018). Environmental impacts analysis of titanium sponge production using Kroll process in China. Journal of Cleaner Production, 174, 771-779. doi:https://doi.org/10.1016/j.jclepro.2017.09.240.

Liao, W., Heijungs, R., & Huppes, G. (2012). Thermodynamic resource indicators in LCA: a case study on the titania produced in Panzhihua city, southwest China. The International Journal of Life Cycle Assessment, 17(8), 951-961. doi:10.1007/s11367-012-0429-4

Xiong, S.-f., Yuan, Z.-f., Xu, C., & Xi, L. (2010). Composition of off-gas produced by combined fluidized bed chlorination for preparation of TiCl4. Transactions of Nonferrous Metals Society of China, 20(1), 128-134. doi:https://doi.org/10.1016/S1003-6326(09)60109-6

## Extrapolations
According to the authors of the publication used as a source for this dataset, data were collected from titanium sponge manufacturing companies in the province of Sichuan and Shaanxi through surveys, but considering at the same time average national production statistics. Therefore, the data are assumed to represent the average production of titanium metal in China.Therefore, the data are assumed to represent the average production of titanium metal in China through the Kroll process.
