# treatment of used trawler, steel

Dataset: EcoSpold 2, unit process
Geography: RoW
Time period: 2010-01-01 to 2021-12-31
Technology level: current
Classification: ISIC rev.4 ecoinvent: 0311:Marine fishing
Scenario: Business-as-Usual
System model: Allocation, cut-off by classification
Generated by: Angel Avadi
Published in: Avadí, A. 2018
Database: ecoinvent
isCopyrightProtected: true
accessRestrictedTo: 1

## General comment
This dataset represents the end of life of steel trawlers, per 1000 kg of light ship weight, based on data from Peru (2004-3013), corresponding to 9 vessels (from a fleet of 54) for which data was avilable with different levels of detail. Specific data for specific inventory items may be based on sub-samples for which detailed data was available. Vessel dimensions: 34 - 275 m3 (16 - 34 m length).
System boundaries and relation between activities

## Included activities start
Treatment of used vessel (recycling)

## Included activities end
End of life (decommissioning). Excludes engines and motors. Excludes energy for dismantling.

## Geography
Data from Peru, extrapolated to global (GLO)

## Technology
Peru features various shipyards and relevant ship-building and ship-retrofitting expertise.

## Reference product
- used trawler, steel: -1 kg; name LSW; = -1*(iron+copper+(nylon*-1)+(paint*-1)+(rubber*-1)); source Angel Avadí 2017; By-product classification Waste; CPC 94312: Ship-breaking and other dismantling of wrecks services
  EOL of a trawler, per 1000 kg of light ship weight (LSW), after 35 years lifetime. Regressions based on mainly primary data were created to relate the weight of each inventory item to a purse seiner's LSW, adjusted for trawler's gear. The list of inventory items (granularity) contribute >95% of environmental impacts, as described in the reference publication.
  production volume 0.997077 kg; name prod_vol
    Unquantifiable
  property water in wet mass 0 kg; name LSW_WWM
  property price 0 EUR2005; name LSW_price_EUR2005
    Waste products are assigned a price of zero as they are assumed to require further treatment.
  property carbon content, fossil 0.0100447; name LSW_C_content_fossil; = 0.005*99.28%+0.63717*0.51%+0.87195*0.21%
    Calculated from the fossil carbon content of the hull and gear materials, multiplied by their relative proportions
  property wet mass 1 kg; name LSW_WM
  property carbon content, non-fossil 0.00121774; name LSW_C_content_non_fossil; = 0.19963*0.61%
    Calculated from the fossil carbon content of thepaint, multiplied by its relative proportion
  property water content 0; name LSW_water_content
  property dry mass 1 kg; name LSW_DM
  property carbon content 0.0112624
    carbon content on a dry matter basis (reserved; not for manual entry)
  properties: carbon allocation 0.0112624 kg

## By-products
- copper scrap, sorted, pressed: 0 kg; source Angel Avadí 2017; CPC 39361: Waste and scrap of copper; By-product classification Recyclable; pedigree (1,1,1,1,1)
  Copper recycled from electric circuit
  Uncertainty: Based on assumptions
  production volume 0 kg; = ABS(prod_vol*copper/LSW)
    Calculated from production volume of reference product using the relative outputs.
  property price 2.84 EUR2005; name copper_price_EUR2005
    Temporary price data. Calculated as 90% of purchasers price based on: Source: USGS Mineral Yearbook 2007, Table 1 in <http://minerals.usgs.gov/minerals/pubs/commodity/recycle/myb1-2007-recyc.pdf>
  property carbon content 0
    carbon content on a dry matter basis (reserved; not for manual entry)
  properties: water in wet mass 0 kg, water content 0, wet mass 1 kg, carbon content, fossil 0, dry mass 1 kg, carbon content, non-fossil 0, carbon allocation 0 kg
- iron scrap, unsorted: 0 kg; source Angel Avadí 2017; CPC 39310: Slag, dross, scalings and other waste from the manufacture of iron or steel; By-product classification Recyclable; pedigree (1,1,1,1,1)
  Recycled steel from hull and structural elements + Recycled steel from fishing gear
  Uncertainty: Based on assumptions
  production volume 0 kg; = ABS(prod_vol*iron/LSW)
    Calculated from production volume of reference product using the relative outputs.
  property price 0.149 EUR2005; name iron_price_EUR2005
    Temporary price data. Calculated as 90% of purchasers price based on: estimated at 85% of sorted scrap
  property carbon content 0
    carbon content on a dry matter basis (reserved; not for manual entry)
  properties: wet mass 1 kg, water in wet mass 0 kg, water content 0, dry mass 1 kg, carbon content, non-fossil 0, carbon content, fossil 0, carbon allocation 0 kg

## Inputs from technosphere
All rows: source Angel Avadí 2017
- waste paint on metal: -0.00208616 kg; name paint; triangular min -0.00208616, mostLikely -0.00208616, max -0.00208616, pedigree (4,3,5,5,1)
  Waste paint scrapped from hull
  Uncertainty: Based on assumptions
  production volume 0.00208006 kg; = ABS(prod_vol*paint/LSW)
    Calculated from production volume of reference product using the relative outputs.
  property price 0 EUR2005; name paint_price_EUR2005
  properties: wet mass 1 kg, carbon content, fossil 0.65, dry mass 1 kg, heating value, net 19.7 MJ
- waste plastic, mixture: 0 kg; name nylon; pedigree (1,1,1,1,1)
  Nylon recycled from fishing gear
  Uncertainty: Based on assumptions
  production volume 0 kg
    Calculated from production volume of reference product using the relative outputs.
  property price 0 EUR2005; name nylon_price_EUR2005
  properties: dry mass 0.847 kg, carbon content, fossil 0.637168, water content 0.180638, wet mass 1 kg, heating value, net 30.79 MJ
  note on heating value, net: Value taken from the general comment of the treatment dataset.
- waste rubber, unspecified: 0 kg; name rubber; pedigree (1,1,1,1,1)
  Rubber from fishing gear
  Uncertainty: Based on assumptions
  production volume 0 kg
    Calculated from production volume of reference product using the relative outputs.
  property price 0 EUR2005; name rubber_price_EUR2005
  properties: dry mass 1 kg, carbon content, fossil 0.853, wet mass 1 kg, heating value, net 27.19 MJ
- copper scrap, sorted, pressed: -0.00990925 kg; triangular min -0.00990925, mostLikely -0.00990925, max -0.00990925, pedigree (4,3,5,5,1)
  Copper recycled from electric circuit
  Uncertainty: Based on assumptions
  production volume 0.00988029 kg
  properties: wet mass 1 kg, dry mass 1 kg
- iron scrap, unsorted: -0.980494 kg; triangular min -0.980494, mostLikely -0.980494, max -0.980494, pedigree (4,3,5,5,1)
  (same comment as for iron scrap, unsorted)
  production volume 0.977628 kg
  properties: wet mass 1 kg, dry mass 1 kg
- waste plastic, mixture: -0.000591544 kg; triangular min -0.000591544, mostLikely -0.000591544, max -0.000591544, pedigree (4,3,5,5,1)
  Nylon recycled from fishing gear
  Uncertainty: Based on assumptions
  production volume 0.00530415 kg
- waste plastic, mixture: -3.95247e-5 kg; triangular min -3.95247e-5, mostLikely -3.95247e-5, max -3.95247e-5, pedigree (4,3,5,5,1)
  Nylon recycled from fishing gear
  Uncertainty: Based on assumptions
- waste plastic, mixture: -2.98919e-6 kg; triangular min -2.98919e-6, mostLikely -2.98919e-6, max -2.98919e-6, pedigree (4,3,5,5,1)
  Nylon recycled from fishing gear
  Uncertainty: Based on assumptions
- waste plastic, mixture: -1.63251e-5 kg; triangular min -1.63251e-5, mostLikely -1.63251e-5, max -1.63251e-5, pedigree (4,3,5,5,1)
  Nylon recycled from fishing gear
  Uncertainty: Based on assumptions
- waste plastic, mixture: -1.55022e-5 kg; triangular min -1.55022e-5, mostLikely -1.55022e-5, max -1.55022e-5, pedigree (4,3,5,5,1)
  Nylon recycled from fishing gear
  Uncertainty: Based on assumptions
- waste plastic, mixture: -0.000512681 kg; triangular min -0.000512681, mostLikely -0.000512681, max -0.000512681, pedigree (4,3,5,5,1)
  Nylon recycled from fishing gear
  Uncertainty: Based on assumptions
- waste plastic, mixture: -0.00414114 kg; triangular min -0.00414114, mostLikely -0.00414114, max -0.00414114, pedigree (4,3,5,5,1)
  Nylon recycled from fishing gear
  Uncertainty: Based on assumptions
- waste rubber, unspecified: -8.82506e-5 kg; triangular min -8.82506e-5, mostLikely -8.82506e-5, max -8.82506e-5, pedigree (4,3,5,5,1)
  Rubber from fishing gear
  Uncertainty: Based on assumptions
  production volume 0.00218406 kg
- waste rubber, unspecified: -0.00210222 kg; triangular min -0.00210222, mostLikely -0.00210222, max -0.00210222, pedigree (4,3,5,5,1)
  Rubber from fishing gear
  Uncertainty: Based on assumptions
