# maize grain to generic market for energy feed

Dataset: EcoSpold 2, unit process
Geography: GLO
Time period: 2012-01-01 to 2021-12-31
Technology level: current
Classification: ISIC rev.4 ecoinvent: 1080:Manufacture of prepared animal feeds
Scenario: Business-as-Usual
System model: Allocation, cut-off by classification
Generated by: Tereza Levova
Database: ecoinvent
isCopyrightProtected: true
accessRestrictedTo: 1

## General comment
This activity is a linking activity, i.e. it connects maize grain with generic protein feed market. Maize grain is used partially as a feed for animals, thus traded on generic feed market with other protein - containing products.

## Included activities end
This linking activity has the maize grain as an input (negative reference product) and protein and energy feed as outputs.

## Parameters
- fraction_to_generic_market: 0.9 % (obsolete); lognormal variance with pedigree 0.108, pedigree (4,1,1,1,1)
  It is assumed that 90% of maize grain is traded on generic protein feed market, i.e. its buyers do not care what type of protein feed they are buying. Remaining 10% of the production volume (PV) is assumed to be used for uses, where specific type of protein feed is required and cannot be substituted by any other protein feed.

## Reference product
- energy feed, gross: 1 MJ; name RP_amount_1; = maize_grain_inp_gross_E_feed_per_kg_DM_0* maize_grain_input*maize_grain_DM; CPC 23319: Preparations used in animal feeding n.e.c.; By-product classification allocatable product
  Calculated based on literature value from Agroscope database (http://www.feed-alp.admin.ch). Agroscope (http://www.agroscope.admin.ch/org/index.html?lang=en) is a research institute which belongs to the Swiss Federal Office for Agriculture. The gross energy in maize grain might vary depending on the amount of fat present in the grain. This grain is considered to have app. 6.3% of fat.
  It is estimated, that 90% of the maize grain goes to the generic market for protein feed.
  production volume 1.07347e13 MJ; name RP_PV_1; = 713430000000* fraction_to_generic_market* maize_grain_DM* maize_grain_inp_gross_E_feed_per_kg_DM_0
    Calculated based on literature value. 7.13E+11kg is the annual production volume of the maize grain in the whole world (FAO, 2005).
  property price 0.0108 EUR2005
    Based on energy feed, gross content in soybean meal and prices per kg of soybean meal. Assumed soybean meal is the most used feed. Soybean meal 2004 prices for World import/export data (tonnes and US$) from FaoStat statistics (http://faostat.fao.org/site/535/default.aspx#ancor, TRADE)- [Accessed 24 May 2010]. See calculations for protein /energy content
  property carbon content 0
    carbon content on a dry matter basis (reserved; not for manual entry)
  property true value 0.180559; name RP_amount_1_true_value
    allocation property applied in "true value" allocation // value calculated from revenue
  properties: water content 0, water in wet mass 0 kg, wet mass 1 kg, carbon content, non-fossil 0, carbon content, fossil 0, dry mass 1 kg, carbon allocation 0 kg

## By-products
- protein feed, 100% crude: 0 kg; name BP_amount_1; CPC 23319: Preparations used in animal feeding n.e.c.; By-product classification allocatable product; pedigree (1,1,1,1,1)
  Calculated based on literature value from Agroscope database (http://www.feed-alp.admin.ch). Agroscope (http://www.agroscope.admin.ch/org/index.html?lang=en) is a research institute which belongs to the Swiss Federal Office for Agriculture. The protein in maize grain might vary depending on the amount of fat present in the grain. This grain is considered to have app. 6.3% of fat.
  It is estimated, that 90% of the maize grain goes to the generic market for protein feed.
  production volume 5.31764e10 kg; = BP_amount_1/ RP_amount_1* RP_PV_1
    (same comment as for energy feed, gross)
  property price 0.424 EUR2005
    Based on protein content and energy feed, gross content in soybean meal and prices per kg of soybean meal. Assumed soybean meal is the most used feed. Soybean meal 2004 prices for World import/export data (tonnes and US$) from FaoStat statistics (http://faostat.fao.org/site/535/default.aspx#ancor, TRADE)- [Accessed 24 May 2010]. See calculations for protein /energy content
  property carbon content 0.53
    carbon content on a dry matter basis (reserved; not for manual entry)
  property true value 0.0351148; name BP_amount_1_true_value
    allocation property applied in "true value" allocation // value calculated from revenue
  properties: carbon content, fossil 0, water in wet mass 0 kg, carbon content, non-fossil 0.53, dry mass 1 kg, water content 0, wet mass 1 kg, carbon allocation 0.53 kg

## Inputs from technosphere
- maize grain: 0 kg; name maize_grain_input; pedigree (1,1,1,1,1)
  property gross energy, feed per kg of dry mass 19.44 MJ/kg; name maize_grain_inp_gross_E_feed_per_kg_DM_0
  property dry mass 0.86 kg; name maize_grain_DM
  property protein feed, 100% crude per kg of dry mass 0.0963 kg/kg; name maize_grain_inp_protein_feed_per_kg_DM_0
  properties: wet mass 1 kg, water content 0.162791, carbon content, non-fossil 0.46957
  note on gross energy, feed per kg of dry mass: Literature value from Agroscope database (http://www.feed-alp.admin.ch). The gross energy in maize grain might vary depending on the amount of fat present in the grain. This grain is considered to have app. 6.3% of fat.
  note on protein feed, 100% crude per kg of dry mass: Literature value from Agroscope database (http://www.feed-alp.admin.ch). The amount of protein feed in maize grain might vary depending on the amount of fat present in the maize grain. This grain is considered to have app. 6.3% of fat.
- maize grain: 0.000100534, 0.00210492, 0.0478702 kg (3 entries); lognormal variance with pedigree 0.0173, pedigree (4,3,4,3,1)
  properties: gross energy, feed per kg of dry mass 19.44 MJ/kg, dry mass 0.86 kg, protein feed, 100% crude per kg of dry mass 0.0963 kg/kg, wet mass 1 kg, water content 0.162791, carbon content, non-fossil 0.46957
