# backlight production, for liquid crystal display

Dataset: EcoSpold 2, unit process
Geography: GLO
Time period: 2001-01-01 to 2021-12-31
Technology level: current
Classification: EcoSpold01Categories: electronics/component
Classification: ISIC rev.4 ecoinvent: 2620:Manufacture of computers and peripheral equipment
Tags: ConvertedDataset
Scenario: Business-as-Usual
System model: Allocation, cut-off by classification
Generated by: Roland Hischier
Published in: Hischier R. 2007
Database: ecoinvent
isCopyrightProtected: true
accessRestrictedTo: 1

## General comment
This dataset represents the average production efforts of 1 kg of typical backlight of an LCD screen. It represents all the production efforts of a typical backlight of an LCD screen. Main data are based on information in a US-EPA LCA study about LCD and CRT production. The data represent the respective efforts for backlight unit of a 15inch LCD computer screen, as it is produced in Japan in the late 1990s. Infrastructure are based on assumptions and simplifications and have thus, accordingly higher uncertainties.
[This dataset was already contained in the ecoinvent database version 2. It was not individually updated during the transfer to ecoinvent version 3. Life Cycle Impact Assessment results may still have changed, as they are affected by changes in the supply chain, i.e. in other datasets. This dataset was generated following the ecoinvent quality guidelines for version 2. It may have been subject to central changes described in the ecoinvent version 3 change report (http://www.ecoinvent.org/database/ecoinvent-version-3/reports-of-changes/), and the results of the central updates were reviewed extensively. The changes added e.g. consistent water flows and other information throughout the database. The documentation of this dataset can be found in the ecoinvent reports of version 2, which are still available via the ecoinvent website. The change report linked above covers all central changes that were made during the conversion process.]

## Included activities start
From reception of raw materials and auxiliares at the factory gate.

## Included activities end
This dataset includes the material and energy efforts as well as the related emissions (air/water) and waste amounts for the production of the cold cathode fluorescent lamp (CCFL), the backlight light guide as well as for the subsequent backlight unit assembly. Estimations for infrastructure are included as well. Packaging material is not included.

## Geography
Data from literature (based on information from Japanese producers) used as data for the global production average

## Technology
CCFL containing backlight unit for a LCD computer screen

## Parameters
- fraction, process water, to air: 0.061 dimensionless; name fraction_PW_to_air; lognormal variance with pedigree 0.092025, pedigree (4,4,3,2,4)
  Literature value (Statistics Canada, 2007 & Shaffer, K.H., 2008, Consumptive water use in the Great Lakes Basin, USGS) (Vionnet, S., Quantis Water Database - Technical Report, 2012).

## Reference product
- backlight, for liquid crystal display: 1 kg; By-product classification allocatable product; CPC 48354: Parts and accessories for the goods of subclass 48315
  Such a backlight is composed of the following main parts:
  lamp: the light source. Currently in use here for are cold cathode fluorescent lamps (CCFL). The CCFL in simplest terms is a gas-discharge light source, which produces its output from a stimulated phosphor coating inside the glass lamp envelope. A CCFL can be described as a transducer converting electrical energy into light energy. Such a lamp is constituted by a Lamp (Glass Tube), a Phosphor layer, Ar+Ne Gas , an Electrode , a Lead Wire and some amounts of Hg.
  diffusion system: a system of (i) a diffuser (i.e. a rigid transparent plastic plate) for producing a uniform light out of the direct light from the lamp and the from the reflector reflected light, and (ii) a series of thin, flexible plastic layers (= optical sheets) with various tasks (e.g. lens sheet, polarizing sheet, etc.).
  reflector sheet: rigid plastic part to reflect all light into the direction of the liquid crystal panel.
  frame elements of backlight unit: plastic and/or metal parts that holds together all other parts of the backlight unit.
  EcoSpold01Location=GLO
  production volume 1 kg
    Dummy value to be replaced by measured, estimated or calculated value
  property carbon content, fossil 0.554974
    Calculated as the addition of C contents in the product composition
  property carbon content 0.554974
    carbon content on a dry matter basis (reserved; not for manual entry)
  properties: dry mass 1 kg, carbon content, non-fossil 0, price 45 EUR2005, wet mass 1 kg, water content 0, water in wet mass 0 kg, carbon allocation 0.554974 kg

## Inputs from technosphere
- hazardous waste, for incineration: 0 kg; source Socolof M. L. 2001; pedigree (1,1,1,1,1)
  EcoSpold01Location=CH
  Literature Value.
  Uncertainty: data from an US-EPA LCA study - approximated with existing waste process
  production volume 0 kg
    Calculated from the production volume of backlight, for liquid crystal display in proportion to the respective output amounts.
  properties: carbon content, fossil 0.554667, wet mass 1 kg, dry mass 0.75 kg, water content 0.333333, heating value, net 17 MJ
  note on carbon content, fossil: Tab A.6, ecoinvent v2.2 report 13_I. C content has been calculated after data in the tables, and then referred to 1 kg DM
  note on heating value, net: Value taken from the general comment of the treatment dataset.
- cable, ribbon cable, 20-pin, with plugs: 0.003396 kg; source Socolof M. L. 2001; lognormal variance with pedigree 0.0407, pedigree (1,3,5,3,1)
  EcoSpold01Location=GLO
  Proxy with literature value, to represent cables, cable, ribbon cable, 20-pin is used.
  Uncertainty: data from an US-EPA LCA study
  properties: wet mass 1 kg, carbon content, fossil 0.648653, dry mass 1 kg
  note on carbon content, fossil: Calculated as the addition of C contents in the product composition. Then referred to 1 kg DM
- lead: 0.00105644 kg; = 0.0019208*0.55; lognormal variance with pedigree 0.0407, pedigree (1,3,5,3,1)
  Proxy with literature value, to represent backlight lamp (CCFL), lead concentrate is used. The concentration of lead in lead concentrate is 0.55kg/kg.
  Uncertainty: data from an US-EPA LCA study
  properties: dry mass 1 kg, wet mass 1 kg
- aluminium, wrought alloy: 0.033168 kg; source Socolof M. L. 2001; lognormal variance with pedigree 0.0407, pedigree (1,3,5,3,1)
  Literature Value.
  EcoSpold01Location=RER
  Uncertainty: data from an US-EPA LCA study
  properties: wet mass 1 kg, dry mass 1 kg
- chemical, organic: 0.00027703 kg; source Socolof M. L. 2001; lognormal variance with pedigree 0.0407, pedigree (1,3,5,3,1)
  Proxy with literature value, to represent 100% of “process materials for backlight assembly” and 50% of “unspecified ancillary materials”, chemicals organics is used.
  EcoSpold01Location=GLO
  Uncertainty: data from an US-EPA LCA study
  properties: heating value, net 19.03 MJ, wet mass 1 kg, carbon content, fossil 0.628, dry mass 1 kg
  note on carbon content, fossil: This dataset is an unweighted average of 20 organic substances (listed in Tab 88.1, ecoinvent v2.2 report 8, part II), being part of the top100 chemicals included in this database. The C-content has also been calculated as an unweighted average of the C content of the substances composing this dataset.
- wastewater from liquid crystal display backlight production: -0.09505 m3; name wastewater_output; source Socolof M. L. 2001; lognormal variance with pedigree 0.1107, pedigree (1,3,5,3,4)
  (same comment as for hazardous waste, for incineration)
  production volume 0.09505 m3
    (same comment as for hazardous waste, for incineration)
  property price 0 EUR2005; name wastewater_output_price_EUR2005
  properties: carbon content, fossil 0.641966, water content 486.009, dry mass 2.05335 kg, wet mass 1000 kg
  note on carbon content, fossil: BOD is 2.03e-3 kg/kg (Tab 12.14, ecoinvent v2.2 report 18_III). BOD was converted to TOC, using conversion factors in Tab 4.10 (ecoinvent v2.2 report 13_IV). TOC was considered as Total Carbon.
- polycarbonate: 0.11287 kg; source Socolof M. L. 2001; lognormal variance with pedigree 0.0407, pedigree (1,3,5,3,1)
  EcoSpold01Location=RER
  Literature Value.
  Uncertainty: data from an US-EPA LCA study
  properties: heating value, net 29.57 MJ, dry mass 1 kg, wet mass 1 kg, carbon content, fossil 0.755906
  note on carbon content, fossil: Polycarbonate means here 2,2-bis(4-hydroxyphenyl)propane polycarbonate – also called bisphenol A polycarbonate ( -(O-C6H4-C(CH3)2-C6H4-O-CO)n- (ecoinvent v2.2 report 11_II), C16H14O3, MW=254 g/mol.
- argon, liquid: 0 kg; source Socolof M. L. 2001; pedigree (1,1,1,1,1)
  EcoSpold01Location=RER
  Literature Value.
  Uncertainty: data from an US-EPA LCA study
  properties: wet mass 1 kg, dry mass 1 kg
- printed wiring board mounting facility: 2.08e-7 unit; lognormal variance with pedigree 0.3861, pedigree (4,5,5,3,1)
  EcoSpold01Location=GLO
  Proxy, due to a lack of specific information, the infrastructure module for the mounting of printed wiring boards is used.
  Uncertainty: Estimation, based on PWB mounting plant
- polymethyl methacrylate, sheet: 0.7495 kg; source Socolof M. L. 2001; lognormal variance with pedigree 0.0407, pedigree (1,3,5,3,1)
  EcoSpold01Location=RER
  Proxy with literature value, to represent LCD light guide, polymethyl methacrylate is used.
  Uncertainty: data from an US-EPA LCA study
  properties: heating value, net 27.86 MJ, carbon content, fossil 0.6, wet mass 1 kg, dry mass 1 kg
  note on carbon content, fossil: Monomer is methyl methacrylate (MMA; CH2-C(CH3)COOCH3) is also called a-methylacrylic acid or 2-methylpropenoic acid (ecoinvent v2.2 report 11_II). MW=100 g/mol
- spent activated carbon with mercury: -9.1287e-10 kg; source Socolof M. L. 2001; lognormal variance with pedigree 0.0407, pedigree (1,3,5,3,1)
  Literature Value.
  EcoSpold01Location=DE
  Uncertainty: data from an US-EPA LCA study
  production volume 9.1287e-10 kg
    (same comment as for hazardous waste, for incineration)
  properties: carbon content, fossil 0.6, wet mass 1 kg, dry mass 1 kg, heating value, net 18.18 MJ
  note on carbon content, fossil: The spent carbon contains 0.1 to 50 w% (sic) mercury (ecoinvent v2.2 report 13_I, pg 56). Activated coal was considered to be charcoal, and to have a C content of 0.8 (Tab 15.1, ecoinvent v2.2 report 9-part 15). Na average Hg content of 25% was assumed.
- krypton, gaseous: 6.2475e-5 kg; source Socolof M. L. 2001; lognormal variance with pedigree 0.0407, pedigree (1,3,5,3,1)
  Proxy with literature value, to represent neon, krypton is used.
  EcoSpold01Location=RER
  Uncertainty: data from an US-EPA LCA study
  properties: wet mass 1 kg, dry mass 1 kg
- synthetic rubber: 0.00059505 kg; source Socolof M. L. 2001; lognormal variance with pedigree 0.0407, pedigree (1,3,5,3,1)
  Literature Value.
  EcoSpold01Location=RER
  Uncertainty: data from an US-EPA LCA study
  properties: heating value, net 26.42 MJ, carbon content, fossil 0.871949, wet mass 1 kg, dry mass 1 kg
  note on carbon content, fossil: EPDM (Ethylene-propene-diene terpolymer) rubber is a terpolymer of ethylene, propene, and a diene with the residual unsaturated portion of the diene in the side chain (ecoinvent v2.2 report 7-part XX & Ullmann). Chemical formula (deduced from Evidences of Solvent-Induced Miscibility in Polychloroprene-co-Ethylene-Propene Diene Terpolymer Blends, Dubey et al., Journal of Applied Polymer Science, 2009, 111:1884–1891): C20H35
- copper, cathode: 0.00067426 kg; source Socolof M. L. 2001; lognormal variance with pedigree 0.0407, pedigree (1,3,5,3,1)
  EcoSpold01Location=GLO
  Proxy with literature value, to represent metals remaining ,copper is used.
  Uncertainty: data from an US-EPA LCA study
  properties: wet mass 1 kg, dry mass 1 kg
- waste polyethylene: 0 kg; source Socolof M. L. 2001; pedigree (1,1,1,1,1)
  (same comment as for hazardous waste, for incineration)
  production volume 0 kg
    (same comment as for hazardous waste, for incineration)
  properties: wet mass 1 kg, carbon content, fossil 0.825301, water content 0.00401606, heating value, net 42.47 MJ, dry mass 0.996 kg
  note on carbon content, fossil: C content in 1 kg DM was calculated using data in Tab A.1, ecoinvent v2.2 report 13_I
- waste paperboard: 0 kg; source Socolof M. L. 2001; pedigree (1,1,1,1,1)
  Literature Value.
  EcoSpold01Location=CH
  Uncertainty: data from an US-EPA LCA study - approximated with existing waste process
  production volume 0 kg
    (same comment as for hazardous waste, for incineration)
  properties: water content 0.243781, dry mass 0.804 kg, carbon content, non-fossil 0.483259, heating value, net 15.92 MJ, wet mass 1 kg
  note on carbon content, non-fossil: C content was calculated for 1 kg DM, using data in Tab A.3, ecoinvent v2.2 report 13_I.
- waste plastic, industrial electronics: 0 kg; source Socolof M. L. 2001; pedigree (1,1,1,1,1)
  (same comment as for waste paperboard)
  production volume 0 kg
    (same comment as for hazardous waste, for incineration)
  properties: water content 0.180638, wet mass 1 kg, dry mass 0.847 kg, heating value, net 34.78 MJ, carbon content, fossil 0.81386
  note on carbon content, fossil: C content in 1 kg DM was calculated using data in Tab A.2, ecoinvent v2.2 report 13_I
- mercury: 3.9505e-6 kg; source Socolof M. L. 2001; lognormal variance with pedigree 0.0407, pedigree (1,3,5,3,1)
  EcoSpold01Location=GLO
  Literature Value.
  Uncertainty: data from an US-EPA LCA study
  properties: dry mass 1 kg, wet mass 1 kg
- lead in car shredder residue: 0 kg; source Socolof M. L. 2001; pedigree (1,1,1,1,1)
  (same comment as for hazardous waste, for incineration)
  production volume 0 kg
    (same comment as for hazardous waste, for incineration)
  properties: wet mass 1 kg, dry mass 1 kg
- diethyl ether, without water, in 99.95% solution state: 0 kg; source Socolof M. L. 2001; pedigree (1,1,1,1,1)
  Literature Value.
  EcoSpold01Location=RER
  Uncertainty: data from an US-EPA LCA study
  properties: dry mass 1 kg, carbon content, fossil 0.648649, wet mass 1 kg, heating value, net 35.99 MJ
- electricity, medium voltage: 1.22662 kWh; source Socolof M. L. 2001; lognormal variance with pedigree 0.0407, pedigree (1,3,5,3,1)
  EcoSpold01Location=CN
  Estimation, based on literature.
  Uncertainty: data from an US-EPA LCA study
- steel, chromium steel 18/8, hot rolled: 0.02495 kg; source Socolof M. L. 2001; lognormal variance with pedigree 0.0407, pedigree (1,3,5,3,1)
  Proxy with literature value, to represent steel, chromium steel is used.
  EcoSpold01Location=RER
  Uncertainty: data from an US-EPA LCA study
  properties: dry mass 1 kg, carbon content, fossil 0.0008, wet mass 1 kg
  note on carbon content, fossil: Stainless steel model is the grade 304 steel (18/8 stainless, 18% chromium 8% nickel; max. 0.08% C)
- waste polypropylene: 0 kg; source Socolof M. L. 2001; pedigree (1,1,1,1,1)
  (same comment as for hazardous waste, for incineration)
  production volume 0 kg
    (same comment as for hazardous waste, for incineration)
  properties: water content 0.189061, wet mass 1 kg, dry mass 0.841 kg, heating value, net 32.78 MJ, carbon content, fossil 0.825208
  note on heating value, net: Value assumed for all polypropylene products. Source: Phyllis2, database for (treated) biomass, algae, feedstocks for biogas production and biochar, https://phyllis.nl/Biomass/View/1186, ECN.TNO
- heat, district or industrial, natural gas: 0.00037489 MJ; source Socolof M. L. 2001; lognormal variance with pedigree 0.0407, pedigree (1,3,5,3,1)
  EcoSpold01Location=RER
  Literature Value.
  Uncertainty: data from an US-EPA LCA study
  properties: heating value, net 1 MJ
- ethanol, without water, in 99.7% solution state, from ethylene: 0 kg; source Socolof M. L. 2001; pedigree (1,1,1,1,1)
  Literature Value.
  EcoSpold01Location=RER
  Uncertainty: data from an US-EPA LCA study
  properties: heating value, net 31.58 MJ, wet mass 1 kg, carbon content, fossil 0.521739, dry mass 1 kg
- glass tube, borosilicate: 0.04099 kg; source Socolof M. L. 2001; lognormal variance with pedigree 0.0407, pedigree (1,3,5,3,1)
  EcoSpold01Location=DE
  Proxy with literature value, to represent glass, glass tube, borosilicate is used.
  Uncertainty: data from an US-EPA LCA study
  properties: wet mass 1 kg, dry mass 1 kg
- inert waste, for final disposal: 0 kg; source Socolof M. L. 2001; pedigree (1,1,1,1,1)
  (same comment as for waste paperboard)
  production volume 0 kg
    (same comment as for hazardous waste, for incineration)
  properties: dry mass 0.995 kg, wet mass 1 kg, water content 0.00502513
- polyethylene terephthalate, granulate, amorphous: 0.027129 kg; source Socolof M. L. 2001; lognormal variance with pedigree 0.0407, pedigree (1,3,5,3,1)
  EcoSpold01Location=RER
  Literature Value.
  Uncertainty: data from an US-EPA LCA study
  properties: dry mass 1 kg, wet mass 1 kg, carbon content, fossil 0.625, heating value, net 22.95 MJ
  note on carbon content, fossil: Polymer of the ethylen terephtalate monomer (C10H8O4)n (ecoinvent v2.2 report 11_II), MW=192 g/mol
- chemical, inorganic: 0.00020743 kg; source Socolof M. L. 2001; lognormal variance with pedigree 0.0407, pedigree (1,3,5,3,1)
  Proxy with literature value, to represent 50% of “unspecified ancillary materials”, chemicals inorganics is used.
  EcoSpold01Location=GLO
  Uncertainty: data from an US-EPA LCA study
  properties: carbon content, fossil 0.003, wet mass 1 kg, dry mass 1 kg
  note on carbon content, fossil: This dataset is an unweighted average of 20 inorganic substances (listed in Tab 88.1, ecoinvent v2.2 report 8, part II), being part of the top100 chemicals included in this database. The C-content has also been calculated as an unweighted average of the C content of the substances composing this dataset.
- hazardous waste, for underground deposit: 0 kg; source Socolof M. L. 2001; pedigree (1,1,1,1,1)
  Literature Value.
  EcoSpold01Location=DE
  Uncertainty: data from an US-EPA LCA study - approximated with existing waste process
  production volume 0 kg
    (same comment as for hazardous waste, for incineration)
  properties: carbon content, fossil 0.554667, wet mass 1 kg, dry mass 1 kg
  note on carbon content, fossil: Tab A.6, ecoinvent v2.2 report 13_I, average hazardous waste composition was used, and referred to 0% water mass. No waste-specific emission are currently inventoried for underground deposits. Accordingly, no waste composition must be specified. For generic, average waste to underground deposit deposition in a 200 liter steel drum without cement solidification is assumed (ecoinvent v2.2 report 13_I).
- hazardous waste, for incineration: -0.00216793, -5.66684e-5, -0.0045081 kg (3 entries); source Socolof M. L. 2001; lognormal variance with pedigree 0.1107, pedigree (1,3,5,3,4)
  (same comment as for hazardous waste, for incineration)
  production volume 0.0067327 kg
- argon, liquid: 6.0813e-6, 2.88687e-5 kg (2 entries); source Socolof M. L. 2001; lognormal variance with pedigree 0.0407, pedigree (1,3,5,3,1)
  EcoSpold01Location=RER
  Literature Value.
  Uncertainty: data from an US-EPA LCA study
- waste polyethylene: -9.52065e-5, -7.33986e-6, -3.03162e-6, -2.87881e-6, -0.000109852, -1.22474e-6, -5.55102e-7, -0.000769022 kg (8 entries); source Socolof M. L. 2001; lognormal variance with pedigree 0.1107, pedigree (1,3,5,3,4)
  (same comment as for hazardous waste, for incineration)
  production volume 0.00098911 kg
- waste paperboard: -1.9322e-6, -1.20144e-7, -4.34129e-7, -7.83595e-8, -7.86772e-7, -4.23312e-8, -1.05055e-8, -1.46156e-5 kg (8 entries); source Socolof M. L. 2001; lognormal variance with pedigree 0.1107, pedigree (1,3,5,3,4)
  (same comment as for waste paperboard)
  production volume 1.802e-5 kg
- waste plastic, industrial electronics: -2.26126e-5, -0.00149679 kg (2 entries); source Socolof M. L. 2001; lognormal variance with pedigree 0.1107, pedigree (1,3,5,3,4)
  (same comment as for waste paperboard)
  production volume 0.0015194 kg
- lead in car shredder residue: -1.20388e-9, -7.96871e-8 kg (2 entries); source Socolof M. L. 2001; lognormal variance with pedigree 0.1107, pedigree (1,3,5,3,4)
  (same comment as for hazardous waste, for incineration)
  production volume 8.0891e-8 kg
- diethyl ether, without water, in 99.95% solution state: 1.69609e-5, 7.49201e-5 kg (2 entries); source Socolof M. L. 2001; lognormal variance with pedigree 0.0407, pedigree (1,3,5,3,1)
  Literature Value.
  EcoSpold01Location=RER
  Uncertainty: data from an US-EPA LCA study
- waste polypropylene: -0.000259223, -1.99846e-5, -8.25436e-6, -7.83828e-6, -0.000299098, -3.33467e-6, -1.5114e-6, -0.00209385 kg (8 entries); source Socolof M. L. 2001; lognormal variance with pedigree 0.1107, pedigree (1,3,5,3,4)
  (same comment as for hazardous waste, for incineration)
  production volume 0.0026931 kg
- ethanol, without water, in 99.7% solution state, from ethylene: 1.42071e-5, 3.16349e-5 kg (2 entries); source Socolof M. L. 2001; lognormal variance with pedigree 0.0407, pedigree (1,3,5,3,1)
  Literature Value.
  EcoSpold01Location=RER
  Uncertainty: data from an US-EPA LCA study
- inert waste, for final disposal: -9.75138e-9, -1.49785e-6 kg (2 entries); source Socolof M. L. 2001; lognormal variance with pedigree 0.1107, pedigree (1,3,5,3,4)
  (same comment as for waste paperboard)
  production volume 1.5076e-6 kg
- hazardous waste, for underground deposit: -1.61175e-8, -2.50223e-7 kg (2 entries); source Socolof M. L. 2001; lognormal variance with pedigree 0.1107, pedigree (1,3,5,3,4)
  (same comment as for hazardous waste, for underground deposit)
  production volume 2.6634e-7 kg

## Inputs from nature
- Water, unspecified natural origin [natural resource, in water]: 0.1901 m3; name water_UNO_input; source Socolof M. L. 2001; lognormal variance with pedigree 0.0407, pedigree (1,3,5,3,1)
  Literature Value.
  Uncertainty: data from an US-EPA LCA study

## Emissions to nature
- Nitrogen oxides [air, urban air close to ground]: 0.028911 kg; source Socolof M. L. 2001; lognormal variance with pedigree 0.0807, pedigree (1,3,5,3,1)
  Literature Value.
  Uncertainty: data from an US-EPA LCA study
- Water [water, unspecified]: 0.0834539 m3; name water_to_water_unspecified; = water_UNO_input*(1-fraction_PW_to_air)-(wastewater_output*-1); lognormal variance with pedigree 0.0807, pedigree (2,2,5,1,1)
  Calculated value based on literature values and expert opinion. See comments in the parametres' comment field.
  property fraction, origin: fresh water 0; name fraction_origin_fresh_water_Ww
  property fraction, origin: salt water 0; name fraction_origin_salt_water_Ww
  property fraction, origin: unspecified 1; name fraction_origin_unspecified_Ww
  property water in wet mass 1000 kg; name WWM
  property carbon content, non-fossil 0; name C_content_non_fossil
  property carbon content, fossil 0; name C_content_fossil
  property dry mass 0 kg; name DM
  property wet mass 1000 kg; name WM
- Diethyl ether [air, urban air close to ground]: 9.1683e-5 kg; source Socolof M. L. 2001; lognormal variance with pedigree 0.1607, pedigree (1,3,5,3,1)
  Literature Value.
  Uncertainty: data from an US-EPA LCA study
- Ethanol [air, urban air close to ground]: 4.5842e-5 kg; source Socolof M. L. 2001; lognormal variance with pedigree 0.1607, pedigree (1,3,5,3,1)
  Literature Value.
  Uncertainty: data from an US-EPA LCA study
- Water [air, unspecified]: 0.0115961 m3; name water_to_air_unspecified; = (water_UNO_input*fraction_PW_to_air); lognormal variance with pedigree 0.0807, pedigree (2,2,5,1,1)
  (same comment as for Water)
  property fraction, origin: salt water 0; name fraction_origin_salt_water
  property fraction, origin: unspecified 1; name fraction_origin_unspecified
  property fraction, origin: fresh water 0; name fraction_origin_fresh_water

## Sampling procedure
literature & own estimations

## Extrapolations
This dataset has been extrapolated from year 2001 to the year of the calculation (2021). The uncertainty has been adjusted accordingly.

## Review by Jürgen Sutter 2007-11-08
passed.
