# wood preservative production, organic, indoor use, occasionally wet

Dataset: EcoSpold 2, unit process
Geography: GLO
Time period: 2012-01-01 to 2021-12-31
Technology level: current
Classification: ISIC rev.4 ecoinvent: 2021:Manufacture of pesticides and other agrochemical products
Tags: Swiss brush-up completed
Scenario: Business-as-Usual
System model: Allocation, cut-off by classification
Generated by: Frank Werner
Database: ecoinvent
isCopyrightProtected: true
accessRestrictedTo: 1

## General comment
According to EN 335-1:2005, five use classes are distinguished for chemical wood protection based on the general exposure of wood in its application, wetting regime in service and the biological agents to be expected. This exposure scenario determines the potentially vulnerable zone of wood and the required treatment for the application of the wood preservative (see table)

## Included activities start
From reception of chemicals at the factory gate

## Included activities end
The datasets covers the components and preparation of a typical water-based/organic solvent based [as applicable] wood preservative for the use class according to EN 335-1:2006 as indicated in the name of the dataset, ready to be packed. In addition in contains an estimate for electricity consumption and for infrastructure. Packaging is not included

## Geography
Data referring to (Central) European conditions

## Reference product
- wood preservative, organic, indoor use, occasionally wet: 1 kg; CPC 345: Miscellaneous basic chemical products; By-product classification allocatable product
  production volume 4.86667e7 kg; name p_preservative; = 3.65E9*0.5*0.08/3
    Using the GLO value of 3.65E09 kg preservative derived from Vlosky (2009), the distribution on solvent-based (8%), the 50% non-pressure methods, and the assumption of equal distribution over the 3 use classes
  property price 0.570696 EUR2005
    Calculated based on inputs: The price of the product has been calculated as a sum of the values of the material and energy inputs for this product. This value is therefore a rough estimation. It may underestimate the real price since there are additional expenses when producing any product. These expences can include for example labour costs, treatment of waste materials and profit for the producer. Please consider carefully whether this level of data quality is acceptable for your application.
  property carbon content 0.8319
    carbon content on a dry matter basis (reserved; not for manual entry)
  properties: wet mass 1 kg, water in wet mass 0 kg, water content 0, carbon content, fossil 0.8319, carbon content, non-fossil 0, dry mass 1 kg, carbon allocation 0.8319 kg

## Inputs from technosphere
- electricity, medium voltage: 0.0428 kWh; source Althaus H.-J. 2007; lognormal variance with pedigree 0.235, pedigree (5,5,5,5,5)
  assumed to equal as for solvent based paint
  properties: UVEK_link_8 4417, UVEK_link_9 4433, UVEK_link_1 1785, UVEK_relative_amount_9 14.0187, UVEK_relative_amount_8 2.33645, UVEK_relative_amount_1 1
  note on UVEK_link_8: This link has been introduced to model transport specifically for the SAM model; to be used only in special submissions in coordination with ecoinvent and the Swiss FOEN.
  note on UVEK_link_1: to be used only in special submissions in coordination with ecoinvent and the Swiss FOEN
  note on UVEK_relative_amount_9: Scaling factor = amount of transport in corresponding KBOB dataset/amount of this input from technosphere. Source for transport distance: Life Cycle Inventories of Wood as Fuel and Construction Material/2007/Werner F. To be used only in special submissions in coordination with ecoinvent and the Swiss FOEN
- cyclic N-compound: 0.006 kg; name m_tebuconazole
  active agent
  properties: wet mass 1 kg, UVEK_relative_amount_1 1, dry mass 1 kg, UVEK_link_1 688, carbon content, fossil 0.641962
- dipropylene glycol monomethyl ether: 0 kg; source Empa St. Gallen 2012; pedigree (1,1,1,1,1)
  solvent
  properties: UVEK_relative_amount_1 1, wet mass 1 kg, dry mass 1 kg, UVEK_link_1 762, carbon content, fossil 0.567568, heating value, net 30.27 MJ
- hazardous waste, for incineration: 0 kg; name m_hazardous_waste; source Nemecek, T. 2007; pedigree (1,1,1,1,1)
  estimated as 200 kg/t active ingredient
  production volume 0 kg
    Calculated from production volume of reference product using the relative outputs.
  properties: wet mass 1 kg, water content 0.333333, dry mass 0.75 kg, heating value, net 17 MJ, carbon content, fossil 0.554667, UVEK_relative_amount_1 -1, UVEK_link_1 965
  note on heating value, net: Value taken from the general comment of the treatment dataset.
- naphtha: 0 kg; source Empa St. Gallen 2012; pedigree (1,1,1,1,1)
  solvent, partly treated with hydrogen, partly hydrodesulfurized
  property carbon content, non-fossil 0; name C_content_non_fossil
  property water in wet mass 0 kg; name WWM
  property wet mass 1 kg; name WM
  property water content 0; name water_content
  property dry mass 1 kg; name DM
  property carbon content, fossil 0.919743; name C_content_fossil
  properties: UVEK_link_1 3072, UVEK_relative_amount_1 1, heating value, net 45 MJ
- chemical, organic: 0.00586 kg; name m_chemical_org; source Empa St. Gallen 2012; lognormal variance with pedigree 0.235, pedigree (5,5,5,5,5)
  active agents
  properties: wet mass 1 kg, carbon content, fossil 0.628, UVEK_link_1 432, dry mass 1 kg, UVEK_relative_amount_1 1, heating value, net 19.03 MJ
- pyrethroid-compound: 0.0015 kg; name m_permetrine; lognormal variance with pedigree 0.235, pedigree (5,5,5,5,5)
  active agent
  properties: wet mass 1 kg, carbon content, fossil 0.623, UVEK_relative_amount_1 1, UVEK_link_1 3716, dry mass 1 kg
- chemical factory, organics: 4e-10 unit; source Althaus H.-J. 2007; lognormal variance with pedigree 0.76, pedigree (5,5,5,5,5)
  assumed to be equal as for paint production
  properties: UVEK_relative_amount_1 1, UVEK_link_1 430
- dipropylene glycol monomethyl ether: 0.0074124, 0.0351876 kg (2 entries); source Empa St. Gallen 2012; lognormal variance with pedigree 0.235, pedigree (5,5,5,5,5)
  solvent
- hazardous waste, for incineration: -0.000860384, -2.24899e-5, -0.00178913 kg (3 entries); source Nemecek, T. 2007; lognormal variance with pedigree 0.203, pedigree (4,5,5,5,5)
  estimated as 200 kg/t active ingredient
  production volume 130037 kg
- naphtha: 0.144353, 0.00451952, 0.104871, 0.00109513, 0.0137161, 0.0284449, 0.6466 kg (7 entries); source Empa St. Gallen 2012; lognormal variance with pedigree 0.235, pedigree (5,5,5,5,5)
  solvent, partly treated with hydrogen, partly hydrodesulfurized
  properties: UVEK_link_1 3072, wet mass 1 kg, dry mass 1 kg, carbon content, fossil 0.919743, UVEK_relative_amount_1 1, heating value, net 45 MJ

## Sampling procedure
Ideal-type formulation of wood preservative for a water-/solvent-based [as applicable] wood preservative for the respective use class

## Extrapolations
This dataset has been extrapolated from year 2012 to the year of the calculation (2021). The uncertainty has been adjusted accordingly.
