# beef cattle production on pasture

Dataset: EcoSpold 2, unit process
Geography: ZA
Time period: 2016-01-01 to 2021-12-31
Technology level: current
Classification: ISIC rev.4 ecoinvent: 0141:Raising of cattle and buffaloes
Scenario: Business-as-Usual
System model: Allocation, cut-off by classification
Generated by: Philippa Notten
Published in: Russo, V 2017
Database: ecoinvent
isCopyrightProtected: true
accessRestrictedTo: 1

## General comment
This dataset represents the production of 1 kg of live weight beef cattle on pasture in South Africa. Free range production accounts for only a small proportion of beef in South Africa (less than 5%). In this dataset, breeding cattle at the end of their productive lives are considered part of the product, i.e. the beef product is 80% high-grade beef and 20% low-grade beef. Culled cows are replaced by some of the heifers, with all other calves raised on pasture and slaughtered at two years of age. Culled breeding cattle are assumed to be slaughtered at eight years of age.
Direct emissions from the cattle (enteric methane), as well as direct and indirect emissions from manure (ammonia, nitrous oxide and methane), are calculated using best available methods (IPCC) with regional adaptations. All manure is deposited on pasture and is not collected (i.e. cattle manure as an organic fertiliser of the pasture is only accounted for in terms of field emissions). Cattle are predominantly raised on natural pasture, thus there is no irrigation nor fertiliser, seed etc. included in the dataset. Emissions of heavy metals to soil and surface water estimated from manure left on pasture during grazing is after Nemecek and Schnetzer (2012). The factors applied in the equations are not South African specific and the calculated emissions are thus highly uncertain (especially leached emissions where South African conditions are likely to be very different).

## Included activities start
This activity starts at the start of the cattle breeding season.

## Included activities end
This activity ends with steers, heifers, cows and bulls at the farm gate, ready to be sent to slaughterhouses as live weight. Emissions from cattle and field emissions are included, as are their requirements (feed supplements and water). Pasture is natural, thus minimal maintenance is assumed to be required (some tractor and trailer use is included, but no fertiliser, seed etc.).

## Geography
South African values: Not applicable worldwide.

## Technology
Data and assumptions reflect current farming practices in South Africa

## Time period
Period indicated in the reference.

## Parameters
- fraction, process water, to air: 0.15 dimensionless; name fraction_PW_to_air
- fraction, process water to water, to surface water: 0.85 dimensionless; name fraction_PWtoW_to_surface_water

## Reference product
- cattle for slaughtering, live weight: 1 kg; CPC 02111: Cattle; By-product classification allocatable product
  Cattle for slaughtering includes finished cattle and culled cows. Grass-finished cattle are slaughtered at 24 months of age. All cattle are assumed to be fattened and slaughtered at 24 months other than those heifers that are retained as breeding stock. These heifers replace cows that do not calf, with an average herd replacement rate of 16% across the sample farms.
  production volume 8.27064e7 kg; name REF_PRODUCT_PV
    National total based on cattle slaughter figures for 2015/2016 reported by Levy Admin (2016). The Levy Admin claims that they collect 98.8% of levy fees due. The breakdown in the source of cattle slaughtered is based on the breakdown in cattle grades reported by members of the Red Meat Abattoirs Association of South Africa (2017). It is assumed that the members are representative of the national average. It is further assumed that feedlot cattle are all A-grade cattle, and cull cows are all C-grade (Strydom et al., 2015 and Strydom, 2015).
    Reference(s): Levy Admin (2016) MSMS Data Nov. 2015 to 2016. Available at: http://levyadmin.co.za/wp-content/uploads/1610-4LevySlaugteringsFinal.pdf. (Accessed September 2017); RMAA (2017) Price Information Report - Red Meat Abattoir Association. Available at: http://rvav.co.za/priceinformationreport/. (Accessed September 2017); Strydom, P.E., Frylinck, L., van Heerden, S.M., Hope-Jones, M., Hugo, A., Webb, E.C., Moholisa, E., Liebenberg, B.E. & Sehoole, O.C. (2015) Sources of variation in quality of South African beef: case studies in relation to the red meat classification system, South African Journal of Animal Science (45) 289-301; Strydom, P.E. (2015) The SA beef classification system in 2015 - a critical review of age classification, Red Meat Research and Development South Africa. Available at: http://www.rmrdsa.co.za/Portals/0/Carcass%20Classification/SA%20Classification%20Critical%20review.pdf.
  property price 2.8 EUR2005
    Current price for A Grade cattle (feedlot) is R 48/kg and for C Grade (cull cows) R 41/kg. Suggested price [7]: 2.8 /kg. Source: http://www.mpo.co.za/wp-content/uploads/2018/04/Agri-Trends-23-April-2018-GrainsOilseedsLlivestock-Fibre-.pdf
  property energy content 14.9367 MJ
    Not geography specific. Energy content calculated from animal fat and protein composition and energy content for animal fat and protein of 39.3 and 23.6 MJ/kg, respectively.
    Johnson, I.R. et al. (2012). J. Anim. Sci. 90(13):4741-475.
    Williams, C.B. (2005). J. Anim. Sci. 83(6):1262-1266.
  property carbon content, non-fossil 0.4928
    Not geography specific. Calculated from live weight empty body composition in fat and protein (
    Johnson, I.R. et al. (2012). J. Anim. Sci. 90(13):4741-475 ; Williams, C.B. (2005). J. Anim. Sci. 83(6):1262-1266) and from C content of nutrients (protein, fat) according to A.D. Kay and T. Vrede ("Evolutionary and Biochemical Aspects", in Global Ecology, 2010, Elsevier B.V., S.E. Jørgensen Ed.).
  property carbon content 0.4928
    carbon content on a dry matter basis (reserved; not for manual entry)
  properties: dry mass 0.6 kg, wet mass 1 kg, carbon content, fossil 0, water content 0.666667, water in wet mass 0.4 kg, carbon allocation 0.29568 kg

## Inputs from technosphere
- sodium chloride, powder: 0.245 kg; lognormal variance with pedigree 0.0098, pedigree (2,3,4,1,1)
  Component of feed supplement. Feed supplementation required by cattle taken from requirements for farming in the KwaZulu-Natal region of South Africa (industry data), with most natural pastures in South Africa of insufficient quality to support year-round grazing. Supplementation changes with the season (typically winter and summer) and amounts required differ with animal type (herd broken down into weaners, cows and bulls). Farmers either purchase pre-mixed supplements and licks, or make up their own. Supplements are predominantly salt, urea and a roughage component (bagasse or maize). For the roughage component, some farmers use brown grass or silage saved over from the good season. The composition of mineral licks and pre-mixed supplements was provided by various farmers and suppliers in the region.
  properties: wet mass 1 kg, dry mass 1 kg
- sulfur: 0.00338 kg; lognormal variance with pedigree 0.0152, pedigree (2,3,4,1,1)
  Component of feed supplement (sulfur). Feed supplementation required by cattle taken from requirements for farming in the KwaZulu-Natal region of South Africa (industry data), with most natural pastures in South Africa of insufficient quality to support year-round grazing. Supplementation changes with the season (typically winter and summer) and amounts required differ with animal type (herd broken down into weaners, cows and bulls). Farmers either purchase pre-mixed supplements and licks, or make up their own. Supplements are predominantly salt, urea and a roughage component (bagasse or maize). For the roughage component, some farmers use brown grass or silage saved over from the good season. The composition of mineral licks and pre-mixed supplements was provided by various farmers and suppliers in the region.
  properties: wet mass 1 kg, dry mass 1 kg
- inorganic phosphorus fertiliser, as P2O5: 0.06287 kg; lognormal variance with pedigree 0.0098, pedigree (2,3,4,1,1)
  Component of feed supplement (triple superphosphate). Feed supplementation required by cattle taken from requirements for farming in the KwaZulu-Natal region of South Africa (industry data), with most natural pastures in South Africa of insufficient quality to support year-round grazing. Supplementation changes with the season (typically winter and summer) and amounts required differ with animal type (herd broken down into weaners, cows and bulls). Farmers either purchase pre-mixed supplements and licks, or make up their own. Supplements are predominantly salt, urea and a roughage component (bagasse or maize). For the roughage component, some farmers use brown grass or silage saved over from the good season. The composition of mineral licks and pre-mixed supplements was provided by various farmers and suppliers in the region.
  properties: wet mass 1 kg, dry mass 1 kg
- transport, tractor and trailer, agricultural: 0.29 metric ton*km; lognormal variance with pedigree 0.1292, pedigree (2,3,4,1,1)
  There is no cultivation as the pasture for grazing is natural. Diesel use on the farm is thus for general production activities, such as maintenance, feeding and fence checking. It is assumed that the field work is carried out in a tractor and trailer. Diesel consumption on the farm is estimated at 4,000 litres per year. The equivalent tonnes.km were calculated using the diesel consumption of the dataset: transport, tractor and trailer, agricultural (43.6g diesel/tonne*km)
- urea: 0.144728 kg; lognormal variance with pedigree 0.0098, pedigree (2,3,4,1,1)
  The exchange has been updated from 'urea, as N' into 'urea' and therefore its amount has been scaled (multiplied) from 0.0675 kg by 2.1438 kg of 'urea' per kg of 'urea, as N'. Original comment of the exchange is: Component of feed supplement. Feed supplementation required by cattle taken from requirements for farming in the KwaZulu-Natal region of South Africa (industry data), with few natural pastures in South Africa of sufficient quality to support year-round grazing. Supplementation changes with the season (typically winter and summer) and amounts required differ with animal type (herd broken down into weaners, cows and bulls). Farmers either purchase pre-mixed supplements and licks, or make up their own. Supplements are predominantly salt, urea and a roughage component (bagasse or maize). For the roughage component, some farmers use brown grass or silage saved over from the good season. The composition of mineral licks and pre-mixed supplements was provided by various farmers and suppliers in the region.
  properties: wet mass 1 kg, dry mass 1 kg, carbon content, fossil 0.2
- molasses, from sugar beet: 0.10706 kg; lognormal variance with pedigree 0.0147, pedigree (2,2,4,1,1)
  Component of feed supplement (substrate). The substrate is typically sugar cane bagasse and/or molasses. As neither of these substances are in the ecoinvent database, sugar beet molasses is used as an approximation. Feed supplementation required by cattle taken from requirements for farming in the KwaZulu-Natal region of South Africa (industry data), with most natural pastures in South Africa of insufficient quality to support year-round grazing. Supplementation changes with the season (typically winter and summer) and amounts required differ with animal type (herd broken down into weaners, cows and bulls). Farmers either purchase pre-mixed supplements and licks, or make up their own. Supplements are predominantly salt, urea and a roughage component (bagasse or maize). For the roughage component, some farmers use brown grass or silage saved over from the good season. The composition of mineral licks and pre-mixed supplements was provided by various farmers and suppliers in the region.
  properties: wet mass 1 kg, dry mass 0.82 kg, water content 0.219512, carbon content, non-fossil 0.39592
- maize grain: 0.08101 kg; lognormal variance with pedigree 0.0098, pedigree (2,3,4,1,1)
  (same comment as for sodium chloride, powder)
  properties: carbon content, non-fossil 0.46957, water content 0.162791, dry mass 0.86 kg, wet mass 1 kg

## Inputs from nature
- Occupation, grassland, natural, for livestock grazing [natural resource, land]: 407 m2*year; lognormal variance with pedigree 0.0112, pedigree (2,3,4,1,1)
  Natural pasture for grazing. Stocking rate reported by farms varied from 3.0 to 11 hectares per live unit (adult herd excluding calved), with an average value of 5 ha/live unit. Beef farming occurs predominantly in the grassland regions of SA, so this is taken as the pre-farming land use. A weighted time on pasture of 3.6 years is applied (oxen are slaughtered at 2 years and breeding cows at 10 years of age).
- Transformation, from grassland, natural, for livestock grazing [natural resource, land]: 128 m2; lognormal variance with pedigree 0.0172, pedigree (2,3,4,1,1)
  Natural pasture for grazing. Stocking rate reported by farms varied from 3.0 to 11 hectares per live unit (adult herd excluding calved), with an average value of 5 ha/live unit. Beef farming occurs predominantly in the grassland regions of SA, so this is taken as the pre-farming land use.
- Transformation, to grassland, natural, for livestock grazing [natural resource, land]: 128 m2; lognormal variance with pedigree 0.0172, pedigree (2,3,4,1,1)
  (same comment as for Transformation, from grassland, natural, for livestock grazing)
- Water, unspecified natural origin [natural resource, in ground]: 0.0513 m3; name drinking_water; lognormal variance with pedigree 0.0098, pedigree (2,3,4,1,1)
  Drinking water for cattle. The daily water requirement for cattle varied from 30 to 95 litres/head/day depending on the farm (average of 52 litres/head/day). Water is sourced from rivers, farm dams or boreholes, depending on the region.

## Emissions to nature
- Mercury [water, surface water]: 8.95e-9 kg; lognormal variance with pedigree 0.0992, pedigree (2,3,4,1,1)
  Emissions of heavy metals to soil and surface water estimated from manure left on pasture during grazing based on Nemecek and Schnetzer (2012). The factors applied in the equations are not South African specific and the calculated emissions are thus highly uncertain (especially leached emissions where South African conditions are likely to be very different). A manure generation rate of 1.82 tonnes/(head.year) for commercial cattle in field is applied in the dataset (DEA, 2017). As the pasture is natural, there are no associated fertiliser, seed and pesticide applications. There is however removal of biomass through grazing. Reference(s): Nemecek and Schnetzer (2012) Methods of Assessment of Direct Field Emissions for LCIs of Agricultural Production Systems, Life cycle inventories of Swiss and European agricultural production systems. Reference(s): DEA (2017) Unlocking Barriers and Opportunities for Land-use Based Climate-Change Mitigation Activities in South Africa, Department of Environmental Affairs of South Africa, Available at: https://www.environment.gov.za/sites/default/files/reports/unlockingbarriers_land-usebasedclimatechangemitigation.pdf. (Accessed September 2017),
- Copper, ion [water, surface water]: 2.73e-5 kg; lognormal variance with pedigree 0.0992, pedigree (2,3,4,1,1)
  (same comment as for Mercury)
- Cadmium, ion [water, surface water]: 2.28e-8 kg; lognormal variance with pedigree 0.0992, pedigree (2,3,4,1,1)
  (same comment as for Mercury)
- Nickel [soil, agricultural]: 7.66e-6 kg; lognormal variance with pedigree 0.0492, pedigree (2,3,4,1,1)
  (same comment as for Mercury)
- Cadmium [soil, agricultural]: 3.21e-7 kg; lognormal variance with pedigree 0.0492, pedigree (2,3,4,1,1)
  (same comment as for Mercury)
- Phosphate [water, surface water]: 0.00626 kg; lognormal variance with pedigree 0.0492, pedigree (2,3,4,1,1)
  Emissions of phosphates through run-off from manure deposited on pasture is from on Nemecek and Schnetzer (2012). The factors applied in the equations are not South African specific and the calculated emissions are thus highly uncertain (especially run-off emissions where South African conditions are likely to be very different). A manure generation rate of 1.82 tonnes/(head.year) for commercial cattle in field is applied in the dataset (DEA, 2017). As the pasture is natural there are no associated fertiliser applications. Reference(s): Nemecek and Schnetzer (2012) Methods of Assessment of Direct Field Emissions for LCIs of Agricultural Production Systems, Life cycle inventories of Swiss and European agricultural production systems. Reference(s): DEA (2017) Unlocking Barriers and Opportunities for Land-use Based Climate-Change Mitigation Activities in South Africa, Department of Environmental Affairs of South Africa, Available at: https://www.environment.gov.za/sites/default/files/reports/unlockingbarriers_land-usebasedclimatechangemitigation.pdf. (Accessed September 2017)
- Lead [water, surface water]: 2.17e-7 kg; lognormal variance with pedigree 0.0992, pedigree (2,3,4,1,1)
  (same comment as for Mercury)
- Dinitrogen monoxide [air, non-urban air or from high stacks]: 0.0204 kg; source du Toit C.J.L. 2013; lognormal variance with pedigree 0.0122, pedigree (2,3,4,1,1)
  Direct and indirect emissions of N2O from manure deposited on pasture during grazing. Calculations following the IPCC guidelines using a combination of default IPCC and country specific input values. Emission factor per animal (bull, calving cows, oxen and calves), taking into account field types and digestibilities, pasture feed characteristics, and livestock weight and weight gain, from du Toit et al., (2013). Herd composition from six sample farms. Oxen are slaughtered at 2 years of age, after being weaned at 7 months (farm data). Breeding cattle (cows and bulls) are assumed to be slaughtered at 8 years of age. Indirect N2O includes only that from deposition of N following volatilisation as ammonia and nitrates, i.e. does not include that from leaching or run-off of N, as this is assumed to be zero (no irrigation and grazing in generally dry areas). Reference(s): IPCC Guidelines for National Greenhouse Gas Inventories‚ Prepared by the National Greenhouse Gas Inventories Programme‚ IGES, Japan; du Toit C.J.L., Meissner H.H. and van Niekerk W.A. (2013) Direct Methane and Nitrous Oxide Emissions of South African Dairy and Beef Cattle, South African Journal of Animal Science, Volume 43 (3), pp 320-339
- Phosphorus [water, surface water]: 0.0113 kg; lognormal variance with pedigree 0.0492, pedigree (2,3,4,1,1)
  Emissions of phosphorous through soil erosion is from Nemecek and Schnetzer (2012). The factors applied in the equations are not South African specific and the calculated emissions are thus highly uncertain. A manure generation rate of 1.82 tonnes/(head.year) for commercial cattle in field is applied in the dataset (DEA, 2017). As the pasture is natural there are no associated fertiliser applications. Reference(s): Nemecek and Schnetzer (2012) Methods of Assessment of Direct Field Emissions for LCIs of Agricultural Production Systems, Life cycle inventories of Swiss and European agricultural production systems. Reference(s): DEA (2017) Unlocking Barriers and Opportunities for Land-use Based Climate-Change Mitigation Activities in South Africa, Department of Environmental Affairs of South Africa, Available at: https://www.environment.gov.za/sites/default/files/reports/unlockingbarriers_land-usebasedclimatechangemitigation.pdf. (Accessed September 2017)
- Zinc [soil, agricultural]: 0.000195 kg; lognormal variance with pedigree 0.0492, pedigree (2,3,4,1,1)
  (same comment as for Mercury)
- Chromium [soil, agricultural]: 2.09e-6 kg; normal variance with pedigree 0.0492, pedigree (2,3,4,1,1)
  (same comment as for Mercury)
- Mercury [soil, agricultural]: 5.79e-7 kg; lognormal variance with pedigree 0.0492, pedigree (2,3,4,1,1)
  (same comment as for Mercury)
- Chromium, ion [water, surface water]: 3.61e-5 kg; lognormal variance with pedigree 0.0992, pedigree (2,3,4,1,1)
  (same comment as for Mercury)
- Zinc, ion [water, surface water]: 6.69e-5 kg; lognormal variance with pedigree 0.0992, pedigree (2,3,4,1,1)
  (same comment as for Mercury)
- Copper [soil, agricultural]: 1.82e-5 kg; lognormal variance with pedigree 0.0492, pedigree (2,3,4,1,1)
  (same comment as for Mercury)
- Water [air, unspecified]: 0.007695 m3; = drinking_water*fraction_PW_to_air
- Methane, non-fossil [air, non-urban air or from high stacks]: 2.01859 kg; source du Toit C.J.L. 2013; lognormal variance with pedigree 0.0172, pedigree (2,3,4,1,1)
  Methane from enteric fermentation and manure management. Emission factor per animal (bull, calving cows, oxen and calves), taking into account field types and digestibilities, pasture feed characteristics, and livestock weight and weight gain, from du Toit et al., (2013). Herd composition from six sample farms. Oxen are slaughtered at 2 years of age, after being weaned at 7 months (farm data). Breeding cattle (cows and bulls) are assumed to be slaughtered at 8 years of age. Reference: du Toit C.J.L., Meissner H.H. and van Niekerk W.A. (2013) Direct Methane and Nitrous Oxide Emissions of South African Dairy and Beef Cattle, South African Journal of Animal Science, Volume 43 (3), pp 320-339
- Lead [soil, agricultural]: 6.89e-6 kg; lognormal variance with pedigree 0.0492, pedigree (2,3,4,1,1)
  (same comment as for Mercury)
- Water [water, surface water]: 0.043605 m3; = drinking_water* fraction_PWtoW_to_surface_water
- Ammonia [air, non-urban air or from high stacks]: 0.5048 kg; lognormal variance with pedigree 0.0172, pedigree (2,3,4,1,1)
  Ammonia emissions from manure left in field during grazing. Calculations following the IPCC guidelines using a combination of default IPCC and country specific input values. Emission factor per animal per day (bull, calving cows, oxen and calves), taking into account field types and digestibilities, pasture feed characteristics, and livestock weight and weight gain, from du Toit et al., (2013). Herd composition from six sample farms. Oxen are slaughtered at 2 years of age, after being weaned at 7 months (farm data). Breeding cattle (cows and bulls) are assumed to be slaughtered at 8 years of age. Reference(s): IPCC Guidelines for National Greenhouse Gas Inventories‚ Prepared by the National Greenhouse Gas Inventories Programme‚ IGES, Japan; du Toit C.J.L., Meissner H.H. and van Niekerk W.A. (2013) Direct Methane and Nitrous Oxide Emissions of South African Dairy and Beef Cattle, South African Journal of Animal Science, Volume 43 (3), pp 320-339

## Sampling procedure
Data from six sample farms provide the majority of activity data for the dataset. However, where more representative data are available (such as emission factors for methane and nitrous oxide developed for South Africa's national greenhouse gas inventory) these are applied instead. Other literature, national statistics, and discussions with industry experts are used to fill various data gaps. Emissions of phosphates and heavy metals from manure are estimated according to Nemecek and Schnetzer (2011).

## Extrapolations
This dataset has been extrapolated from year 2016 to the year of the calculation (2021). The uncertainty has been adjusted accordingly.
