# treatment of spent perfluoropentane

Dataset: EcoSpold 2, unit process
Geography: GLO
Time period: 2008-01-01 to 2021-12-31
Technology level: current
Classification: ISIC rev.4 ecoinvent: 3822:Treatment and disposal of hazardous waste
Scenario: Business-as-Usual
System model: Allocation, cut-off by classification
Generated by: Karin Treyer
Database: ecoinvent
isCopyrightProtected: true
accessRestrictedTo: 1

## General comment
This dataset for used perfluoropentane (C5F12) which details the choice of a proxy substance in order to ensure the C5F12 to go into the right waste treatment process. So this dataset is a temporary "translation" process for better quality of the datasets using "used perfluoropentane" as an exchange.

## Included activities start
This dataset is a first proxy for assigning the appropriate treatment process to used perfluoropentane.

## Included activities end
This dataset doesn't include any specifications, but only a proxy waste/by-product as input.

## Reference product
- used perfluoropentane: -1 kg; By-product classification Waste; CPC 39931: Pharmaceutical waste; CAS 678-26-2
  production volume 1e7 kg; name apv_perfluoropentane
    Proxy - This value is not a true value and therefore has no correlation with reality. It should be adapted when working on this dataset.
  property price 0 EUR2005
    Waste products are assigned a price of zero as they are assumed to require further treatment.
  property density 1.63 kg/l; name density
  property boiling point 304.15 K; name boiling_point
  property fluorine content 0.79; name F_content
    fluorine content on a dry matter basis
  property heating value, net 6.32 MJ
    LHV is calculated based on the elemental composition of the substance. Based on the name of the substance, the chemical formula of the substance is manually found to be: C6H15N.
  property carbon content, fossil 0.21; name C_content_fossil
    fossil carbon content on a dry matter basis. Perfluoropentane: C5 F12 with C: 12g/mol and F: 19g/mol.

## Inputs from technosphere
- hazardous waste, for incineration: 0 kg; pedigree (1,1,1,1,1)
  Proxy - This input is only a proxy exchange in order to bring the perfluoropentane in an appropriate treatment process.
  Uncertainty: This input is only a proxy for the whole transfer of used perfluoropentane into an appropriate treatment process.
  production volume 0 kg
    Calculated value.
  properties: heating value, net 17 MJ, carbon content, fossil 0.554667, dry mass 0.75 kg, water content 0.333333, wet mass 1 kg
  note on heating value, net: Value taken from the general comment of the treatment dataset.
  note on carbon content, fossil: Tab A.6, ecoinvent v2.2 report 13_I. C content has been calculated after data in the tables, and then referred to 1 kg DM
- hazardous waste, for incineration: -0.322, -0.00841689, -0.669583 kg (3 entries); lognormal variance with pedigree 0.0806, pedigree (1,1,5,1,4)
  (same comment as for hazardous waste, for incineration)
  production volume 1e7 kg

## Extrapolations
This dataset has been extrapolated from year 2008 to the year of the calculation (2021). The uncertainty has been adjusted accordingly.

## Review by Gabor Doka 2012-01-11
passed
proxy disposal dataset

## Review by Bo Weidema 2012-01-11
This dataset has only been reviewed by two editors. Since this is a treatment dataset, this deviation from normal procedures is acceptable.
