# planning, heat and power co-generation unit, 160kW electrical

Dataset: EcoSpold 2, unit process
Geography: RER
Time period: 1987-01-01 to 2021-12-31
Technology level: current
Classification: ISIC rev.4 ecoinvent: 7110:Architectural and engineering activities and related technical consultancy
Classification: EcoSpold01Categories: natural gas/cogeneration
Tags: ConvertedDataset
Scenario: Business-as-Usual
System model: Allocation, cut-off by classification
Generated by: Thomas Heck
Published in: Heck, T. 2007
Database: ecoinvent
isCopyrightProtected: true
accessRestrictedTo: 1

## General comment
Inventory refers to infrastructure of an existing natural gas cogeneration plant (lambda=1 motor, 160kWe, operation start 1987) at Jakobsberg, Basel, Switzerland.
[This dataset was already contained in the ecoinvent database version 2. It was not individually updated during the transfer to ecoinvent version 3. Life Cycle Impact Assessment results may still have changed, as they are affected by changes in the supply chain, i.e. in other datasets. This dataset was generated following the ecoinvent quality guidelines for version 2. It may have been subject to central changes described in the ecoinvent version 3 change report (http://www.ecoinvent.org/database/ecoinvent-version-3/reports-of-changes/), and the results of the central updates were reviewed extensively. The changes added e.g. consistent water flows and other information throughout the database. The documentation of this dataset can be found in the ecoinvent reports of version 2, which are still available via the ecoinvent website. The change report linked above covers all central changes that were made during the conversion process.]

## Included activities end
Includes energy needed.

## Geography
Data refers to a plant in Switzerland, assumed valid for Europe (RER)

## Technology
Component of a specific cogeneration unit installed in Switzerland. Technology at end of 1980s.

## Reference product
- planning, heat and power co-generation unit, 160kW electrical: 1 unit; CPC 83: Professional, technical and business services (except research, development, legal and accounting services); By-product classification allocatable product
  EcoSpold01Location=RER
  production volume 1.32237 unit
    This is a placeholder value that does not reflect real-world production volumes. This dataset does not currently require a real-world production volume to work in the database framework, and no actual data were collected yet. This has no negative effect on the results of the ecoinvent database. The placeholder value of this activity was scaled according to the nominal GDP of 2005 (source: United Nations, http://data.un.org/Glossary.aspx?q=GDP+%28current+US%24%29, accessed 20130726) to reflect an appropriate share of the global production volume, which is also a placeholder value.
  property price 1365.28 EUR2005
    Calculated based on inputs: The price of the product has been calculated as a sum of the values of the material and energy inputs for this product. This value is therefore a rough estimation. It may underestimate the real price since there are additional expenses when producing any product. These expences can include for example labour costs, treatment of waste materials and profit for the producer. Please consider carefully whether this level of data quality is acceptable for your application.

## Inputs from technosphere
- heat, district or industrial, other than natural gas: 58140 MJ; lognormal variance with pedigree 0.1227, pedigree (3,3,5,3,4)
  EcoSpold01Location=RER
  properties: heating value, net 1 MJ
- electricity, low voltage: 7000 kWh; lognormal variance with pedigree 0.1227, pedigree (3,3,5,3,4)
  EcoSpold01Location=UCTE

## Sampling procedure
Operator and manufacturer information

## Extrapolations
This dataset has been extrapolated from year 2000 to the year of the calculation (2021). The uncertainty has been adjusted accordingly.

## Review by Gerald Rebitzer (obsolete) 2003-08-27
had passed
