# treatment of waste polyvinylchloride product, collection for final disposal

Dataset: EcoSpold 2, unit process
Geography: Europe without Switzerland
Time period: 1994-01-01 to 2021-12-31
Technology level: current
Classification: EcoSpold01Categories: waste management/building demolition
Classification: ISIC rev.4 ecoinvent: 3821:Treatment and disposal of non-hazardous waste
Synonyms: PVC
Tags: Treatment
Scenario: Business-as-Usual
System model: Allocation, cut-off by classification
Generated by: [System]
Database: ecoinvent
isCopyrightProtected: true
accessRestrictedTo: 1

## General comment
The waste contains 1kg polyvinylchloride (GSD=100%) Waste density is 1400 kg/m3. Allocation of energy production in waste incineration: no substitution or expansion. Total burden allocated to waste disposal function of waste incinerator.

## Included activities end
transport to dismantling facilities, final disposal of waste material,

## Technology
Building demolition with skid-steer loaders.

## Reference product
- waste polyvinylchloride product: -1 kg; name RP; CPC 39270: Waste, parings and scrap of plastics; By-product classification Waste; CAS 9002-86-2
  production volume 1.11 kg; name RP_PV
    This is a placeholder value that does not reflect real-world production volumes. This dataset does not currently require a real-world production volume to work in the database framework, and no actual data were collected yet. This has no negative effect on the results of the ecoinvent database.dummy variable. The Europe without Switzerland production volume is extrapolated from the global production volume using the nominal GDP of 2010 (source: United Nations, http://data.un.org/Glossary.aspx?q=GDP+%28current+US%24%29, accessed 20130726 and 20130312).
    Gross domestic product (GDP) at current prices is GDP at prices of the current reporting period. Also known as nominal GDP.
  property price 0 EUR2005; name RP_price_EUR2005
    Waste products are assigned a price of zero as they are assumed to require further treatment.
  property carbon content 0.440882
    carbon content on a dry matter basis (reserved; not for manual entry)
  properties: wet mass 1 kg, carbon content, fossil 0.440882, dry mass 0.998 kg, carbon content, non-fossil 0, water in wet mass 0.002 kg, water content 0.00200401, heating value, net 21.51 MJ, carbon allocation 0.44 kg

## Inputs from technosphere
- waste polyvinylchloride: -1 kg; name waste; lognormal variance with pedigree 0.042, pedigree (1,1,5,5,1)
  disposed masses. Uncertainty calculated from uncertainty of waste composition
  production volume 1.11 kg; = waste* RP_PV/ABS( RP)
    Calculated from the production volume of waste polyvinylchloride product in proportion to the respective output amounts.
  property price 0 EUR2005; name waste_price_EUR2005
  properties: wet mass 1 kg, water content 0.00200401, dry mass 0.998 kg, carbon content, fossil 0.440882, heating value, net 21.51 MJ
  note on carbon content, fossil: C content in 1 kg DM was calculated using data in Tab A.1, ecoinvent v2.2 report 13_I
  note on heating value, net: Value taken from the general comment of the treatment dataset.

## Sampling procedure
waste-specific calculation based on literature data

## Extrapolations
This dataset has been extrapolated from year 2002 to the year of the calculation (2021). The uncertainty has been adjusted accordingly.
