# onion production

Dataset: EcoSpold 2, unit process
Geography: RoW
Time period: 2004-01-01 to 2021-12-31
Technology level: current
Classification: ISIC rev.4 ecoinvent: 0113:Growing of vegetables and melons, roots and tubers
Tags: WFLDB
Scenario: Business-as-Usual
System model: Allocation, cut-off by classification
Generated by: [System]
Database: ecoinvent
isCopyrightProtected: true
accessRestrictedTo: 1

## General comment
This dataset is a weighted average of the regional datasets, with weights based on production volume of the reference product. Detailed comments and sources about the exchanges can be found in the regional datasets.
The geographicalCorrelation score of every pedigree matrix of was changed to '5'.
Sum of regional production volumes: 3.971e+10 kg
CN: PV = 2.268e+10 kg; weight = 0.5712
IN: PV = 1.540e+10 kg; weight = 0.3878
NL: PV = 1.402e+9 kg; weight = 0.03531
NZ: PV = 2.245e+8 kg; weight = 5.653e-3
Yield of the global dataset = 43838.9116255 kg/ha, calculated as a weighted average of the regional yields.
The comments below were part of the CN regional dataset.
This dataset represents the production of 1 kg of onions The average yield from 2009 - 2010 is 60 t/ha. The data are representative for onion production in China, Gansu province, used for the export market. Mineral NPK fertiliser input is 200-240-75 kg/ha. No organic fertilisers are applied. Total active ingredients (a.i.) applied as pesticides amount to 10.6 kg a.i./ha.
The dataset was modelled within the project 'World Food LCA database (WFLDB)'. The aim of this project was to provide inventories of a broad variety of agricultural products and processes and to cover for each product at least 50% of the global export market. The export share of onions produced in China amounts to 9% of the global export (tonnage exported in 2010). The production system regarded in this dataset aimed at representing onions produced in China for the export market.
PEF-Quality: data quality rating (DQR) = 2.0 (i.e. very good quality). This dataset refers to an average situation; for specific situations exchanges might differ substantially due to site specific parameters

## Included activities start
This activity starts with the nursery producing seedlings, i.e. seedlings from roots.

## Included activities end
This activity ends with the harvest of onions at farm gate. The dataset includes total diesel combusted in agricultural machinery, corresponding infrastructure, fuel use and sheds. Further, direct field emissions and land use change are included. Heavy metal uptake by the crop is considered. The inputs of seeds, fertilisers and pesticides as well as packaging of fertilisers and pesticides are considered.
Statistical data from FAO used to assess land use change is incomplete for China. The original land use of 40.9% of annual cropland and 100% of perennial cropland transformed in the last 20 years is unknown. Land use change impacts may therefore be underestimated.

## Reference product
- onion: 1 kg; CPC 01253: Onions; By-product classification allocatable product
  production volume 3.85969e10 kg
    Source: FAOSTAT. Average, 2009-2012
  property price 0.322 EUR2005
    Calculated from the trade statistics for the year 2005 published by the UN (COMTRADE database, accessed 20151105) as an average of 5 biggest importers of onion in the world; USA, UK, RU, DE and MY. Comtrade cathegory: 70310: Onions and shallots, fresh or chilled.
  property carbon content, non-fossil 0.331061
    calculation: C-content of components according to ecoinvent report No. 15a. Source of composition: Souci, S.W., Fachmann, W., Kraut, H. (Hg.: Bundesminsiterium fur Ernahrung, Landwirtschaft und Forsten, Bonn) 'Die Zusammensetzung der Lebensmittel - Nahrwerttabellen', medpharm Scientific Publishers Stuttgart, CRC Press; 2000.
  property carbon content 0.331061
    carbon content on a dry matter basis (reserved; not for manual entry)
  properties: dry mass 0.530223 kg, water in wet mass 0.469777 kg, wet mass 1 kg, water content 0.886, carbon content, fossil 0, carbon allocation 0.175536 kg

## Inputs from technosphere
- cyclic N-compound: 5.07461e-6 kg; lognormal variance with pedigree 0.0158498, pedigree (2,2,4,5,1)
  Proxy: Source for total amount of pesticides: Literature value or expert estimation (Barber 2004). Active ingredient is calculated based on Ecoinvent dataset 'onion855 production GLO'. For calculations see supporting documentation 'WFLDB-Documentation.pdf' (https://ecoquery.ecoinvent.org/File/Reports).
  properties: wet mass 1 kg, dry mass 1 kg, carbon content, fossil 0.641962
- ammonium nitrate: 0 kg; pedigree (1,1,1,1,1)
  The exchange has been updated from 'ammonium nitrate, as N' into 'ammonium nitrate' and therefore its amount has been scaled (multiplied) from 0.0001 kg by 2.8573 kg of 'ammonium nitrate' per kg of 'ammonium nitrate, as N'. Original comment of the exchange is: Calculated based on literature values or expert estimation: The total amount of nutrient (De Visser 1998) multiplied by the country-share of fertiliser type (IFA 2014). See supporting documentation 'WFLDB-Documentation.pdf' chapter 'Fertiliser application' for L3 and L4 data (https://ecoquery.ecoinvent.org/File/Reports).
  Corresponds to 1.38 kg/ha
  properties: wet mass 1 kg, dry mass 1 kg
- onion seedling, for planting: 18.6838 unit; lognormal variance with pedigree 0.126177, pedigree (2,1,4,5,1)
  Proxy: Similar crop and country used (onion NL). Planting density: 1'130'000 seedlings/ha.
  properties: wet mass 1 kg, carbon content, non-fossil 0.439481, dry mass 0.578035 kg, water content 0.73
  note on carbon content, non-fossil: calculation: C-content of components according to ecoinvent report No. 15a. Source of composition: https://ndb.nal.usda.gov/ndb/search/. Unspecific seedling used as proxy.
- packaging, for fertilisers: 0.0200022 kg; lognormal variance with pedigree 0.0592, pedigree (4,3,4,5,4)
  Total amount of active substance/s of fertilisers needed for the production of 'onion' is calculated to be circa 1.00E-02 kg. Fertiliser/s used in this dataset is/are: 'ammonia, liquid', 'ammonium nitrate, as N', 'ammonium sulfate, as N', 'nitrogen fertiliser, as N', 'phosphate fertiliser, as P2O5', 'phosphate rock, as P2O5, beneficiated, dry', 'potassium chloride, as K2O', 'potassium fertiliser, as K2O', 'potassium sulfate, as K2O', 'urea, as N'. The total amount of active substance/s is doubled in order to account for the packaging of the dilluted product of fertiliser/s that is/are applied. Therefore, 2.00E-02 kg of packaging for fertilisers is justified with this exchange.
  properties: carbon content, fossil 0.825301, dry mass 1 kg, heating value, net 25.01 MJ, price 0.0642 EUR2005, wet mass 1 kg
  note on carbon content, fossil: Considering a chemical formula (C2H4)n for polyethylene, carbon content-fossil is calculated to be 0.856286 kg of Carbon per kg of dry mass.
- ammonia, anhydrous, liquid: 0 kg; pedigree (1,1,1,1,1)
  Calculated based on literature values or expert estimation: The total amount of nutrient (De Visser 1998) multiplied by the country-share of fertiliser type (IFA 2014). See supporting documentation 'WFLDB-Documentation.pdf' chapter 'Fertiliser application' for L3 and L4 data (https://ecoquery.ecoinvent.org/File/Reports).
  Corresponds to 4.46 kg/ha
  properties: dry mass 1 kg, wet mass 1 kg
- inorganic nitrogen fertiliser, as N: 0 kg; pedigree (1,1,1,1,1)
  Calculated based on literature values or expert estimation: The total amount of nutrient (Personal written communication, Warwick Catto & Scott Beckett, Yara, 2015) multiplied by the share of fertiliser type (Personal written communication, Warwick Catto & Scott Beckett, Yara, 2015). See supporting documentation 'WFLDB-Documentation.pdf' chapter 'Fertiliser application' for L3 and L4 data (https://ecoquery.ecoinvent.org/File/Reports).
  Corresponds to 31.1 kg/ha
  properties: dry mass 1 kg, wet mass 1 kg
- potassium sulfate: 6.92182e-5 kg; lognormal variance with pedigree 0.126177, pedigree (2,1,4,5,1)
  The exchange has been updated from 'potassium sulfate, as K2O' into 'potassium sulfate' and therefore its amount has been scaled (multiplied) from 0 kg by 1.85 kg of 'potassium sulfate' per kg of 'potassium sulfate, as K2O'. Original comment of the exchange is: Calculated based on literature values or expert estimation: The total amount of nutrient (Personal written communication, Warwick Catto & Scott Beckett, Yara, 2015) multiplied by the share of fertiliser type (Personal written communication, Warwick Catto & Scott Beckett, Yara, 2015). See supporting documentation 'WFLDB-Documentation.pdf' chapter 'Fertiliser application' for L3 and L4 data (https://ecoquery.ecoinvent.org/File/Reports).
  Corresponds to 38.0 kg/ha
  properties: wet mass 1 kg, dry mass 1 kg
- ammonium sulfate: 3.66308e-5 kg; lognormal variance with pedigree 0.126177, pedigree (2,1,4,5,1)
  Calculated based on literature values or expert estimation: The total amount of nutrient (De Visser 1998) multiplied by the country-share of fertiliser type (IFA 2014). See supporting documentation 'WFLDB-Documentation.pdf' chapter 'Fertiliser application' for L3 and L4 data (https://ecoquery.ecoinvent.org/File/Reports).
  Corresponds to 1.61 kg/ha
  properties: dry mass 1 kg, wet mass 1 kg
- irrigation: 0 m3; pedigree (1,1,1,1,1)
  Calculated value: The total amount of water used for irrigation (Barber 2004) multiplied by the country-share of irrigation technique (WFLDB-Guidelines.pdf, Appendix 6.1). See supporting documentation 'WFLDB-Documentation.pdf' chapter 'Water use for irrigation' (https://ecoquery.ecoinvent.org/File/Reports).
  properties: wet mass 1000 kg, water content 9089.91, dry mass 0.11 kg
- inorganic potassium fertiliser, as K2O: 0 kg; pedigree (1,1,1,1,1)
  Calculated based on literature values: The nutrient content of the crop multiplied by the country-share of the fertiliser type (IFA 2014). See supporting documentation 'WFLDB-Documentation.pdf' chapter 'Fertiliser application' for L1 data and appendix for the source of nutrient content (https://ecoquery.ecoinvent.org/File/Reports).
  Corresponds to 7.38 kg/ha
  properties: wet mass 1 kg, dry mass 1 kg
- pyrethroid-compound: 4.45378e-7 kg; lognormal variance with pedigree 0.0158498, pedigree (2,2,4,5,1)
  (same comment as for cyclic N-compound)
  properties: wet mass 1 kg, dry mass 1 kg, carbon content, fossil 0.623
- dithiocarbamate-compound: 0.000162226 kg; lognormal variance with pedigree 0.0158498, pedigree (2,2,4,5,1)
  (same comment as for cyclic N-compound)
  properties: dry mass 1 kg, wet mass 1 kg, carbon content, fossil 0.179339
- potassium chloride: 0.00244362 kg; lognormal variance with pedigree 0.126177, pedigree (2,1,4,5,1)
  The exchange has been updated from 'potassium chloride, as K2O' into 'potassium chloride' and therefore its amount has been scaled (multiplied) from 0.0015 kg by 1.5829 kg of 'potassium chloride' per kg of 'potassium chloride, as K2O'. Original comment of the exchange is: Calculated based on literature values: The nutrient content of the crop multiplied by the country-share of the fertiliser type (IFA 2014). See supporting documentation 'WFLDB-Documentation.pdf' chapter 'Fertiliser application' for L1 data and appendix for the source of nutrient content (https://ecoquery.ecoinvent.org/File/Reports).
  Corresponds to 9.36 kg/ha
  properties: dry mass 1 kg, wet mass 1 kg
- urea: 0.00363305 kg; lognormal variance with pedigree 0.126177, pedigree (2,1,4,5,1)
  The exchange has been updated from 'urea, as N' into 'urea' and therefore its amount has been scaled (multiplied) from 0.0017 kg by 2.1438 kg of 'urea' per kg of 'urea, as N'. Original comment of the exchange is: Calculated based on literature values or expert estimation: The total amount of nutrient (De Visser 1998) multiplied by the country-share of fertiliser type (IFA 2014). See supporting documentation 'WFLDB-Documentation.pdf' chapter 'Fertiliser application' for L3 and L4 data (https://ecoquery.ecoinvent.org/File/Reports).
  Corresponds to 2.58 kg/ha
  properties: dry mass 1 kg, wet mass 1 kg, carbon content, fossil 0.2
- dinitroaniline-compound: 1.71133e-5 kg; lognormal variance with pedigree 0.0158498, pedigree (2,2,4,5,1)
  (same comment as for cyclic N-compound)
  properties: carbon content, fossil 0.55516, dry mass 1 kg, wet mass 1 kg
- phosphate rock, beneficiated: 0 kg; pedigree (1,1,1,1,1)
  The exchange has been updated from 'phosphate rock, as P2O5, beneficiated, dry' into 'phosphate rock, beneficiated' and therefore its amount has been scaled (multiplied) from 0 kg by 3.125 kg of 'phosphate rock, beneficiated' per kg of 'phosphate rock, as P2O5, beneficiated, dry'. Original comment of the exchange is: Calculated based on literature values or expert estimation: The total amount of nutrient (Zheng et al. 2013) multiplied by the country-share of fertiliser type (IFA 2014). See supporting documentation 'WFLDB-Documentation.pdf' chapter 'Fertiliser application' for L3 and L4 data (https://ecoquery.ecoinvent.org/File/Reports).
  properties: dry mass 1 kg, wet mass 1 kg
- packaging, for pesticides: 0.000383214 kg; lognormal variance with pedigree 0.0592, pedigree (4,3,4,5,4)
  Total amount of active substance/s of pesticides needed for the production of onion is calculated to be circa 1.92E-04 kg. Pesticide/s used in this dataset is/are: 'cyclic N-compound', 'dinitroaniline-compound', 'dithiocarbamate-compound', 'organophosphorus-compound, unspecified', 'pyrethroid-compound'. The total amount of active substance/s is doubled in order to account for the packaging of the dilluted product of pesticide/s that is/are applied. Therefore, 3.83E-04 kg of packaging for pesticides is justified with this exchange.
  properties: wet mass 1 kg, price 0.0642 EUR2005, carbon content, fossil 0.85714, dry mass 1 kg, heating value, net 25.97 MJ
- inorganic phosphorus fertiliser, as P2O5: 0 kg; pedigree (1,1,1,1,1)
  Calculated based on literature values or expert estimation: The total amount of nutrient (Personal written communication, Warwick Catto & Scott Beckett, Yara, 2015) multiplied by the share of fertiliser type (Personal written communication, Warwick Catto & Scott Beckett, Yara, 2015). See supporting documentation 'WFLDB-Documentation.pdf' chapter 'Fertiliser application' for L3 and L4 data (https://ecoquery.ecoinvent.org/File/Reports).
  Corresponds to 40.0 kg/ha
  properties: wet mass 1 kg, dry mass 1 kg
- diesel, burned in agricultural machinery: 0.527711 MJ; lognormal variance with pedigree 0.126177, pedigree (2,1,4,5,1)
  Literature value or expert estimation (Barber 2004).
- organophosphorus-compound, unspecified: 6.74815e-6 kg; lognormal variance with pedigree 0.0158498, pedigree (2,2,4,5,1)
  (same comment as for cyclic N-compound)
  properties: wet mass 1 kg, carbon content, fossil 0.260898, dry mass 1 kg
- ammonium nitrate: 7.02283e-5, 0.00018324 kg (2 entries); lognormal variance with pedigree 0.126177, pedigree (2,1,4,5,1)
  (same comment as for ammonium nitrate)
- ammonia, anhydrous, liquid: 2.70186e-6, 4.2034e-6, 8.32843e-6, 3.82315e-6, 9.04446e-5 kg (5 entries); lognormal variance with pedigree 0.126177, pedigree (2,1,4,5,1)
  (same comment as for ammonia, anhydrous, liquid)
- inorganic nitrogen fertiliser, as N: 2.87116e-7, 1.53007e-5, 1.91831e-6, 2.19927e-5, 5.56878e-7, 1.96564e-5, 2.57994e-6, 6.24555e-6, 6.90497e-5, 4.12374e-5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 kg (60 entries); lognormal variance with pedigree 0.126177, pedigree (2,1,4,5,1)
  (same comment as for inorganic nitrogen fertiliser, as N)
- irrigation: 0.0136692, 0.000580217, 2.32087e-5, 0.00200243, 0.00010013, 0.00568562, 0.000925439, 0.00451374, 0.00154269, 0.00413626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 m3 (14 entries); lognormal variance with pedigree 0.126177, pedigree (2,1,4,5,1)
  (same comment as for irrigation)
- inorganic potassium fertiliser, as K2O: 1.56297e-8, 4.5302e-7, 3.75112e-7, 2.2449e-6, 1.18305e-7, 4.55328e-6, 4.84645e-7, 1.49083e-7, 5.62957e-5, 4.03005e-6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 kg (60 entries); lognormal variance with pedigree 0.126177, pedigree (2,1,4,5,1)
  (same comment as for inorganic potassium fertiliser, as K2O)
- phosphate rock, beneficiated: 5.15087e-5, 5.15087e-5 kg (2 entries); lognormal variance with pedigree 0.126177, pedigree (2,1,4,5,1)
  (same comment as for phosphate rock, beneficiated)
- inorganic phosphorus fertiliser, as P2O5: 3.64359e-7, 3.01884e-5, 1.93558e-6, 3.91668e-5, 4.31194e-7, 3.13622e-5, 8.47057e-7, 4.46046e-6, 0.000245565, 5.17433e-5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 kg (60 entries); lognormal variance with pedigree 0.126177, pedigree (2,1,4,5,1)
  (same comment as for inorganic phosphorus fertiliser, as P2O5)

## Inputs from nature
- Transformation, to arable land, unspecified use [natural resource, land]: 0.306987 m2; lognormal variance with pedigree 0.0462144, pedigree (2,1,4,5,1)
  10000 m2 divided by the life time of the crop.
- Transformation, from arable land, unspecified use [natural resource, land]: 0.306987 m2; lognormal variance with pedigree 0.0462144, pedigree (2,1,4,5,1)
  10000 m2 divided by the life time of the crop.
- Occupation, annual crop [natural resource, land]: 0.204096 m2*year; lognormal variance with pedigree 0.0220616, pedigree (2,1,4,5,1)
  Related to the duration from harvest date of previous crop to harvest date of main crop: 365 days.
- Energy, gross calorific value, in biomass [natural resource, biotic]: 2.09532 MJ; lognormal variance with pedigree 0.0158498, pedigree (2,2,4,5,1)
  Gross energy content is related to MJ/kg dry matter of product. Source: ecoinvent data.
- Carbon dioxide, in air [natural resource, in air]: 0.177386 kg; lognormal variance with pedigree 0.0158498, pedigree (2,2,4,5,1)
  CO2 uptake by biomass

## Emissions to nature
- Carbon dioxide, fossil [air, non-urban air or from high stacks]: 0.00266064 kg; lognormal variance with pedigree 0.0158498, pedigree (2,2,4,5,1)
  Calculated value - CO2 emissions from urea and lime. See 'WFLDB-Guidelines.pdf', available at https://ecoquery.ecoinvent.org/File/Reports.
- Water [water, surface water]: 0.0479043 m3; lognormal variance with pedigree 0.126177, pedigree (2,1,4,5,1)
  Calculated value - Emission calculated from water balance. See 'WFLDB-Guidelines.pdf', available at https://ecoquery.ecoinvent.org/File/Reports.
- Lead [water, ground-]: 8.00028e-9 kg; lognormal variance with pedigree 0.358938, pedigree (2,2,4,5,1)
  Calculated value - Freiermuth (2006). See 'WFLDB-Guidelines.pdf', available at https://ecoquery.ecoinvent.org/File/Reports.
- Lambda-cyhalothrin [soil, agricultural]: 3.96056e-7 kg; lognormal variance with pedigree 0.0467216, pedigree (2,2,4,5,1)
  Calculated value - 100% emission in soil. See 'WFLDB-Guidelines.pdf', available at https://ecoquery.ecoinvent.org/File/Reports.
- Cadmium, ion [water, surface water]: 3.10412e-9 kg; lognormal variance with pedigree 0.358938, pedigree (2,2,4,5,1)
  (same comment as for Lead)
- Ioxynil [soil, agricultural]: 7.92111e-6 kg; lognormal variance with pedigree 0.0467216, pedigree (2,2,4,5,1)
  (same comment as for Lambda-cyhalothrin)
- Water [water, ground-]: 0.0119763 m3; lognormal variance with pedigree 0.126177, pedigree (2,1,4,5,1)
  (same comment as for Water)
- Dinitrogen monoxide [air, non-urban air or from high stacks]: 0.00019969 kg; lognormal variance with pedigree 0.126664, pedigree (2,2,4,5,1)
  Calculated value - IPCC (2006). See 'WFLDB-Guidelines.pdf', available at https://ecoquery.ecoinvent.org/File/Reports.
- Water [air, non-urban air or from high stacks]: 0.0544961 m3; lognormal variance with pedigree 0.126177, pedigree (2,1,4,5,1)
  (same comment as for Water)
- Dimethomorph [soil, agricultural]: 4.51263e-6 kg; lognormal variance with pedigree 0.0467216, pedigree (2,2,4,5,1)
  (same comment as for Lambda-cyhalothrin)
- Pyrimethanil [soil, agricultural]: 8.97726e-6 kg; lognormal variance with pedigree 0.0467216, pedigree (2,2,4,5,1)
  (same comment as for Lambda-cyhalothrin)
- Cymoxanil [soil, agricultural]: 4.32061e-6 kg; lognormal variance with pedigree 0.0467216, pedigree (2,2,4,5,1)
  (same comment as for Lambda-cyhalothrin)
- Phosphorus [water, surface water]: 7.54537e-6 kg; lognormal variance with pedigree 0.177866, pedigree (2,2,4,5,1)
  Calculated value - Prasuhn (2006) and SQCB-Erosion. See 'WFLDB-Guidelines.pdf', available at https://ecoquery.ecoinvent.org/File/Reports.
- Carbon dioxide, from soil or biomass stock [air, non-urban air or from high stacks]: 0.0198363 kg; normal variance with pedigree 0.5452, pedigree (3,3,5,5,2)
  Global average LUC emissions according 2nd edition of the Quantis-modified tool developed by Blonk Consultants 'WFLDB-adapted-Blonk 2014 direct-land-use-change-assessment-tool_2015-05-18a.xlsx', tab. 'Country & land use unknown'. The emission are based on the relative change in production areas in all countries for a given crop. The weighted average is used which takes into acount relative difference in crop expansion into primary forest, secondary forest, grassland, perennial and annual land.
  Uncertainty: Uncertainty estimated based on IPCC guidlines 2006.
- Phosphate [water, surface water]: 1.89305e-5 kg; lognormal variance with pedigree 0.177866, pedigree (2,2,4,5,1)
  Calculated value - Prasuhn (2006). See 'WFLDB-Guidelines.pdf', available at https://ecoquery.ecoinvent.org/File/Reports.
- Diazinon [soil, agricultural]: 6.00084e-6 kg; lognormal variance with pedigree 0.0467216, pedigree (2,2,4,5,1)
  (same comment as for Lambda-cyhalothrin)
- Phosphate [water, ground-]: 4.37859e-6 kg; lognormal variance with pedigree 0.177866, pedigree (2,2,4,5,1)
  (same comment as for Phosphate)
- Copper, ion [water, surface water]: 2.76298e-7 kg; lognormal variance with pedigree 0.358938, pedigree (2,2,4,5,1)
  (same comment as for Lead)
- Pendimethalin [soil, agricultural]: 1.52181e-5 kg; lognormal variance with pedigree 0.0467216, pedigree (2,2,4,5,1)
  (same comment as for Lambda-cyhalothrin)
- Copper, ion [water, ground-]: 7.07557e-8 kg; lognormal variance with pedigree 0.358938, pedigree (2,2,4,5,1)
  (same comment as for Lead)
- Nitrogen oxides [air, non-urban air or from high stacks]: 0.000359981 kg; lognormal variance with pedigree 0.126664, pedigree (2,2,4,5,1)
  Calculated value - EEA/EMEP (2013). See 'WFLDB-Guidelines.pdf', available at https://ecoquery.ecoinvent.org/File/Reports.
- Copper [soil, agricultural]: 8.42703e-6 kg
  Comment on mathematicalRelation:
  -7.554666e-07 from Crop, default, heavy metals uptake model
  Heavy metal uptake can be excluded by setting the parameter heavyMetalUptakeSwitch to zero.
- Chromium, ion [water, surface water]: 3.3079e-7 kg; lognormal variance with pedigree 0.358938, pedigree (2,2,4,5,1)
  (same comment as for Lead)
- Nitrate [water, ground-]: 0.0105465 kg; lognormal variance with pedigree 0.177866, pedigree (2,2,4,5,1)
- Chromium, ion [water, ground-]: 4.20225e-7 kg; lognormal variance with pedigree 0.358938, pedigree (2,2,4,5,1)
  (same comment as for Lead)
- Nickel [soil, agricultural]: 2.87769e-6 kg
  Comment on mathematicalRelation:
  -2.22011111111e-07 from Calculated value - Freiermuth (2006). See 'WFLDB-Guidelines.pdf', available at https://ecoquery.ecoinvent.org/File/Reports.
  -1.190844e-07 from Crop, default, heavy metals uptake model
  Heavy metal uptake can be excluded by setting the parameter heavyMetalUptakeSwitch to zero.
- Nickel, ion [water, surface water]: 2.97129e-7 kg; lognormal variance with pedigree 0.358938, pedigree (2,2,4,5,1)
  (same comment as for Lead)
- Cadmium, ion [water, ground-]: 9.40217e-10 kg; lognormal variance with pedigree 0.358938, pedigree (2,2,4,5,1)
  (same comment as for Lead)
- Mercury [water, surface water]: 9.47824e-10 kg; lognormal variance with pedigree 0.358938, pedigree (2,2,4,5,1)
  (same comment as for Lead)
- Cadmium [soil, agricultural]: 2.41061e-7 kg
  Comment on mathematicalRelation:
  1.191e-07 from Calculated value - Freiermuth (2006). See 'WFLDB-Guidelines.pdf', available at https://ecoquery.ecoinvent.org/File/Reports.
  -1.157556e-08 from Crop, default, heavy metals uptake model
  Heavy metal uptake can be excluded by setting the parameter heavyMetalUptakeSwitch to zero.
- Ammonia [air, non-urban air or from high stacks]: 0.00234484 kg; lognormal variance with pedigree 0.0467216, pedigree (2,2,4,5,1)
  Calculated value - EMEP/EEA (2013). See 'WFLDB-Guidelines.pdf', available at https://ecoquery.ecoinvent.org/File/Reports.
- Mercury [water, ground-]: 2.36734e-11 kg; lognormal variance with pedigree 0.358938, pedigree (2,2,4,5,1)
  (same comment as for Lead)
- Zinc, ion [water, surface water]: 6.11113e-7 kg; lognormal variance with pedigree 0.358938, pedigree (2,2,4,5,1)
  (same comment as for Lead)
- Lead [soil, agricultural]: 8.72671e-7 kg
  Comment on mathematicalRelation:
  -2.75177777778e-08 from Calculated value - Freiermuth (2006). See 'WFLDB-Guidelines.pdf', available at https://ecoquery.ecoinvent.org/File/Reports.
  -6.164778e-08 from Crop, default, heavy metals uptake model
  Heavy metal uptake can be excluded by setting the parameter heavyMetalUptakeSwitch to zero.
- Mercury [soil, agricultural]: 8.24546e-8 kg
  Comment on mathematicalRelation:
  1.12902222222e-08 from Calculated value - Freiermuth (2006). See 'WFLDB-Guidelines.pdf', available at https://ecoquery.ecoinvent.org/File/Reports.
  -4.623384e-09 from Crop, default, heavy metals uptake model
  Heavy metal uptake can be excluded by setting the parameter heavyMetalUptakeSwitch to zero.
- Mancozeb [soil, agricultural]: 0.00014426 kg; lognormal variance with pedigree 0.0467216, pedigree (2,2,4,5,1)
  (same comment as for Lambda-cyhalothrin)
- Zinc, ion [water, ground-]: 5.63368e-7 kg; lognormal variance with pedigree 0.358938, pedigree (2,2,4,5,1)
  (same comment as for Lead)
- Lead [water, surface water]: 1.79491e-7 kg; lognormal variance with pedigree 0.358938, pedigree (2,2,4,5,1)
  (same comment as for Lead)
- Zinc [soil, agricultural]: 5.93555e-5 kg
  Comment on mathematicalRelation:
  4.09933333333e-06 from Calculated value - Freiermuth (2006). See 'WFLDB-Guidelines.pdf', available at https://ecoquery.ecoinvent.org/File/Reports.
  Heavy metal uptake can be excluded by setting the parameter heavyMetalUptakeSwitch to zero.
- Chromium [soil, agricultural]: 2.91554e-6 kg
  Comment on mathematicalRelation:
  2.64644444444e-07 from Calculated value - Freiermuth (2006). See 'WFLDB-Guidelines.pdf', available at https://ecoquery.ecoinvent.org/File/Reports.
  -6.213e-08 from Crop, default, heavy metals uptake model
  Heavy metal uptake can be excluded by setting the parameter heavyMetalUptakeSwitch to zero.

## Sampling procedure
WFLDB Methodological Guidelines for the Life Cycle Inventory of Agricultural Products in the latest version, available at: (Report section: https://v30.ecoquery.ecoinvent.org/File/Reports). Data sources: Data were categorised from level 0 (L0) to level (L4) as follows: L0 = estimate, proxy; L1 = statistical data (e.g. FAOSTAT); L2 = L1 adapted to crop and country; L3 = literature data or L1 resp. L2 data approved by experts; medium detailing (i.e. kg of total N-fertiliser); L4 = L3 data of high detailing (i.e. portion N-fertiliser types).In this dataset data were obtained for yield: L3; Fertilisers: L3; Pesticides: L1; Machinery: L0; Irrigation: L3. For information regarding the calculation of individual exchanges see supporting documentation WFLDB-Documentation.pdf.

## Extrapolations
The amount of the exchanges are weighted average of regional datasets.

## Review by Assumpció ANTON 2016-05-30
Be aware that the use of statistics in input calculations could provide some specific inputs not common for specific crops, this should be corrected if better information is available and better reflexed in DQR . Currently, I would dissent for some of good marks provided, being a revision of criteria applied advisable.

Pesticides will need to be amended periodically checking for update of pesticides' ban.
