# treatment of wastewater from ammonium paratungstate production, capacity 5E9l/year

Dataset: EcoSpold 2, unit process
Geography: CN
Time period: 1994-01-01 to 2021-12-31
Technology level: current
Classification: EcoSpold01Categories: waste management/wastewater treatment
Classification: ISIC rev.4 ecoinvent: 3700:Sewerage
Scenario: Business-as-Usual
System model: Allocation, cut-off by classification
Generated by: Nora Minas
Database: ecoinvent
isCopyrightProtected: true
accessRestrictedTo: 1

## General comment
This dataset was created using the wastewater composition and treatment model which is described in detail by Doka G. (2009). The model includes canalisation, mechanical, biological, and chemical treatment of wastewater, sludge digestion and sludge disposal. With the help of an excel tool (13_WWTv2.xls) created by Doka G., inventories for the treatment of wastewater with different compositions can be calculated. This excel tool has been used to calculate the inventory for the treatment of wastewater from ammonium paratungstate production with the following composition (in kg/m3):

COD: 0.537 (GSD=224.1%); NH4-N: 1.65 (GSD=122.5%); Ptot.: 0.77 (GSD=122.5%); Cl: 0.42 (GSD=224.1%); As: 0.01 (GSD=224.1%); Mo: 0.039 (GSD=224.1%); Ni: 0.01 (GSD=224.1%); W: 0.38 (GSD=224.1%);

The value for COD was derived from an average value reported for the industrial pollution discharge (post-WWT) of the Chinese non-ferrous metals industry during the period of 2011-2015 (29.08 kt COD per 306 Mio m3 WW) (Cao et al., 2019). Based on this post WWT COD value, a COD input value for the model (pre WWT) has been calculated assuming that the original value represents emissions from the WWTP only, without the overload discharge. A COD transfer coefficient of 18% and an overload discharge of 1.68% has ben assumed, resulting in an input value of 0.536980606 kg COD/m3 ww input (0.536980606 =29.08/306/18%/(1-1.68%)). The resulting COD emission includes overload discharge prior to treatment (+0.009021274kg/m3). All other values are specific for the Chinese tungsten industry (Cao et al., 2019).

For the calculation of the inventory, it was assumed that the wastewater is purified in a medium size municipal wastewater treatment plant (capacity class 3), with an average capacity size of 24900 per-captia-equivalents PCE. For the sludge disposal a split of 39% to incineration and 61% to agricultural application was assumed based on a study by Lu et al. (2019).
Wastewater composition taken from Cao et al. (2019).

Cao, H., Zhao, H., Zhang, D., Liu, C., Lin, X., Li, Y., Ning, P., Sun, J., Zhang, Y., Sun, Z., 2019. Whole-Process Pollution Control for Cost-Effective and Cleaner Chemical Production—A Case Study of the Tungsten Industry in China. Engineering 5, 768-776. https://doi.org/10.1016/j.eng.2019.01.010
Doka G. (2009) Life Cycle Inventories of Waste Treatment Services. ecoinvent report No. 13. Swiss Centre for Life Cycle Inventories, Dübendorf, 2009
Lu, J. Y., Wang, X. M., Liu, H. Q., Yu, H. Q., & Li, W. W. (2019). Optimizing operation of municipal wastewater treatment plants in China: The remaining barriers and future implications. Environment International, 129 (May), 273-278. https://doi.org/10.1016/j.envint.2019.05.057

## Included activities start
Activity starts with the reception of the wastewater

## Included activities end
Activity ends with the treated water being discharged to a water body

## Geography
This dataset was created using the wastewater composition and treatment model. Input data for the model are specific for China and were taken from Cao et al. (2019). However, it should be kept in mind that the model used is specific to the technology mix encountered in Switzerland in 2000 and well ap-plicable to modern treatment practices in Europe, North America or Japan.
Cao, H., Zhao, H., Zhang, D., Liu, C., Lin, X., Li, Y., Ning, P., Sun, J., Zhang, Y., Sun, Z., 2019. Whole-Process Pollution Control for Cost-Effective and Cleaner Chemical Production—A Case Study of the Tungsten Industry in China. Engineering 5, 768-776. https://doi.org/10.1016/j.eng.2019.01.010

## Technology
Three stage wastewater treatment (mechanical, biological, chemical) including sludge digestion (fermentation) according to the average technology in Switzerland

## Reference product
- wastewater from ammonium paratungstate production: -1 m3; name RP; CPC 39920: Sewage sludge; By-product classification Waste
  production volume 6.3775e6 m3; name RP_PV
    Production Volume is taken from ammonium paratungstate production, ion exchange, CN
  property price 0 EUR2005; name RP_price_EUR2005
    Waste products are assigned a price of zero as they are assumed to require further treatment.
  property carbon content, fossil 0.688834; name RP_C_content_fossil; = (0.537/2.31)/0.33748
    Carbon content fossil was approximated with the TOC value. The TOC value was estimated based on the COD value (0.537 Kg/m3) with a conversion factor of 2.31 as documented in Tab 4.10 of the ecoinvent v2.2 report 13_IV. TOC was considered as Total Carbon.
  property carbon content, non-fossil 0; name RP_C_content_non_fossil
    biogene carbon content on a dry matter basis
  property tungsten content 1.12599; name RP_W_content; = 0.38/0.33748
    tungsten content on a dry matter basis
  property carbon content 0.688834
    carbon content on a dry matter basis (reserved; not for manual entry)
  properties: dry mass 0.33748 kg, wet mass 1000 kg, water in wet mass 999.663 kg, water content 2962.14, carbon allocation 0.232468 kg

## Inputs from technosphere
- process-specific burdens, residual material landfill: 0.257922 kg; lognormal variance with pedigree 0.0804557, pedigree (3,4,5,5,1)
  burden from sludge incineration. Uncertainty calculated from wastewater composition and treatment model
- liquid manure spreading, by vacuum tanker: 0.0352838 m3; lognormal variance with pedigree 0.0466931, pedigree (3,4,5,5,1)
  burden from sludge spreading. Uncertainty calculated from wastewater composition and treatment model
- iron (III) chloride, without water, in 40% solution state: 4.77488 kg; lognormal variance with pedigree 0.10381, pedigree (3,4,5,5,1)
  direct wastewater treatment plant burden plus burden from sludge incineration. Uncertainty calculated from wastewater composition and treatment model
  properties: wet mass 1 kg, dry mass 1 kg
- sewer grid, 5E9l/year, 110 km: 2.17822e-7 km; lognormal variance with pedigree 0.346, pedigree (3,4,5,5,1)
  uncertainty heeded in exchanges of the module
- electricity, low voltage: 10.3181 kWh; lognormal variance with pedigree 0.0754491, pedigree (3,4,5,5,1)
  direct wastewater treatment plant burden. Uncertainty calculated from wastewater composition and treatment model
- municipal waste incineration facility: 1.74371e-9 unit; lognormal variance with pedigree 0.0521652, pedigree (3,4,5,5,1)
  (same comment as for process-specific burdens, residual material landfill)
- cement, unspecified: 0.103169 kg; lognormal variance with pedigree 0.0895397, pedigree (3,4,5,5,1)
  (same comment as for process-specific burdens, residual material landfill)
  properties: wet mass 1 kg, dry mass 1 kg
- chromium oxide, flakes: 1.13781e-6 kg; lognormal variance with pedigree 0.581985, pedigree (3,4,5,5,1)
  (same comment as for process-specific burdens, residual material landfill)
  properties: dry mass 1 kg, wet mass 1 kg
- wastewater treatment facility, capacity 5E9l/year: 5.68819e-9 unit; lognormal variance with pedigree 0.346, pedigree (3,4,5,5,1)
  uncertainty heeded in exchanges of the module
- heat, district or industrial, other than natural gas: 5.8497 MJ; lognormal variance with pedigree 0.0527604, pedigree (3,4,5,5,1)
  (same comment as for process-specific burdens, residual material landfill)
  properties: corresponding fuel use, propane, furnace >100kW 1.05263 MJ, heating value, net 1 MJ
  note on corresponding fuel use, propane, furnace >100kW: Lower heating value of the fuel input related to the heat/electricity output, taken directly from ecoinvent v3.0 dataset "heat production, natural gas, at industrial furnace >100kW, GLO 2000".
- heat, central or small-scale, natural gas: 3.50271 MJ; lognormal variance with pedigree 0.117767, pedigree (3,4,5,5,1)
  (same comment as for electricity, low voltage)
  properties: heating value, net 1 MJ
- residual material landfill: 5.37337e-10 unit; lognormal variance with pedigree 0.0804557, pedigree (3,4,5,5,1)
  (same comment as for process-specific burdens, residual material landfill)
- heat, central or small-scale, other than natural gas: 2.5957 MJ; lognormal variance with pedigree 0.117767, pedigree (3,4,5,5,1)
  (same comment as for electricity, low voltage)
  properties: heating value, net 1 MJ
- quicklime, milled, packed: 0.000106265 kg; lognormal variance with pedigree 0.115329, pedigree (3,4,5,5,1)
  (same comment as for process-specific burdens, residual material landfill)
  properties: dry mass 0.99 kg, wet mass 1 kg, water content 0.010101
- chemical, inorganic: 2.62815e-5 kg; lognormal variance with pedigree 0.119559, pedigree (3,4,5,5,1)
  (same comment as for process-specific burdens, residual material landfill)
  properties: dry mass 1 kg, carbon content, fossil 0.003, wet mass 1 kg
  note on carbon content, fossil: This dataset is an unweighted average of 20 inorganic substances (listed in Tab 88.1, ecoinvent v2.2 report 8, part II), being part of the top100 chemicals included in this database. The C-content has also been calculated as an unweighted average of the C content of the substances composing this dataset.
- electricity, high voltage: 1.00277 kWh; lognormal variance with pedigree 0.494207, pedigree (3,4,5,5,1)
  (same comment as for process-specific burdens, residual material landfill)
- waste plastic, mixture: -0.0155 kg; name ByP_02; lognormal variance with pedigree 0.0471444, pedigree (3,4,5,5,1)
  (same comment as for electricity, low voltage)
  production volume 98851.3 kg; = ABS(ByP_02/RP)*RP_PV
    Calculated from production volume of reference product using the relative outputs.
  property price 0 EUR2005; name ByP_02_price_EUR2005
  properties: carbon content, fossil 0.747344, wet mass 1 kg, water content 0.180638, heating value, net 30.79 MJ, dry mass 0.847 kg
  note on heating value, net: Value taken from the general comment of the treatment dataset.
- slag landfill: 3.58991e-9 unit; lognormal variance with pedigree 0.0797247, pedigree (3,4,5,5,1)
  (same comment as for process-specific burdens, residual material landfill)
- sodium hydroxide, without water, in 50% solution state: 0.000586123 kg; lognormal variance with pedigree 0.111976, pedigree (3,4,5,5,1)
  (same comment as for process-specific burdens, residual material landfill)
  properties: wet mass 1 kg, dry mass 1 kg, heating value, net 3.03 MJ
- iron sulfate: 3.49233 kg; lognormal variance with pedigree 0.103811, pedigree (3,4,5,5,1)
  (same comment as for electricity, low voltage)
  properties: wet mass 1 kg, dry mass 1 kg
- waste cement, hydrated: -0.257922 kg; name ByP_03; lognormal variance with pedigree 0.0895397, pedigree (3,4,5,5,1)
  (same comment as for process-specific burdens, residual material landfill)
  production volume 1.64489e6 kg; = ABS(ByP_03/RP)*RP_PV
    Calculated from production volume of reference product using the relative outputs.
  property price 0 EUR2005; name ByP_03_price_EUR2005
  properties: dry mass 1 kg, wet mass 1 kg
- process-specific burdens, municipal waste incineration: 6.97485 kg; lognormal variance with pedigree 0.0521652, pedigree (3,4,5,5,1)
  (same comment as for process-specific burdens, residual material landfill)
- waste graphical paper: -0.0155 kg; name ByP_01; lognormal variance with pedigree 0.0471444, pedigree (3,4,5,5,1)
  (same comment as for electricity, low voltage)
  production volume 98851.3 kg; = ABS(ByP_01/RP)*RP_PV
    Calculated from production volume of reference product using the relative outputs.
  property price 0 EUR2005; name ByP_01_price_EUR2005
  properties: wet mass 1 kg, carbon content, non-fossil 0.454955, heating value, net 14.12 MJ, water content 0.126126, dry mass 0.888 kg
- heat, district or industrial, natural gas: 0.189945 MJ; lognormal variance with pedigree 0.258832, pedigree (3,4,5,5,1)
  (same comment as for process-specific burdens, residual material landfill)
  properties: heating value, net 1 MJ
- hydrochloric acid, without water, in 30% solution state: 1.57689e-5 kg; lognormal variance with pedigree 0.119559, pedigree (3,4,5,5,1)
  (same comment as for process-specific burdens, residual material landfill)
  properties: heating value, net 3.32 MJ, wet mass 1 kg, dry mass 1 kg
- titanium dioxide: 5.57528e-5 kg; lognormal variance with pedigree 0.581985, pedigree (3,4,5,5,1)
  (same comment as for process-specific burdens, residual material landfill)
  properties: wet mass 1 kg, dry mass 1 kg
- aluminium sulfate, powder: 0.94386 kg; lognormal variance with pedigree 0.103811, pedigree (3,4,5,5,1)
  (same comment as for electricity, low voltage)
  properties: wet mass 1 kg, dry mass 1 kg
- process-specific burdens, slag landfill: 2.01932 kg; lognormal variance with pedigree 0.0797247, pedigree (3,4,5,5,1)
  (same comment as for process-specific burdens, residual material landfill)
- ammonia, anhydrous, liquid: 0.00194771 kg; lognormal variance with pedigree 0.258832, pedigree (3,4,5,5,1)
  (same comment as for process-specific burdens, residual material landfill)
  properties: dry mass 1 kg, wet mass 1 kg

## Emissions to nature
- Nitrogen oxides [air, urban air close to ground]: 0.0290461 kg; lognormal variance with pedigree 0.123532, pedigree (3,4,5,5,1)
  direct digester gas emission plus emission from sludge incineration. Uncertainty calculated from wastewater composition and treatment model
- Iron [air, urban air close to ground]: 3.81303e-5 kg; lognormal variance with pedigree 0.148782, pedigree (3,4,5,5,1)
  (same comment as for Nitrogen oxides)
- BOD5, Biological Oxygen Demand [water, ground-, long-term]: 0.000191954 kg; lognormal variance with pedigree 0.730085, pedigree (3,4,5,5,1)
  emission from sludge incineration. Uncertainty calculated from wastewater composition and treatment model
- Aluminium [air, urban air close to ground]: 9.07972e-5 kg; lognormal variance with pedigree 0.123096, pedigree (3,4,5,5,1)
  (same comment as for Nitrogen oxides)
- Molybdenum [soil, agricultural]: 0.0117166 kg; lognormal variance with pedigree 0.716278, pedigree (3,4,5,5,1)
  emission from sludge spreading. Uncertainty calculated from wastewater composition and treatment model
- DOC, Dissolved Organic Carbon [water, ground-, long-term]: 0.000232214 kg; lognormal variance with pedigree 0.730085, pedigree (3,4,5,5,1)
  (same comment as for BOD5, Biological Oxygen Demand)
- Tungsten [soil, agricultural]: 0.114161 kg; lognormal variance with pedigree 0.716278, pedigree (3,4,5,5,1)
  (same comment as for Molybdenum)
- Ammonia [air, urban air close to ground]: 0.0220452 kg; lognormal variance with pedigree 0.340661, pedigree (3,4,5,5,1)
  direct digester gas emission plus emission from sludge incineration plus emission from sludge spreading. Uncertainty calculated from wastewater composition and treatment model
- COD, Chemical Oxygen Demand [water, ground-, long-term]: 0.000586841 kg; lognormal variance with pedigree 0.730085, pedigree (3,4,5,5,1)
  (same comment as for BOD5, Biological Oxygen Demand)
- Nitrate [water, ground-, long-term]: 0.00138687 kg; lognormal variance with pedigree 0.126344, pedigree (3,4,5,5,1)
  (same comment as for BOD5, Biological Oxygen Demand)
- Arsenic [soil, agricultural]: 0.00131639 kg; lognormal variance with pedigree 0.714699, pedigree (3,4,5,5,1)
  (same comment as for Molybdenum)
- Tungsten [water, ground-, long-term]: 0.0643916 kg; lognormal variance with pedigree 0.718247, pedigree (3,4,5,5,1)
  (same comment as for BOD5, Biological Oxygen Demand)
- Cyanide [air, urban air close to ground]: 3.4746e-5 kg; lognormal variance with pedigree 0.281293, pedigree (3,4,5,5,1)
  (same comment as for BOD5, Biological Oxygen Demand)
- Iron, ion [water, surface water]: 0.000390856 kg; lognormal variance with pedigree 0.134151, pedigree (3,4,5,5,1)
  sewer overload discharge plus direct wastewater treatment plant emission plus emission from sludge incineration. Uncertainty calculated from wastewater composition and treatment model
- Nitrogen [water, surface water]: 0.0466215 kg; lognormal variance with pedigree 0.100496, pedigree (3,4,5,5,1)
  direct wastewater treatment plant emission. Uncertainty calculated from wastewater composition and treatment model
- Nickel [soil, agricultural]: 0.00240096 kg; lognormal variance with pedigree 0.715707, pedigree (3,4,5,5,1)
  (same comment as for Molybdenum)
- Sulfate [water, surface water]: 3.00269 kg; lognormal variance with pedigree 0.103811, pedigree (3,4,5,5,1)
  (same comment as for Iron, ion)
- Phosphate [water, ground-]: 0.00533302 kg; lognormal variance with pedigree 0.146356, pedigree (3,4,5,5,1)
  (same comment as for Molybdenum)
- Iron [soil, agricultural]: 1.78644 kg; lognormal variance with pedigree 0.104407, pedigree (3,4,5,5,1)
  (same comment as for Molybdenum)
- COD, Chemical Oxygen Demand [water, surface water]: 0.104056 kg; lognormal variance with pedigree 0.620646, pedigree (3,4,5,5,1)
  (same comment as for Iron, ion)
- Phosphate [water, ground-, long-term]: 0.0228605 kg; lognormal variance with pedigree 4.27462, pedigree (3,4,5,5,1)
  (same comment as for BOD5, Biological Oxygen Demand)
- TOC, Total Organic Carbon [water, ground-, long-term]: 0.000232214 kg; lognormal variance with pedigree 0.730085, pedigree (3,4,5,5,1)
  (same comment as for BOD5, Biological Oxygen Demand)
- Dinitrogen monoxide [air, urban air close to ground]: 0.00541392 kg; lognormal variance with pedigree 0.0923515, pedigree (3,4,5,5,1)
  direct wastewater treatment plant emission plus direct digester gas emission plus emission from sludge incineration plus emission from sludge spreading. Uncertainty calculated from wastewater composition and treatment model
- Nickel, ion [water, ground-, long-term]: 0.00143721 kg; lognormal variance with pedigree 0.717791, pedigree (3,4,5,5,1)
  (same comment as for BOD5, Biological Oxygen Demand)
- Aluminium [water, ground-, long-term]: 0.0430123 kg; lognormal variance with pedigree 0.116923, pedigree (3,4,5,5,1)
  (same comment as for BOD5, Biological Oxygen Demand)
- Chloride [water, surface water]: 3.55075 kg; lognormal variance with pedigree 0.107361, pedigree (3,4,5,5,1)
  (same comment as for Iron, ion)
- NMVOC, non-methane volatile organic compounds, unspecified origin [air, urban air close to ground]: 8.04463e-6 kg; lognormal variance with pedigree 0.870745, pedigree (3,4,5,5,1)
  direct digester gas emission. Uncertainty calculated from wastewater composition and treatment model
- Nickel, ion [water, surface water]: 0.00606496 kg; lognormal variance with pedigree 0.671797, pedigree (3,4,5,5,1)
  (same comment as for Iron, ion)
- Arsenic [air, urban air close to ground]: 2.81519e-6 kg; lognormal variance with pedigree 0.739351, pedigree (3,4,5,5,1)
  (same comment as for Nitrogen oxides)
- Ammonium, ion [water, surface water]: 0.679189 kg; lognormal variance with pedigree 0.0885428, pedigree (3,4,5,5,1)
  (same comment as for Nitrogen)
- Aluminium [soil, agricultural]: 0.0909086 kg; lognormal variance with pedigree 0.104407, pedigree (3,4,5,5,1)
  (same comment as for Molybdenum)
- Water [air, unspecified]: 0.1 m3
  Calculated value based on water balance.
- Carbon dioxide, fossil [air, urban air close to ground]: 0.613901 kg; lognormal variance with pedigree 0.378658, pedigree (3,4,5,5,1)
  (same comment as for BOD5, Biological Oxygen Demand)
- Tungsten [water, surface water]: 0.200137 kg; lognormal variance with pedigree 0.637097, pedigree (3,4,5,5,1)
  (same comment as for Iron, ion)
- TOC, Total Organic Carbon [water, surface water]: 0.0278793 kg; lognormal variance with pedigree 0.0493745, pedigree (3,4,5,5,1)
  (same comment as for Iron, ion)
- Water [water, unspecified]: 0.9 m3
  Calculated value based on water balance.
- Carbon [soil, agricultural]: 0.0371951 kg; lognormal variance with pedigree 0.719012, pedigree (3,4,5,5,1)
  (same comment as for Molybdenum)
- Aluminium [water, surface water]: 4.83627e-6 kg; lognormal variance with pedigree 0.714696, pedigree (3,4,5,5,1)
  (same comment as for Iron, ion)
- Nickel [air, urban air close to ground]: 6.62502e-11 kg; lognormal variance with pedigree 0.816334, pedigree (3,4,5,5,1)
  (same comment as for Nitrogen oxides)
- Molybdenum [water, surface water]: 0.0210719 kg; lognormal variance with pedigree 0.615866, pedigree (3,4,5,5,1)
  (same comment as for Iron, ion)
- Methane, fossil [air, urban air close to ground]: 0.00179772 kg; lognormal variance with pedigree 0.743356, pedigree (3,4,5,5,1)
  (same comment as for BOD5, Biological Oxygen Demand)
- Molybdenum [water, ground-, long-term]: 0.00619644 kg; lognormal variance with pedigree 0.718007, pedigree (3,4,5,5,1)
  (same comment as for BOD5, Biological Oxygen Demand)
- Phosphate [water, surface water]: 0.813237 kg; lognormal variance with pedigree 0.0850145, pedigree (3,4,5,5,1)
  sewer overload discharge plus direct wastewater treatment plant emission plus emission from sludge incineration plus emission from sludge spreading. Uncertainty calculated from wastewater composition and treatment model
- DOC, Dissolved Organic Carbon [water, surface water]: 0.0260411 kg; lognormal variance with pedigree 0.571526, pedigree (3,4,5,5,1)
  (same comment as for Iron, ion)
- Nitrate [water, surface water]: 3.08304 kg; lognormal variance with pedigree 0.0879133, pedigree (3,4,5,5,1)
  (same comment as for Iron, ion)
- Molybdenum [air, urban air close to ground]: 1.49819e-5 kg; lognormal variance with pedigree 0.734967, pedigree (3,4,5,5,1)
  (same comment as for Nitrogen oxides)
- Arsenic, ion [water, surface water]: 0.00821859 kg; lognormal variance with pedigree 0.63295, pedigree (3,4,5,5,1)
  (same comment as for Iron, ion)
- Phosphorus [air, urban air close to ground]: 0.000195196 kg; lognormal variance with pedigree 0.117973, pedigree (3,4,5,5,1)
  (same comment as for Nitrogen oxides)
- Arsenic, ion [water, ground-, long-term]: 0.0004622 kg; lognormal variance with pedigree 0.716391, pedigree (3,4,5,5,1)
  (same comment as for BOD5, Biological Oxygen Demand)
- Carbon monoxide, fossil [air, urban air close to ground]: 0.00151338 kg; lognormal variance with pedigree 0.464104, pedigree (3,4,5,5,1)
  (same comment as for BOD5, Biological Oxygen Demand)
- Iron, ion [water, ground-, long-term]: 0.534989 kg; lognormal variance with pedigree 0.939286, pedigree (3,4,5,5,1)
  (same comment as for BOD5, Biological Oxygen Demand)
- BOD5, Biological Oxygen Demand [water, surface water]: 0.0341729 kg; lognormal variance with pedigree 0.0513348, pedigree (3,4,5,5,1)
  (same comment as for Iron, ion)

## Extrapolations
This dataset has been extrapolated from year 2015 to the year of the calculation (2021). The uncertainty has been adjusted accordingly.

## Review by Gabor Doka 2020-05-18
Passed. COD value in input WW extrapolated from general Chinese metal industry emisisons and back-calculated with purification in employed WWT model.
