# isopropylamine production

Dataset: EcoSpold 2, unit process
Geography: RoW
Time period: 2010-01-01 to 2021-12-31
Technology level: current
Classification: ISIC rev.4 ecoinvent: 2011:Manufacture of basic chemicals
Synonyms: C3H9N
Scenario: Business-as-Usual
System model: Allocation, cut-off by classification
Share of production covered: 100 %
Generated by: Jürgen Sutter
Database: ecoinvent
isCopyrightProtected: true
accessRestrictedTo: 1

## General comment
The process “isopropylamine, at plant, GLO" is modelled for the production of isopropylamine from isopropanol. Raw materials are modelled with a stoechiometric calculation. Emissions are estimated. Energy consumptions, infrastructure and transports are calculated with standard values.
Isopropylamine (C6H15N; CAS 142-84-7) is a colourless liquid with an ammionia odour. It is a flammable, highly toxic, corrosive amine. Dipropylamine is soluble in Ethanol, Benzene , Ethyl Acetate Isopropylamine is produced by an amination of isopropanol.
C3H8O + NH3 → C3H9N + H2O
The reaction of the appropriate alcohol with ammonia over a suitable catalyst is now the most common process for the preparation of lower alkylamines. In this reaction, the product is always a mixture of primary, secondary, and tertiary amines because the primary amine formed initially can react further with one or two molecules of alcohol. While the initial conversion of the alcohol to the primary amine is close to thermoneutral, the formation of secondary and tertiary amines is exothermic and thus thermodynamically favored. Also, the primary amine is more nucleophilic than ammonia and hence has a higher reactivity. The product distribution can be controlled to a certain extent by means of the reaction conditions (temperature, excess of ammonia, residence time). Because the mixture of products usually obtained does not correspond to market requirements, amines that are not marketable can be recycled. Thus, the yield of the desired amine can be increased to above 90 %.
The first and rate-determining step is the dehydrogenation of the alcohol to the carbonyl compound. Addition of ammonia is followed by loss of water to yield an imine or an enamine, which is hydrogenated to the final amine. Side reactions are amine disproportionation, especially at higher reaction temperatures, and to a lesser degree aldol condensation of the intermediate aldehydes, formation of Schiff base from these aldehydes and the amine product, and nitrile formation, which occurs at high temperatures and low hydrogen pressures.
Monoisopropylamine is used particularly in the production of herbicides such as bentazon (BASF), Roundup (Monsanto), imazapyr (ACC) and the triazines ametryne (Novartis), atrazine (Novartis), desmetryn (Novartis), prometryn (Novartis), pramitol (Novartis), dipropetryn (Novartis), and propazine (Novartis, Makteshim-Agan and Drexel). Other applications encompass the nematicide fenamiphos (Bayer), the fungicide iprodione (Rhône-Poulenc), insecticides, pharmaceuticals, and surfactants.Arsenic hydride is used as a dopant in the semiconductor industry.
Frischknecht R., Jungbluth N., Althaus H.-J., Doka G., Dones R., Heck T., Hellweg S., Hischier R., Nemecek T., Rebitzer G. and Spielmann M. (2007) Overview and Methodology. Final report ecoinvent v2.0 No. 1. Swiss Centre for Life Cycle Inventories, Dübendorf, CH, retrieved from: www.ecoinvent.org.

Gendorf (2000) Umwelterklärung 2000, Werk Gendorf. Werk Gendorf, Burgkirchen as pdf-File under: http://www.gendorf.de/pdf/umwelterklaerung2000.pdf

Kim 2003 Kim S., Overcash M.: Energy in chemical manufacturing processes: gate-to-gate information for life cycle assessment. In: Journal of Chemical Technology & Biotechnology vol. 78, no. 9: 995-1005(11). 2003

Karsten Eller, Erhard Henkes, Roland Rossbacher, Hartmut Höke: Amines, Aliphatic. Published online: 2000. In: Ullmann's Encyclopedia of Industrial Chemistry, Seventh Edition, 2004 Electronic Release (ed. Fiedler E., Grossmann G., Kersebohm D., Weiss G. and Witte C.). 7 th Electronic Release Edition. Wiley InterScience, New York, Online-Version under: DOI: 10.1002/14356007.a02_001

## Included activities end
production of isopropylamine including materials, energy uses, infrastructure, and emissions

## Geography
The inventory is modelled for the world.

## Technology
amination of isopropanol

## Time period
Time of publications

## Parameters
- fraction, cooling water, cooling pond system, to air: 0.032 dimensionless; name fraction_CW_CP_to_air; lognormal variance with pedigree 0.0413, pedigree (2,3,1,3,1)
  Calculated based on literature value (Scown, C.D., 2011, Water Footprint of U.S. Transportation Fuels and supplying information of the article) (Vionnet, S., Quantis Water Database - Technical Report, 2012).
- fraction, cooling water, to air: 0.3875 dimensionless; name fraction_CW_to_air; = (0.5*fraction_CW_OT_to_air)+(0.5*fraction_CW_R_to_air); lognormal variance with pedigree 0.092025, pedigree (4,4,3,2,4)
  Calculated value based on literature value (see comments of the other parametres present in this dataset) and expert opinion. In the case when no industry/literature data are available about the type of cooling or directly fraction, cooling water, to air specific for the process a default assumption is applied. It is assumed that the once-through cooling system is used in 50% of all cases and recirculating system is used in another 50% of all cases.
- fraction, cooling water, once-through system, to air: 0.004 dimensionless; name fraction_CW_OT_to_air; lognormal variance with pedigree 0.0413, pedigree (2,3,1,3,1)
  (same comment as for fraction, cooling water, cooling pond system, to air)
- fraction, cooling water, recirculating system, to air: 0.771 dimensionless; name fraction_CW_R_to_air; lognormal variance with pedigree 0.0413, pedigree (2,3,1,3,1)
  (same comment as for fraction, cooling water, cooling pond system, to air)

## Reference product
- isopropylamine: 1 kg; CPC 34150: Amine-function compounds; oxygen-function amino-compounds, except lysine and its esters and salts thereof and […]; By-product classification allocatable product; CAS 75-31-0
  EcoSpold01Location=RER
  production volume 6.7e6 kg
    Expert judgement
  property price 1.31123 EUR2005
    Calculated based on inputs: The price of the product has been calculated as a sum of the values of the material and energy inputs for this product. This value is therefore a rough estimation. It may underestimate the real price since there are additional expenses when producing any product. These expences can include for example labour costs, treatment of waste materials and profit for the producer. Please consider carefully whether this level of data quality is acceptable for your application.
  property carbon content, fossil 0.712172
    Calculated based on molecular structure. See tab "chemicals".
  property heating value, net 36.92 MJ
    LHV is calculated based on the elemental composition of the substance. Based on the CAS number of the substance (000075-31-0 ), which is found manually, the chemical formula of the substance is found to be: C3H9N, (PubChem 2020).
    Reference: Kim, S., Chen, J., Cheng, T., Gindulyte, A., He, J., He, S., Li, Q., Shoemaker, B. A., Thiessen, P. A., Yu, B., Zaslavsky, L., Zhang, J., & Bolton, E. E. (2019). PubChem 2019 update: improved access to chemical data. Nucleic acids research, 47(D1), D1102–D1109. https://doi.org/10.1093/nar/gky1033
  property carbon content 0.712172
    carbon content on a dry matter basis (reserved; not for manual entry)
  properties: water in wet mass 0 kg, wet mass 1 kg, carbon content, non-fossil 0, water content 0, dry mass 1 kg, carbon allocation 0.712172 kg

## Inputs from technosphere
- ammonia, anhydrous, liquid: 0 kg; pedigree (1,1,1,1,1)
  EcoSpold01Location=RER
  For the input of ammonia a yield of 95 % is assumed, as no data are available (Frischknecht et al. 2007).
  Uncertainty: Stoechiometric calculation
  properties: dry mass 1 kg, wet mass 1 kg
- chemical factory, organics: 4e-10 unit; lognormal variance with pedigree 0.3184, pedigree (4,5,5,5,5)
  No information was readily available about infrastructure and land-use of isopropylamine production plants. Therefore, in this study, the infrastructure is estimated based on the module "chemical plant, organics". This module assumes a built area of about 4.2 ha, an average output of 50'000 t/a, and plant life of fifty years. For this study, the estimated value is 4.00 E-10 units per kg of produced chemical.
  EcoSpold01Location=RER
  Uncertainty: Estimation
- electricity, medium voltage: 0 kWh; pedigree (1,1,1,1,1)
  As no data for the production of isopropylamine are available, the values for the energy use have been estimated with data from Kim 2003, who gives data for the amination of methanol. This process is considered to be similar to the amination of isopropanol.
  EcoSpold01Location=UCTE
  Uncertainty: Kim 2003
- isopropanol: 1.1299 kg; lognormal variance with pedigree 0.0335, pedigree (4,5,4,1,1)
  Ullmanns (2004) reports a yield for alcohol aminations of 90% based on alcohol.
  EcoSpold01Location=RER
  Uncertainty: Stoechiometric calculation
  properties: dry mass 1 kg, heating value, net 34.3 MJ, carbon content, fossil 0.6, wet mass 1 kg
- heat, from steam, in chemical industry: 1.76 MJ; lognormal variance with pedigree 0.0416, pedigree (1,2,5,1,1)
  EcoSpold01Location=RER
  As no data for the production of isopropylamine are available, the values for the energy use have been estimated with data from Kim 2003, who gives data for the amination of methanol. This process is considered to be similar to the amination of isopropanol.
  Uncertainty: Kim 2003
  properties: heating value, net 1 MJ
- ammonia, anhydrous, liquid: 0.0635756, 0.00546509, 0.00850227, 0.016846, 0.0165046, 0.00172986, 0.00773313, 0.182943 kg (8 entries); lognormal variance with pedigree 0.0335, pedigree (4,5,4,1,1)
  (same comment as for ammonia, anhydrous, liquid)
- electricity, medium voltage: 0.00451682, 0.000866131, 0.0145405, 0.211479, 0.0298081, 0.0971192 kWh (6 entries); lognormal variance with pedigree 0.0416, pedigree (1,2,5,1,1)
  (same comment as for electricity, medium voltage)

## Inputs from nature
- Water, cooling, unspecified natural origin [natural resource, in water]: 0.024 m3; name water_cooling_UNO_input; lognormal variance with pedigree 0.0335, pedigree (4,5,4,1,1)
  There was no information available on the amount of cooling water used within the plant. In order not to neglect the process cooling water demand this value was approximated with data from an large chemical plant site in Germany producing 2.05 Mt a-1 (intermediates included) of different chemicals (Gendorf 2000). In this plant in total an average 24 kg water per kg of product were used for. This value was used in this inventory as approximation for the cooling water consumption of the isopropylamine production.
  There was no information available on the amount of cooling water used within the plant. In order not to neglect the process cooling water demand this value was approximated with data from an large chemical plant site in Germany producing 2.05 Mt a-1 (intermediates included) of different chemicals (Gendorf 2000). In this plant in total an average 24 kg water per kg of product were used for. This value was used in this inventory as approximation for the cooling water consumption of the isopropylamine production.
  Uncertainty: Estimation

## Emissions to nature
- DOC, Dissolved Organic Carbon [water, surface water]: 0.0066395 kg; lognormal variance with pedigree 0.218, pedigree (4,5,5,5,5)
  The values for COD, BOD, TOC, and DOC used in this inventory are calculated from the amount of isopropanol in the treated waste water assuming a carbon conversion of 96% for COD. For the calculation of the values for BOD and DOC the worst case scenario BOD = COD and TOC = DOC is used.
  Uncertainty: Estimation
- Ammonia [air, urban air close to ground]: 0.0006066 kg; lognormal variance with pedigree 0.1786, pedigree (4,5,5,5,5)
  There was no data available on process emissions to air for the isopropylamine production. As approximation the air emissions occurring from the purge vent, the distillation vent and fugitive emission sources were estimated to 0.2% of the input of isopropanol and ammonia.
  Uncertainty: Estimation
- Carbon dioxide, fossil [air, urban air close to ground]: 0.21925 kg; lognormal variance with pedigree 0.1786, pedigree (4,5,5,5,5)
  The carbon contained in the removed isopropanol is accounted as CO2 emissions to air.
  Uncertainty: Estimation
- Water [air, unspecified]: 0.0093 m3; name water_to_air_unspecified; = water_cooling_UNO_input*fraction_CW_to_air; lognormal variance with pedigree 0.130025, pedigree (4,4,5,2,4)
  Calculated value based on literature values and expert opinion. See comments in the parametres' comment field.
  property fraction, origin: salt water 0; name fraction_origin_salt_water
  property fraction, origin: fresh water 0; name fraction_origin_fresh_water
  property fraction, origin: unspecified 1; name fraction_origin_unspecified
- BOD5, Biological Oxygen Demand [water, surface water]: 0.025471 kg; lognormal variance with pedigree 0.218, pedigree (4,5,5,5,5)
  (same comment as for DOC, Dissolved Organic Carbon)
- 2-Propanol [air, urban air close to ground]: 0.0022599 kg; lognormal variance with pedigree 0.1786, pedigree (4,5,5,5,5)
  (same comment as for Ammonia)
- 2-Propanol [water, surface water]: 0.011073 kg; lognormal variance with pedigree 0.3184, pedigree (4,5,5,5,5)
  The remaining amount of unreacted isopropanol and ammonia is assumed to leave the production process with the waste water. Further it was assumed that this wastewater is treated in a internal wastewater plant. The removal efficiency for isopropanol is assumed with 90%. The carbon contained in the removed isopropanol is accounted as CO2 emissions to air.
  Uncertainty: Estimation
- Water [water, unspecified]: 0.0147 m3; name water_to_water_unspecified; = water_cooling_UNO_input*(1-fraction_CW_to_air); lognormal variance with pedigree 0.130025, pedigree (4,4,5,2,4)
  (same comment as for Water)
  property fraction, origin: unspecified 1; name fraction_origin_unspecified_Ww
  property fraction, origin: salt water 0; name fraction_origin_salt_water_Ww
  property fraction, origin: fresh water 0; name fraction_origin_fresh_water_Ww
- TOC, Total Organic Carbon [water, surface water]: 0.0066395 kg; lognormal variance with pedigree 0.218, pedigree (4,5,5,5,5)
  (same comment as for DOC, Dissolved Organic Carbon)
- Ammonium, ion [water, surface water]: 0.0014558 kg; lognormal variance with pedigree 0.1786, pedigree (4,5,5,5,5)
  For the ammonia within the waste water a removal efficiency of 50% was assumed. The nitrogen emitted to air (N2) and remaining in the sewage sludge was neglected.
  Uncertainty: Estimation
- COD, Chemical Oxygen Demand [water, surface water]: 0.025471 kg; lognormal variance with pedigree 0.218, pedigree (4,5,5,5,5)
  (same comment as for DOC, Dissolved Organic Carbon)

## Sampling procedure
Literature data

## Extrapolations
Emissions are modelled with standard methods.
