# glazing production, double, U<1.1 W/m2K, laminated safety glass

Dataset: EcoSpold 2, unit process
Geography: RER
Time period: 1996-01-01 to 2021-12-31
Technology level: current
Classification: EcoSpold01Categories: building components/windows
Classification: ISIC rev.4 ecoinvent: 2310:Manufacture of glass and glass products
Tags: ConvertedDataset
Scenario: Business-as-Usual
System model: Allocation, cut-off by classification
Generated by: Martin Lehmann
Published in: Kellenberger D. 2007
Database: ecoinvent
isCopyrightProtected: true
accessRestrictedTo: 1

## General comment
This dataset describes the processes included in the production of 1.06m2 (corresponding to 1m2 visible area) double glazing (2-IV, LSG) with a U-value below 1.1 W/m2K. It can be applied for laminated safety double glazing used in the building sector. 1 m2 visible glazing area has a final weight of 26 kg.
[This dataset was already contained in the ecoinvent database version 2. It was not individually updated during the transfer to ecoinvent version 3. Life Cycle Impact Assessment results may still have changed, as they are affected by changes in the supply chain, i.e. in other datasets. This dataset was generated following the ecoinvent quality guidelines for version 2. It may have been subject to central changes described in the ecoinvent version 3 change report (http://www.ecoinvent.org/database/ecoinvent-version-3/reports-of-changes/), and the results of the central updates were reviewed extensively. The changes added e.g. consistent water flows and other information throughout the database. The documentation of this dataset can be found in the ecoinvent reports of version 2, which are still available via the ecoinvent website. The change report linked above covers all central changes that were made during the conversion process.]

## Included activities end
Included in this dataset are the materials and production processes of 1.06m2 (corresponding to 1m2 visible area) LSG double glazing (2-IV, LSG) with a U-value below 1.1 W/m2K including disposal of waste water and production wastes.

## Geography
Data estimated according to a European company.

## Technology
The technology represents average European production.

## Reference product
- glazing, double, U<1.1 W/m2K, laminated safety glass: 1 m2; By-product classification allocatable product; CPC 37114: Glass in sheets, bent, edge-worked, engraved, drilled, enamelled or otherwise worked, but not framed, etc.
  EcoSpold01Location=RER
  production volume 1.32237 m2
    This is a placeholder value that does not reflect real-world production volumes. This dataset does not currently require a real-world production volume to work in the database framework, and no actual data were collected yet. This has no negative effect on the results of the ecoinvent database. The placeholder value of this activity was scaled according to the nominal GDP of 2005 (source: United Nations, http://data.un.org/Glossary.aspx?q=GDP+%28current+US%24%29, accessed 20130726) to reflect an appropriate share of the global production volume, which is also a placeholder value.
  property price 81.7282 EUR2005
    Calculated based on inputs: The price of the product has been calculated as a sum of the values of the material and energy inputs for this product. This value is therefore a rough estimation. It may underestimate the real price since there are additional expenses when producing any product. These expences can include for example labour costs, treatment of waste materials and profit for the producer. Please consider carefully whether this level of data quality is acceptable for your application.
  property carbon content, fossil 0.0175264
    Calculated as an addition of C content in the product, then referred to 1 kg DM.
  property carbon content 0.0175264
    carbon content on a dry matter basis (reserved; not for manual entry)
  properties: water content 0, carbon content, non-fossil 0, dry mass 27.56 kg, wet mass 27.56 kg, water in wet mass 0 kg, carbon allocation 0.483029 kg

## Inputs from technosphere
- extrusion, plastic film: 1.05 kg; lognormal variance with pedigree 0.0513, pedigree (2,3,5,3,1)
  activityLink introduced to establish a direct link to the corresponding regional supply of this product
  EcoSpold01Location=RER
- polyvinylchloride, suspension polymerised: 0.915957 kg; lognormal variance with pedigree 0.0507, pedigree (1,3,5,3,1)
  EcoSpold01Location=RER
  properties: heating value, net 21.5 MJ, carbon content, fossil 0.387097, dry mass 1 kg, wet mass 1 kg
  note on carbon content, fossil: Monomer is vynyl chloride, C2H3Cl (ecoinvent v2.2 report 11_II). MW=62 g/mol
- electricity, medium voltage: 9.67 kWh; lognormal variance with pedigree 0.0527, pedigree (2,4,5,3,1)
  EcoSpold01Location=UCTE
- polyvinylchloride, emulsion polymerised: 0.134043 kg; lognormal variance with pedigree 0.0507, pedigree (1,3,5,3,1)
  EcoSpold01Location=RER
  properties: dry mass 1 kg, wet mass 1 kg, carbon content, fossil 0.387097, heating value, net 21.5 MJ
- glazing, double, U<1.1 W/m2K: 1 m2; lognormal variance with pedigree 0.1707, pedigree (1,3,5,3,1)
  EcoSpold01Location=RER
  properties: dry mass 21.2742 kg, carbon content, fossil 0.00359953, wet mass 21.2742 kg
  note on carbon content, fossil: Calculated as an addition of C content in the product, then referred to 1 kg DM.
- flat glass, uncoated: 4.84 kg; lognormal variance with pedigree 0.0507, pedigree (1,3,5,3,1)
  EcoSpold01Location=RER
  properties: wet mass 1 kg, dry mass 1 kg

## Sampling procedure
Company documentation, calculations based on geometry

## Extrapolations
This dataset has been extrapolated from year 2004 to the year of the calculation (2021). The uncertainty has been adjusted accordingly.

## Review by Rolf Frischknecht 2007-11-08
passed
