# polypropylene production, granulate

Dataset: EcoSpold 2, unit process
Geography: RER
Time period: 2011-01-01 to 2021-12-31
Technology level: current
Classification: ISIC rev.4 ecoinvent: 2013:Manufacture of plastics and synthetic rubber in primary forms
Synonyms: PP
Scenario: Business-as-Usual
System model: Allocation, cut-off by classification
Share of production covered: 76 %
Generated by: Thomas Fröhlich
Published in: PlasticsEurope 2016
Database: ecoinvent
isCopyrightProtected: true
accessRestrictedTo: 1

## General comment
The dataset represents the production mix of commercial PP production technologies: slurry suspension polymerisation,Bulk suspension polymerisation, gas phase polymerisation using Ziegler-Natta and Metallocene catalysts
PP is usually manufactured with the gas phase or the suspension (slurry) process. Modern suspension processes, however, use liquid monomers instead of a solvent and are termed “bulk” process.
In the gas phase processes a fluidised bed of polymer particles and catalyst is maintained by a steady gaseous monomer feed from the bottom of the reactor. Polymer powder is continuously extracted at the bottom of the fluidised bed reactor. Unreacted monomer gas from the top is compressed and recycled to the reactor inlet. Catalyst, and co-catalyst if necessary, is also continuously fed to the reactor. Typically Ziegler-Natta catalysts are used for gas phase polymerisation where the catalyst is supported on inert silica particles so that the reaction takes place at the catalyst surface.
The suspension polymerisation can be described as precipitation process. The formation of the polymer takes place in a hydrocarbon diluent and under conditions, where the monomer is soluble in the solution. The precipitated polymer, however, is insoluble and forms a fine suspension. The polymer is then separated by centrifugation. The suspension process can be combined with a stirred tank reactor or a loop reactor. Different diluents can be chosen, like C5 to C9 hydrocarbons, hexane, or isobutane.
The bulk suspension process describes the slurry suspension process used for the production of PP where the monomer propylene is used as solvent instead of other hydrocarbons. Modern suspension processes for the production of PP use liquid monomers instead of gaseous.
After the reaction phase, most of the residual (unreacted) monomers (which are mostly present as gases) are separated from the polymer and are either recycled back into the process or flared of. Depending on the purity of the separated monomers, the gas can either be fed directly back into the production line or the monomers are returned to a purification unit. To limit the accumulation of impurities in the process, usually a small side-stream (purge) of the unreacted gas is sent back to the cracker or to a dedicated purification unit. After polymerisation, the polymer is usually fed di-rectly into a hot melt extruder, where additives can be added to the melted polymer if required. The polymer is then pelletised in an underwater pelletiser. The pelletised product is dried, blended where required and degassed.

## Included activities start
Acitivity starts with monomers and comonomers entering the polymerisation plant. Energy supply is included in terms of heat production inside the battery limits of the plant. Steam and electricity supply is outside the activity.

## Included activities end
Activity ends with polymer granulate leaving the factory.

## Allocation
The polyolefin production itself is regarded as a single-output process since only one polymer type is produced by one installation. All other products of this installation, e.g. monomers being recycled to the cracker or distillation, or hydrocarbons being used thermally, are treated as internal flows replacing the respective input materials (i.e. monomers or energy carriers). Hence, no allocation is needed for the polyolefin production process.

## Geography
EU27 including Norway and Switzerland

## Technology
Coverage of production capacity in Europe: 76%

## Time period
Data was collected for the year 2011, processed in 2013 and published in 2014

## Reference product
- polypropylene, granulate: 1 kg; CPC 347: Plastics in primary forms; By-product classification allocatable product; CAS 9003-07-0
  Reference Product
  production volume 1.1e10 kg; name RP_PV
    Production Capacity in 2013 in EU27+NOR+CH, Source: PlasticsEurope
  property price 0.76 EUR2005
    From UN data, http://data.un.org/Data.aspx?q=polypropylene&d=ComTrade&f=_l1Code%3a40%3bcmdCode%3a390210
  property heating value, net 32.78 MJ
    Value extracted from "treatment of waste polypropylene, open burning"
  property carbon content 0.857143
    carbon content on a dry matter basis (reserved; not for manual entry)
  properties: water in wet mass 0 kg, carbon content, fossil 0.857143, wet mass 1 kg, carbon content, non-fossil 0, dry mass 1 kg, water content 0, carbon allocation 0.857143 kg

## Inputs from technosphere
- compressed air, 600 kPa gauge: 0.0398991 m3; lognormal variance with pedigree 0.0093, pedigree (2,2,4,1,1)
  Weighted average of reported input
- chemical, organic: 0.00711046 kg; lognormal variance with pedigree 0.0093, pedigree (2,2,4,1,1)
  Sum input parameter covering partly confidential information on additives, solvents, catalysts. Weighted average of reported input materials.
  properties: dry mass 1 kg, heating value, net 19.03 MJ, wet mass 1 kg, carbon content, fossil 0.628
  note on carbon content, fossil: This dataset is an unweighted average of 20 organic substances (listed in Tab 88.1, ecoinvent v2.2 report 8, part II), being part of the top100 chemicals included in this database. The C-content has also been calculated as an unweighted average of the C content of the substances composing this dataset.
- wastewater, unpolluted: -0.0162738 m3; name BP_amount4; lognormal variance with pedigree 0.0107, pedigree (3,2,4,1,1)
  Weighted average of reported waste
  production volume 1.79012e8 m3; = BP_amount4*RP_PV
    calculated with production volume of reference product
  property price 0 EUR2005; name BP_amount4_price_EUR2005
  properties: dry mass 0.337476 kg, wet mass 1000 kg, water content 2962.17, carbon content, non-fossil 0.00178991, carbon content, fossil 0.00178991
  note on carbon content, fossil: Assumed to be like in tap water. Bicarbonate content is 2.93 mol/m3. CO2 content is 0.1 mol/m3 (ecoinvent v2.2 report 8, Tab 93.1).
- natural gas, high pressure: 0 m3; pedigree (1,1,1,1,1)
  Weighted average of reported input
  properties: wet mass 1 kg, dry mass 1 kg, carbon content, fossil 0.695187, heating value, net 39 MJ
  note on heating value, net: Literature value, Source: United Nations Statistics Division (2018) International Recommendations for Energy Statistics (IRES). Available at: http://unstats.un.org/unsd/statcom/doc11/BG-IRES.pdf.
- hazardous waste, for incineration: 0 kg; name BP_amount3; pedigree (1,1,1,1,1)
  Weighted average of reported waste
  production volume 0 kg
    calculated with production volume of reference product
  property price 0 EUR2005; name BP_amount3_price_EUR2005
  properties: heating value, net 17 MJ, carbon content, fossil 0.554667, dry mass 0.75 kg, wet mass 1 kg, water content 0.333333
  note on heating value, net: Value taken from the general comment of the treatment dataset.
  note on carbon content, fossil: Tab A.6, ecoinvent v2.2 report 13_I. C content has been calculated after data in the tables, and then referred to 1 kg DM
- chemical factory, organics: 4e-10 unit; lognormal variance with pedigree 0.311225, pedigree (2,3,3,2,3)
  Calculated based on literature data published by the industry. For this activity, no information was readily available concerning infrastructure and land-use. Therefore, the infrastructure is estimated based on data from two chemical factories, the BASF site of Ludwigshafen and the chemical factory in Gendorf (which are both located in Germany), which produce a wide range of chemical substances. Based on this data, the following assumptions are made: the built area amounts to about 4.2 ha, the plant has an average output of 50"000 t/a and a lifespan of fifty years. The estimated infrastructure amount is therefore 4.00 E-10 units per kg of produced chemical.
  References:
  Althaus H.-J., Chudacoff M., Hischier R., Jungbluth N., Osses M. and Primas A. (2007) Life Cycle Inventories of Chemicals. ecoinvent report No. 8, v2.0. EMPA Dübendorf, Swiss Centre for Life Cycle Inventories, Dübendorf, CH.
  Gendorf (2000) Umwelterklärung 2000, Werk Gendorf. Werk Gendorf, Burgkirchen.
- hydrogen, liquid: 0.00019513 kg; lognormal variance with pedigree 0.0093, pedigree (2,2,4,1,1)
  Weighted average of reported input
  properties: wet mass 1 kg, dry mass 1 kg, heating value, net 120.21 MJ
- nitrogen, liquid: 0.0526179 kg; lognormal variance with pedigree 0.0093, pedigree (2,2,4,1,1)
  Weighted average of reported input
  properties: dry mass 1 kg, wet mass 1 kg
- electricity, medium voltage: 0.351542 kWh; lognormal variance with pedigree 0.0093, pedigree (2,2,4,1,1)
  Weighted average of reported input
- solvent, organic: 0.000739521 kg; lognormal variance with pedigree 0.0093, pedigree (2,2,4,1,1)
  Weighted average of reported input
  properties: heating value, net 19.11 MJ, carbon content, fossil 0.63072, wet mass 1 kg, dry mass 1 kg
- propylene: 0.987665 kg; lognormal variance with pedigree 0.0093, pedigree (2,2,4,1,1)
  Weighted average of reported input
  properties: carbon content, fossil 0.857143, wet mass 1 kg, dry mass 1 kg, heating value, net 43.22 MJ
- chemical, inorganic: 4.11111e-6 kg; lognormal variance with pedigree 0.0093, pedigree (2,2,4,1,1)
  (same comment as for chemical, organic)
  properties: wet mass 1 kg, dry mass 1 kg, carbon content, fossil 0.003
  note on carbon content, fossil: This dataset is an unweighted average of 20 inorganic substances (listed in Tab 88.1, ecoinvent v2.2 report 8, part II), being part of the top100 chemicals included in this database. The C-content has also been calculated as an unweighted average of the C content of the substances composing this dataset.
- wastewater, average: 0 m3; name BP_amount1; pedigree (1,1,1,1,1)
  Weighted average of reported waste
  production volume 0 m3
    calculated with production volume of reference product
  property price 0 EUR2005; name BP_amount1_price_EUR2005
  properties: carbon content, non-fossil 0.194039, wet mass 1000 kg, dry mass 0.346837 kg, water content 2882.2
  note on carbon content, non-fossil: 0.0673 kg TOC/m3 (Tab A.17, ecoinvent v2.2 report 13_I). TOC was considered as Total Carbon.
- titanium tetrachloride: 0.00109493 kg; lognormal variance with pedigree 0.0093, pedigree (2,2,4,1,1)
  Weighted average of reported input
  properties: wet mass 1 kg, dry mass 1 kg
- heat, from steam, in chemical industry: 0.568567 MJ; lognormal variance with pedigree 0.0093, pedigree (2,2,4,1,1)
  Weighted average of reported input
  properties: heating value, net 1 MJ
- ethylene: 0.0545143 kg; lognormal variance with pedigree 0.0093, pedigree (2,2,4,1,1)
  Weighted average of reported input
  properties: carbon content, fossil 0.857143, heating value, net 43.22 MJ, wet mass 1 kg, dry mass 1 kg
- waste plastic, mixture: -0.00184256 kg; name BP_amount2; lognormal variance with pedigree 0.0107, pedigree (3,2,4,1,1)
  Weighted average of reported waste
  production volume 2.02682e7 kg; = BP_amount2*RP_PV
    calculated with production volume of reference product
  property price 0 EUR2005; name BP_amount2_price_EUR2005
  properties: dry mass 0.847 kg, carbon content, fossil 0.747344, wet mass 1 kg, heating value, net 30.79 MJ, water content 0.180638
- natural gas, high pressure: 0.00508195, 3.2812e-5 m3 (2 entries); lognormal variance with pedigree 0.0093, pedigree (2,2,4,1,1)
  Weighted average of reported input
- hazardous waste, for incineration: -0.002226, -5.81863e-5 kg (2 entries); lognormal variance with pedigree 0.0107, pedigree (3,2,4,1,1)
  Weighted average of reported waste
  production volume 2.51261e7 kg
- wastewater, average: -0.000609966, -6.59868e-5 m3 (2 entries); lognormal variance with pedigree 0.0492, pedigree (2,3,4,1,1)
  Weighted average of reported waste
  production volume 7.43548e6 m3

## Inputs from nature
- Water, unspecified natural origin [natural resource, in water]: 0.000586742 m3; lognormal variance with pedigree 0.0093, pedigree (2,2,4,1,1)
  Weighted average of reported input
- Water, cooling, unspecified natural origin [natural resource, in water]: 0.0192503 m3; lognormal variance with pedigree 0.0093, pedigree (2,2,4,1,1)
  Weighted average of reported input

## Emissions to nature
- AOX, Adsorbable Organic Halogen as Cl [water, unspecified]: 6.74897e-8 kg; lognormal variance with pedigree 0.0487, pedigree (2,2,4,1,1)
  Weighted average of reported emissions
- Propene [air, unspecified]: 3.82619e-5 kg; lognormal variance with pedigree 0.1292, pedigree (2,3,4,1,1)
  Weighted average of reported emissions
- Hydrogen [air, unspecified]: 5.73076e-8 kg; lognormal variance with pedigree 0.0492, pedigree (2,3,4,1,1)
  Weighted average of reported emissions
- Sulfur dioxide [air, unspecified]: 6.34431e-8 kg; lognormal variance with pedigree 0.0098, pedigree (2,3,4,1,1)
  Weighted average of reported emissions
- Lead [water, unspecified]: 2.30091e-9 kg; lognormal variance with pedigree 0.6592, pedigree (2,3,4,1,1)
  Weighted average of reported emissions
- Particulates, > 2.5 um, and < 10um [air, unspecified]: 2.77433e-6 kg; lognormal variance with pedigree 0.1292, pedigree (2,3,4,1,1)
  Weighted average of reported emissions
- Sulfate [water, unspecified]: 0.000147119 kg; lognormal variance with pedigree 0.0492, pedigree (2,3,4,1,1)
  Weighted average of reported emissions
- Arsenic, ion [water, unspecified]: 1.51813e-9 kg; lognormal variance with pedigree 0.6592, pedigree (2,3,4,1,1)
  Weighted average of reported emissions
- NMVOC, non-methane volatile organic compounds, unspecified origin [air, unspecified]: 0.000268994 kg; lognormal variance with pedigree 0.0487, pedigree (2,2,4,1,1)
  Weighted average of reported emissions
- Copper, ion [water, unspecified]: 8.11439e-9 kg; lognormal variance with pedigree 0.6592, pedigree (2,3,4,1,1)
  Weighted average of reported emissions
- Dinitrogen monoxide [air, unspecified]: 8.27339e-7 kg; lognormal variance with pedigree 0.0487, pedigree (2,2,4,1,1)
  Weighted average of reported emissions
- Zinc, ion [water, unspecified]: 1.11129e-7 kg; lognormal variance with pedigree 0.6592, pedigree (2,3,4,1,1)
  Weighted average of reported emissions
- Carbon dioxide, fossil [air, unspecified]: 0.0415733 kg; lognormal variance with pedigree 0.0093, pedigree (2,2,4,1,1)
  Weighted average of reported emissions
- Mercury [water, unspecified]: 1.42324e-11 kg; lognormal variance with pedigree 0.6592, pedigree (2,3,4,1,1)
  Weighted average of reported emissions
- Aluminium [water, unspecified]: 1.09353e-7 kg; lognormal variance with pedigree 0.6592, pedigree (2,3,4,1,1)
  Weighted average of reported emissions
- Methane, fossil [air, unspecified]: 3.20543e-6 kg; lognormal variance with pedigree 0.0492, pedigree (2,3,4,1,1)
  Weighted average of reported emissions
- Chromium, ion [water, unspecified]: 1.17778e-8 kg; lognormal variance with pedigree 0.6592, pedigree (2,3,4,1,1)
  Weighted average of reported emissions
- Nitrate [water, unspecified]: 7.39138e-7 kg; lognormal variance with pedigree 0.0492, pedigree (2,3,4,1,1)
  Weighted average of reported emissions
- Carbon monoxide, fossil [air, unspecified]: 1.58699e-5 kg; lognormal variance with pedigree 0.6592, pedigree (2,3,4,1,1)
  Weighted average of reported emissions
- Water [air, unspecified]: 0.00288732 m3; lognormal variance with pedigree 0.0167, pedigree (4,2,4,1,1)
  Calculated to close water balance
- Nitrogen, organic bound [water, unspecified]: 3.13276e-6 kg; lognormal variance with pedigree 0.0492, pedigree (2,3,4,1,1)
  Weighted average of reported emissions
- Sulfur hexafluoride [air, unspecified]: 5.81147e-10 kg; lognormal variance with pedigree 0.0492, pedigree (2,3,4,1,1)
  Weighted average of reported emissions
- Particulates, > 10 um [air, unspecified]: 6.61805e-6 kg; lognormal variance with pedigree 0.0492, pedigree (2,3,4,1,1)
  Weighted average of reported emissions
- Chloride [water, unspecified]: 0.000145564 kg; lognormal variance with pedigree 0.0492, pedigree (2,3,4,1,1)
  Weighted average of reported emissions
- Ethene [air, unspecified]: 7.26111e-7 kg; lognormal variance with pedigree 0.1292, pedigree (2,3,4,1,1)
  Weighted average of reported emissions
- Suspended solids, unspecified [water, unspecified]: 1.04372e-5 kg; lognormal variance with pedigree 0.0487, pedigree (2,2,4,1,1)
  Weighted average of reported emissions
- Fluoride [water, unspecified]: 1.23681e-7 kg; lognormal variance with pedigree 0.0492, pedigree (2,3,4,1,1)
  Weighted average of reported emissions
- Ammonium, ion [water, unspecified]: 5.63628e-7 kg; lognormal variance with pedigree 0.0492, pedigree (2,3,4,1,1)
  Weighted average of reported emissions
- Phosphorus [water, unspecified]: 1.13894e-6 kg; lognormal variance with pedigree 0.0492, pedigree (2,3,4,1,1)
  Weighted average of reported emissions
- Nitrogen oxides [air, unspecified]: 2.00236e-5 kg; lognormal variance with pedigree 0.0487, pedigree (2,2,4,1,1)
  Weighted average of reported emissions
- Nickel, ion [water, unspecified]: 1.72288e-9 kg; lognormal variance with pedigree 0.6592, pedigree (2,3,4,1,1)
  Weighted average of reported emissions
- Cadmium, ion [water, unspecified]: 1.48729e-10 kg; lognormal variance with pedigree 0.6592, pedigree (2,3,4,1,1)
  Weighted average of reported emissions

## Sampling procedure
Questionnaires sent out to all production units in Europe operated by PlasticEurope member companies.

## Extrapolations
This dataset has been extrapolated from year 2016 to the year of the calculation (2021). The uncertainty has been adjusted accordingly.
