# fibreboard production, hard

Dataset: EcoSpold 2, unit process
Geography: RER
Time period: 2012-01-01 to 2021-12-31
Technology level: current
Classification: ISIC rev.4 ecoinvent: 1621:Manufacture of veneer sheets and wood-based panels
Synonyms: hardboard; hard fibreboard
Tags: Swiss brush-up completed
Scenario: Business-as-Usual
System model: Allocation, cut-off by classification
Generated by: Frank Werner
Database: ecoinvent
isCopyrightProtected: true
accessRestrictedTo: 1

## General comment
This dataset represents hard wood fibreboard production produced in the wet process as the weighted average of hard wood fibreboards produced by the members of the European Panel Federation (EPF).

Hard fibreboard, also called hardboard, is an engineered wood product in conformity with the stan-dard EN 622-1. Hard fibreboard is produced in either the wet or dry process. The wet process leaves only one smooth side while the dry processed hardboard is smooth on both sides. Hardboard is similar to medium density fibreboard, but is denser, much stronger and harder because it is made out of exploded wood fibres that have been highly compressed. Consequently, the density of hardboard is usually about 800-1040 kg/m³. Typical thickness is in a range from 2.2-4.0 mm.
It differs from MDF in that the bonding of the wood fibres usually requires no additional materials, although resin is often added. Hard fibreboard is characterised by high dimensional stability.

## Included activities start
From the reception at the factory gate of all materials and fuels used.

## Included activities end
Activity ends with the hard fibreboard at the factory gate.

## Geography
Representation of the production of the member companies of the European Panel Federation (EPF).

## Technology
The dataset represents hardboard produced in the wet process. In th wet process, the raw material is grinded and then mixed into a mash with up to 98% water. This mash is then formed into a so-called fibre cake. After pressing most water out of the mat, the fibre cake is the cut and dried in the drying channel with temperatures between 160 to 220 °C. The addition of binders is usually not required, as the heating of the liquid lignin as part of the wood bonds the fibres during cooling. For special purposes (higher strength, hydrophobic properties), resins or bitumen-containing agents can be added.
Production is subject to the regulations of the Industrial Emissions Directive (EU-IED, 2011) if the production capacity exceeds 600 m3 per day where one or more of the following wood-based panels are produced: fibreboard, particleboard or oriented strand board.

## Parameters
- input wood fuel: 3907.3 MJ; name wood_fuel; = 205*19.06
  input of wood fuel used in production, i.e. wood fuel from forestry, internal wood residues, post-consumer wood used for energy purposes, etc; expressed in MJ of absolutely dry mass (lower heating value at humidity u=0%)

## Reference product
- bark chips, wet, measured as dry mass: 1 kg; name w_bark; CPC 31230: Wood in chips or particles; By-product classification allocatable product; pedigree (1,1,1,1,1)
  bark from debarking logs, not used energetically minus bark bought for energetic purposes
  production volume 9.26503e7 kg; = w_bark*p_board
    Calculated from production volume of reference product using the relative outputs.
  property price 0.034 EUR2005
    Expert judgement (Urs Luginbühl, Swiss Sawmilling industry, personal communication in June 2014). Cross-reference; FAOSTAT database; http://faostat.fao.org/site/626/DesktopDefault.aspx?PageID=626#ancor; Average import/export prices of EU for 'chips and particles'. Price: 48.76 Euro/m3. The density of the wood chips is 650 kg/m3. The price is calculated to be 0.075 EUR/kg.
  property heating value, net 4.81 MJ
    LHV is calculated based on the Carbon content of the product. More details can be found on the respective documentation.
  property carbon content 0.494
    carbon content on a dry matter basis (reserved; not for manual entry)
  property true value 0.80852; name w_bark_true_value
    allocation property applied in "true value" allocation // value calculated from revenue
  properties: water content 1.4, carbon content, fossil 0, carbon content, non-fossil 0.494, wet mass 2.4 kg, dry mass 1 kg, water in wet mass 1.4 kg, carbon allocation 0.494 kg
- fibreboard, hard: 0 m3; By-product classification allocatable product; CPC 31449: Other fibreboard
  production volume 3.89614e6 m3; name p_board
    FaoStat 2011
  property price 412 EUR2005
    Export prices for the World+ according to: http://faostat.fao.org/site/626/DesktopDefault.aspx?PageID=626#ancor downloaded 28 April 2009; calculated as export value divided by export volume.
  property dry mass 905.3 kg; name DM_HFB; = WM_HFB - WiWM_HFB
  property carbon content, non-fossil 0.47823; = 876.4*0.494/DM_HFB
    wood content converted to carbon, divided by dry mass
  property heating value, net 12565.8 MJ
    LHV is calculated based on the Carbon content of the product. More details can be found on the respective documentation.The property is based on a value of 13.96MJ/kg
  property water in wet mass 50.7 kg; name WiWM_HFB
  property water content 0.0560035; = WiWM_HFB/DM_HFB
  property wet mass 956 kg; name WM_HFB
  property carbon content 0.490663
    carbon content on a dry matter basis (reserved; not for manual entry)
  property true value 412
    allocation property applied in "true value" allocation // value calculated from revenue
  properties: carbon content, fossil 0.0124326, carbon allocation 444.197 kg

## By-products
- residual wood, dry: 0 m3; CPC 39283: Non-agglomerated wood waste and scrap; By-product classification allocatable product; pedigree (1,1,1,1,1)
  sold residual wood: output in kg dry matter divided by dry wood density
  production volume 135302 m3
    Calculated from production volume of reference product using the relative outputs.
  property dry mass 550 kg; name DM_residual_wood
  property price 26.9 EUR2005
    Temporary price data. Calculated as 90% of purchasers price based on: 2004 prices for World Import/Export (USD/cubicmeter) from FaoStat (http://faostat.fao.org/site/626/default.aspx#ancor, [accessed 10th June 2010]) Commodity: 'Chips and Particles' assuming this is for air-dry chips (10% water on a dry matter basis at 650 kg/m3) and no price difference for water content (i.e. assuming air-drying).
  property heating value, net 8030.06 MJ
    LHV is calculated based on the Carbon content of the product. More details can be found on the respective documentation.The property is based on a value of 12.7MJ/kg
  property carbon content 0.494
    carbon content on a dry matter basis (reserved; not for manual entry)
  property true value 0.934164
    allocation property applied in "true value" allocation // value calculated from revenue
  properties: carbon content, non-fossil 0.494, water in wet mass 82.5 kg, water content 0.15, carbon content, fossil 0, wet mass 632.5 kg, carbon allocation 271.7 kg

## Inputs from technosphere
- wood chips, from post-consumer wood, measured as dry mass: 0.00345964 kg; lognormal variance with pedigree 0.033, pedigree (1,1,4,1,1)
  properties: carbon content, non-fossil 0.494, wet mass 1.4 kg, dry mass 1 kg, water content 0.4, heating value, net 9.99 MJ
- aluminium sulfate, powder: 4.79912e-5 kg; lognormal variance with pedigree 0.0336, pedigree (1,3,4,1,1)
  aluminium sulfate plus input of unspecified hardeners
  properties: dry mass 1 kg, UVEK_link_1 158, UVEK_relative_amount_1 1, wet mass 1 kg
  note on UVEK_link_1: to be used only in special submissions in coordination with ecoinvent and the Swiss FOEN
- tap water: 0.10346 kg; lognormal variance with pedigree 0.0336, pedigree (1,3,4,1,1)
  properties: wet mass 1 kg, dry mass 0.000337476 kg, UVEK_relative_amount_1 1, carbon content, fossil 0.00178991, water content 2962.17, UVEK_link_1 4285
  note on carbon content, fossil: Bicarbonate content is 2.93 mol/m3. CO2 content is 0.1 mol/m3 (ecoinvent v2.2 report 8, Tab 93.1).
- electricity, medium voltage: 0.00224096 kWh; = 505*0.054; lognormal variance with pedigree 0.033, pedigree (1,1,4,1,1)
  electricity input from grid times share of total production in specific country
  properties: UVEK_link_1 1742, UVEK_relative_amount_1 1
- vegetable oil, refined: 0.000349251 kg; lognormal variance with pedigree 0.033, pedigree (1,1,4,1,1)
  additive
  properties: wet mass 1 kg, dry mass 1 kg, UVEK_relative_amount_1 1, UVEK_link_1 3739, carbon content, non-fossil 0.768, heating value, net 38.4 MJ
  note on heating value, net: Values is approximated from HHV from "vegetable oil, crude". Source: Radovanovic,M.; Zivanovic,T.; Stojiljkovic,D.; Jovanovic,V.; Jerinic,N.; Knezevic,S. et.al. Utilization of sunflower husk as a fuel for industrial boilers - 20 years experience. Proc. 5th Eur. Conf. on Industrial Furnaces&Boilers 2000,vol.2,p.221-233. Available at: https://phyllis.nl/Biomass/View/2152
- electricity, medium voltage: 0.00236546 kWh; = 505*0.057; lognormal variance with pedigree 0.033, pedigree (1,1,4,1,1)
  electricity input from grid times share of total production in specific country
  properties: UVEK_relative_amount_1 1, UVEK_link_1 1724
- wood chips, dry, measured as dry mass: 0.0169202 kg; = 55.3+150.6; lognormal variance with pedigree 0.033, pedigree (1,1,4,1,1)
  input of different types of wood chips
  properties: wet mass 1.4 kg, water content 0.4, carbon content, non-fossil 0.494, dry mass 1 kg, heating value, net 9.99 MJ
  note on carbon content, non-fossil: C content of dry mass is 0.494 kgC/kg dry wood (ecoinvent v2.2 report 9).
- heat, district or industrial, other than natural gas: 0.00156527 MJ; = 20/1.05; lognormal variance with pedigree 0.033, pedigree (1,1,4,1,1)
  Fuel input, converted to heat output; proxy for animal grease
  properties: UVEK_link_1 999999, UVEK_relative_amount_1 1, heating value, net 1 MJ
- sodium hydroxide, without water, in 50% solution state: 7.3959e-7 kg; = 0.018*0.5; lognormal variance with pedigree 0.033, pedigree (1,1,4,1,1)
  50% concentration
  properties: dry mass 1 kg, UVEK_link_1 4137, wet mass 1 kg, UVEK_relative_amount_1 1, heating value, net 3.03 MJ
- electricity, medium voltage: 0.00141097 kWh; = 505*0.034; lognormal variance with pedigree 0.033, pedigree (1,1,4,1,1)
  electricity input from grid times share of total production in specific country
  properties: UVEK_relative_amount_1 1, UVEK_link_1 1703
- pulpwood, softwood, measured as solid wood under bark: 0 m3; pedigree (1,1,1,1,1)
  input in kg divided by the basic wood density of 378 kg/m3
  properties: heating value, net 4483.78 MJ, wet mass 1080 kg, basic wood density 400, water content 1.4, dry mass 450 kg, carbon content, non-fossil 0.494
  note on heating value, net: Value based on "softwood forestry, mixed species, sustainable forest management"The property is based on a value of 11.58MJ/kg
- electricity, medium voltage: 0.027929 kWh; = 505*0.673; lognormal variance with pedigree 0.033, pedigree (1,1,4,1,1)
  electricity input from grid times share of total production in specific country
  properties: UVEK_link_1 1715, UVEK_relative_amount_1 1
- sawdust, wet, measured as dry mass: 0 kg; pedigree (1,1,1,1,1)
  input of sawdust
  properties: dry mass 1 kg, water content 0.7, carbon content, non-fossil 0.494, heating value, net 7.79 MJ, wet mass 1.7 kg
- heat, district or industrial, other than natural gas: 0.282923 MJ; = 3615/1.05; lognormal variance with pedigree 0.0336, pedigree (1,3,4,1,1)
  Fuel input, converted to heat output
  properties: UVEK_link_1 2487, UVEK_relative_amount_1 1, heating value, net 1 MJ
- phenolic resin: 0.00098612 kg; lognormal variance with pedigree 0.0336, pedigree (1,3,4,1,1)
  part of glueing system (inventoried as averaged production average in Europe)
  properties: UVEK_link_1 3435, carbon content, fossil 0.772277, UVEK_relative_amount_1 1, dry mass 1 kg, heating value, net 33.57 MJ, wet mass 1 kg
- heat, district or industrial, natural gas: 2.17573e-6 MJ; = 0.0278/1.05; lognormal variance with pedigree 0.0336, pedigree (1,3,4,1,1)
  Input of natural gas plus liquified petrolium gas, converted to heat output
  properties: UVEK_relative_amount_1 1, heating value, net 1 MJ, UVEK_link_1 2576
- pulpwood, hardwood, measured as solid wood under bark: 0 m3; pedigree (1,1,1,1,1)
  input in kg divided by the basic wood density of 572 kg/m3
  property heating value, gross 0 MJ; name pulpwood_Gross_Heat_Value
  properties: basic wood density 550, carbon content, non-fossil 0.494, wet mass 1170 kg, dry mass 650 kg, water content 0.8, heating value, net 6071.3 MJ
  note on heating value, net: Value based on "hardwood forestry, mixed species, sustainable forest management"The property is based on a value of 11.58MJ/kg
- wood ash mixture, pure: 0 kg; name w_wood_ash; pedigree (1,1,1,1,1)
  Emission factor from DS on heat generation from industrial residual wood mulitplied by the input of wood fuel (direct wood fuel plus production residues), scaled to convert wood input to resulting heat.
  production volume 0 kg
    Calculated from production volume of reference product using the relative outputs.
  properties: UVEK_link_3 1129, UVEK_relative_amount_3 -1, UVEK_link_2 1127, wet mass 1 kg, UVEK_link_1 1128, carbon content, non-fossil 0.012, dry mass 1 kg
- lubricating oil: 2.51461e-5 kg; = 0.011+0.295; lognormal variance with pedigree 0.0336, pedigree (1,3,4,1,1)
  input of lubricating oils plus mineral oils, incl. thermooil
  properties: heating value, net 40.2 MJ, UVEK_relative_amount_1 1, dry mass 1 kg, UVEK_link_1 2866, wet mass 1 kg, carbon content, fossil 0.75
  note on heating value, net: Literature value, Source: IPCC 2006, 2006 IPCC Guidelines for National Greenhouse Gas Inventories, Prepared by the National Greenhouse Gas Inventories Programme, Eggleston H.S., Buendia L., Miwa K., Ngara T. and Tanabe K. (eds). Published: IGES, Japan
  note on carbon content, fossil: Lubricating oil is produced from diesel. C-content/dry mass of fats and oils considered 75%, from: ecoinvent v2.2 report, n 15a, pg 40
- wastewater from hard fibreboard production: -0.000183254 m3; name w_WW; lognormal variance with pedigree 0.0342, pedigree (2,3,4,1,1)
  production volume 8.6884e6 m3; = w_WW*p_board
    Calculated from production volume of reference product using the relative outputs.
  properties: wet mass 1000 kg, water content 1999, carbon content, fossil 0.0188, dry mass 0.5 kg, UVEK_link_1 4561, carbon content, non-fossil 0.919, UVEK_relative_amount_1 -1
- paraffin: 0.000763421 kg; lognormal variance with pedigree 0.0336, pedigree (1,3,4,1,1)
  hydrophobing agent
  properties: dry mass 1 kg, UVEK_link_1 3381, UVEK_relative_amount_1 1, wet mass 1 kg, carbon content, fossil 0.847059, heating value, net 41.5 MJ
  note on heating value, net: Indicative value. Reference: Fuels - Higher and Lower Calorific Values, available at: https://www.engineeringtoolbox.com/fuels-higher-calorific-values-d_169.html
- electricity, medium voltage: 0.00444042 kWh; = 505*(0.107); lognormal variance with pedigree 0.033, pedigree (1,1,4,1,1)
  electricity input from grid times share of total production not covered via specific country mixes; it covers the electricity input in countries where < 3% of the total production are produced.
  properties: UVEK_link_1 1779, UVEK_relative_amount_1 1
- hazardous waste, for incineration: 0 kg; name w_HW; pedigree (1,1,1,1,1)
  Output of minor quantities of waste resins, oily filters and rags
  production volume 0 kg
    Calculated from production volume of reference product using the relative outputs.
  properties: UVEK_relative_amount_1 -1, carbon content, fossil 0.554667, heating value, net 17 MJ, wet mass 1 kg, water content 0.333333, UVEK_link_1 965, dry mass 0.75 kg
  note on carbon content, fossil: Tab A.6, ecoinvent v2.2 report 13_I. C content has been calculated after data in the tables, and then referred to 1 kg DM
  note on heating value, net: Value taken from the general comment of the treatment dataset.
- diesel, burned in building machine: 0.00345142 MJ; lognormal variance with pedigree 0.0336, pedigree (1,3,4,1,1)
  for internal transport
  properties: UVEK_relative_amount_1 1, UVEK_link_1 732, heating value, net 1 MJ
- biowaste: -0.00772461 kg; name w_biowaste; lognormal variance with pedigree 0.0342, pedigree (2,3,4,1,1)
  sludges from chip washing etc.
  production volume 3.66237e8 kg; = w_biowaste*p_board
    Calculated from production volume of reference product using the relative outputs.
  properties: carbon content, non-fossil 0.1624, dry mass 0.4 kg, heating value, net 4.29 MJ, UVEK_relative_amount_1 -1, water content 1.5, UVEK_link_1 813, wet mass 1 kg
- furnace, wood chips, with silo, 1000kW: 2.1224e-9 unit; = 6.61E-09*wood_fuel; lognormal variance with pedigree 0.5586, pedigree (1,3,4,1,1)
  Infrastructure factor from DS 'Heat, district or industrial, other than natural gas {CH}| heat production, wood chips from industry, at furnace 1000kW | Cut-off, U', multiplied by the input of wood fuel (direct wood fuel plus production residues); correction for assumed efficiency as original value refers to heat output
  properties: UVEK_relative_amount_1 1, UVEK_link_1 999999
- chemical, organic: 0.000163137 kg; lognormal variance with pedigree 0.0336, pedigree (1,3,4,1,1)
  input of unspecified additives, dyes, flame redardants, etc.
  properties: heating value, net 19.03 MJ, wet mass 1 kg, UVEK_link_9 4433, UVEK_relative_amount_9 5.16321, carbon content, fossil 0.628, UVEK_relative_amount_8 2.50604, UVEK_link_8 4417, UVEK_relative_amount_1 1, UVEK_link_1 432, dry mass 1 kg
  note on UVEK_link_9: This link has been introduced to model transport specifically for the SAM model; to be used only in special submissions in coordination with ecoinvent and the Swiss FOEN.
  note on UVEK_relative_amount_9: Scaling factor = amount of transport in corresponding KBOB dataset (excluding the input of wood, assumed to be 95%)/amount of this input from technosphere. Source for transport distance: Life Cycle Inventories of Wood as Fuel and Construction Material/2007/Werner F. To be used only in special submissions in coordination with ecoinvent and the Swiss FOEN
  note on carbon content, fossil: This dataset is an unweighted average of 20 organic substances (listed in Tab 88.1, ecoinvent v2.2 report 8, part II), being part of the top100 chemicals included in this database. The C-content has also been calculated as an unweighted average of the C content of the substances composing this dataset.
- wooden board factory, organic bonded boards: 3.13054e-12 unit; = 1/(525000*50); lognormal variance with pedigree 0.5586, pedigree (1,3,4,1,1)
  estimated based on an assumed yearly production volume o 525,000 m3/year and a life time of infrastructure of 50 years
- electricity, medium voltage: 0.00178447 kWh; = 505*0.043; lognormal variance with pedigree 0.033, pedigree (1,1,4,1,1)
  electricity input from grid times share of total production in specific country
  properties: UVEK_relative_amount_1 1, UVEK_link_1 1720
- electricity, medium voltage: 0.00132798 kWh; = 505*0.032; lognormal variance with pedigree 0.033, pedigree (1,1,4,1,1)
  electricity input from grid times share of total production in specific country
  properties: UVEK_link_1 1743, UVEK_relative_amount_1 1
- pulpwood, softwood, measured as solid wood under bark: 0.000120102, 1.46754e-6 m3 (2 entries); lognormal variance with pedigree 0.0336, pedigree (1,3,4,1,1)
  input in kg divided by the basic wood density of 378 kg/m3
- sawdust, wet, measured as dry mass: 0.00160778, 1.84987e-5 kg (2 entries); lognormal variance with pedigree 0.0336, pedigree (1,3,4,1,1)
  input of sawdust
- pulpwood, hardwood, measured as solid wood under bark: 3.35058e-5, 9.30867e-7 m3 (2 entries); lognormal variance with pedigree 0.0336, pedigree (1,3,4,1,1)
  input in kg divided by the basic wood density of 572 kg/m3
- wood ash mixture, pure: -0.00019976, -4.10635e-6 kg (2 entries); lognormal variance with pedigree 0.0342, pedigree (2,3,4,1,1)
  (same comment as for wood ash mixture, pure)
  production volume 9.66565e6 kg
- hazardous waste, for incineration: -1.39505e-5, -3.64658e-7 kg (2 entries); lognormal variance with pedigree 0.0342, pedigree (2,3,4,1,1)
  Output of minor quantities of waste resins, oily filters and rags
  production volume 678708 kg

## Inputs from nature
- Carbon dioxide, non-fossil, resource correction [natural resource, in air]: 1.65186 kg; pedigree (1,1,1,1,1)
  This exchange has been added after economic allocation in order to re-balance the non-fossil carbon dioxide resource extraction.
- Water, cooling, unspecified natural origin [natural resource, in water]: 0.000184898 m3; lognormal variance with pedigree 0.0336, pedigree (1,3,4,1,1)

## Emissions to nature
- PAH, polycyclic aromatic hydrocarbons [air, unspecified]: 4.52583e-9 kg; name pah; = 0.0000000148*wood_fuel/1.05; lognormal variance with pedigree 0.5912, pedigree (2,3,5,1,1)
  Emission factor from DS 'Heat, district or industrial, other than natural gas {CH}| heat production, wood chips from industry, at furnace 1000kW | Cut-off, U' on heat generation from industrial residual wood per MJ, multiplied by the input of wood fuel (direct wood fuel plus production residues ) scaled to reflect wood input per generated heat.
- Chromium VI [air, unspecified]: 1.63093e-11 kg; = 5.33333333333334E-11*wood_fuel/1.05; lognormal variance with pedigree 0.8412, pedigree (2,3,5,1,1)
  (same comment as for PAH, polycyclic aromatic hydrocarbons)
- Particulates, < 2.5 um [air, unspecified]: 1.83479e-5 kg; = 0.0000600000000000001*wood_fuel/1.05; lognormal variance with pedigree 0.5912, pedigree (2,3,5,1,1)
  (same comment as for PAH, polycyclic aromatic hydrocarbons)
- Copper [air, unspecified]: 8.9701e-9 kg; = 2.93333333333334E-08*wood_fuel/1.05; lognormal variance with pedigree 0.2412, pedigree (2,3,5,1,1)
  (same comment as for PAH, polycyclic aromatic hydrocarbons)
- Nitrogen oxides [air, unspecified]: 9.17397e-5 kg; = 0.0003*wood_fuel/1.05; lognormal variance with pedigree 0.2412, pedigree (2,3,5,1,1)
  (same comment as for PAH, polycyclic aromatic hydrocarbons)
- Chlorine [air, unspecified]: 7.33918e-8 kg; = 0.00000024*wood_fuel/1.05; lognormal variance with pedigree 0.2412, pedigree (2,3,5,1,1)
  (same comment as for PAH, polycyclic aromatic hydrocarbons)
- Nickel [air, unspecified]: 2.44639e-9 kg; name nickel; = 0.000000008*wood_fuel/1.05; lognormal variance with pedigree 0.8412, pedigree (2,3,5,1,1)
  (same comment as for PAH, polycyclic aromatic hydrocarbons)
- Carbon monoxide, non-fossil [air, unspecified]: 0.00012232 kg; = 0.0004*wood_fuel/1.05; lognormal variance with pedigree 0.2412, pedigree (2,3,5,1,1)
  (same comment as for PAH, polycyclic aromatic hydrocarbons)
- m-Xylene [air, unspecified]: 4.89278e-8 kg; name mxylene; = 0.00000016*wood_fuel/1.05; lognormal variance with pedigree 0.3912, pedigree (2,3,5,1,1)
  (same comment as for PAH, polycyclic aromatic hydrocarbons)
- Cadmium [air, unspecified]: 2.85412e-10 kg; = 9.33333333333334E-10*wood_fuel/1.05; lognormal variance with pedigree 0.8412, pedigree (2,3,5,1,1)
  (same comment as for PAH, polycyclic aromatic hydrocarbons)
- Methanol [air, unspecified]: 2.37491e-6 kg; lognormal variance with pedigree 0.3926, pedigree (3,3,5,1,1)
  (same comment as for PAH, polycyclic aromatic hydrocarbons)
- Carbon dioxide, non-fossil [air, unspecified]: 0.0436273 kg; = 0.142666666666666*wood_fuel/1.05; lognormal variance with pedigree 0.0662, pedigree (2,3,5,1,1)
  (same comment as for PAH, polycyclic aromatic hydrocarbons)
- Methane, non-fossil [air, unspecified]: 1.2232e-6 kg; = 0.000004*wood_fuel/1.05; lognormal variance with pedigree 0.2412, pedigree (2,3,5,1,1)
  (same comment as for PAH, polycyclic aromatic hydrocarbons)
- Calcium [air, unspecified]: 2.38523e-6 kg; = 0.0000078*wood_fuel/1.05; lognormal variance with pedigree 0.2412, pedigree (2,3,5,1,1)
  (same comment as for PAH, polycyclic aromatic hydrocarbons)
- Magnesium [air, unspecified]: 1.46784e-7 kg; name magnesium; = 0.00000048*wood_fuel/1.05; lognormal variance with pedigree 0.2412, pedigree (2,3,5,1,1)
  (same comment as for PAH, polycyclic aromatic hydrocarbons)
- Benzene, ethyl- [air, unspecified]: 1.2232e-8 kg; = 0.00000004*wood_fuel/1.05; lognormal variance with pedigree 0.2412, pedigree (2,3,5,1,1)
  (same comment as for PAH, polycyclic aromatic hydrocarbons)
- Zinc [air, unspecified]: 1.2232e-7 kg; = 0.0000004*wood_fuel/1.05; lognormal variance with pedigree 0.8412, pedigree (2,3,5,1,1)
  (same comment as for PAH, polycyclic aromatic hydrocarbons)
- Mercury [air, unspecified]: 1.2232e-10 kg; name mercury; = 0.0000000004*wood_fuel/1.05; lognormal variance with pedigree 0.8412, pedigree (2,3,5,1,1)
  (same comment as for PAH, polycyclic aromatic hydrocarbons)
- Bromine [air, unspecified]: 2.44639e-8 kg; = 0.00000008*wood_fuel/1.05; lognormal variance with pedigree 0.8412, pedigree (2,3,5,1,1)
  (same comment as for PAH, polycyclic aromatic hydrocarbons)
- Toluene [air, unspecified]: 1.2232e-7 kg; = 0.0000004*wood_fuel/1.05; lognormal variance with pedigree 0.3912, pedigree (2,3,5,1,1)
  (same comment as for PAH, polycyclic aromatic hydrocarbons)
- Manganese [air, unspecified]: 6.93144e-8 kg; name manganese; = 2.26666666666667E-07*wood_fuel/1.05; lognormal variance with pedigree 0.2412, pedigree (2,3,5,1,1)
  (same comment as for PAH, polycyclic aromatic hydrocarbons)
- Benzene, hexachloro- [air, unspecified]: 2.93567e-15 kg; = 9.60000000000001E-15*wood_fuel/1.05; lognormal variance with pedigree 0.2412, pedigree (2,3,5,1,1)
  (same comment as for PAH, polycyclic aromatic hydrocarbons)
- Sulfur dioxide [air, unspecified]: 1.01933e-6 kg; = 3.33333333333334E-06*wood_fuel/1.05; lognormal variance with pedigree 0.0662, pedigree (2,3,5,1,1)
  (same comment as for PAH, polycyclic aromatic hydrocarbons)
- Lead [air, unspecified]: 1.01933e-8 kg; = 3.33333333333333E-08*wood_fuel/1.05; lognormal variance with pedigree 0.8412, pedigree (2,3,5,1,1)
  (same comment as for PAH, polycyclic aromatic hydrocarbons)
- Benzo(a)pyrene [air, unspecified]: 2.03866e-10 kg; = 6.66666666666667E-10*wood_fuel/1.05; lognormal variance with pedigree 0.5912, pedigree (2,3,5,1,1)
  (same comment as for PAH, polycyclic aromatic hydrocarbons)
- Hydrocarbons, aliphatic, unsaturated [air, unspecified]: 1.26397e-6 kg; = 4.13333333333333E-06*wood_fuel/1.05; lognormal variance with pedigree 0.2412, pedigree (2,3,5,1,1)
  (same comment as for PAH, polycyclic aromatic hydrocarbons)
- Arsenic [air, unspecified]: 4.07732e-10 kg; = 1.33333333333333E-09*wood_fuel/1.05; lognormal variance with pedigree 0.2412, pedigree (2,3,5,1,1)
  (same comment as for PAH, polycyclic aromatic hydrocarbons)
- Sodium [air, unspecified]: 5.30052e-7 kg; = 1.73333333333334E-06*wood_fuel/1.05; lognormal variance with pedigree 0.2412, pedigree (2,3,5,1,1)
  (same comment as for PAH, polycyclic aromatic hydrocarbons)
- Hydrocarbons, aliphatic, alkanes, unspecified [air, unspecified]: 3.71036e-7 kg; = 1.21333333333333E-06*wood_fuel/1.05; lognormal variance with pedigree 0.2412, pedigree (2,3,5,1,1)
  (same comment as for PAH, polycyclic aromatic hydrocarbons)
- Benzene [air, unspecified]: 3.71036e-7 kg; = 1.21333333333333E-06*wood_fuel/1.05; lognormal variance with pedigree 0.2412, pedigree (2,3,5,1,1)
  (same comment as for PAH, polycyclic aromatic hydrocarbons)
- Potassium [air, unspecified]: 9.54093e-6 kg; = 0.0000312*wood_fuel/1.05; lognormal variance with pedigree 0.2412, pedigree (2,3,5,1,1)
  (same comment as for PAH, polycyclic aromatic hydrocarbons)
- Dioxins, measured as 2,3,7,8-tetrachlorodibenzo-p-dioxin [air, unspecified]: 1.26397e-14 kg; = 4.13333333333333E-14*wood_fuel/1.05; lognormal variance with pedigree 0.5912, pedigree (2,3,5,1,1)
  (same comment as for PAH, polycyclic aromatic hydrocarbons)
- Acetaldehyde [air, unspecified]: 7.02332e-8 kg; = 8.13333333333333E-08*wood_fuel/1.05+0.000552; lognormal variance with pedigree 0.2412, pedigree (2,3,5,1,1)
  Emission factor from DS 'Heat, district or industrial, other than natural gas {CH}| heat production, wood chips from industry, at furnace 1000kW | Cut-off, U' on heat generation from industrial residual wood per MJ, multiplied by the input of wood fuel (direct wood fuel plus production residues ) scaled to reflect wood input per generated heat plus estimated emissions from wood and glue drying processes (based on Albrecht et al. 2009).
- Phosphorus [air, unspecified]: 1.2232e-7 kg; = 0.0000004*wood_fuel/1.05; lognormal variance with pedigree 0.2412, pedigree (2,3,5,1,1)
  (same comment as for PAH, polycyclic aromatic hydrocarbons)
- Formaldehyde [air, unspecified]: 2.59226e-6 kg; = 1.73333333333334E-07*wood_fuel/1.05+0.0309; lognormal variance with pedigree 0.2412, pedigree (2,3,5,1,1)
  (same comment as for Acetaldehyde)
- Ammonia [air, unspecified]: 7.05376e-7 kg; = 2.30666666666667E-06*wood_fuel/1.05; lognormal variance with pedigree 0.2412, pedigree (2,3,5,1,1)
  (same comment as for PAH, polycyclic aromatic hydrocarbons)
- Particulates, > 2.5 um, and < 10um [air, unspecified]: 1.01933e-6 kg; = 3.33333333333334E-06*wood_fuel/1.05
  (same comment as for PAH, polycyclic aromatic hydrocarbons)
- Phenol, pentachloro- [air, unspecified]: 3.30263e-12 kg; = 0.0000000000108*wood_fuel/1.05; lognormal variance with pedigree 0.3912, pedigree (2,3,5,1,1)
  (same comment as for PAH, polycyclic aromatic hydrocarbons)
- Fluorine [air, unspecified]: 2.03866e-8 kg; = 6.66666666666667E-08*wood_fuel/1.05; lognormal variance with pedigree 0.2412, pedigree (2,3,5,1,1)
  (same comment as for PAH, polycyclic aromatic hydrocarbons)
- NMVOC, non-methane volatile organic compounds, unspecified origin [air, unspecified]: 6.63478e-5 kg; name nmvoc; = 9.33333333333334E-06*wood_fuel/1.05 + 0.833 - (0.0309+0.000552+0.0289); lognormal variance with pedigree 0.2412, pedigree (2,3,5,1,1)
  Emission factor from DS 'Heat, district or industrial, other than natural gas {CH}| heat production, wood chips from industry, at furnace 1000kW | Cut-off, U' on heat generation from industrial residual wood per MJ, multiplied by the input of wood fuel (direct wood fuel plus production residues ) scaled to reflect wood input per generated heat plus estimated emissions from wood and glue drying processes (based on Albrecht et al. 2009), minus VOC emissions that are inventoried specifically.
- Dinitrogen monoxide [air, unspecified]: 9.37784e-7 kg; = 3.06666666666667E-06*wood_fuel/1.05; lognormal variance with pedigree 0.2412, pedigree (2,3,5,1,1)
  (same comment as for PAH, polycyclic aromatic hydrocarbons)
- Particulates, > 10 um [air, unspecified]: 1.35592e-5 kg; lognormal variance with pedigree 0.2106, pedigree (3,3,4,1,1)
  dust emissions
- Chromium [air, unspecified]: 1.61462e-9 kg; = 5.28000000000001E-09*wood_fuel/1.05; lognormal variance with pedigree 0.8412, pedigree (2,3,5,1,1)
  (same comment as for PAH, polycyclic aromatic hydrocarbons)

## Sampling procedure
Survey among member companies of the European Panel Federation; emissions profile per MJ wood input from PSI (2014)
