# gas motor production, 206kW

Dataset: EcoSpold 2, unit process
Geography: RER
Time period: 1987-01-01 to 2021-12-31
Technology level: current
Classification: ISIC rev.4 ecoinvent: 2710:Manufacture of electric motors, generators, transformers and electricity di
Classification: EcoSpold01Categories: natural gas/cogeneration
Tags: ConvertedDataset
Scenario: Business-as-Usual
System model: Allocation, cut-off by classification
Generated by: Thomas Heck
Published in: Heck, T. 2007
Database: ecoinvent
isCopyrightProtected: true
accessRestrictedTo: 1

## General comment
Inventory refers to infrastructure of an existing natural gas cogeneration plant (lambda=1 motor, 160kWe, operation start 1987) at Jakobsberg, Basel, Switzerland. Module can be used generally for a gas motor. (Life time for operation assumed 70'000 h.)
[This dataset was already contained in the ecoinvent database version 2. It was not individually updated during the transfer to ecoinvent version 3. Life Cycle Impact Assessment results may still have changed, as they are affected by changes in the supply chain, i.e. in other datasets. This dataset was generated following the ecoinvent quality guidelines for version 2. It may have been subject to central changes described in the ecoinvent version 3 change report (http://www.ecoinvent.org/database/ecoinvent-version-3/reports-of-changes/), and the results of the central updates were reviewed extensively. The changes added e.g. consistent water flows and other information throughout the database. The documentation of this dataset can be found in the ecoinvent reports of version 2, which are still available via the ecoinvent website. The change report linked above covers all central changes that were made during the conversion process.]

## Included activities end
The module includes the most important materials used for production. It includes also the transport of these materials and the energy and water needed for production.

## Geography
Production in Germany, assumed valid for Europe (RER).

## Technology
Component of a specific cogeneration unit installed in Switzerland. Technology at end of 1980s.

## Parameters
- fraction, process water, to air: 0.15 dimensionless; name fraction_PW_to_air; lognormal variance with pedigree 0.092025, pedigree (4,4,3,2,4)
  Literature value. In case when no industry/process specific data are available, default evaporation fraction value is used. This value is 15% and is based on literature (Statistics Canada, 2007 & Shaffer, K.H., 2008, Consumptive water use in the Great Lakes Basin, USGS & Shiklomanov, 2003, World Water Resources at the Beginning of the 21st Century) and has been approved by an expert.

## Reference product
- gas motor, 206kW: 1 unit; CPC 431: Engines and turbines and parts thereof; By-product classification allocatable product
  EcoSpold01Location=RER
  production volume 1.32237 unit
    This is a placeholder value that does not reflect real-world production volumes. This dataset does not currently require a real-world production volume to work in the database framework, and no actual data were collected yet. This has no negative effect on the results of the ecoinvent database. The placeholder value of this activity was scaled according to the nominal GDP of 2005 (source: United Nations, http://data.un.org/Glossary.aspx?q=GDP+%28current+US%24%29, accessed 20130726) to reflect an appropriate share of the global production volume, which is also a placeholder value.
  property price 5187 EUR2005
    EU27 I/O database-68 Electronic machinery (4.02 EURO2003/kg dry soilds) in the 'EU & DK Input Output Database' (available in SimaPro); 1300 kg

## Inputs from technosphere
- steel, chromium steel 18/8, hot rolled: 100 kg; lognormal variance with pedigree 0.186, pedigree (4,5,5,1,1)
  Basic uncertainty:2
  EcoSpold01Location=RER
  properties: carbon content, fossil 0.0008, wet mass 1 kg, dry mass 1 kg
  note on carbon content, fossil: Stainless steel model is the grade 304 steel (18/8 stainless, 18% chromium 8% nickel; max. 0.08% C)
- heat, district or industrial, natural gas: 7486 MJ; lognormal variance with pedigree 0.1227, pedigree (3,3,5,3,4)
  EcoSpold01Location=RER
  properties: heating value, net 1 MJ
- wastewater from pig iron production: 0 m3; name wastewater_output; pedigree (1,1,1,1,1)
  EcoSpold01Location=CH
  rough estimate, uncertainty refers to amount of water only; not quantified here: composition of waste water unkown, therefore high uncertainty of applicability of modul.
  production volume 0 m3
    Calculated from the production volume of gas motor, 206kW in proportion to the respective output amounts.
  property price 0 EUR2005; name wastewater_output_price_EUR2005
  properties: water content 2962.17, carbon content, fossil 1.2149e-5, dry mass 0.337476 kg, wet mass 1000 kg
  note on carbon content, fossil: TOC = 0.0000041 kg/m3 (Tab A.19, ecoinvent v2.2 report 13_I). TOC was considered as Total Carbon.
- electricity, medium voltage: 161 kWh; lognormal variance with pedigree 0.1227, pedigree (3,3,5,3,4)
  EcoSpold01Location=UCTE
- cast iron: 1000 kg; lognormal variance with pedigree 0.186, pedigree (4,5,5,1,1)
  Basic uncertainty:2
  EcoSpold01Location=RER
  properties: carbon content, fossil 0.04, wet mass 1 kg, dry mass 1 kg
  note on carbon content, fossil: Cast iron is made by remelting pig iron in small furnaces (e.g. cupola furnaces or electric arc furnaces) and poured into moulds to make castings. It usually contains 2% to 6% carbon (ecoinvent v2.2 report 10_partII). An average content of 4% was considered
- steel, low-alloyed, hot rolled: 200 kg; lognormal variance with pedigree 0.186, pedigree (4,5,5,1,1)
  Basic uncertainty:2
  EcoSpold01Location=RER
  properties: dry mass 1 kg, carbon content, fossil 0.005, wet mass 1 kg
  note on carbon content, fossil: Low alloyed steel composition given in Tab. 3.2 ecoinvent v2.2 report 10_partII. Steel assumed to have a C content of 0.5%
- heat, district or industrial, other than natural gas: 7486 MJ; lognormal variance with pedigree 0.1227, pedigree (3,3,5,3,4)
  EcoSpold01Location=CH
  properties: heating value, net 1 MJ
- reinforcing steel: 100 kg; lognormal variance with pedigree 0.186, pedigree (4,5,5,1,1)
  Basic uncertainty:2
  EcoSpold01Location=RER
  properties: carbon content, fossil 0.004, wet mass 1 kg, dry mass 1 kg
- wastewater from pig iron production: -1.29312, -0.386883 m3 (2 entries); lognormal variance with pedigree 0.34, pedigree (1,1,5,1,1)
  (same comment as for wastewater from pig iron production)
  production volume 1.68 m3

## Inputs from nature
- Water, unspecified natural origin [natural resource, in water]: 2.1 m3; name water_UNO_input; lognormal variance with pedigree 0.34, pedigree (1,1,5,1,1)
  rough estimate

## Emissions to nature
- Water [water, unspecified]: 0.105 m3; name water_to_water_unspecified; = water_UNO_input*(1-fraction_PW_to_air)-(wastewater_output*-1); lognormal variance with pedigree 0.0807, pedigree (2,2,5,1,1)
  Calculated value based on literature values and expert opinion. See comments in the parametres' comment field.
  property fraction, origin: salt water 0; name fraction_origin_salt_water_Ww
  property fraction, origin: unspecified 1; name fraction_origin_unspecified_Ww
  property fraction, origin: fresh water 0; name fraction_origin_fresh_water_Ww
  property carbon content, non-fossil 0; name C_content_non_fossil
  property dry mass 0 kg; name DM
  property wet mass 1000 kg; name WM
  property water in wet mass 1000 kg; name WWM
  property carbon content, fossil 0; name C_content_fossil
- Water [air, unspecified]: 0.315 m3; name water_to_air_unspecified; = (water_UNO_input*fraction_PW_to_air); lognormal variance with pedigree 0.0807, pedigree (2,2,5,1,1)
  (same comment as for Water)
  property fraction, origin: salt water 0; name fraction_origin_salt_water
  property fraction, origin: fresh water 0; name fraction_origin_fresh_water
  property fraction, origin: unspecified 1; name fraction_origin_unspecified

## Sampling procedure
Operator and manufacturer information

## Extrapolations
This dataset has been extrapolated from year 2000 to the year of the calculation (2021). The uncertainty has been adjusted accordingly.

## Review by Gerald Rebitzer (obsolete) 2003-08-27
had passed
