# battery cell production, Li-ion

Dataset: EcoSpold 2, unit process
Geography: RoW
Time period: 2009-01-01 to 2021-12-31
Technology level: current
Classification: ISIC rev.4 ecoinvent: 2720:Manufacture of batteries and accumulators
Classification: EcoSpold01Categories: electronics/component
Tags: ConvertedDataset
Scenario: Business-as-Usual
System model: Allocation, cut-off by classification
Generated by: Dominic Notter
Published in: Hischier, R. 2009
Database: ecoinvent
isCopyrightProtected: true
accessRestrictedTo: 1

## General comment
The dataset can be used as a cathode for a lithium-ion battery. Data are based on patents. For infrastructure, the ecoinvent dataset "chemical plant, organics" is accounted. Transportation efforts are based on ecoinvent standard estimates.
[This dataset was already contained in the ecoinvent database version 2. It was not individually updated during the transfer to ecoinvent version 3. Life Cycle Impact Assessment results may still have changed, as they are affected by changes in the supply chain, i.e. in other datasets. This dataset was generated following the ecoinvent quality guidelines for version 2. It may have been subject to central changes described in the ecoinvent version 3 change report (http://www.ecoinvent.org/database/ecoinvent-version-3/reports-of-changes/), and the results of the central updates were reviewed extensively. The changes added e.g. consistent water flows and other information throughout the database. The documentation of this dataset can be found in the ecoinvent reports of version 2, which are still available via the ecoinvent website. The change report linked above covers all central changes that were made during the conversion process.]

## Included activities end
This dataset incudes the production of a single cell for a lithium ion battery. Cathode, anode and a seperator are calendared. An aluminium electrode tab is added. The singel cells are filled with electrolyte (LiPF6 in ethylencarbonate) in an inert atmosphere and packed up in a polyethylene envelope. For infrastructure, the ecoinvent dataset "chemical plant, organics" is accounted. Transportation efforts are based on ecoinvent standard estimates.

## Geography
Some European datasets are used for global processes.

## Technology
This dataset includes a method of producing a lithium ion single cell. Lithium ion move from the cathode (LiMn2O4) into the electrolyte (LiPF6 in ethylenecarbonate) through the micropores of the sepeartor into the anode (lithium ion intercalation). During the charging phase. During the discharge of the battery the Li+-ions move back into the cathode.

## Reference product
- battery cell, Li-ion: 1 kg; By-product classification allocatable product; CPC 46410: Primary cells and primary batteries; CAS 7719-12-2
  EcoSpold01Location=CN
  production volume 3.80251 kg
    This is a placeholder value that does not reflect real-world production volumes. This dataset does not currently require a real-world production volume to work in the database framework, and no actual data were collected yet. This has no negative effect on the results of the ecoinvent database.
  property price 10 EUR2005
    Calculated value based on data from United Nations Commodity Trade Statistics Database (comtrade.un.org). UN comtrade category: 8506 Primary cells and primary bateries. Using exchange rate of 1EURO = 1.209 USD. Average of price of import into 4 main markets (EU, US, JP, and CH).
  property carbon content, fossil 0.380721
    C content calculated as the addition of the C contents in the final product components
  property carbon content 0.380721
    carbon content on a dry matter basis (reserved; not for manual entry)
  properties: water content 0, wet mass 1 kg, dry mass 1 kg, water in wet mass 0 kg, carbon content, non-fossil 0, carbon allocation 0.380721 kg

## Inputs from technosphere
- electricity, medium voltage: 0 kWh; pedigree (1,1,1,1,1)
  composite
  EcoSpold01Location=CN
- anode, graphite, for lithium-ion battery: 0.4011 kg; lognormal variance with pedigree 0.0226, pedigree (2,4,4,5,1)
  EcoSpold01Location=CN
  properties: carbon content, fossil 0.523764, wet mass 1 kg, dry mass 1 kg
  note on carbon content, fossil: C content calculated as the addition of the C contents in the final product components
- nitrogen, liquid: 0.01 kg; lognormal variance with pedigree 0.04, pedigree (4,4,4,5,1)
  EcoSpold01Location=RER
  properties: dry mass 1 kg, wet mass 1 kg
- ethylene carbonate: 0.15957 kg; lognormal variance with pedigree 0.0226, pedigree (2,4,4,5,1)
  EcoSpold01Location=CN
  properties: wet mass 1 kg, dry mass 1 kg, heating value, net 27.53 MJ, carbon content, fossil 0.409173
- heat, district or industrial, natural gas: 0 MJ; pedigree (1,1,1,1,1)
  EcoSpold01Location=RER
  properties: heating value, net 1 MJ
- battery separator: 0.053655 kg; lognormal variance with pedigree 0.0226, pedigree (2,4,4,5,1)
  EcoSpold01Location=CN
  properties: carbon content, fossil 0.603377, wet mass 1 kg, dry mass 1 kg
- sheet rolling, aluminium: 0.016485 kg; lognormal variance with pedigree 0.3226, pedigree (2,4,4,5,1)
  EcoSpold01Location=RER
- aluminium, wrought alloy: 0.016485 kg; lognormal variance with pedigree 0.0226, pedigree (2,4,4,5,1)
  EcoSpold01Location=RER
  properties: wet mass 1 kg, dry mass 1 kg
- chemical factory, organics: 4e-10 unit; lognormal variance with pedigree 0.448, pedigree (5,5,5,5,3)
  EcoSpold01Location=RER
- cathode, LiMn2O4, for lithium-ion battery: 0.32686 kg; lognormal variance with pedigree 0.0226, pedigree (2,4,4,5,1)
  EcoSpold01Location=CN
  properties: carbon content, fossil 0.0310613, dry mass 1 kg, wet mass 1 kg
- extrusion, plastic film: 0.07329 kg; lognormal variance with pedigree 0.0226, pedigree (2,4,4,5,1)
  EcoSpold01Location=RER
- lithium hexafluorophosphate: 0.019037 kg; lognormal variance with pedigree 0.0226, pedigree (2,4,4,5,1)
  EcoSpold01Location=CN
  properties: dry mass 1 kg, wet mass 1 kg
- polyethylene, low density, granulate: 0.07329 kg; lognormal variance with pedigree 0.0226, pedigree (2,4,4,5,1)
  EcoSpold01Location=RER
  properties: heating value, net 42.47 MJ, carbon content, fossil 0.857143, wet mass 1 kg, dry mass 1 kg
  note on carbon content, fossil: Polyethylene is formed out of a huge amount of ethylene monomers (C2H4) (ecoinvent v2.2 report 11_II). MW=28 g/mol
- used Li-ion battery: -0.0525 kg; lognormal variance with pedigree 0.092, pedigree (5,4,4,5,1)
  EcoSpold01Location=GLO
  production volume 0.1575 kg
    Calculated from the production volume of battery cell, Li-ion in proportion to the respective output amounts.
  properties: wet mass 1 kg, dry mass 1 kg, carbon content, fossil 0.328011
- electricity, medium voltage: 0.00204033, 0.000391247, 0.00898364, 0.00656822, 0.0302812, 0.0134648, 0.0438705 kWh (7 entries); lognormal variance with pedigree 0.05, pedigree (1,1,4,5,1)
  composite
  EcoSpold01Location=CN
- heat, district or industrial, natural gas: 0.00261124, 0.0626228 MJ (2 entries); lognormal variance with pedigree 0.04, pedigree (4,4,4,5,1)
  EcoSpold01Location=RER

## Sampling procedure
measurements, patent, ecoinvent

## Extrapolations
see Geography This dataset has been copied from an original dataset covering the geography CN. The uncertainty has been adjusted accordingly.

## Review by Christian Bauer 2010-02-08
passed
