# treatment of wastewater from plywood production, capacity 5E9l/year

Dataset: EcoSpold 2, unit process
Geography: RoW
Time period: 1994-01-01 to 2021-12-31
Technology level: current
Classification: EcoSpold01Categories: waste management/wastewater treatment
Classification: ISIC rev.4 ecoinvent: 3700:Sewerage
Tags: Treatment; ConvertedDataset
Scenario: Business-as-Usual
System model: Allocation, cut-off by classification
Generated by: Gabor Doka (obsolete)
Published in: Doka G. 2008
Database: ecoinvent
isCopyrightProtected: true
accessRestrictedTo: 1

## General comment
Wastewater purified in a medium size municipal wastewater treatment plant (capacity class 3), with an average capacity size of 24900 per-captia-equivalents PCE.
Wastewater contains (in kg/m3): COD: 0.7 (GSD=177.5%); BOD: 4.23 (GSD=177.5%); PO4-P: 0.00116 (GSD=107.7%); Cu: 0.00003 (GSD=225.8%); Zn: 0.00013 (GSD=225.8%);
[This dataset was already contained in the ecoinvent database version 2. It was not individually updated during the transfer to ecoinvent version 3. Life Cycle Impact Assessment results may still have changed, as they are affected by changes in the supply chain, i.e. in other datasets. This dataset was generated following the ecoinvent quality guidelines for version 2. It may have been subject to central changes described in the ecoinvent version 3 change report (http://www.ecoinvent.org/database/ecoinvent-version-3/reports-of-changes/), and the results of the central updates were reviewed extensively. The changes added e.g. consistent water flows and other information throughout the database. The documentation of this dataset can be found in the ecoinvent reports of version 2, which are still available via the ecoinvent website. The change report linked above covers all central changes that were made during the conversion process.]

## Included activities end
Infrastructure materials for municipal wastewater treatment plant, transports, dismantling. Land use burdens.

## Geography
Specific to the technology mix encountered in Switzerland in 2000. Well applicable to modern treatment practices in Europe, North America or Japan.

## Technology
Three stage wastewater treatment (mechanical, biological, chemical) including sludge digestion (fermentation) according to the average technology in Switzerland

## Parameters
- fraction, process water, to air: 0.1 dimensionless; name fraction_PW_to_air; lognormal variance with pedigree 0.092025, pedigree (4,4,3,2,4)

## Reference product
- wastewater from plywood production: -1 m3; CPC 39920: Sewage sludge; By-product classification Waste
  EcoSpold01Location=CH
  production volume 3.96633 m3
    This is a placeholder value that does not reflect real-world production volumes. This dataset does not currently require a real-world production volume to work in the database framework, and no actual data were collected yet. This has no negative effect on the results of the ecoinvent database.
  property price 0 EUR2005
    Waste products are assigned a price of zero as they are assumed to require further treatment.
  property carbon content, non-fossil 0.897931
    COD= 0.7 kg/m3 (Tab A.18, ecoinvent v2.2 report 13_I). COD was converted to TOC, using conversion factors in Tab 4.10 (ecoinvent v2.2 report 13_IV). TOC was considered as Total Carbon.
  property carbon content 0.897931
    carbon content on a dry matter basis (reserved; not for manual entry)
  properties: water content 2962.17, dry mass 0.337476 kg, wet mass 1000 kg, water in wet mass 999.663 kg, carbon content, fossil 0, carbon allocation 0.30303 kg

## Inputs from technosphere
- residual material landfill: 3.9606e-12 unit; lognormal variance with pedigree 0.072, pedigree (1,1,5,5,1)
  EcoSpold01Location=CH
  burden from sludge incineration. Uncertainty calculated from wastewater composition and treatment model
- wastewater treatment facility, capacity 5E9l/year: 5.6882e-9 unit; lognormal variance with pedigree 0.042, pedigree (1,1,5,5,1)
  uncertainty heeded in exchanges of the module
  EcoSpold01Location=CH
- aluminium sulfate, powder: 0.0014866 kg; lognormal variance with pedigree 0.062, pedigree (1,1,5,5,1)
  EcoSpold01Location=RER
  direct wastewater treatment plant burden. Uncertainty calculated from wastewater composition and treatment model
  properties: dry mass 1 kg, wet mass 1 kg
- sewer grid, 5E9l/year, 110 km: 2.1782e-7 km; lognormal variance with pedigree 0.042, pedigree (1,1,5,5,1)
  EcoSpold01Location=CH
  uncertainty heeded in exchanges of the module
- chemical, inorganic: 1.0874e-7 kg; lognormal variance with pedigree 0.162, pedigree (1,1,5,5,1)
  EcoSpold01Location=GLO
  burden from sludge incineration. Uncertainty calculated from wastewater composition and treatment model
  properties: carbon content, fossil 0.003, wet mass 1 kg, dry mass 1 kg
  note on carbon content, fossil: This dataset is an unweighted average of 20 inorganic substances (listed in Tab 88.1, ecoinvent v2.2 report 8, part II), being part of the top100 chemicals included in this database. The C-content has also been calculated as an unweighted average of the C content of the substances composing this dataset.
- waste plastic, mixture: 0 kg; pedigree (1,1,1,1,1)
  EcoSpold01Location=CH
  direct wastewater treatment plant burden. Uncertainty calculated from wastewater composition and treatment model
  production volume 0 kg
    Calculated from the production volume of wastewater from plywood production in proportion to the respective output amounts.
  properties: water content 0.180638, carbon content, fossil 0.747344, dry mass 0.847 kg, wet mass 1 kg, heating value, net 30.79 MJ
  note on carbon content, fossil: C content in 1 kg DM was calculated using data in Tab A.2, ecoinvent v2.2 report 13_I
  note on heating value, net: Value taken from the general comment of the treatment dataset.
- heat, district or industrial, other than natural gas: 0 MJ; pedigree (1,1,1,1,1)
  (same comment as for residual material landfill)
  properties: heating value, net 1 MJ
- cement, unspecified: 0 kg; pedigree (1,1,1,1,1)
  (same comment as for residual material landfill)
  properties: wet mass 1 kg, dry mass 1 kg
- electricity, high voltage: 0 kWh; pedigree (1,1,1,1,1)
  (same comment as for residual material landfill)
- municipal waste incineration facility: 4.4533e-10 unit; lognormal variance with pedigree 0.072, pedigree (1,1,5,5,1)
  (same comment as for residual material landfill)
- process-specific burdens, residual material landfill: 0 kg; pedigree (1,1,1,1,1)
  burden from sludge incineration. Uncertainty calculated from wastewater composition and treatment model
  EcoSpold01Location=CH
- waste graphical paper: -0.0155 kg; lognormal variance with pedigree 0.042, pedigree (1,1,5,5,1)
  direct wastewater treatment plant burden. Uncertainty calculated from wastewater composition and treatment model
  EcoSpold01Location=CH
  production volume 0.062 kg
    (same comment as for waste plastic, mixture)
  properties: wet mass 1 kg, dry mass 0.888 kg, carbon content, non-fossil 0.454955, heating value, net 14.12 MJ, water content 0.126126
- sodium hydroxide, without water, in 50% solution state: 9.8067e-7 kg; lognormal variance with pedigree 0.102, pedigree (1,1,5,5,1)
  burden from sludge incineration. Uncertainty calculated from wastewater composition and treatment model
  EcoSpold01Location=RER
  properties: wet mass 1 kg, heating value, net 3.03 MJ, dry mass 1 kg
- process-specific burdens, municipal waste incineration: 0 kg; pedigree (1,1,1,1,1)
  (same comment as for residual material landfill)
- slag landfill: 1.2502e-11 unit; lognormal variance with pedigree 0.072, pedigree (1,1,5,5,1)
  (same comment as for residual material landfill)
- hydrochloric acid, without water, in 30% solution state: 6.5245e-8 kg; lognormal variance with pedigree 0.162, pedigree (1,1,5,5,1)
  (same comment as for sodium hydroxide, without water, in 50% solution state)
  properties: heating value, net 3.32 MJ, wet mass 1 kg, dry mass 1 kg
- waste cement, hydrated: 0 kg; pedigree (1,1,1,1,1)
  (same comment as for process-specific burdens, residual material landfill)
  production volume 0 kg
    (same comment as for waste plastic, mixture)
  properties: dry mass 1 kg, wet mass 1 kg
- iron sulfate: 0.0055003 kg; lognormal variance with pedigree 0.062, pedigree (1,1,5,5,1)
  (same comment as for aluminium sulfate, powder)
  properties: dry mass 1 kg, wet mass 1 kg
- liquid manure spreading, by vacuum tanker: 0.0083943 m3; lognormal variance with pedigree 0.042, pedigree (1,1,5,5,1)
  EcoSpold01Location=CH
  burden from sludge spreading. Uncertainty calculated from wastewater composition and treatment model
- quicklime, milled, packed: 1.778e-7 kg; lognormal variance with pedigree 0.102, pedigree (1,1,5,5,1)
  (same comment as for process-specific burdens, residual material landfill)
  properties: water content 0.010101, wet mass 1 kg, dry mass 0.99 kg
- electricity, low voltage: 0 kWh; pedigree (1,1,1,1,1)
  (same comment as for waste plastic, mixture)
- iron (III) chloride, without water, in 40% solution state: 0.0075253 kg; lognormal variance with pedigree 0.062, pedigree (1,1,5,5,1)
  direct wastewater treatment plant burden plus burden from sludge incineration. Uncertainty calculated from wastewater composition and treatment model
  EcoSpold01Location=CH
  properties: dry mass 1 kg, wet mass 1 kg
- process-specific burdens, slag landfill: 0 kg; pedigree (1,1,1,1,1)
  (same comment as for residual material landfill)
- waste plastic, mixture: -0.00172425, -0.000115208, -8.71297e-6, -4.75849e-5, -1.92238e-5, -4.51863e-5, -0.00146914, -0.0120707 kg (8 entries); lognormal variance with pedigree 0.042, pedigree (1,1,5,5,1)
  (same comment as for waste plastic, mixture)
  production volume 0.0614782 kg
- heat, district or industrial, other than natural gas: 0.000591117, 0.0356945, 1.45771 MJ (3 entries); lognormal variance with pedigree 0.072, pedigree (1,1,5,5,1)
  (same comment as for residual material landfill)
- cement, unspecified: 0.000109804, 2.2847e-5, 1.67339e-6, 4.7697e-6, 0.000107868, 3.17488e-6, 3.48696e-5, 4.21883e-6, 0.000471214 kg (9 entries); lognormal variance with pedigree 0.082, pedigree (1,1,5,5,1)
  (same comment as for residual material landfill)
- electricity, high voltage: 0.00258805, 0.000496153, 0.0114282, 0.0374522, 0.00841227, 0.121133, 0.0192107, 0.055379 kWh (8 entries); lognormal variance with pedigree 0.522, pedigree (1,1,5,5,1)
  (same comment as for residual material landfill)
- process-specific burdens, residual material landfill: 0.000537773, 0.00136333 kg (2 entries); lognormal variance with pedigree 0.072, pedigree (1,1,5,5,1)
  (same comment as for process-specific burdens, residual material landfill)
- process-specific burdens, municipal waste incineration: 0.503884, 1.27742 kg (2 entries); lognormal variance with pedigree 0.072, pedigree (1,1,5,5,1)
  (same comment as for residual material landfill)
- waste cement, hydrated: -0.000537773, -0.00136333 kg (2 entries); lognormal variance with pedigree 0.082, pedigree (1,1,5,5,1)
  (same comment as for process-specific burdens, residual material landfill)
  production volume 0.00754039 kg
- electricity, low voltage: 0.00270023, 0.00049166, 0.0110986, 0.0387761, 0.00791635, 0.121541, 0.0196632, 0.0564626 kWh (8 entries); lognormal variance with pedigree 2.042, pedigree (1,1,5,5,1)
  (same comment as for waste plastic, mixture)
- process-specific burdens, slag landfill: 0.00198931, 0.00504319 kg (2 entries); lognormal variance with pedigree 0.072, pedigree (1,1,5,5,1)
  (same comment as for residual material landfill)

## Emissions to nature
- Iron [soil, agricultural]: 0.0021612 kg; lognormal variance with pedigree 0.062, pedigree (1,1,5,5,1)
  emission from sludge spreading. Uncertainty calculated from wastewater composition and treatment model
- DOC, Dissolved Organic Carbon [water, ground-, long-term]: 0.0038128 kg; lognormal variance with pedigree 0.402, pedigree (1,1,5,5,1)
  emission from sludge incineration. Uncertainty calculated from wastewater composition and treatment model
- Zinc [soil, agricultural]: 4.2084e-5 kg; lognormal variance with pedigree 0.722, pedigree (1,1,5,5,1)
  (same comment as for Iron)
- Carbon monoxide, non-fossil [air, urban air close to ground]: 0.0067433 kg; lognormal variance with pedigree 0.432, pedigree (1,1,5,5,1)
  direct digester gas emission plus emission from sludge incineration. Uncertainty calculated from wastewater composition and treatment model
- Aluminium [water, surface water]: 1.038e-8 kg; lognormal variance with pedigree 0.672, pedigree (1,1,5,5,1)
  sewer overload discharge plus direct wastewater treatment plant emission plus emission from sludge incineration. Uncertainty calculated from wastewater composition and treatment model
- Copper [air, urban air close to ground]: 8.7165e-11 kg; lognormal variance with pedigree 0.782, pedigree (1,1,5,5,1)
  (same comment as for Carbon monoxide, non-fossil)
- Carbon dioxide, non-fossil [air, urban air close to ground]: 7.6035 kg; lognormal variance with pedigree 0.192, pedigree (1,1,5,5,1)
  direct wastewater treatment plant emission plus direct digester gas emission plus emission from sludge incineration. Uncertainty calculated from wastewater composition and treatment model
- NMVOC, non-methane volatile organic compounds, unspecified origin [air, urban air close to ground]: 9.6932e-5 kg; lognormal variance with pedigree 0.542, pedigree (1,1,5,5,1)
  direct digester gas emission. Uncertainty calculated from wastewater composition and treatment model
- Phosphate [water, ground-, long-term]: 4.5814e-5 kg; lognormal variance with pedigree 4.242, pedigree (1,1,5,5,1)
  (same comment as for DOC, Dissolved Organic Carbon)
- Aluminium [air, urban air close to ground]: 1.9487e-7 kg; lognormal variance with pedigree 0.082, pedigree (1,1,5,5,1)
  (same comment as for Carbon monoxide, non-fossil)
- Phosphate [water, surface water]: 0.0012725 kg; lognormal variance with pedigree 0.052, pedigree (1,1,5,5,1)
  sewer overload discharge plus direct wastewater treatment plant emission plus emission from sludge incineration plus emission from sludge spreading. Uncertainty calculated from wastewater composition and treatment model
- Phosphate [water, ground-]: 6.0245e-6 kg; lognormal variance with pedigree 0.112, pedigree (1,1,5,5,1)
  (same comment as for Iron)
- Zinc, ion [water, surface water]: 4.0192e-5 kg; lognormal variance with pedigree 0.662, pedigree (1,1,5,5,1)
  (same comment as for Aluminium)
- Zinc, ion [water, ground-, long-term]: 7.4004e-7 kg; lognormal variance with pedigree 5.522, pedigree (1,1,5,5,1)
  (same comment as for DOC, Dissolved Organic Carbon)
- Iron, ion [water, surface water]: 8.3885e-7 kg; lognormal variance with pedigree 0.092, pedigree (1,1,5,5,1)
  (same comment as for Aluminium)
- Copper, ion [water, ground-, long-term]: 9.5449e-6 kg; lognormal variance with pedigree 0.742, pedigree (1,1,5,5,1)
  (same comment as for DOC, Dissolved Organic Carbon)
- Iron, ion [water, ground-, long-term]: 0.0011482 kg; lognormal variance with pedigree 0.902, pedigree (1,1,5,5,1)
  (same comment as for DOC, Dissolved Organic Carbon)
- COD, Chemical Oxygen Demand [water, ground-, long-term]: 0.0096355 kg; lognormal variance with pedigree 0.402, pedigree (1,1,5,5,1)
  (same comment as for DOC, Dissolved Organic Carbon)
- Sulfate [water, surface water]: 0.0047291 kg; lognormal variance with pedigree 0.062, pedigree (1,1,5,5,1)
  (same comment as for Aluminium)
- Aluminium [water, ground-, long-term]: 9.2312e-5 kg; lognormal variance with pedigree 0.072, pedigree (1,1,5,5,1)
  (same comment as for DOC, Dissolved Organic Carbon)
- Phosphorus [air, urban air close to ground]: 3.9119e-7 kg; lognormal variance with pedigree 0.082, pedigree (1,1,5,5,1)
  (same comment as for Carbon monoxide, non-fossil)
- Copper, ion [water, surface water]: 7.7817e-6 kg; lognormal variance with pedigree 0.662, pedigree (1,1,5,5,1)
  (same comment as for Aluminium)
- Zinc [air, urban air close to ground]: 7.7979e-10 kg; lognormal variance with pedigree 0.772, pedigree (1,1,5,5,1)
  (same comment as for Carbon monoxide, non-fossil)
- TOC, Total Organic Carbon [water, surface water]: 0.32679 kg; lognormal variance with pedigree 0.282, pedigree (1,1,5,5,1)
  (same comment as for Aluminium)
- Methane, non-fossil [air, urban air close to ground]: 0.021332 kg; lognormal variance with pedigree 0.432, pedigree (1,1,5,5,1)
  (same comment as for Carbon monoxide, non-fossil)
- BOD5, Biological Oxygen Demand [water, surface water]: 0.40107 kg; lognormal variance with pedigree 0.292, pedigree (1,1,5,5,1)
  (same comment as for Aluminium)
- Copper [soil, agricultural]: 1.0411e-5 kg; lognormal variance with pedigree 0.732, pedigree (1,1,5,5,1)
  (same comment as for Iron)
- Carbon [soil, agricultural]: 0.34425 kg; lognormal variance with pedigree 0.392, pedigree (1,1,5,5,1)
  (same comment as for Iron)
- DOC, Dissolved Organic Carbon [water, surface water]: 0.30597 kg; lognormal variance with pedigree 0.302, pedigree (1,1,5,5,1)
  (same comment as for Aluminium)
- COD, Chemical Oxygen Demand [water, surface water]: 0.13567 kg; lognormal variance with pedigree 0.332, pedigree (1,1,5,5,1)
  (same comment as for Aluminium)
- Iron [air, urban air close to ground]: 8.1835e-8 kg; lognormal variance with pedigree 0.112, pedigree (1,1,5,5,1)
  (same comment as for Carbon monoxide, non-fossil)
- BOD5, Biological Oxygen Demand [water, ground-, long-term]: 0.0031518 kg; lognormal variance with pedigree 0.402, pedigree (1,1,5,5,1)
  (same comment as for DOC, Dissolved Organic Carbon)
- Water [water, unspecified]: 0.9 m3; name water_to_water_unspecified; lognormal variance with pedigree 0.0827, pedigree (2,2,5,5,1)
  Calculated value based on water balance.
  property fraction, origin: fresh water 1; name fraction_origin_fresh_water_Ww
  property fraction, origin: unspecified 0; name fraction_origin_unspecified_Ww
  property fraction, origin: salt water 0; name fraction_origin_salt_water_Ww
  property carbon content, non-fossil 0; name C_content_non_fossil
  property wet mass 1000 kg; name WM
  property dry mass 0 kg; name DM
  property water in wet mass 1000 kg; name WWM
  property carbon content, fossil 0; name C_content_fossil
- TOC, Total Organic Carbon [water, ground-, long-term]: 0.0038128 kg; lognormal variance with pedigree 0.402, pedigree (1,1,5,5,1)
  (same comment as for DOC, Dissolved Organic Carbon)
- Aluminium [soil, agricultural]: 0.00010998 kg; lognormal variance with pedigree 0.062, pedigree (1,1,5,5,1)
  (same comment as for Iron)
- Water [air, unspecified]: 0.1 m3; name water_to_air_unspecified; lognormal variance with pedigree 0.0827, pedigree (2,2,5,5,1)
  Calculated value based on water balance.
  property fraction, origin: fresh water 0; name fraction_origin_fresh_water
  property fraction, origin: unspecified 1; name fraction_origin_unspecified
  property fraction, origin: salt water 0; name fraction_origin_salt_water
- Chloride [water, surface water]: 0.0049308 kg; lognormal variance with pedigree 0.062, pedigree (1,1,5,5,1)
  (same comment as for Aluminium)

## Extrapolations
wastewater compositions from literature and/or estimates This dataset has been copied from an original dataset covering the geography CH. The uncertainty has been adjusted accordingly.

## Review by Niels Jungbluth 2009-01-22
passed.
