# treatment of waste paper, unsorted, sorting

Dataset: EcoSpold 2, unit process
Geography: CH
Time period: 2012-01-01 to 2021-12-31
Technology level: current
Classification: ISIC rev.4 ecoinvent: 3830:Materials recovery
Scenario: Business-as-Usual
System model: Allocation, cut-off by classification
Generated by: Melanie Haupt
Published in: Melanie Haupt 2018
Database: ecoinvent
isCopyrightProtected: true
accessRestrictedTo: 1

## General comment
This activity represents the treatment of 1 kg waste paper from separate collection, i.e. a source-segregated municipal solid waste fraction, through sorting for recycling. The activity starts with receiving the unsorted waste paper, as collected from the households, at the sorting facility and ends when sorted fractions are produced.

## Included activities start
The activity starts with "waste paper, unsorted" being available to the sorting facility.

## Included activities end
The activity ends with "waste paper, unsorted" being sorted and "waste paper, sorted" available for transportation at the gate of the sorting facility.

## Geography
Data are sourced from plants located or activities taking place in Switzerland and/or relevant literature sources.

## Technology
Technology encountered in Switzerland for the underlying time frame.

## Time period
Data mainly reflecting situation in Switzerland in 2012.

## Reference product
- waste paper, unsorted: 0 kg; By-product classification Recyclable; CPC 39240: Waste and scrap of paper or paperboard
  production volume 0 kg; name PVRP
    Based on Haupt et al. (2017): The amount of unsorted waste paper entering sorting in Switzerland is estimated to circa 708"000 tonnes in 2012. This value is calculated from data reported in figure 5 by assuming that 83% of "mixed paper input" to cardboard recycling is unsorted paper, in addition to the 641"000 tonnes from separate collection of paper.
    Reference: Haupt, Melanie & Vadenbo, Carl & Hellweg, Stefanie. (2017). Do We Have the Right Performance Indicators for the Circular Economy?: Insight into the Swiss Waste Management System. Journal of Industrial Ecology. vol. 21, no. 3, pp. 615-627.
  property price 0.093 EUR2005; name RP_price_EUR2005
    Temporary price data. Calculated as 90% of purchasers price based on: Assumed to be 10% less than for sorted waste paper
  property carbon content 0.448889
    carbon content on a dry matter basis (reserved; not for manual entry)
  properties: heating value, net 14.11 MJ, water in wet mass 0.1 kg, water content 0.111111, carbon content, non-fossil 0.448889, dry mass 0.9 kg, carbon content, fossil 0, wet mass 1 kg, carbon allocation 0.404 kg
- waste paper, sorted: 1 kg; name BP5; By-product classification Recyclable; CPC 39240: Waste and scrap of paper or paperboard; pedigree (1,1,1,1,1)
  Exchange modelled based on previous versions of this dataset in the ecoinvent database, i.e. in v2: waste paper, sorted, for further treatment, CH, and; in v3 (up until 3.6): treatment of waste paper, unsorted, sorting, CH
  production volume 6.98151e8 kg; = BP5*PVRP/ABS(RP)
  property price 0.104 EUR2005; name BP5_price_EUR2005
  properties: dry mass 0.9 kg, carbon content, non-fossil 0.448889, heating value, net 14.11 MJ, carbon content, fossil 0, wet mass 1 kg, water in wet mass 0.1 kg, water content 0.111111, carbon content 0.448889, carbon allocation 0.404 kg

## By-products
- waste paper, sorted: 0 kg; By-product classification Recyclable; CPC 39240: Waste and scrap of paper or paperboard; pedigree (1,1,1,1,1)
  (same comment as for waste paper, sorted)
  production volume 0 kg; = BP5*PVRP/ABS(RP)
    Calculated based on the production volume of the reference product.
  property carbon content 0.448889
    carbon content on a dry matter basis (reserved; not for manual entry)
  properties: dry mass 0.9 kg, carbon content, non-fossil 0.448889, heating value, net 14.11 MJ, carbon content, fossil 0, wet mass 1 kg, water in wet mass 0.1 kg, water content 0.111111, carbon allocation 0.404 kg

## Inputs from technosphere
- steel, unalloyed: 0.00118735 kg; lognormal variance with pedigree 0.0447, pedigree (3,4,5,3,1)
  (same comment as for waste paper, sorted)
  properties: wet mass 1 kg, carbon content, fossil 0.0025, dry mass 1 kg
- waste plastic, mixture: -0.00952357 kg; name BP3; lognormal variance with pedigree 0.0493, pedigree (4,3,5,3,1)
  (same comment as for waste paper, sorted)
  production volume 6.64889e6 kg; = BP3*PVRP/ABS(RP)
    Calculated based on the production volume of the reference product.
  property price 0 EUR2005; name BP3_price_EUR2005
  properties: heating value, net 30.79 MJ, water content 0.180638, dry mass 0.847 kg, wet mass 1 kg, carbon content, fossil 0.747344
  note on heating value, net: Value taken from the general comment of the treatment dataset.
- heat, central or small-scale, other than natural gas: 0.0144165 MJ; lognormal variance with pedigree 0.0447, pedigree (3,4,5,3,1)
  (same comment as for waste paper, sorted)
  properties: heating value, net 1 MJ
- lubricating oil: 1.18735e-5 kg; lognormal variance with pedigree 0.0447, pedigree (3,4,5,3,1)
  (same comment as for waste paper, sorted)
  properties: wet mass 1 kg, carbon content, fossil 0.75, dry mass 1 kg, heating value, net 40.2 MJ
  note on heating value, net: Literature value, Source: IPCC 2006, 2006 IPCC Guidelines for National Greenhouse Gas Inventories, Prepared by the National Greenhouse Gas Inventories Programme, Eggleston H.S., Buendia L., Miwa K., Ngara T. and Tanabe K. (eds). Published: IGES, Japan
- sheet rolling, steel: 0.00118735 kg; lognormal variance with pedigree 0.0447, pedigree (3,4,5,3,1)
  Input of metal working modelled as a service with an activity link to the supplying activity of matching/overlapping geography.
- waste graphical paper: -0.00853411 kg; name BP6; lognormal variance with pedigree 0.0493, pedigree (4,3,5,3,1)
  (same comment as for waste paper, sorted)
  production volume 5.9581e6 kg; = BP6*PVRP/ABS(RP)
    Calculated based on the production volume of the reference product.
  property price 0 EUR2005; name BP6_price_EUR2005
  properties: wet mass 1 kg, dry mass 0.888 kg, heating value, net 14.12 MJ, water content 0.126126, carbon content, non-fossil 0.454955
- electricity, medium voltage: 0.009202 kWh; lognormal variance with pedigree 0.0493, pedigree (4,3,5,3,1)
  (same comment as for waste paper, sorted)
- waste paper sorting facility: 5.99614e-10 unit; lognormal variance with pedigree 0.1786, pedigree (4,5,5,5,5)
  Input of (immobile) infrastructure modelled with an activity link to the supplying activity (construction) of matching/overlapping geography.
- waste wood, untreated: -0.000742097 kg; name BP1; lognormal variance with pedigree 0.0493, pedigree (4,3,5,3,1)
  (same comment as for waste paper, sorted)
  production volume 518096 kg; = BP1*PVRP/ABS(RP)
    Calculated based on the production volume of the reference product.
  property price 0 EUR2005; name BP1_price_EUR2005
  properties: wet mass 1 kg, carbon content, non-fossil 0.48632, dry mass 0.8 kg, heating value, net 13.99 MJ, water content 0.25
- waste paperboard: -0.00445258 kg; name BP4; lognormal variance with pedigree 0.0493, pedigree (4,3,5,3,1)
  (same comment as for waste paper, sorted)
  production volume 3.10857e6 kg; = BP4*PVRP/ABS(RP)
    Calculated based on the production volume of the reference product.
  property price 0 EUR2005; name BP4_price_EUR2005
  properties: heating value, net 15.92 MJ, dry mass 0.804 kg, wet mass 1 kg, carbon content, non-fossil 0.483259, water content 0.243781
- scrap steel: -0.000742097 kg; name BP7; lognormal variance with pedigree 0.0493, pedigree (4,3,5,3,1)
  (same comment as for waste paper, sorted)
  production volume 518096 kg; = BP7*PVRP/ABS(RP)
    Calculated based on the production volume of the reference product.
  property price 0 EUR2005; name BP7_price_EUR2005
  properties: wet mass 1 kg, dry mass 1 kg
- waste textile, soiled: -0.000742097 kg; name BP2; lognormal variance with pedigree 0.0493, pedigree (4,3,5,3,1)
  (same comment as for waste paper, sorted)
  production volume 518096 kg; = BP2*PVRP/ABS(RP)
    Calculated based on the production volume of the reference product.
  property price 0 EUR2005; name BP2_price_EUR2005
  properties: heating value, net 14.45 MJ, wet mass 1 kg, carbon content, non-fossil 0.570519, dry mass 0.75 kg, water content 0.333333
- waste paper, unsorted: 1.0142 kg
  production volume 7.08064e8 kg
  properties: heating value, net 14.11 MJ, water content 0.111111, carbon content, non-fossil 0.448889, dry mass 0.9 kg, wet mass 1 kg

## Extrapolations
This dataset has been extrapolated from year 2012 to the year of the calculation (2021). The uncertainty has been adjusted accordingly.
