# titanium production, triple-melt

Dataset: EcoSpold 2, unit process
Geography: GLO
Time period: 2004-01-01 to 2021-12-31
Technology level: current
Classification: ISIC rev.4 ecoinvent: 2420:Manufacture of basic precious and other non-ferrous metals
Scenario: Business-as-Usual
System model: Allocation, cut-off by classification
Generated by: Marylène Dussault
Published in: Norgate, T. E. 2004
Database: ecoinvent
isCopyrightProtected: true
accessRestrictedTo: 1

## General comment
This dataset represents the production of 1 kg of titanium triple-melt. Primary titanium metal is produced mainly by the Kroll process, which produces purified titanium sponge. The titanium sponge can then be refined using vacuum arc remelting. This remelting can be done several times to achieve high purity of titanium metal. Triple-melt titanium is the purest primary titanium and is mainly used to produce parts for the aerospace sector. This dataset models the vacuum arc remelting step (3 stages). The previous steps are modelled in the titanium tetrachloride production dataset and the titanium sponge production dataset.

## Included activities start
This activity starts with the supply of titanium sponge, produced using the Kroll process.

## Included activities end
This activity ends with the production of triple-melt titanium metal. This dataset includes the process of remelting titanium sponge by vacuum arc remelting in an electric furnace. Only the energy consumption is included. Missing data include solid waste and air emissions during remelting and fabrication of ingot using vacuum electric arc furnace.

## Technology
Primary titanium metal is produced mainly by Kroll process. In this batch process, titanium tetrachloride (TiCl4) is reduced with magnesium under inert atmosphere creating a sponge like titanium metal solid which is refined by vaccum arc remelting. The Kroll process is characterized by multiple steps for which many are energy and labor intensive. Main steps include batch reduction, processing, vaccum distillation and remelting. Main batch reduction takes place in a steel reactor filled with argon where the magnesium is melt at temperature between 850°C-950°C. The titanium chloride (TiCl4) is fed, or blown in as vapor, into the reactor. The reduction is a highly exothermic reaction, thus little energy input is required for it to take place. Reaction is as follow:

TiCl4(l or g) + 2 Mg(l) = Ti(s) + 2 MgCl2(l).

During the processing the reaction by-product, molten magnesium chloride (MgCl2), is remove from the reator periodically during the reaction. The magnesium and clhoride from this by-product are recovered using electrolysis and re-used. Main product from the process is a sponge like titanium (Ti(0)).
Vaccum distillation is then use to purified the crude sponge removing residual metal chlorides and magnesium. This process takes place at temperature between 900°C and 1000°C. The residuals are recovered by condensation.
The purified titanium sponge is refined using vacuum arc remelting. This remelting can be done several times to achieve high purity of titanium metal. Triple-melt titanium is the purest primary titanium and is mainly used to produce parts for the aerospace sector.

## Time period
Time period chosen based on year of publication of LCI data

## Reference product
- titanium, triple-melt: 1 kg; name titanium_3mlt; CPC 41601: Tungsten, molybdenum, tantalum, magnesium, cobalt, cadmium, titanium, zirconium, beryllium, gallium, hafnium, […]; By-product classification allocatable product; CAS 7440-32-6
  production volume 3.15e7 kg; name PV_titanium_3mlt
    Literature value. Based on reported world titanium mill consumption in 2005 (Hogan, 2008). Titanium triple-melt production is assumed to be equal to world consumption from the aerospace, sum of mill consumption from other sectors is assumed equivalent to standard titanium production.
  property price 11.3 EUR2005; name titanium_3mlt_price_EUR2005
    Calculated value based on data from United Nations Commodity Trade Statistics Database (comtrade.un.org). UN comtrade category: 810820 Unwrought titanium; powders. Year 2005. Using exchange rate of 1EURO = 1.209 USD. Average of price of import into 5 main markets (EU, US, JP, IN and CN).

## Inputs from technosphere
- electricity, high voltage: 4 kWh; lognormal variance with pedigree 0.04, pedigree (1,1,5,1,1)
  Literature value. Based on reported electricity requirements for 3 stages vaccum arc remelting of titanium by Norgate (2004).
  2004, Norgate, T. E., Rajakumar, V. ; Trang, S., Titanium and Other Light Metals - Technology Pathways to Sustainable Development, AUSTRALASIAN INST. OF MINING AND METALLU, 2, 105-112
- titanium sponge: 1 kg; lognormal variance with pedigree 0.2106, pedigree (5,5,5,5,5)
  The titanium sponge is assumed to be produced at the same location as where it is used for producing the titanium metal.
  properties: wet mass 1 kg, titanium content 0.99, dry mass 1 kg

## Sampling procedure
The eletricity consumption for the vacuum arc remelting (3 stages) is taken from Table 1 in Norgate et al. (2004).

## Extrapolations
This dataset has been extrapolated from year 2004 to the year of the calculation (2021). The uncertainty has been adjusted accordingly.
