# photovoltaic laminate production, CdTe

Dataset: EcoSpold 2, unit process
Geography: US
Time period: 2004-01-01 to 2021-12-31
Technology level: current
Classification: EcoSpold01Categories: photovoltaic/production of components
Classification: ISIC rev.4 ecoinvent: 2610:Manufacture of electronic components and boards
Synonyms: cadmium telluride; PV-module; Solarmodul; thin film
Tags: ConvertedDataset
Scenario: Business-as-Usual
System model: Allocation, cut-off by classification
Share of production covered: 100 %
Generated by: Niels Jungbluth
Published in: Jungbluth, N. 2008
Database: ecoinvent
isCopyrightProtected: true
accessRestrictedTo: 1

## General comment
Production of photovoltaic thin film modules by vapour deposition. The modules produced at First Solar have a size of 1.2m by 0.6 m. The weight is 12.0kg. The efficiency is 9%. The rated nominal power is about 65Wp per module.
[This dataset was already contained in the ecoinvent database version 2. It was not individually updated during the transfer to ecoinvent version 3. Life Cycle Impact Assessment results may still have changed, as they are affected by changes in the supply chain, i.e. in other datasets. This dataset was generated following the ecoinvent quality guidelines for version 2. It may have been subject to central changes described in the ecoinvent version 3 change report (http://www.ecoinvent.org/database/ecoinvent-version-3/reports-of-changes/), and the results of the central updates were reviewed extensively. The changes added e.g. consistent water flows and other information throughout the database. The documentation of this dataset can be found in the ecoinvent reports of version 2, which are still available via the ecoinvent website. The change report linked above covers all central changes that were made during the conversion process.]

## Included activities end
Electricity including overhead operations and office use, materials, transport of materials, infrastructure. Module processing includes film deposition, etching, cleaning and module assembly. Disposal after end of life. Process emissions not known (except Cd).

## Geography
Data for First Solar in US.

## Technology
Production technology of thin film cells. Sublimation of the powders and condensation of the vapours on a glass substrate by vapour transport deposition (VTD).

## Time period
Data published in 2004 - 2005.

## Parameters
- fraction, tap water, to air: 0.15 dimensionless; name fraction_TW_to_air; = fraction_PW_to_air; lognormal variance with pedigree 0.092025, pedigree (4,4,3,2,4)
  Calculated value. See comment in the other parametres present in this dataset. Tap water is considered to be always used as process water, thus process water fractions to air are applied to all tap water input flows to calculate the amount of water consumed in the processes.
- fraction, process water, to air: 0.15 dimensionless; name fraction_PW_to_air; lognormal variance with pedigree 0.092025, pedigree (4,4,3,2,4)
  Literature value. In case when no industry/process specific data are available, default evaporation fraction value is used. This value is 15% and is based on literature (Statistics Canada, 2007 & Shaffer, K.H., 2008, Consumptive water use in the Great Lakes Basin, USGS & Shiklomanov, 2003, World Water Resources at the Beginning of the 21st Century) and has been approved by an expert.

## Reference product
- photovoltaic laminate, CdTe: 1 m2; By-product classification allocatable product; CPC 47150: Diodes, transistors and similar semi-conductor devices; photosensitive semi-conductor devices; light emitting […]
  EcoSpold01Location=US
  production volume 137243 m2
    110.0 MW in 2007
    Calculated from GLO, attributing 59% US production (Tab 9.4, ecoinvent v2 report 6_XII)
  property price 242 EUR2005
    The production volume of this product is small compared to other products supplied by the activities within the same ISIC 3 category. Therefore, an average price of products supplied by the activities in the same ISIC 3 code has been applied.This price is obtained as '_69 Radio, television and communication equipment, EU27' in the 'EU & DK Input Output Database' (available in SimaPro, 19.28 EUR2003 per kg DS). The price is assumed to be valid for both RER2005, world 2005. Weight of product according to Ecoinvent: approx 12.6 kg per m2.

## Inputs from technosphere
- acetone, liquid: 0.00891 kg; lognormal variance with pedigree 0.0401, pedigree (1,2,5,1,1)
  Fthenakis, literature
  EcoSpold01Location=RER
  Uncertainty: Fthenakis, literature
  properties: wet mass 1 kg, carbon content, fossil 0.62069, dry mass 1 kg, heating value, net 31.32 MJ
- lead: 0.000708 kg; lognormal variance with pedigree 0.0401, pedigree (1,2,5,1,1)
  Fthenakis, literature
  EcoSpold01Location=RER
  Uncertainty: Fthenakis, literature
  properties: dry mass 1 kg, wet mass 1 kg
- sulfuric acid: 0.0393 kg; lognormal variance with pedigree 0.0401, pedigree (1,2,5,1,1)
  Fthenakis, literature
  EcoSpold01Location=RER
  Uncertainty: Fthenakis, literature
  properties: wet mass 1 kg, dry mass 1 kg
- soda ash, light, crystalline, heptahydrate: 0.0151 kg; lognormal variance with pedigree 0.0401, pedigree (1,2,5,1,1)
  Fthenakis, literature
  EcoSpold01Location=RER
  Uncertainty: Fthenakis, literature
  properties: heating value, net 3.43 MJ, wet mass 1 kg, carbon content, fossil 0.0517241, dry mass 1 kg
- silica sand: 0.0468 kg; lognormal variance with pedigree 0.0401, pedigree (1,2,5,1,1)
  Fthenakis, literature
  EcoSpold01Location=DE
  Uncertainty: Fthenakis, literature
  properties: wet mass 1 kg, dry mass 0.99 kg, water content 0.010101
- corrugated board box: 1.37 kg; lognormal variance with pedigree 0.0401, pedigree (1,2,5,1,1)
  EcoSpold01Location=RER
  Fthenakis, packaging material
  Uncertainty: Fthenakis, packaging material
  properties: heating value, net 12.86 MJ, water content 0.0582011, wet mass 1 kg, carbon content, fossil 0.000656085, dry mass 0.945 kg, carbon content, non-fossil 0.432275
  note on carbon content, fossil: Fossil C content was calculated after fossil C contents of chemicals used in the production of board (Tab 10-15 & 10.16 ecoinvent v2.2 report 11_III, part 10)
  note on carbon content, non-fossil: Biogenic C content was calculated after biogenic C contents of chemicals used in the production of board (Tab 10.15 & 10.16, ecoinvent v2.2 report 11_III, part 10).
- silicone product: 0.00307 kg; lognormal variance with pedigree 0.0401, pedigree (1,2,5,1,1)
  Fthenakis, literature
  EcoSpold01Location=RER
  Uncertainty: Fthenakis, literature
  properties: carbon content, fossil 0.324324, wet mass 1 kg, dry mass 1 kg, heating value, net 9.83 MJ
  note on carbon content, fossil: The term silicones is used for compounds in which silicon atoms are linked via oxygen atoms, each silicon atom bearing one or several organic groups. In industrially important silicones, these groups are usually methyl or phenyl (ecoinvent v2.2 report 8_part71 & Ullmann). The chemical formula was considered to be [Si(CH3)2O]n (Ullmann).
- hydrogen peroxide, without water, in 50% solution state: 0.0167 kg; lognormal variance with pedigree 0.0401, pedigree (1,2,5,1,1)
  EcoSpold01Location=RER
  Fthenakis, literature
  Uncertainty: Fthenakis, literature
  properties: dry mass 1 kg, wet mass 1 kg, heating value, net 7.13 MJ
- aluminium, wrought alloy: 0.015 kg; lognormal variance with pedigree 0.0401, pedigree (1,2,5,1,1)
  Fthenakis, literature
  EcoSpold01Location=RER
  Uncertainty: Fthenakis, literature
  properties: wet mass 1 kg, dry mass 1 kg
- transport, freight train: 0.0093824 metric ton*km; = (cadmium_sulfide + cadmium_telluride) * 200/1000
  The cadmium sulfide and cadmium telluride are assumed to be transported 200 km by rail. This is the standard rail transport distance for the US (see table 4.2, p. 635/926 in Classen et al., 2009).
  References:
  Classen M., Althaus H.-J., Blaser S., Tuchschmid M., Jungbluth N., Doka G., Faist Emmenegger M. and Scharnhorst W. (2009) Life Cycle Inventories of Metals. Final report ecoinvent data v2.1, No 10. EMPA Dübendorf, Swiss Centre for Life Cycle Inventories, Dübendorf, CH, Online-Version under: www.ecoinvent.ch
- cadmium sulfide, semiconductor-grade: 0.003516 kg; name cadmium_sulfide; lognormal variance with pedigree 0.0401, pedigree (1,2,5,1,1)
  Fthenakis, literature, incl. Part of Cd compound powder.
  This product is assumed to be supplied exclusively by the production in the US, therefore a direct activity link to the activity "cadmium sulfide production, semiconductor-grade" in the US is used.
  EcoSpold01Location=US
  Uncertainty: Fthenakis, literature, incl. Part of Cd compound powder
  properties: dry mass 1 kg, wet mass 1 kg
- tap water: 219 kg; name tap_water_input; lognormal variance with pedigree 0.0401, pedigree (1,2,5,1,1)
  Fthenakis, literature
  EcoSpold01Location=RER
  Uncertainty: Fthenakis, literature
  properties: carbon content, fossil 0.00178991, wet mass 1 kg, water content 2962.17, dry mass 0.000337476 kg
  note on carbon content, fossil: Bicarbonate content is 2.93 mol/m3. CO2 content is 0.1 mol/m3 (ecoinvent v2.2 report 8, Tab 93.1).
- ethylvinylacetate, foil: 0.6 kg; lognormal variance with pedigree 0.0401, pedigree (1,2,5,1,1)
  EcoSpold01Location=RER
  Fthenakis, literature
  Uncertainty: Fthenakis, literature
  properties: wet mass 1 kg, carbon content, fossil 0.79734, dry mass 1 kg, heating value, net 35.99 MJ
  note on carbon content, fossil: Ethylene vinyl acetate copolymer contains 20% of vinyl acetate (ecoinvent v2.2 report 11_II)
- chemical, organic: 0.0097419 kg; lognormal variance with pedigree 0.0401, pedigree (1,2,5,1,1)
  Fthenakis, literature, sum up of several chemicals
  EcoSpold01Location=GLO
  Uncertainty: Fthenakis, literature, sum up of several chemicals
  properties: heating value, net 19.03 MJ, dry mass 1 kg, carbon content, fossil 0.628, wet mass 1 kg
  note on carbon content, fossil: This dataset is an unweighted average of 20 organic substances (listed in Tab 88.1, ecoinvent v2.2 report 8, part II), being part of the top100 chemicals included in this database. The C-content has also been calculated as an unweighted average of the C content of the substances composing this dataset.
- wastewater from glass production: -0.219 m3; name wastewater_output; lognormal variance with pedigree 0.0401, pedigree (1,2,5,1,1)
  Calculation
  EcoSpold01Location=CH
  Uncertainty: Calculation
  production volume 30056.2 m3
    Calculated from the production volume of photovoltaic laminate, CdTe in proportion to the respective output amounts.
  property price 0 EUR2005; name wastewater_output_price_EUR2005
  properties: water content 913.443, dry mass 1.09356 kg, carbon content, fossil 0.0455242, wet mass 1000 kg
  note on carbon content, fossil: COD= 0.115 kg/m3 (Tab A.18, ecoinvent v2.2 report 13_I). COD was converted to TOC, using conversion factors in Tab 4.10 (ecoinvent v2.2 report 13_IV). TOC was considered as Total Carbon.
- sodium hydroxide, without water, in 50% solution state: 0.0493 kg; lognormal variance with pedigree 0.0401, pedigree (1,2,5,1,1)
  EcoSpold01Location=RER
  Fthenakis, literature
  Uncertainty: Fthenakis, literature
  properties: heating value, net 3.03 MJ, dry mass 1 kg, wet mass 1 kg
- municipal solid waste: -0.03 kg; lognormal variance with pedigree 0.0421, pedigree (1,4,5,3,1)
  EcoSpold01Location=CH
  Alsema (personal communication) 2007, production waste
  Uncertainty: Alsema (personal communication) 2007, production waste
  production volume 4117.29 kg
    (same comment as for wastewater from glass production)
  properties: heating value, net 11.74 MJ, dry mass 0.771 kg, wet mass 1 kg, carbon content, non-fossil 0.261655, water content 0.297017, carbon content, fossil 0.171549
  note on heating value, net: Value taken from the general comment of the treatment dataset.
  note on carbon content, non-fossil: MSW composition in tab 4.1, ecoinvent v2.2 report 13_I. C content referred to 1 kg DM
- cadmium telluride, semiconductor-grade: 0.043396 kg; name cadmium_telluride; lognormal variance with pedigree 0.0401, pedigree (1,2,5,1,1)
  EcoSpold01Location=US
  Fthenakis, literature, incl. Part of Cd compound powder.
  This product is assumed to be supplied exclusively by the production in the US, therefore a direct activity link to the activity "cadmium telluride production, semiconductor-grade" in the US is used.
  Uncertainty: Fthenakis, literature, incl. Part of Cd compound powder
  properties: dry mass 1 kg, wet mass 1 kg
- solar glass, low-iron: 19.19 kg; lognormal variance with pedigree 0.0401, pedigree (1,2,5,1,1)
  EcoSpold01Location=RER
  Fthenakis, literature
  Uncertainty: Fthenakis, literature
  properties: wet mass 1 kg, dry mass 1 kg
- isopropanol: 0.00208 kg; lognormal variance with pedigree 0.0401, pedigree (1,2,5,1,1)
  Fthenakis, literature
  EcoSpold01Location=RER
  Uncertainty: Fthenakis, literature
  properties: heating value, net 34.3 MJ, wet mass 1 kg, dry mass 1 kg, carbon content, fossil 0.6
- chromium: 0.00315 kg; lognormal variance with pedigree 0.0401, pedigree (1,2,5,1,1)
  EcoSpold01Location=RER
  Fthenakis, literature
  Uncertainty: Fthenakis, literature
  properties: wet mass 1 kg, dry mass 1 kg
- nitric acid, without water, in 50% solution state: 0.0572 kg; lognormal variance with pedigree 0.0401, pedigree (1,2,5,1,1)
  EcoSpold01Location=RER
  Fthenakis, literature
  Uncertainty: Fthenakis, literature
  properties: wet mass 1 kg, dry mass 1 kg
- chemical, inorganic: 0.035013 kg; lognormal variance with pedigree 0.0401, pedigree (1,2,5,1,1)
  (same comment as for chemical, organic)
  properties: carbon content, fossil 0.003, wet mass 1 kg, dry mass 1 kg
  note on carbon content, fossil: This dataset is an unweighted average of 20 inorganic substances (listed in Tab 88.1, ecoinvent v2.2 report 8, part II), being part of the top100 chemicals included in this database. The C-content has also been calculated as an unweighted average of the C content of the substances composing this dataset.
- copper, cathode: 0.51807 kg; lognormal variance with pedigree 0.0401, pedigree (1,2,5,1,1)
  EcoSpold01Location=RER
  Fthenakis, including metal compounds for coating and contacts
  Uncertainty: Fthenakis, including metal compounds for coating and contacts
  properties: wet mass 1 kg, dry mass 1 kg
- nitrogen, liquid: 0.0732 kg; lognormal variance with pedigree 0.0401, pedigree (1,2,5,1,1)
  EcoSpold01Location=RER
  Fthenakis, literature
  Uncertainty: Fthenakis, literature
  properties: wet mass 1 kg, dry mass 1 kg
- photovoltaic panel factory: 4e-6 unit; lognormal variance with pedigree 0.354, pedigree (3,4,5,1,1)
  Assumption
  EcoSpold01Location=GLO
  Uncertainty: Assumption
- tempering, flat glass: 9.15 kg; lognormal variance with pedigree 0.0401, pedigree (1,2,5,1,1)
  Amount of flat glass tempered
  EcoSpold01Location=RER
  Uncertainty: amount of flat glass tempered
- helium: 0.0364 kg; lognormal variance with pedigree 0.0401, pedigree (1,2,5,1,1)
  EcoSpold01Location=GLO
  Fthenakis, literature
  Uncertainty: Fthenakis, literature
  properties: wet mass 1 kg, dry mass 1 kg
- sodium chloride, powder: 0.0453 kg; lognormal variance with pedigree 0.0401, pedigree (1,2,5,1,1)
  EcoSpold01Location=RER
  Fthenakis, literature
  Uncertainty: Fthenakis, literature
  properties: dry mass 1 kg, wet mass 1 kg
- glass fibre reinforced plastic, polyamide, injection moulded: 0.10776 kg; lognormal variance with pedigree 0.0401, pedigree (1,2,5,1,1)
  Fthenakis, literature, sum up of several materials
  EcoSpold01Location=RER
  Uncertainty: Fthenakis, literature, sum up of several materials
  properties: carbon content, fossil 0.446018, dry mass 1 kg, wet mass 1 kg
  note on carbon content, fossil: Polyamide resin assimilate to Nylon 66 (ecoinvent v2.2 report 7_XIII). Nylon 66 is derived from hexamethylene diamine and adipic acid and has the following structure: -(HN-(CH2)6-NH-CO-(CH2)4-CO)n- (ecoinvent v2.2 report 11_II), C12H22N2O2. MW=226 g/mol. Here Nylon 66 is – mainly for improved stiffness and stability – modified with glass fibres. The glass fibre content in the product is assumed of 30%. (ecoinvent v2.2 report 11_II)
- electricity, medium voltage: 58.12 kWh; lognormal variance with pedigree 0.0401, pedigree (1,2,5,1,1)
  Fthenakis, literature
  EcoSpold01Location=US
  Uncertainty: Fthenakis, literature
- steel, low-alloyed, hot rolled: 0.22 kg; lognormal variance with pedigree 0.0401, pedigree (1,2,5,1,1)
  EcoSpold01Location=RER
  Fthenakis, literature
  Uncertainty: Fthenakis, literature
  properties: wet mass 1 kg, carbon content, fossil 0.005, dry mass 1 kg
  note on carbon content, fossil: Low alloyed steel composition given in Tab. 3.2 ecoinvent v2.2 report 10_partII. Steel assumed to have a C content of 0.5%
- waste plastic, mixture: -0.70776 kg; lognormal variance with pedigree 0.0401, pedigree (1,2,5,1,1)
  EcoSpold01Location=CH
  Calculation
  Uncertainty: Calculation
  production volume 97135.2 kg
    (same comment as for wastewater from glass production)
  properties: heating value, net 30.79 MJ, water content 0.180638, dry mass 0.847 kg, wet mass 1 kg, carbon content, fossil 0.747344
  note on carbon content, fossil: C content in 1 kg DM was calculated using data in Tab A.2, ecoinvent v2.2 report 13_I
- transport, freight, lorry, unspecified: 0.0046912 metric ton*km; = (cadmium_sulfide + cadmium_telluride) * 100/1000
  The cadmium sulfide and cadmium telluride are assumed to be transported 100 km by lorry. This is the standard road transport distance for the US (see table 4.2, p. 635/926 in Classen et al., 2009).
  References:
  Classen M., Althaus H.-J., Blaser S., Tuchschmid M., Jungbluth N., Doka G., Faist Emmenegger M. and Scharnhorst W. (2009) Life Cycle Inventories of Metals. Final report ecoinvent data v2.1, No 10. EMPA Dübendorf, Swiss Centre for Life Cycle Inventories, Dübendorf, CH, Online-Version under: www.ecoinvent.ch

## Emissions to nature
- Cadmium [air, urban air close to ground]: 2.1e-8 kg; lognormal variance with pedigree 0.698, pedigree (4,1,5,1,1)
  Literature data and own assumption for share of different inputs
  Uncertainty: Literature data and own assumption for share of different inputs

## Sampling procedure
Literature data based on producer information.

## Extrapolations
This dataset has been extrapolated from year 2005 to the year of the calculation (2021). The uncertainty has been adjusted accordingly.

## Review by Christian Bauer 2010-03-21
Passed.
none
