# epoxy resin insulator, SiO2 production

Dataset: EcoSpold 2, unit process
Geography: RER
Time period: 2000-01-01 to 2021-12-31
Technology level: current
Classification: ISIC rev.4 ecoinvent: 2013:Manufacture of plastics and synthetic rubber in primary forms
Classification: EcoSpold01Categories: plastics/monomers
Tags: ConvertedDataset
Scenario: Business-as-Usual
System model: Allocation, cut-off by classification
Generated by: Niels Jungbluth
Published in: Althaus H.-J. 2007
Database: ecoinvent
isCopyrightProtected: true
accessRestrictedTo: 1

## General comment
Rough estimation
[This dataset was already contained in the ecoinvent database version 2. It was not individually updated during the transfer to ecoinvent version 3. Life Cycle Impact Assessment results may still have changed, as they are affected by changes in the supply chain, i.e. in other datasets. This dataset was generated following the ecoinvent quality guidelines for version 2. It may have been subject to central changes described in the ecoinvent version 3 change report (http://www.ecoinvent.org/database/ecoinvent-version-3/reports-of-changes/), and the results of the central updates were reviewed extensively. The changes added e.g. consistent water flows and other information throughout the database. The documentation of this dataset can be found in the ecoinvent reports of version 2, which are still available via the ecoinvent website. The change report linked above covers all central changes that were made during the conversion process.]

## Included activities end
Only base materials and transports, direct impacts of processing are not known

## Geography
Estimation for RER

## Technology
manufacturing of insulator

## Time period
Time to which data refer

## Reference product
- epoxy resin insulator, SiO2: 1 kg; By-product classification allocatable product; CPC 34740: Polyacetals, other polyethers and epoxide resins, in primary forms; polycarbonates, alkyd resins, polyallyl es[…]
  EcoSpold01Location=RER
  production volume 1.32237 kg
    This is a placeholder value that does not reflect real-world production volumes. This dataset does not currently require a real-world production volume to work in the database framework, and no actual data were collected yet. This has no negative effect on the results of the ecoinvent database. The placeholder value of this activity was scaled according to the nominal GDP of 2005 (source: United Nations, http://data.un.org/Glossary.aspx?q=GDP+%28current+US%24%29, accessed 20130726) to reflect an appropriate share of the global production volume, which is also a placeholder value.
  property heating value, net 5.13 MJ
    LHV is calculated based on the Carbon content of the product. More details can be found on the respective documentation.
  property price 24 EUR2005
    Calculated value based on data from United Nations Commodity Trade Statistics Database (comtrade.un.org). UN comtrade category: 8546 Electrical insulators of any material. Year 2005. Using exchange rate of 1EURO = 1.209 USD. Average of price of import into 5 main markets (EU, US, JP, IN and CN).
  property carbon content, fossil 0.1693
    Cast resin insulators are produced from epoxy resins, hardeners and a filling material. Aluminium oxide, dolomite and quartz powder are well-known filling materials.The filling material is assumed to be 60% of cast resin insulators (ecoinvent v2.2 report 8. Part 31)
  property carbon content 0.1693
    carbon content on a dry matter basis (reserved; not for manual entry)
  properties: water in wet mass 0 kg, water content 0, carbon content, non-fossil 0, dry mass 1 kg, wet mass 1 kg, carbon allocation 0.1693 kg

## Inputs from technosphere
- silica sand: 0.6 kg; lognormal variance with pedigree 0.05, pedigree (3,5,5,1,1)
  Estimation based on literature values
  EcoSpold01Location=DE
  Uncertainty: Estimation based on literature values
  properties: dry mass 0.99 kg, water content 0.010101, wet mass 1 kg
- epoxy resin, liquid: 0.4 kg; lognormal variance with pedigree 0.05, pedigree (3,5,5,1,1)
  Estimation based on literature values
  EcoSpold01Location=RER
  Uncertainty: Estimation based on literature values
  properties: heating value, net 12.82 MJ, dry mass 1 kg, carbon content, fossil 0.42325, wet mass 1 kg

## Sampling procedure
Estimation

## Extrapolations
This dataset has been extrapolated from year 2000 to the year of the calculation (2021). The uncertainty has been adjusted accordingly.

## Review by Roland Hischier 2003-05-28
Passed.
