# treatment of hard coal ash, residual material landfill

Dataset: EcoSpold 2, unit process
Geography: CZ
Time period: 1994-01-01 to 2021-12-31
Technology level: current
Classification: EcoSpold01Categories: waste management/residual material landfill
Classification: ISIC rev.4 ecoinvent: 3822:Treatment and disposal of hazardous waste
Tags: Treatment; ConvertedDataset
Scenario: Business-as-Usual
System model: Allocation, cut-off by classification
Generated by: Gabor Doka (obsolete)
Published in: Doka G. 2009
Database: ecoinvent
isCopyrightProtected: true
accessRestrictedTo: 1

## General comment
Inventoried waste contains 100% CZ hard coal ash; .
waste composition (wet, in ppm): H2O n.a.; O 777380; H n.a.; C n.a.; S 1768.2; N n.a.; P 353.45; B 123.84; Cl 9.6542; Br 28.291; F 0.70727; I 1.7682; Ag n.a.; As 5.2657; Ba 707.27; Cd 1.7627; Co 24.742; Cr 31.827; Cu 53.01; Hg 0.035382; Mn 707.27; Mo 10.604; Ni 70.643; Pb 141.09; Sb 5.2963; Se 3.5926; Sn 38.9; V 141.38; Zn 176.27; Be 7.0727; Sc 4.5977; Sr 707.09; Ti 5304.5; Tl 3.5327; W 3.5363; Si 88409; Fe 24754; Ca 7072.7; Al 60118; K 7072.7; Mg 21218; Na 3536.3;
Share of carbon in waste that is biogenic 60.4%.
[This dataset was already contained in the ecoinvent database version 2. It was not individually updated during the transfer to ecoinvent version 3. Life Cycle Impact Assessment results may still have changed, as they are affected by changes in the supply chain, i.e. in other datasets. This dataset was generated following the ecoinvent quality guidelines for version 2. It may have been subject to central changes described in the ecoinvent version 3 change report (http://www.ecoinvent.org/database/ecoinvent-version-3/reports-of-changes/), and the results of the central updates were reviewed extensively. The changes added e.g. consistent water flows and other information throughout the database. The documentation of this dataset can be found in the ecoinvent reports of version 2, which are still available via the ecoinvent website. The change report linked above covers all central changes that were made during the conversion process.]

## Included activities end
Waste-specific short-term emissions to water from leachate. Long-term emissions from landfill to ground water.

## Geography
Technology encountered in Switzerland in 2000. Landfill includes base seal and leachate collection system.

## Technology
Swiss residual material landfill for polluted, inorganic waste. With base seal and leachate collection system. Recultivation after closure.

## Time period
Waste composition as given in literature reference, theoretical data or other source. Transfer coefficients from prospective model.

## Reference product
- hard coal ash: -1 kg; By-product classification Waste; CPC 39: Wastes or scraps
  EcoSpold01Location=CZ
  production volume 4.31104e8 kg
    Estimated. Energy production in mainly responsible for hard coal ashes. The production volume is calculated as the sum of hard coal ashes resulting from electricity and heat and power co-generation production from hard coal in the respective country.
  property price 0 EUR2005
    Waste products are assigned a price of zero as they are assumed to require further treatment.
  property carbon content 0
    carbon content on a dry matter basis (reserved; not for manual entry)
  properties: carbon content, fossil 0, wet mass 1 kg, water content 0, water in wet mass 0 kg, dry mass 1 kg, carbon content, non-fossil 0, carbon allocation 0 kg

## Inputs from technosphere
- process-specific burdens, residual material landfill: 1 kg; lognormal variance with pedigree 0.04, pedigree (1,1,5,1,1)
  EcoSpold01Location=CH
  demands per kilogram waste. uncertainty is heeded in the module;activityLink introduced to establish a direct link to the corresponding regional supply of this product
- residual material landfill: 2.0833e-9 unit; lognormal variance with pedigree 0.04, pedigree (1,1,5,1,1)
  demands per kilogram waste. uncertainty is heeded in the module
  EcoSpold01Location=CH

## Emissions to nature
- Sodium, ion [water, surface water]: 0.0013271 kg; lognormal variance with pedigree 0.56, pedigree (1,1,5,1,1)
  uncertainty is calculated from uncertainties in waste composition and transfer coefficients in residual landfill
- Iodide [water, ground-, long-term]: 1.7682e-13 kg; lognormal variance with pedigree 1.56, pedigree (1,1,5,1,1)
  uncertainty is calculated from uncertainties in waste composition and transfer coefficients in incinerator and landfills.
- Strontium [water, surface water]: 4.2737e-7 kg; lognormal variance with pedigree 1.46, pedigree (1,1,5,1,1)
  (same comment as for Sodium, ion)
- Chromium VI [water, surface water]: 1.9132e-6 kg; lognormal variance with pedigree 1.32, pedigree (1,1,5,1,1)
  (same comment as for Sodium, ion)
- Lead [water, ground-, long-term]: 7.3185e-7 kg; lognormal variance with pedigree 7.88, pedigree (1,1,5,1,1)
  (same comment as for Iodide)
- Fluoride [water, surface water]: 3.8328e-8 kg; lognormal variance with pedigree 1.83, pedigree (1,1,5,1,1)
  (same comment as for Sodium, ion)
- Nickel, ion [water, surface water]: 4.2697e-8 kg; lognormal variance with pedigree 1.77, pedigree (1,1,5,1,1)
  (same comment as for Sodium, ion)
- Magnesium [water, ground-, long-term]: 0.0024109 kg; lognormal variance with pedigree 1.5, pedigree (1,1,5,1,1)
  (same comment as for Iodide)
- Thallium [water, ground-, long-term]: 1.279e-6 kg; lognormal variance with pedigree 1.7, pedigree (1,1,5,1,1)
  (same comment as for Iodide)
- Nickel, ion [water, ground-, long-term]: 2.5576e-5 kg; lognormal variance with pedigree 1.31, pedigree (1,1,5,1,1)
  (same comment as for Iodide)
- Manganese [water, surface water]: 9.7533e-9 kg; lognormal variance with pedigree 1.96, pedigree (1,1,5,1,1)
  (same comment as for Sodium, ion)
- Vanadium, ion [water, surface water]: 3.4698e-7 kg; lognormal variance with pedigree 1.49, pedigree (1,1,5,1,1)
  (same comment as for Sodium, ion)
- Scandium [water, ground-, long-term]: 3.9488e-6 kg; lognormal variance with pedigree 1.41, pedigree (1,1,5,1,1)
  (same comment as for Iodide)
- Mercury [water, ground-, long-term]: 1.6701e-9 kg; lognormal variance with pedigree 4.29, pedigree (1,1,5,1,1)
  (same comment as for Iodide)
- Selenium [water, ground-, long-term]: 2.3256e-6 kg; lognormal variance with pedigree 1.45, pedigree (1,1,5,1,1)
  (same comment as for Iodide)
- Silicon [water, surface water]: 0.00019883 kg; lognormal variance with pedigree 0.72, pedigree (1,1,5,1,1)
  (same comment as for Sodium, ion)
- Chloride [water, surface water]: 2.7612e-6 kg; lognormal variance with pedigree 1.35, pedigree (1,1,5,1,1)
  (same comment as for Sodium, ion)
- Potassium, ion [water, ground-, long-term]: 0.005079 kg; lognormal variance with pedigree 0.45, pedigree (1,1,5,1,1)
  (same comment as for Iodide)
- Cobalt [water, surface water]: 7.0616e-9 kg; lognormal variance with pedigree 2, pedigree (1,1,5,1,1)
  (same comment as for Sodium, ion)
- Titanium, ion [water, ground-, long-term]: 0.0015747 kg; lognormal variance with pedigree 0.85, pedigree (1,1,5,1,1)
  (same comment as for Iodide)
- Cadmium, ion [water, ground-, long-term]: 1.1967e-8 kg; lognormal variance with pedigree 7.77, pedigree (1,1,5,1,1)
  (same comment as for Iodide)
- Iron, ion [water, ground-, long-term]: 0.00012407 kg; lognormal variance with pedigree 7.31, pedigree (1,1,5,1,1)
  (same comment as for Iodide)
- Strontium [water, ground-, long-term]: 0.00025599 kg; lognormal variance with pedigree 1, pedigree (1,1,5,1,1)
  (same comment as for Iodide)
- Barium [water, ground-, long-term]: 5.8422e-6 kg; lognormal variance with pedigree 6.49, pedigree (1,1,5,1,1)
  (same comment as for Iodide)
- Copper, ion [water, surface water]: 3.4067e-9 kg; lognormal variance with pedigree 2.1, pedigree (1,1,5,1,1)
  (same comment as for Sodium, ion)
- Magnesium [water, surface water]: 4.0248e-6 kg; lognormal variance with pedigree 1.19, pedigree (1,1,5,1,1)
  (same comment as for Sodium, ion)
- Cobalt [water, ground-, long-term]: 4.2299e-6 kg; lognormal variance with pedigree 1.97, pedigree (1,1,5,1,1)
  (same comment as for Iodide)
- Lead [water, surface water]: 1.2218e-9 kg; lognormal variance with pedigree 2.24, pedigree (1,1,5,1,1)
  (same comment as for Sodium, ion)
- Molybdenum [water, ground-, long-term]: 4.8682e-8 kg; lognormal variance with pedigree 1.32, pedigree (1,1,5,1,1)
  (same comment as for Iodide)
- Potassium, ion [water, surface water]: 0.0019937 kg; lognormal variance with pedigree 0.49, pedigree (1,1,5,1,1)
  (same comment as for Sodium, ion)
- Scandium [water, surface water]: 6.4887e-7 kg; lognormal variance with pedigree 1.5, pedigree (1,1,5,1,1)
  (same comment as for Sodium, ion)
- Sulfate [water, surface water]: 0.00056911 kg; lognormal variance with pedigree 0.74, pedigree (1,1,5,1,1)
  (same comment as for Sodium, ion)
- Iron, ion [water, surface water]: 2.0713e-7 kg; lognormal variance with pedigree 1.59, pedigree (1,1,5,1,1)
  (same comment as for Sodium, ion)
- Manganese [water, ground-, long-term]: 5.8422e-6 kg; lognormal variance with pedigree 6.49, pedigree (1,1,5,1,1)
  (same comment as for Iodide)
- Tin, ion [water, surface water]: 1.2306e-9 kg; lognormal variance with pedigree 2.24, pedigree (1,1,5,1,1)
  (same comment as for Sodium, ion)
- Zinc, ion [water, ground-, long-term]: 2.1604e-6 kg; lognormal variance with pedigree 5.77, pedigree (1,1,5,1,1)
  (same comment as for Iodide)
- Beryllium [water, ground-, long-term]: 2.5606e-6 kg; lognormal variance with pedigree 1.61, pedigree (1,1,5,1,1)
  (same comment as for Iodide)
- Aluminium [water, ground-, long-term]: 0.017846 kg; lognormal variance with pedigree 0.58, pedigree (1,1,5,1,1)
  (same comment as for Iodide)
- Antimony [water, ground-, long-term]: 3.4285e-6 kg; lognormal variance with pedigree 1.4, pedigree (1,1,5,1,1)
  (same comment as for Iodide)
- Sodium, ion [water, ground-, long-term]: 0.0022092 kg; lognormal variance with pedigree 0.54, pedigree (1,1,5,1,1)
  (same comment as for Iodide)
- Chromium VI [water, ground-, long-term]: 6.0436e-6 kg; lognormal variance with pedigree 1.16, pedigree (1,1,5,1,1)
  (same comment as for Iodide)
- Chloride [water, ground-, long-term]: 6.893e-6 kg; lognormal variance with pedigree 1.32, pedigree (1,1,5,1,1)
  (same comment as for Iodide)
- Beryllium [water, surface water]: 4.2748e-9 kg; lognormal variance with pedigree 2.07, pedigree (1,1,5,1,1)
  (same comment as for Sodium, ion)
- Tin, ion [water, ground-, long-term]: 7.3712e-7 kg; lognormal variance with pedigree 5.06, pedigree (1,1,5,1,1)
  (same comment as for Iodide)
- Silicon [water, ground-, long-term]: 0.08821 kg; lognormal variance with pedigree 0.17, pedigree (1,1,5,1,1)
  (same comment as for Iodide)
- Arsenic, ion [water, surface water]: 5.2657e-6 kg; lognormal variance with pedigree 1.39, pedigree (1,1,5,1,1)
  (same comment as for Sodium, ion)
- Fluoride [water, ground-, long-term]: 6.6894e-7 kg; lognormal variance with pedigree 1.65, pedigree (1,1,5,1,1)
  (same comment as for Iodide)
- Tungsten [water, ground-, long-term]: 2.2892e-6 kg; lognormal variance with pedigree 1.45, pedigree (1,1,5,1,1)
  (same comment as for Iodide)
- Phosphate [water, surface water]: 4.0421e-7 kg; lognormal variance with pedigree 1.62, pedigree (1,1,5,1,1)
  (same comment as for Sodium, ion)
- Vanadium, ion [water, ground-, long-term]: 0.00010867 kg; lognormal variance with pedigree 0.97, pedigree (1,1,5,1,1)
  (same comment as for Iodide)
- Cadmium, ion [water, surface water]: 1.9978e-11 kg; lognormal variance with pedigree 2.78, pedigree (1,1,5,1,1)
  (same comment as for Sodium, ion)
- Titanium, ion [water, surface water]: 2.6288e-6 kg; lognormal variance with pedigree 1.23, pedigree (1,1,5,1,1)
  (same comment as for Sodium, ion)
- Mercury [water, surface water]: 2.7881e-12 kg; lognormal variance with pedigree 2.95, pedigree (1,1,5,1,1)
  (same comment as for Sodium, ion)
- Antimony [water, surface water]: 1.8678e-6 kg; lognormal variance with pedigree 1.42, pedigree (1,1,5,1,1)
  (same comment as for Sodium, ion)
- Sulfate [water, ground-, long-term]: 0.0047354 kg; lognormal variance with pedigree 0.62, pedigree (1,1,5,1,1)
  (same comment as for Iodide)
- Copper, ion [water, ground-, long-term]: 2.0406e-6 kg; lognormal variance with pedigree 3.74, pedigree (1,1,5,1,1)
  (same comment as for Iodide)
- Bromine [water, ground-, long-term]: 5.5647e-6 kg; lognormal variance with pedigree 1.19, pedigree (1,1,5,1,1)
  (same comment as for Iodide)
- Tungsten [water, surface water]: 1.2471e-6 kg; lognormal variance with pedigree 1.47, pedigree (1,1,5,1,1)
  (same comment as for Sodium, ion)
- Calcium, ion [water, surface water]: 1.0669e-6 kg; lognormal variance with pedigree 1.35, pedigree (1,1,5,1,1)
  (same comment as for Sodium, ion)
- Aluminium [water, surface water]: 2.9793e-5 kg; lognormal variance with pedigree 0.95, pedigree (1,1,5,1,1)
  (same comment as for Sodium, ion)
- Selenium [water, surface water]: 1.267e-6 kg; lognormal variance with pedigree 1.47, pedigree (1,1,5,1,1)
  (same comment as for Sodium, ion)
- Iodide [water, surface water]: 1.7682e-6 kg; lognormal variance with pedigree 1.54, pedigree (1,1,5,1,1)
  (same comment as for Sodium, ion)
- Thallium [water, surface water]: 2.1352e-9 kg; lognormal variance with pedigree 2.16, pedigree (1,1,5,1,1)
  (same comment as for Sodium, ion)
- Calcium, ion [water, ground-, long-term]: 0.00063908 kg; lognormal variance with pedigree 1.89, pedigree (1,1,5,1,1)
  (same comment as for Iodide)
- Molybdenum [water, surface water]: 1.0555e-5 kg; lognormal variance with pedigree 1.3, pedigree (1,1,5,1,1)
  (same comment as for Sodium, ion)
- Arsenic, ion [water, ground-, long-term]: 5.2657e-15 kg; lognormal variance with pedigree 1.42, pedigree (1,1,5,1,1)
  (same comment as for Iodide)
- Boron [water, surface water]: 9.7027e-7 kg; lognormal variance with pedigree 1.37, pedigree (1,1,5,1,1)
  (same comment as for Sodium, ion)
- Phosphate [water, ground-, long-term]: 0.00024212 kg; lognormal variance with pedigree 1.4, pedigree (1,1,5,1,1)
  (same comment as for Iodide)
- Bromine [water, surface water]: 2.2726e-5 kg; lognormal variance with pedigree 1.17, pedigree (1,1,5,1,1)
  (same comment as for Sodium, ion)
- Zinc, ion [water, surface water]: 3.6067e-9 kg; lognormal variance with pedigree 2.09, pedigree (1,1,5,1,1)
  (same comment as for Sodium, ion)
- Boron [water, ground-, long-term]: 0.00012176 kg; lognormal variance with pedigree 0.97, pedigree (1,1,5,1,1)
  (same comment as for Iodide)
- Barium [water, surface water]: 9.7533e-9 kg; lognormal variance with pedigree 1.96, pedigree (1,1,5,1,1)
  (same comment as for Sodium, ion)

## Sampling procedure
Landfill model based on observed leachate concentrations in literature. Extrapolated to 60'000 years heeding chemical characteristics. Initial waste composition from various literature sources.

## Extrapolations
This dataset has been extrapolated from year 2000 to the year of the calculation (2021). The uncertainty has been adjusted accordingly.

## Review by Niels Jungbluth 2009-02-15
passed.
