# sodium dichromate production

Dataset: EcoSpold 2, unit process
Geography: RER
Time period: 1997-01-01 to 2021-12-31
Technology level: current
Classification: ISIC rev.4 ecoinvent: 2011:Manufacture of basic chemicals
Synonyms: Disodium dichromate; Sodium dichromate(VI); Celcure; Natriumdichromat; Bichromate of soda
Scenario: Business-as-Usual
System model: Allocation, cut-off by classification
Generated by: Mike Chudacoff
Published in: Althaus H.-J. 2007
Database: ecoinvent
isCopyrightProtected: true
accessRestrictedTo: 1

## General comment
This dataset represents the production of 1 kg of sodium dichromate produced by the sulfuric acid process. Sodium dichromate is an inorganic chemical compound that is available as an orange liquid solution or as red-orange crystals. It is used primarily for pigment manufacturing, leather tanning, metals treating.
This dataset is based on literature data.
References:
Althaus H.-J., Chudacoff M., Hischier R., Jungbluth N., Osses M. and Primas A. (2007) Life Cycle Inventories of Chemicals. Final report ecoinvent data v2.0 No. 8. Swiss Centre for Life Cycle Inventories, Dübendorf, CH.

## Included activities start
The activity starts when the raw materials enter the process.

## Included activities end
This activity ends with the production of 1 kg of sodium dichromate. The raw materials, the energy and auxillaries input are taken into account together with air emissions and waste. Infrastructure is estimated. No water emissions are taken into account.

## Geography
Average European values.

## Technology
Roasting of sodium chromite is accomplished with soda ash and limestone. Sodium chromate is produced, as well as carbon dioxide emissions. The sodium chromate is treated with sulphuric acid and sodium carbonate to produce dichromate and sodium sulfate. The dichromate solution is neutralized to filter the remaining ore residues, which precipitate, then fed to a crystallizer, then to a centrifuge and drier. The post-neutralisation residues are sent to a treatment facility.
This dataset is based on literature data on the acidification process, taken from plant data in Europe and North America.
References:
Althaus H.-J., Chudacoff M., Hischier R., Jungbluth N., Osses M. and Primas A. (2007) Life Cycle Inventories of Chemicals. Final report ecoinvent data v2.0 No. 8. Swiss Centre for Life Cycle Inventories, Dübendorf, CH.

## Reference product
- sodium dichromate: 1 kg; name RP; By-product classification allocatable product; CPC 34250: Salts of oxometallic or peroxometallic acids; colloidal precious metals and compounds thereof; inorganic and o[…]; CAS 10588-01-9
  Sodium dichromate is an inorganic chemical compound that is available as an orange liquid solution or as red-orange crystals. It is used primarily for pigment manufacturing, leather tanning, metals treating.
  References:
  Althaus H.-J., Chudacoff M., Hischier R., Jungbluth N., Osses M. and Primas A. (2007) Life Cycle Inventories of Chemicals. Final report ecoinvent data v2.0 No. 8. Swiss Centre for Life Cycle Inventories, Dübendorf, CH.
  production volume 1.1e8 kg; name RP_PV
    According to the OECD the European production volume of sodium dichromate in 1997 was approximately 110 000 metric tonnes.
    Reference(s): OECD. 2002. Screening Information Dataset, Initial Assessment Report for SIAM 14. Retrieved from: http://webnet.oecd.org/hpv/ui/handler.axd?id=88ff8c1a-a6a1-4443-adf2-75cb7a467fff, 15 June 2017.
  property price 0.67 EUR2005
    Calculated value based on data from United Nations Commodity Trade Statistics Database (comtrade.un.org). UN comtrade category: 284130 Sodium dichromate. Year 2005. Using exchange rate of 1EURO = 1.209 USD. Average of price of import into 5 main markets (EU, US, JP, IN and CN).
  property carbon content 0
    carbon content on a dry matter basis (reserved; not for manual entry)
  properties: carbon content, fossil 0, water content 0, water in wet mass 0 kg, carbon content, non-fossil 0, wet mass 1 kg, dry mass 1 kg, carbon allocation 0 kg

## Inputs from technosphere
- heat, district or industrial, other than natural gas: 5.42976 MJ; lognormal variance with pedigree 0.0586, pedigree (4,3,5,1,1)
  Uncertainty: s
  properties: heating value, net 1 MJ
- sulfuric acid: 0.41 kg; lognormal variance with pedigree 0.0406, pedigree (1,3,5,1,1)
  According to Chromium (1998), precursor materials in the sulfuric acid process for sodium dichromate production include 0.41 kg of sulfuric acid.
  Reference:
  Adelhardt, W., Antrekowitsch, H.: ”Stoffmengenflüsse und Energiebedarf bei der Gewinnung ausgewählter mineralischer Stoffe – Teilstudie Chrom”, Bundesanstalt für Geowissenschaften und Rohstoffe, 1998.
  Uncertainty: a
  properties: wet mass 1 kg, dry mass 1 kg
- chemical factory, organics: 4e-10 unit; lognormal variance with pedigree 0.349225, pedigree (2,3,5,2,3)
  Calculated based on literature data published by the industry. For this activity, no information was readily available concerning infrastructure and land-use. Therefore, the infrastructure is estimated based on data from two chemical factories, the BASF site of Ludwigshafen and the chemical factory in Gendorf (which are both located in Germany), which produce a wide range of chemical substances. Based on this data, the following assumptions are made: the built area amounts to about 4.2 ha, the plant has an average output of 50'000 t/a and a lifespan of fifty years. The estimated infrastructure amount is therefore 4.00 E-10 units per kg of produced chemical.
  References:
  Althaus H.-J., Chudacoff M., Hischier R., Jungbluth N., Osses M. and Primas A. (2007) Life Cycle Inventories of Chemicals. ecoinvent report No. 8, v2.0. EMPA Dübendorf, Swiss Centre for Life Cycle Inventories, Dübendorf, CH.
  Gendorf (2000) Umwelterklärung 2000, Werk Gendorf. Werk Gendorf, Burgkirchen.
- heat, district or industrial, natural gas: 20.928 MJ; lognormal variance with pedigree 0.0486, pedigree (4,3,5,1,1)
  Fuel
  Uncertainty: f
  properties: heating value, net 1 MJ
- soda ash, light, crystalline, heptahydrate: 1 kg; lognormal variance with pedigree 0.0406, pedigree (1,3,5,1,1)
  According to Chromium (1998), precursor materials in the sulfuric acid process for sodium dichromate production include 1 kg of sodium carbonate.
  Reference:
  Adelhardt, W., Antrekowitsch, H.: ”Stoffmengenflüsse und Energiebedarf bei der Gewinnung ausgewählter mineralischer Stoffe – Teilstudie Chrom”, Bundesanstalt für Geowissenschaften und Rohstoffe, 1998.
  Uncertainty: s
  properties: dry mass 1 kg, carbon content, fossil 0.0517241, wet mass 1 kg, heating value, net 3.43 MJ
- residue from Na-dichromate production: -1.2 kg; name BP_residue_from_Na_dichromate_production; lognormal variance with pedigree 0.0406, pedigree (1,3,5,1,1)
  According to literature (EPA Dichromate 2000), it can be estimated that 1.2 kg of solid wastes or 55 g of elemental chromium is disposed of per kg of sodium dichromate. These wastes are referred to as reduced chromium treatment residues; they consist of 4.5 wt % chromium (III).
  Reference:
  EPA Dichromate 2000, Sodium Dichromate Listing Background Document August 2000
  Uncertainty: r
  production volume 1.32e8 kg; = RP_PV*BP_residue_from_Na_dichromate_production/ABS(RP)
    Calculated from the production volume of sodium dichromate in proportion to the respective output amounts.
  property price 0 EUR2005; name BP_residue_from_Na_dichrom_price_EUR2005
  properties: wet mass 1 kg, dry mass 1 kg
- electricity, medium voltage: 0.283424 kWh; lognormal variance with pedigree 0.0486, pedigree (4,3,5,1,1)
  Power
  Uncertainty: p
- lime: 1.21 kg; lognormal variance with pedigree 0.0406, pedigree (1,3,5,1,1)
  According to Chromium (1998), precursor materials in the sulfuric acid process for sodium dichromate production include 1.21 kg of limestone.
  Reference:
  Adelhardt, W., Antrekowitsch, H.: ”Stoffmengenflüsse und Energiebedarf bei der Gewinnung ausgewählter mineralischer Stoffe – Teilstudie Chrom”, Bundesanstalt für Geowissenschaften und Rohstoffe, 1998.
  Uncertainty: a
  properties: wet mass 1 kg, carbon content, fossil 0.120005, dry mass 1 kg
- chromite ore concentrate: 1.64 kg; lognormal variance with pedigree 0.0406, pedigree (1,3,5,1,1)
  According to Chromium (1998), precursor materials in the sulfuric acid process for sodium dichromate production include 1.64 kg of chromite ore.
  Reference:
  Adelhardt, W., Antrekowitsch, H.: ”Stoffmengenflüsse und Energiebedarf bei der Gewinnung ausgewählter mineralischer Stoffe – Teilstudie Chrom”, Bundesanstalt für Geowissenschaften und Rohstoffe, 1998.
  Uncertainty: c
  properties: wet mass 1 kg, dry mass 1 kg

## Emissions to nature
- Chromium VI [water, surface water]: 4.7e-7 kg; lognormal variance with pedigree 0.0406, pedigree (1,3,5,1,1)
  According to literature (EPA Dichromate 2000), it can be estimated that 0.47 mg hexavalent chromium is permitted to exit the plant per kg of produced sodium dichromate.
  Reference:
  EPA Dichromate 2000, Sodium Dichromate Listing Background Document August 2000
  Uncertainty: w
- Chromium, ion [water, surface water]: 4e-6 kg; lognormal variance with pedigree 0.0406, pedigree (1,3,5,1,1)
  According to literature (EPA Dichromate 2000), total chromium discharges were permitted up to 450 kg per year. Taking production information into account, this amounts to 4 mg chrome (III) emissions per kg of produced sodium dichromate
  Reference:
  EPA Dichromate 2000, Sodium Dichromate Listing Background Document August 2000
  Uncertainty: w
- Particulates, > 2.5 um, and < 10um [air, urban air close to ground]: 0.003 kg; lognormal variance with pedigree 0.0406, pedigree (1,3,5,1,1)
  According to Chromium (1998),0.3 kg of dust are emitted per kg of product. Assuming the dust figure is pre-treatment, air pollution control devices with an efficiency of 99% would reduce the dust to 0.003 kg / kg product.
  Reference:
  Adelhardt, W., Antrekowitsch, H.: ”Stoffmengenflüsse und Energiebedarf bei der Gewinnung ausgewählter mineralischer Stoffe – Teilstudie Chrom”, Bundesanstalt für Geowissenschaften und Rohstoffe, 1998.
  Uncertainty: e
- Carbon dioxide, fossil [air, urban air close to ground]: 1.25 kg; lognormal variance with pedigree 0.0406, pedigree (1,3,5,1,1)
  According to Chromium (1998), 1.25 kg of CO2 are emitted per kg of product.
  Reference:
  Adelhardt, W., Antrekowitsch, H.: ”Stoffmengenflüsse und Energiebedarf bei der Gewinnung ausgewählter mineralischer Stoffe – Teilstudie Chrom”, Bundesanstalt für Geowissenschaften und Rohstoffe, 1998.
  Uncertainty: e

## Sampling procedure
Data from plants in Europe and North America.

## Extrapolations
This dataset has been extrapolated from year 2000 to the year of the calculation (2021). The uncertainty has been adjusted accordingly.

## Review by Gregor Wernet 2017-08-04
This dataset was additionally reviewed in a separate review process by Eric Johnson of Atlantic Consulting as well as Emilia Moreno Ruiz and Gregor Wernet of ecoinvent.
