# fattening of calves for beef cattle production, on pasture

Dataset: EcoSpold 2, unit process
Geography: RoW
Time period: 2006-01-01 to 2021-12-31
Technology level: current
Classification: ISIC rev.4 ecoinvent: 0141:Raising of cattle and buffaloes
Scenario: Business-as-Usual
System model: Allocation, cut-off by classification
Share of production covered: 3 %
Generated by: Fernando Dias
Published in: Folegatti-Matsuura M. 2018
Database: ecoinvent
isCopyrightProtected: true
accessRestrictedTo: 1

## General comment
This dataset represents the intensive production of 1 kg of live weight of beef cattle, in Brazil, on planted pasture, at farm, for slaughtering, from the fattening of weaned calves acquired from other systems. The dataset include operations for pasture maintenance and replanting. Fences are the only infrastructure included. Grass seeds are not included (less then 3% of product mass). Direct field emissions are included, with important regionalizations added. Farm manure as an organic fertiliser is only accounted for in terms of direct field emissions.

## Included activities start
This activity starts at the replanting of pasture.

## Included activities end
This activity ends with the provision of fat steers at farm gate, ready to be sent to slaughterhouses as live weight.

## Technology
Calves and steers are kept on regularly fertilized pastures. Mineral salt is served to all cattle in troughs on the field. Besides pasture and mineral salt, proteic supplement (maize, soybean meal, urea and salt) is served to weaned calves during the first dry season and some of the steers receive concentrate feed for 80 days in troughs on the field during the second dry season and are sold for slaughter under 24 months, others are kept on pasture and sold for slaughterhouses under 30 months. The dataset does not include pharmaceuticals, although typical production systems use them. Use of hormones for cattle raising is forbidden in Brazil.

## Time period
Time period of the most of the data collected for this dataset.

## Parameters
- nitrogen uptake by plant: 176.62 kg N/ha; name Nuptake_plant; lognormal variance with pedigree 0.0573, pedigree (4,3,4,3,4)
  N taken by plant during its growth. Used in the SQCB-NO3 model for the calculation of leaching of NO3. From Bernardi (2012).
- dinitrogen monoxide from manure in feedlot: 0 kg; name N2O_feedlot
  N2O from manure management in feedlot, direct and indirect emissions (IPCC 2006).
- rooting depth: 0.2205 m; name root_depth; lognormal variance with pedigree 0.0573, pedigree (4,3,4,3,4)
  Plant rooting depth for pasture. Used in the SQCB-NO3 model for the calculation of leaching of NO3. From Cunha et al. (2010).
- total nitrogen: 58.5392 kg/ha; name Ntot; = (N_ex + N_urea_fert + N_fert) / (T_t * 10^-4); lognormal variance with pedigree 0.0573, pedigree (4,3,4,3,4)
  Total nitrogen in mineral and organic fertilisers (kg N/ha)
- nitrogen in crop residues: 0 kg N/ha; name Ncrop_residues
  N contained in the crop residues. Used for the calculation of emissions of N2O to the air. Not considered for pastures because root is semiperennial.
- urea, as N, as fertilizer: 0 kg; name N_urea_fert
  Urea as fertilizer for pasture planting and maintenance.
- nitrogen in manure on pasture: 0.11409 kg; name N_ex; lognormal variance with pedigree 0.0573, pedigree (4,3,4,3,4)
  Manure deposited on pasture, as N, per year and kg of product.
- nitrogen fertilizer, as N: 0.039306 kg; name N_fert; lognormal variance with pedigree 0.0573, pedigree (4,3,4,3,4)
  Nitrogen fertilizer (not urea) for fertilization.
- soil eroded: 200 kg/ha.yr; name soil_eroded; lognormal variance with pedigree 0.0573, pedigree (4,3,4,3,4)
  Soil eroded. Used for the calculation of P emissions through water erosion to surface water. From Macedo et al. (2005).
- clay content into soil: 53.06 % (obsolete); name Clay_content; lognormal variance with pedigree 0.0573, pedigree (4,3,4,3,4)
  Fraction of clay content into soil. Used in the SQCB-NO3 model for the calculation of leaching of NO3. From Folegatti et al. (2015).
- precipitation, annual: 1201.3 mm/year; name precipitation; lognormal variance with pedigree 0.0573, pedigree (4,3,4,3,4)
  Average annual precipitation in the BR-CO geographic region. Used in the SQCB-NO3 model for the calculation of leaching of NO3.
- emission factor N2O: 0.02 dimensionless; name EF_N2O; lognormal variance with pedigree 0.0573, pedigree (4,3,4,3,4)
  Emission factor of N2O from manure deposited in pasture. From IPCC (2006).
- organic nitrogen into soil: 5520.7 kg N/ha; name Norg_soil; lognormal variance with pedigree 0.0573, pedigree (4,3,4,3,4)
  Mass of organic N contained in the upper 50 cm of soil per ha. Used in the SQCB-NO3 model for the calculation of leaching of NO3. From Folegatti et al. (2015).
- urea, as N, as feed: 0.0059972 kg; name N_urea_feed; lognormal variance with pedigree 0.0573, pedigree (4,3,4,3,4)
  Urea for cattle feed.

## Reference product
- cattle for slaughtering, live weight: 1 kg; name REF_PRODUCT; CPC 02111: Cattle; By-product classification allocatable product
  production volume 1.48329e10 kg; name REF_PRODUCT_VOLUME; = 6.79E10 * 13.84% * (1 - 10%) / 0.5
    (GLO beef production in 2015) * (% of system in GLO in 2015) * (1 - % beef production from milk cattle in GLO) / (carcass as live weight, GLO average)
  property water in wet mass 0.4 kg; name REF_PRODUCT_WWM
  property water content 0.666667; name REF_PRODUCT_water_content; = REF_PRODUCT_WWM / REF_PRODUCT_DM
  property dry mass 0.6 kg; name REF_PRODUCT_DM; = REF_PRODUCT_WM - REF_PRODUCT_WWM
  property price 2.025 EUR2005; name REF_PRODUCT_price_EUR2005
    Calculated as an average of the regional prices (ZA and BR) which were provided by the data providers for the specific countries.
  property carbon content, non-fossil 0.4928; name REF_PRODUCT_C_content_non_fossil
    Calculated from live weight empty body composition in fat and protein (
    Johnson, I.R. et al. (2012). J. Anim. Sci. 90(13):4741-475 ; Williams, C.B. (2005). J. Anim. Sci. 83(6):1262-1266) and from C content of nutrients (protein, fat) according to A.D. Kay and T. Vrede ('Evolutionary and Biochemical Aspects', in Global Ecology, 2010, Elsevier B.V., S.E. Jørgensen Ed.).
  property carbon content, fossil 0; name REF_PRODUCT_C_content_fossil
  property wet mass 1 kg; name REF_PRODUCT_WM
  property energy content 14.9367 MJ; name REF_PRODUCT_energy_content
    Energy content calculated from animal fat and protein composition and energy content for animal fat and protein of 39.3 and 23.6 MJ/kg, respectively.
    Johnson, I.R. et al. (2012). J. Anim. Sci. 90(13):4741-475.
    Williams, C.B. (2005). J. Anim. Sci. 83(6):1262-1266.
  property carbon content 0.4928
    carbon content on a dry matter basis (reserved; not for manual entry)
  properties: carbon allocation 0.29568 kg

## By-products
- iron scrap, unsorted: 0 kg; CPC 39310: Slag, dross, scalings and other waste from the manufacture of iron or steel; By-product classification Recyclable
  Fencing the farm: steel wire.
  production volume 0 kg; name BY_PRODUCT_3_VOLUME; = REF_PRODUCT_VOLUME * ( BY_PRODUCT_3 / REF_PRODUCT)
    Calculated from production volume of reference product using the relative outputs.
  property price 0.149 EUR2005; name BY_PRODUCT_3_price_EUR2005
    Temporary price data. Calculated as 90% of purchasers price based on: estimated at 85% of sorted scrap
  property carbon content 0
    carbon content on a dry matter basis (reserved; not for manual entry)
  properties: dry mass 1 kg, carbon content, fossil 0, water in wet mass 0 kg, carbon content, non-fossil 0, water content 0, wet mass 1 kg, carbon allocation 0 kg

## Inputs from technosphere
- inorganic potassium fertiliser, as K2O: 0 kg; pedigree (1,1,1,1,1)
  Potassium fertilizer for pasture replanting and maintenance.
  properties: dry mass 1 kg, wet mass 1 kg
- zinc coat, pieces: 6.6712e-5 m2; lognormal variance with pedigree 0.0439, pedigree (3,3,5,3,2)
  Fencing the farm: steel wire zinc coating.
- tillage, harrowing, by offset leveling disc harrow: 0.00026204 ha; lognormal variance with pedigree 0.0439, pedigree (3,3,5,3,2)
- mowing, by rotary mower: 0.00078611 ha; lognormal variance with pedigree 0.0439, pedigree (3,3,5,3,2)
  To be replaced by as activity link to new BR dataset for weed control, by brush cutter, pasture
- tillage, harrowing, by offset disc harrow: 0.00013102 ha; lognormal variance with pedigree 0.0439, pedigree (3,3,5,3,2)
- wire drawing, steel: 0.00028091 kg; name wire; lognormal variance with pedigree 0.0439, pedigree (3,3,5,3,2)
  Fencing the farm: steel wire.
- inorganic nitrogen fertiliser, as N: 0 kg; pedigree (1,1,1,1,1)
  Nitrogen fertilizer (not urea) for pasture fertilization.
  properties: dry mass 1 kg, wet mass 1 kg
- wood preservation, vacuum pressure method, inorganic salt, containing Cr, outdoor use, ground contact: 1.3904e-5 kg; name WOOD; lognormal variance with pedigree 0.0439, pedigree (3,3,5,3,2)
  Fencing the farm: poles preservation by treatment with inorganic CCB (chromium, copper, boron) salt with the vacuum pressure method. Emissions in farm or after used were not included.
- urea: 0 kg; pedigree (1,1,1,1,1)
  The exchange has been updated from 'urea, as N' into 'urea' and therefore its amount has been scaled (multiplied) from 0.006 kg by 2.1438 kg of 'urea' per kg of 'urea, as N'. Original comment of the exchange is: Urea for cattle feed and pasture fertilization.
  properties: wet mass 1 kg, carbon content, fossil 0.2, dry mass 1 kg
- soybean meal: 0.023557 kg; name MEAL; lognormal variance with pedigree 0.0439, pedigree (3,3,5,3,2)
  For concentrate formulation.
  property water in wet mass 0.11 kg; name MEAL_WWM
  property energy content 19.7 MJ; name MEAL_energy_content
  properties: water content 0.123596, dry mass 0.89 kg, wet mass 1 kg, carbon content, non-fossil 0.475627
- waste wood pole, chrome preserved: -1.98458e-5 kg; name BY_PRODUCT_1; = (poles*1237.5)*-1
  Fencing the farm: waste wood poles from fences (after periodic replacement).
  production volume 294370 kg; name BY_PRODUCT_1_VOLUME; = REF_PRODUCT_VOLUME * (BY_PRODUCT_1 / REF_PRODUCT)
    Calculated from production volume of reference product using the relative outputs.
  property price 0 EUR2005; name BY_PRODUCT_1_price_EUR2005
  properties: heating value, net 13.99 MJ, dry mass 0.8 kg, water content 0.25, wet mass 1 kg, carbon content, non-fossil 0.483676
  note on heating value, net: Value taken from the general comment of the treatment dataset.
- maize grain: 0 kg; name MAIZE; pedigree (1,1,1,1,1)
  For cattle feed.
  property water in wet mass 0.14 kg; name MAIZE_WWM
  property energy content 15.927 MJ; name MAIZE_energy_content
  properties: dry mass 0.86 kg, carbon content, non-fossil 0.46957, wet mass 1 kg, water content 0.162791
- limestone and gypsum application, by spreader: 0.00019653 ha; lognormal variance with pedigree 0.0439, pedigree (3,3,5,3,2)
- inorganic phosphorus fertiliser, as P2O5: 0 kg; pedigree (1,1,1,1,1)
  Phosphate fertilizer for pasture replanting or maintenance.
  properties: wet mass 1 kg, dry mass 1 kg
- lime: 0.19653 kg; lognormal variance with pedigree 0.0439, pedigree (3,3,5,3,2)
  Lime applied for pasture replanting or maintenance.
  properties: carbon content, fossil 0.120005, dry mass 1 kg, wet mass 1 kg
- weed control, by brush cutter, pasture: 0.00078611 ha; lognormal variance with pedigree 0.0439, pedigree (3,3,5,3,2)
- sowing: 0.00013102 ha; lognormal variance with pedigree 0.0439, pedigree (3,3,5,3,2)
- weaned calves, live weight: 0 kg; name INPUT; pedigree (1,1,1,1,1)
  Weaned calves bought.
  property wet mass 1 kg; name INPUT_WM
  property water in wet mass 0.4 kg; name INPUT_WWM
  property dry mass 0.6 kg; name INPUT_DM; = INPUT_WM - INPUT_WWM
  property energy content 14.937 MJ; name INPUT_energy_content
  property carbon content, non-fossil 0.4928; name INPUT_C_content_non_fossil
  property water content 0.666667; name INPUT_water_content; = INPUT_WWM / INPUT_DM
  property carbon content, fossil 0; name INPUT_C_content_fossil
  properties: price 4.8 EUR2005
- sawlog and veneer log, eucalyptus ssp., measured as solid wood under bark: 1.6037e-8 m3; name poles; lognormal variance with pedigree 0.0439, pedigree (3,3,5,3,2)
  Fencing the farm: roundwood from eucalyptus for poles.
  property water in wet mass 412.5 kg; name WOOD_WWM
  properties: wet mass 1237.5 kg, heating value, net 11336.5 MJ, dry mass 825 kg, water content 0.5, carbon content, non-fossil 0.494
- fertilising, by broadcaster: 0.00089093 ha; lognormal variance with pedigree 0.0439, pedigree (3,3,5,3,2)
- iron scrap, unsorted: -0.00028091 kg
  Fencing the farm: steel wire.
  production volume 4.1667e6 kg
  properties: dry mass 1 kg, wet mass 1 kg
- inorganic potassium fertiliser, as K2O: 1.93113e-5, 9.56956e-5, 0.000194097, 0.000171793, 2.48464e-5, 4.13697e-5, 0.00401954, 0.000139812, 3.44406e-5, 1.55803e-6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 kg (29 entries); lognormal variance with pedigree 0.0439, pedigree (3,3,5,3,2)
  Potassium fertilizer for pasture replanting and maintenance.
- inorganic nitrogen fertiliser, as N: 0.000192699, 0.000276978, 0.000247554, 0.000519347, 6.4372e-6, 3.85437e-5, 0.00488371, 9.12731e-5, 1.37088e-5, 1.33115e-6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 kg (29 entries); lognormal variance with pedigree 0.0439, pedigree (3,3,5,3,2)
  Nitrogen fertilizer (not urea) for pasture fertilization.
- urea: 0.00965436, 0.00177256, 0.00142987 kg (3 entries); lognormal variance with pedigree 0.0439, pedigree (3,3,5,3,2)
  (same comment as for urea)
- maize grain: 0.000231118, 0.110049 kg (2 entries); lognormal variance with pedigree 0.0439, pedigree (3,3,5,3,2)
  For cattle feed.
  properties: dry mass 0.86 kg, carbon content, non-fossil 0.46957, wet mass 1 kg, water content 0.162791, energy content 15.927 MJ
- inorganic phosphorus fertiliser, as P2O5: 0.000225511, 0.00029258, 0.000234279, 0.000386528, 1.59264e-5, 4.19813e-5, 0.00433062, 7.80573e-5, 8.51794e-6, 1.86106e-6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 kg (29 entries); lognormal variance with pedigree 0.0439, pedigree (3,3,5,3,2)
  Phosphate fertilizer for pasture replanting or maintenance.
- weaned calves, live weight: 0.0266639, 0.316916 kg (2 entries); lognormal variance with pedigree 0.0439, pedigree (3,3,5,3,2)
  Weaned calves bought.
  properties: wet mass 1 kg, price 4.8 EUR2005, dry mass 0.6 kg, energy content 14.937 MJ, carbon content, non-fossil 0.4928, water content 0.666667

## Inputs from nature
- Transformation, to pasture, man made [natural resource, land]: 1.3102 m2; = T_t*1/20; lognormal variance with pedigree 0.0513, pedigree (3,3,5,3,2)
  From Folegatti et al. (2015).
- Occupation, pasture, man made [natural resource, land]: 26.204 m2*year; name T_t; lognormal variance with pedigree 0.0453, pedigree (3,3,5,3,2)
  From Folegatti et al. (2015).
- Energy, gross calorific value, in biomass [natural resource, biotic]: 7.58414 MJ; = REF_PRODUCT_energy_content - INPUT_energy_content * INPUT - MAIZE_energy_content * MAIZE - MEAL_energy_content * MEAL; lognormal variance with pedigree 0.0439, pedigree (3,3,5,3,2)
  Balance of energy content, considering product, by-product and the main exchanges from technosphere, only.
- Transformation, from pasture, man made [natural resource, land]: 1.3102 m2; = T_t*1/20; lognormal variance with pedigree 0.0513, pedigree (3,3,5,3,2)
  From Folegatti et al. (2015).

## Emissions to nature
- Nickel [soil, agricultural]: 0.0010325 kg; normal variance with pedigree 0.0946, pedigree (3,3,5,3,2)
  Emissions of heavy metals to soil and surface water estimated from mineral fertilisers and liming as recommended by Canals (2003) and regionalized following Folegatti et al. (2015).
- Lead [water, surface water]: 6.9725e-8 kg; normal variance with pedigree 0.1446, pedigree (3,3,5,3,2)
  (same comment as for Nickel)
- Copper [soil, agricultural]: 0.0053856 kg; normal variance with pedigree 0.0946, pedigree (3,3,5,3,2)
  (same comment as for Nickel)
- Carbon dioxide, fossil [air, non-urban air or from high stacks]: 0.15539 kg; = 44/12 * 0.13 * lime + 1.57 * N_fert; lognormal variance with pedigree 0.0439, pedigree (3,3,5,3,2)
  Emissions of CO2 to air from limestone and urea application based on IPCC (2006).
- Chromium, ion [water, surface water]: 6.6662e-8 kg; normal variance with pedigree 0.1446, pedigree (3,3,5,3,2)
  (same comment as for Nickel)
- Zinc [soil, agricultural]: 0.024742 kg; normal variance with pedigree 0.0946, pedigree (3,3,5,3,2)
  (same comment as for Nickel)
- Phosphorus [water, ground-]: 0 kg
  Exchange kept with zero amount only for information that phosphorus leaching must be disregarded due to its low mobility in Brazilian soils (Novais & Smyth, 1999).
- Copper, ion [water, surface water]: 5.3862e-7 kg; normal variance with pedigree 0.1446, pedigree (3,3,5,3,2)
  (same comment as for Nickel)
- Nitrate [water, ground-]: 0.13959 kg; name NO3; = T_t*10^-4 * 62/14 * (( 21.37 + precipitation / ( Clay_content * root_depth) * (0.0037 * Ntot + 0.0000601 * Norg_soil - 0.00362 * Nuptake_plant))); lognormal variance with pedigree 0.0439, pedigree (3,3,5,3,2)
  See '2.2.2 The SQCB-NO3 model' in Nemececk & Schnetzer (2011), as 'SALCA-NO3 model' has 'Geographic scope of application: Europe'.
- Dinitrogen monoxide [air, non-urban air or from high stacks]: 0.00476292 kg; name N2O; = N2O_feedlot + 44/28*((0.01*(N_fert + Ncrop_residues)+ 0.01*14/17*NH3 + 0.0075*14/62*NO3) + N_ex* EF_N2O); lognormal variance with pedigree 0.0733, pedigree (3,3,5,3,2)
  Emissions of N2O to the air from pasture. See IPCC (2006).
- Zinc, ion [water, surface water]: 2.4745e-6 kg; normal variance with pedigree 0.1446, pedigree (3,3,5,3,2)
  (same comment as for Nickel)
- Methane, non-fossil [air, non-urban air or from high stacks]: 0.21017 kg; lognormal variance with pedigree 0.0513, pedigree (3,3,5,3,2)
  Enteric fermentation and manure management (IPCC, 2006).
- Chromium [soil, agricultural]: 0.00066655 kg; normal variance with pedigree 0.0946, pedigree (3,3,5,3,2)
  (same comment as for Nickel)
- Phosphorus [water, surface water]: 0.00018521 kg; = T_t*10^-4 * soil_eroded * 0.00095 * 1.86 * 0.2; lognormal variance with pedigree 0.0833, pedigree (3,3,5,3,2)
  As phosphorus leaching must be disregarded due to its low mobility in Brazilian soils (Novais & Smyth, 1999), only P emission by water erosion through surface water was considered, as in '2.3.3 Phorsphorous Emissions Through Water Erosion to Surface Water' Nemecek and Schnetzer (2011).
- Cadmium [soil, agricultural]: 8.0048e-5 kg; normal variance with pedigree 0.0946, pedigree (3,3,5,3,2)
  (same comment as for Nickel)
- Cadmium, ion [water, surface water]: 8.0056e-9 kg; normal variance with pedigree 0.1446, pedigree (3,3,5,3,2)
  (same comment as for Nickel)
- Nitrogen oxides [air, non-urban air or from high stacks]: 0.00100021 kg; = N2O*0.21; lognormal variance with pedigree 0.0733, pedigree (3,3,5,3,2)
  Emissions of NOx to the air. See '2.5 EMISSIONS OF NOX TO THE AIR' in Nemecek and Schnetzer (2011).
- Lead [soil, agricultural]: 0.00069718 kg; normal variance with pedigree 0.0946, pedigree (3,3,5,3,2)
  (same comment as for Nickel)
- Nickel, ion [water, surface water]: 1.0326e-7 kg; normal variance with pedigree 0.1446, pedigree (3,3,5,3,2)
  (same comment as for Nickel)
- Ammonia [air, non-urban air or from high stacks]: 0.0145331 kg; name NH3; = 17/14 * (N_fert*0.20 + N_ex*0.6*0.06); lognormal variance with pedigree 0.0513, pedigree (3,3,5,3,2)
  NH3 emissions from applied mineral fertilisers are calculated by constant emission factors for each group of fertiliser. For Urea 20%. See Nemecek et al. (2015).

## Sampling procedure
Inventory data for cattle systems obtained from Embrapa’s PECUS Project, literature and expert knowledge. Emissions from the agricultural process estimated according to Nemecek and Schnetzer (2011) and Canals (2003) and other references mentioned.

## Extrapolations
Carbon content, water and gross calorific value are based on ecoinvent database.
