# gold production

Dataset: EcoSpold 2, unit process
Geography: US
Time period: 2003-01-01 to 2021-12-31
Technology level: current
Classification: ISIC rev.4 ecoinvent: 0729:Mining of other non-ferrous metal ores
Tags: ConvertedDataset
Scenario: Business-as-Usual
System model: Allocation, cut-off by classification
Generated by: Matthias Tuchschmid (obsolete)
Published in: Classen M. 2009
Database: ecoinvent
isCopyrightProtected: true
accessRestrictedTo: 1

## General comment
This dataset describes the production 1 kg of gold, at plant. Data was taken from the following US gold-only mines: Bald Mountain, Cortez, Golden Sunlight, Goldstrike and Round Mountain (as in the 2006 Environmental report of Barrick), and Nevada and Golden Giant (as in the 2005 Environmental report of Newmont). Data for reference flows, by products and most exchanges was calculated by piling up the corresponding amounts of inputs and outputs of each mine, and then scaling the piled amounts to the production of 1 kg of gold. Barrick mines were previously owned by Placer Dome to Barrick, thus previous environmental reports of Placer Dome Inc. (2002) are used as well. Mines are either open ground or underground.

## Included activities start
From the transport of raw materials to the mine.

## Included activities end
This activity ends with the Wohlwill electrolysis of gold.

This data set includes the mining and beneficiation of the metals, the smelting, the energy, materials and land consumption, and the air and water emissions; all the previous as of a combined mix of technologies representative of each Mine.

This dataset does not include the emissions from the refining step.

## Geography
Material requirements for gold concentration are estimated with Australian data, emissions to water and air are estimated with Australian data

## Technology
OPEN PIT MINING:
The ore is mined in four steps: drilling, blasting, loading and hauling. In the case of a surface mine, a pattern of holes is drilled in the pit and filled with explosives. The explosives are detonated in order to break up the ground so large shovels or front-end loaders can load it into haul trucks.
UNDERGROUND MINING:
Some ore bodies are more economically mined underground. In this case, a tunnel called an adit or a shaft is dug into the earth. Sort tunnels leading from the adit or shaft, called stopes, are dug to access the ore. The surface containing the ore, called a face, is drilled and loaded with explosives. Following blasting, the broken ore is loaded onto electric trucks and taken to the surface. Once mining is completed in a particular stope, it is backfilled with a cement compound.
BENEFICIATION:
Bald Mountain Mines: The ore treatment method is based on conventional heap leaching technology followed by carbon absorption. The loaded carbon is stripped and refined in the newly commissioned refinery on site. Water is supplied by wells located on the mine property. Grid power was brought to Bald Mountain Mine in 1996. For this purpose, one 27-kilometre 69 KVA power line was constructed from the Alligator Ridge Mine substation to the grid.
Golden Sunlight Mines: The ore treatment plant is based on conventional carbon-in-pulp technology, with the addition of a Sand Tailings Retreatment (STR) gold recovery plant to recover gold that would otherwise be lost to tailings. The STR circuit removes the heavier gold bearing pyrite from the sand portion of the tailings by gravity separation. The gold is refined into doré at the mine. Tailing from the mill is discharged to an impoundment area where the solids are allowed to settle so the water can be reused. A cyanide recovery/destruction process was commissioned in 1998. It eliminates the hazard posed to wildlife at the tailings impoundment by lowering cyanide concentrations below 20 mg/l. Fresh water for ore processing, dust suppression, and fire control is supplied from the Jefferson Slough, which is an old natural channel of the Jefferson River. Ore processing also uses water pumped from the tailings impoundment. Pit water is treated in a facility located in the mill complex prior to disposal or for use in dust control. Drinking water is made available by filtering fresh water through an on-site treatment plant. Electric power is provided from a substation at the south property boundary. North-Western Energy supplies electricity the substation. Small diesel generators are used for emergency lighting. A natural gas pipeline supplies gas for heating buildings, a crusher, air scrubber, boiler, carbon reactivation kiln, and refining furnaces.
Cortez Mine: Three different metallurgical processes are employed for the recovery of gold. The process used for a particular ore is determined based on grade and metallurgical character of that ore. Lower grade oxide ore is heap leached, while higher-grade non-refractory ore is treated in a conventional mill using cyanidation and a carbon-in-leach (“CIL”) process. When carbonaceous ore is processed by Barrick, it is first dry ground, and then oxidized in a circulating fluid bed roaster, followed by CIL recovery. In 2002 a new leach pad and process plant was commissioned; this plant is capable of processing 164 million tonnes of heap leach ore over the life of the asset. Heap leach ore production is hauled directly to heap leach pads for gold recovery. Water for process use is supplied from the open pit dewatering system. Approximately 90 litres per second of the pit dewatering volume is diverted for plant use. Electric power is supplied by Sierra Pacific Power Company (“SPPC”) through a 73 kilometre, 120 kV transmission line. A long-term agreement is in place with SPPC to provide power through the regulated power system. The average power requirement of the mine is about 160 GWh/year.
REFINING:
Wohlwill electrolysis. It is assumed that the gold doré-bars from both mines undergo the treatment of Wohlwill electrolysis. This process uses an electrolyte containing 2.5 mol/l of HCl and 2 mol/l of HAuCl4 acid. Electrolysis is carried out with agitation at 65 – 75 °C. The raw gold is intro-duced as cast anode plates. The cathodes, on which the pure gold is deposited, were for many years made of fine gold of 0.25 mm thickness. These have now largely been replaced by sheet titanium or tantalum cathodes, from which the thick layer of fine gold can be peeled off. In a typical electrolysis cell, gold anodes weighing 12 kg and having dimensions 280×230×12 mm (0.138 m2 surface) are used. Opposite to them are conductively connected cathode plates, arranged by two or three on a support rail. One cell normally contains five or six cathode units and four or five anodes. The maximum cell voltage [V] is 1.5 V and the maximum anodic current density [A] 1500 A/m2. The South African Rand refinery gives a specific gold production rate of 0.2 kg per hour Wohlwill electrolysis. Assuming a current efficiency of 95% the energy consumption is [V] x [A] / 0.2 [kg/h] = 1.63 kWh per kg gold refined. No emissions are assumed because of the purity and the high value of the material processed. The resulting sludge contains the PGM present in the electric scrap and is sold for further processing.
OTHER MINES:
Information about the technology used in the remaining mines is described in the References.
WATER EMISSIONS:
Water effluents are discharged into rivers.
References:
Auerswald D. A. and Radcliffe P. H. (2005) Process technology development at Rand Refinery. In: Minerals Engineering, 18(8), pp. 748-753, Online-Version under: http://dx.doi.org/10.1016/j.mineng.2005.03.011.
Newmont (2004) How gold is mined. Newmont. Retrieved from http://www.newmont.com/en/gold/howmined/index.asp
Renner H., Schlamp G., Hollmann D., Lüschow H. M., Rothaut J., Knödler A., Hecht C., Schlott M., Drieselmann R., Peter C. and Schiele R. (2002) Gold, Gold Alloys, and Gold Compounds. In: Ullmann's Encyclopedia of Industrial Chemistry. Online version, posting date: September 15, 2000 Edition. Wiley-Interscience, Online-Version under: http://dx.doi.org/10.1002/14356007.a12_
499.
Barrick (2006b) Environment: Performance Tables from http://www.barrick.
com/Default.aspx?SectionID=8906c4bd-4ee4-4f15-bf1b-565e357c01e1&
LanguageId=1
Newmont (2005b) Now & Beyond: Sustainability Reports. Newmont Mining Corporation. Retrieved from http://www.newmont.com/en/social/reporting/
index.asp

## Time period
Period of public environmental report

## Parameters
- fraction, process water, to air: 0.15 dimensionless; name fraction_PW_to_air; lognormal variance with pedigree 0.092025, pedigree (4,4,3,2,4)
  Literature value. In case when no industry/process specific data are available, default evaporation fraction value is used. This value is 15% and is based on literature (Statistics Canada, 2007 & Shaffer, K.H., 2008, Consumptive water use in the Great Lakes Basin, USGS & Shiklomanov, 2003, World Water Resources at the Beginning of the 21st Century) and has been approved by an expert.

## Reference product
- gold: 1 kg; name RP_amount; By-product classification allocatable product; CPC 41320: Gold (including gold plated with platinum), unwrought or in semi-manufactured forms, or in powder form; CAS 7440-57-5
  Gold is considered a precious metal because of its rarity and corrosion resistance. Gold is often mined together with silver in polymetallic mines. Apart from copper, Gold is the only metallic element with a color different from a grey tone. It is a soft yellow metal with a moderately high melting point (1064°C) and a high electrical and thermal conductivity exceeded only among the elements by silver and copper. It is the most malleable and ductile of the metals. One ounce of gold can be beaten in to foil some 300 square feet in area.
  Uses: Gold is used mainly for jewellery, electronics and other industrial and decorative appliances. In electric/electronic devices, it is mostly used as connector or as solder paste (Goosey & Kellner, 2002). The latter one is typically a gold alloy incorporating Si (98%Au, 2%Si), Ge (87.5%Au, 12.5%Ge), In (82%Au, 18%In) or Sn (80%Au, 20%Sn).
  production volume 222000 kg; name RP_PV
    Source: USGS Minerals Yearbook 2016. Available from: https://www.usgs.gov/centers/nmic/gold-statistics-and-information (downloaded 02 July 2019), Table 8.
  property price 25128.4 EUR2005
    Price calculated as 5-year market average (2015-2019; USD/kg; USGS [2020]) and converted to EUR2005 (USD2019/EUR2005 exchange rate: 0.62; Official Data Foundation [2020] and Macrotrends [2020]).
    References:
    Official Data Foundation (2020). Inflation Calculator [Online]. Available from: https://www.officialdata.org/us/inflation/2005?endYear=2019&amount=1 [Accessed 28/07/2020]
    USGS (2020). Mineral Commodity Summaries 2020 [Online]. Available from: https://pubs.usgs.gov/periodicals/mcs2020/mcs2020.pdf [Accessed 28/07/2020]
    Macrotrends (2020). Euro Dollar Exchange Rate (EUR USD) - Historical Chart [Online]. Available from: https://www.macrotrends.net/2548/euro-dollar-exchange-rate-historical-chart [Accessed 28/07/2020]
  property carbon content 0
    carbon content on a dry matter basis (reserved; not for manual entry)
  properties: wet mass 1 kg, carbon content, non-fossil 0, carbon content, fossil 0, dry mass 1 kg, water in wet mass 0 kg, water content 0, carbon allocation 0 kg

## Inputs from technosphere
- hydrochloric acid, without water, in 30% solution state: 203.66 kg; source Newmont 2005; lognormal variance with pedigree 0.0427, pedigree (3,3,5,3,1)
  Calculated value: Data for Barrick mines was obtained from Australian mining, scaled by processed gold. Data for Newmont mines was obtained directly from cited source.
  Further references:
  Barrick (2006b) Environment: Performance Tables from
  <http://www.barrick.com/Default.aspx?SectionID=8906c4bd-4ee4-4f15-bf1b-565e357c01e1&LanguageId=1>
  Stewart M. (1999) Environmental Life Cycle Considerations for Design-Related Decision Making in Minerals Processing. PhD Thesis. University of Cape Town, Cape Town.
  Uncertainty: E
  properties: heating value, net 3.32 MJ, dry mass 1 kg, wet mass 1 kg
- sodium hydroxide, without water, in 50% solution state: 6.7633 kg; source Newmont 2005; lognormal variance with pedigree 0.0427, pedigree (3,3,5,3,1)
  Calculated value: Data for Barrick mines was obtained from Australian mining, scaled by processed gold. Data for Newmont mines was obtained directly from cited source.
  Proxy: Caustic is approximated with 'sodium hydroxide, without water, in 50% solution state'.
  Further references:
  Barrick (2006b) Environment: Performance Tables from
  <http://www.barrick.com/Default.aspx?SectionID=8906c4bd-4ee4-4f15-bf1b-565e357c01e1&LanguageId=1>
  Stewart M. (1999) Environmental Life Cycle Considerations for Design-Related Decision Making in Minerals Processing. PhD Thesis. University of Cape Town, Cape Town.
  Uncertainty: C
  properties: heating value, net 3.03 MJ, wet mass 1 kg, dry mass 1 kg
- precious metal refinery: 1.6461e-7 unit; lognormal variance with pedigree 0.3586, pedigree (1,3,5,1,3)
  Estimation from dataset author.
  Proxy: Refinery infrastructure is approximated with 'precious metal refinery'.
  Uncertainty: A
- blasting: 184.38 kg; source Barrick  2006; lognormal variance with pedigree 0.0426, pedigree (1,3,5,5,1)
  Calculated value.
  Estimation: Partly ANFO explosives.
  Further references:
  Newmont (2005b) Now & Beyond: Sustainability Reports. Newmont Mining Corporation. Retrieved from
  <http://www.newmont.com/en/social/reporting/index.asp>
  Uncertainty: E
- diesel, burned in building machine: 74214 MJ; source Barrick  2006; lognormal variance with pedigree 0.044025, pedigree (3,4,5,2,1)
  Calculated value: This includes the consumption of petrol of Barrick Mines.
  Estimation: Share for Barrick Mines is based on actual total energy consumption for older shares of diesel in mobile equipment.
  Further references:
  Newmont (2005b) Now & Beyond: Sustainability Reports. Newmont Mining Corporation. Retrieved from
  <http://www.newmont.com/en/social/reporting/index.asp>
  Placer Dome Inc. (2002b) Sustainability - environmental charts 2002. Placer Dome Inc. Retrieved from
  <http://www.placerdome.com/sustainability/env_charts/greendata02.html>
  Uncertainty: E
  properties: heating value, net 1 MJ
- diesel, burned in diesel-electric generating set, 10MW: 23925 MJ; source Barrick  2006; lognormal variance with pedigree 0.044025, pedigree (3,4,5,2,1)
  Calculated value.
  Estimation: Share for Barrick Mines is based on actual total energy consumption for older share of Diesel in generators.
  Further references:
  Newmont (2005b) Now & Beyond: Sustainability Reports. Newmont Mining Corporation. Retrieved from
  <http://www.newmont.com/en/social/reporting/index.asp>
  Placer Dome Inc. (2002b) Sustainability - environmental charts 2002. Placer Dome Inc. Retrieved from
  <http://www.placerdome.com/sustainability/env_charts/greendata02.html>
  Uncertainty: E
  properties: heating value, net 1 MJ
- mine infrastructure, gold: 1.0908e-7 unit; lognormal variance with pedigree 0.3586, pedigree (1,3,5,1,3)
  Estimation from dataset author.;activityLink introduced to establish a direct link to the corresponding regional supply of this product
  Uncertainty: A
- lime, packed: 1136.7 kg; source Newmont 2005; lognormal variance with pedigree 0.0446, pedigree (3,3,5,5,1)
  (same comment as for hydrochloric acid, without water, in 30% solution state)
  properties: wet mass 1 kg, carbon content, fossil 0.117492, dry mass 0.998 kg, water content 0.00200401
  note on carbon content, fossil: Table 3.1, ecoinvent v2.2 report 7, part VII, pg 3. MW CaCO3=100, MW MgCO3=84
- sulfuric acid: 196.33 kg; source Newmont 2005; lognormal variance with pedigree 0.0427, pedigree (3,3,5,3,1)
  (same comment as for hydrochloric acid, without water, in 30% solution state)
  properties: dry mass 1 kg, wet mass 1 kg
- zinc: 2.8946 kg; source Barrick  2006; lognormal variance with pedigree 0.0427, pedigree (3,3,5,3,1)
  Calculated value: All data was obtained from Australian mining, scaled by processed gold.
  Further references:
  Newmont (2005b) Now & Beyond: Sustainability Reports. Newmont Mining Corporation. Retrieved from
  <http://www.newmont.com/en/social/reporting/index.asp>
  Stewart M. (1999) Environmental Life Cycle Considerations for Design-Related Decision Making in Minerals Processing. PhD Thesis. University of Cape Town, Cape Town.
  Uncertainty: C
  properties: dry mass 1 kg, wet mass 1 kg
- heat, district or industrial, other than natural gas: 702.591 MJ; source Newmont 2005; lognormal variance with pedigree 0.044025, pedigree (3,4,5,2,1)
  Calculated value: For Newmont Mines only.
  Uncertainty: E
  property corresponding fuel use, propane, furnace >100kW 0 MJ; name fuel_use
  properties: heating value, net 1 MJ
  note on corresponding fuel use, propane, furnace >100kW: Lower heating value of the fuel input related to the heat/electricity output, taken directly from ecoinvent v3.0 dataset 'heat production, natural gas, at industrial furnace >100kW, GLO 2000'.
- charcoal: 16.968 kg; source Barrick  2006; lognormal variance with pedigree 0.042625, pedigree (3,3,5,2,1)
  Calculated value: All data was obtained from Australian mining, scaled by processed gold.
  Proxy: Carbon is approximated with 'charcoal'.
  Further references:
  Newmont (2005b) Now & Beyond: Sustainability Reports. Newmont Mining Corporation. Retrieved from
  <http://www.newmont.com/en/social/reporting/index.asp>
  Stewart M. (1999) Environmental Life Cycle Considerations for Design-Related Decision Making in Minerals Processing. PhD Thesis. University of Cape Town, Cape Town.
  Uncertainty: C
  properties: wet mass 1 kg, carbon content, non-fossil 0.8, heating value, net 28.4 MJ, dry mass 1 kg
  note on heating value, net: Indicative value. Reference: Fuels - Higher and Lower Calorific Values, available at: https://www.engineeringtoolbox.com/fuels-higher-calorific-values-d_169.html
- sulfidic tailings, from gold mine operation: -1.9176e6 kg; name sulfidic_tailings_amount; source Classen M. 2009; lognormal variance with pedigree 0.042625, pedigree (3,3,5,2,1)
  Estimation: Amount was estimated from data for Papua New Guinea mining.
  Proxy: Disposal is approximated with 'sulfidic tailing, off-site'.
  Uncertainty: E
  production volume 4.25707e11 kg; = ABS(sulfidic_tailings_amount/RP_amount)*RP_PV
    Calculated from the production volume of gold in proportion to the respective output amounts.
  properties: sodium content 0.0014916, magnesium content 0.0020127, calcium content 0.0037589, oxygen content 0.88758, silicon content 0.056714, water content 0.428571, wet mass 1 kg, carbon content, fossil 0.0087785, iron content 0.014628, dry mass 0.7 kg, potassium content 0.0031243, aluminium content 0.017079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
- sodium cyanide: 51.781 kg; source Barrick  2006; lognormal variance with pedigree 0.0427, pedigree (3,3,5,3,1)
  Calculated value.
  Proxy: Cyanide is approximated with 'sodium cyanide'.
  Further references:
  Newmont (2005b) Now & Beyond: Sustainability Reports. Newmont Mining Corporation. Retrieved from
  <http://www.newmont.com/en/social/reporting/index.asp>
  Uncertainty: E
  properties: heating value, net 7.43 MJ, dry mass 1 kg, carbon content, fossil 0.244898, wet mass 1 kg
- electricity, medium voltage: 9755.3 kWh; source Barrick  2006; lognormal variance with pedigree 0.064, pedigree (3,4,5,5,3)
  Calculated value: Total electricity consumption was obtained by adding electricity consumption of the mining and refining steps (see sources).
  Further references:
  Newmont (2005b) Now & Beyond: Sustainability Reports. Newmont Mining Corporation. Retrieved from
  <http://www.newmont.com/en/social/reporting/index.asp>
  Uncertainty: E

## Inputs from nature
- Gold, in ground [natural resource, in ground]: 1.1364 kg; source Barrick  2006; lognormal variance with pedigree 0.0426, pedigree (3,3,5,1,1)
  1.4 ppm Au in ore; Calculated value: The recovery rate (proportion of valuable material physically recovered in the processing of ore) is taken into account in order to define the resource extraction.
  Further references:
  Newmont (2005b) Now & Beyond: Sustainability Reports. Newmont Mining Corporation. Retrieved from
  <http://www.newmont.com/en/social/reporting/index.asp>
  Uncertainty: E
- Water, river [natural resource, in water]: 174.23 m3; name water_river_input; source Newmont 2005; lognormal variance with pedigree 0.0426, pedigree (3,3,5,1,1)
  Calculated value.
  Uncertainty: E
- Water, well, in ground [natural resource, in water]: 0.55085 m3; name water_well_in_ground_input; source Barrick  2006; lognormal variance with pedigree 0.0426, pedigree (3,3,5,1,1)
  Calculated value.
  Further References:
  Newmont (2005b) Now & Beyond: Sustainability Reports. Newmont Mining Corporation. Retrieved from
  <http://www.newmont.com/en/social/reporting/index.asp>
  Calculated value.
  Further References:
  Newmont (2005b) Now & Beyond: Sustainability Reports. Newmont Mining Corporation. Retrieved from
  <http://www.newmont.com/en/social/reporting/index.asp>
  Uncertainty: E

## Emissions to nature
- Beryllium [air, non-urban air or from high stacks]: 0.0055795 kg; source Barrick  2006; lognormal variance with pedigree 0.6946, pedigree (3,3,5,5,1)
  Calculated value: Total amount was directly obtained from Australian mining, scaled by milled ore.
  Further references:
  Newmont (2005b) Now & Beyond: Sustainability Reports. Newmont Mining Corporation. Retrieved from
  <http://www.newmont.com/en/social/reporting/index.asp>
  Stewart M. (1999) Environmental Life Cycle Considerations for Design-Related Decision Making in Minerals Processing. PhD Thesis. University of Cape Town, Cape Town.
  Uncertainty: C
- Chromium [air, non-urban air or from high stacks]: 0.048311 kg; source Barrick  2006; lognormal variance with pedigree 0.6946, pedigree (3,3,5,5,1)
  (same comment as for Beryllium)
- Lead [water, surface water]: 1.4716 kg; source Barrick  2006; lognormal variance with pedigree 0.6946, pedigree (3,3,5,5,1)
  (same comment as for Beryllium)
- Manganese [air, non-urban air or from high stacks]: 0.26167 kg; source Barrick  2006; lognormal variance with pedigree 0.6946, pedigree (3,3,5,5,1)
  (same comment as for Beryllium)
- Cyanide [water, surface water]: 0.71352 kg; source Barrick  2006; lognormal variance with pedigree 0.3546, pedigree (3,3,5,5,1)
  (same comment as for Beryllium)
- Lead [air, non-urban air or from high stacks]: 0.020826 kg; source Newmont 2005; lognormal variance with pedigree 0.694, pedigree (3,4,5,1,1)
  Calculated value: Total is based on data from Golden Giant Mine.
  Uncertainty: E
- Zinc, ion [water, surface water]: 2.6757 kg; source Barrick  2006; lognormal variance with pedigree 0.6946, pedigree (3,3,5,5,1)
  (same comment as for Beryllium)
- Carbon dioxide, fossil [air, non-urban air or from high stacks]: 76.308 kg; source Newmont 2005; lognormal variance with pedigree 0.0426, pedigree (3,3,5,1,1)
  Calculated value: Total is based on data from Nevada Mine. CO2 emissions from explosives are calculated with the factor of 0.16 kg CO2 per kg explosive.
  Uncertainty: E
- Antimony [air, non-urban air or from high stacks]: 0.60396 kg; source Newmont 2005; lognormal variance with pedigree 0.694, pedigree (3,4,5,1,1)
  Calculated value: Total is based on data from Golden Giant Mine.
  Uncertainty: E
- Water [air, unspecified]: 26.2171 m3; name water_to_air_unspecified; = (water_river_input*fraction_PW_to_air)+(water_well_in_ground_input*fraction_PW_to_air); lognormal variance with pedigree 0.0807, pedigree (2,2,5,1,1)
  Calculated value based on literature values and expert opinion. See comments in the parametres' comment field.
  property fraction, origin: salt water 0; name fraction_origin_salt_water
  property fraction, origin: fresh water 1; name fraction_origin_fresh_water
  property fraction, origin: unspecified 0; name fraction_origin_unspecified
- Selenium [air, non-urban air or from high stacks]: 0.15375 kg; source Barrick  2006; lognormal variance with pedigree 0.6946, pedigree (3,3,5,5,1)
  (same comment as for Beryllium)
- Arsenic [air, non-urban air or from high stacks]: 0.020826 kg; source Newmont 2005; lognormal variance with pedigree 0.694, pedigree (3,4,5,1,1)
  Calculated value: Total is based on data from Golden Giant Mine.
  Uncertainty: E
- Arsenic, ion [water, surface water]: 0.053478 kg; source Barrick  2006; lognormal variance with pedigree 0.6946, pedigree (3,3,5,5,1)
  (same comment as for Beryllium)
- Cadmium, ion [water, surface water]: 0.024081 kg; source Barrick  2006; lognormal variance with pedigree 0.3546, pedigree (3,3,5,5,1)
  (same comment as for Beryllium)
- Mercury [air, non-urban air or from high stacks]: 0.0032239 kg; source Newmont 2005; lognormal variance with pedigree 0.694, pedigree (3,4,5,1,1)
  Calculated value: Total is based on data from Nevada Mine.
  Uncertainty: E
- Cadmium [air, non-urban air or from high stacks]: 0.0002956 kg; source Barrick  2006; lognormal variance with pedigree 0.6946, pedigree (3,3,5,5,1)
  (same comment as for Beryllium)
- Water [water, unspecified]: 148.564 m3; name water_to_water_unspecified; = water_river_input*(1-fraction_PW_to_air)+water_well_in_ground_input*(1-fraction_PW_to_air); lognormal variance with pedigree 0.0807, pedigree (2,2,5,1,1)
  (same comment as for Water)
  property fraction, origin: fresh water 1; name fraction_origin_fresh_water_Ww
  property fraction, origin: salt water 0; name fraction_origin_salt_water_Ww
  property carbon content, fossil 0; name C_content_fossil
  property wet mass 1000 kg; name WM
  property fraction, origin: unspecified 0; name fraction_origin_unspecified_Ww
  property carbon content, non-fossil 0; name C_content_non_fossil
  property dry mass 0 kg; name DM
  property water in wet mass 1000 kg; name WWM
- Nickel, ion [water, surface water]: 0.24081 kg; source Barrick  2006; lognormal variance with pedigree 0.6946, pedigree (3,3,5,5,1)
  (same comment as for Beryllium)
- Cobalt [air, non-urban air or from high stacks]: 0.00837 kg; source Barrick  2006; lognormal variance with pedigree 0.6946, pedigree (3,3,5,5,1)
  (same comment as for Beryllium)
- Mercury [water, surface water]: 0.026757 kg; source Barrick  2006; lognormal variance with pedigree 0.6946, pedigree (3,3,5,5,1)
  (same comment as for Beryllium)
- Copper, ion [water, surface water]: 0.43703 kg; source Barrick  2006; lognormal variance with pedigree 0.3546, pedigree (3,3,5,5,1)
  (same comment as for Beryllium)

## Sampling procedure
environmental report

## Extrapolations
This dataset has been extrapolated from year 2006 to the year of the calculation (2021). The uncertainty has been adjusted accordingly.
