# lithium carbonate production, from concentrated brine

Dataset: EcoSpold 2, unit process
Geography: GLO
Time period: 2009-01-01 to 2021-12-31
Technology level: current
Classification: ISIC rev.4 ecoinvent: 2011:Manufacture of basic chemicals
Synonyms: Dilithium carbonate; 554-13-2; Lithane; Lithobid; Lithonate
Scenario: Business-as-Usual
System model: Allocation, cut-off by classification
Generated by: Dominic Notter
Published in: Anna Stamp 2012
Database: ecoinvent
isCopyrightProtected: true
accessRestrictedTo: 1

## General comment
This dataset represents the production of 1 kg of lithium carbonate from concentrated brine. The dataset can be used for preparing electrode base material for batteries. This dataset is based on an environmental survey from SEIA-CONAMA (2006) as well as environmental reports from a company in Chile (SQM).
References:
Stamp A., Lang D. J., Wäger P. A. (2012) Environmental impacts of a transition toward e-mobility: the present and future role of lithium carbonate production
Garrett D. E. (2004) Part 1 – Lithium, in: Handbook of Lithium and Natural Calcium Chloride. Elsevier, Amsterdam.
Wietelmann, U. and Steinbild, M. 2014. Lithium and Lithium Compounds. Ullmann's Encyclopedia of Industrial Chemistry. 1–38.

## Included activities start
The activity starts when the raw materials enter the process.

## Included activities end
This activity ends with the production of 1 kg of lithium carbonate. The dataset includes the processing of the raw materials, the energy uses, and the estimated infrastructure. Emissions to air and water are not included.

## Geography
The production site is in Chile, all data originate from an environmental survey about this plant. This dataset can be used globally, as this plant produces 70% of the Li2CO3 worldwide.

## Technology
Concentrated lithium brine is treated with additives for the removal of boron, followed by a purification step. Finally, the addition of soda for carbonation results in the precipitation of lithium carbonate (Li2CO3). The salt is filtered, washed and dried and subsequently reaches a purity of 99.2%

## Time period
Period during which the reports were published.

## Reference product
- lithium carbonate: 1 kg; name RP; CPC 34240: Phosphates of triammonium; salts and peroxysalts of inorganic acids and metals n.e.c.; By-product classification allocatable product; CAS 554-13-2
  The commercialized form of lithium carbonate is a fine white powder with a bulk density of ca. 0.8 kg/L. It is only slightly soluble in water; its solubility decreases with increasing temperature. Lithium carbonate is the a precursor material
  for the industrial production of all other lithium compounds while itself is produced heavily. It is also used in glass and ceramics industries.
  References:
  Stamp A., Lang D. J., Wäger P. A. (2012) Environmental impacts of a transition toward e-mobility: the present and future role of lithium carbonate production
  Garrett D. E. (2004) Part 1 – Lithium, in: Handbook of Lithium and Natural Calcium Chloride. Elsevier, Amsterdam.
  Wietelmann, U. and Steinbild, M. 2014. Lithium and Lithium Compounds. Ullmann's Encyclopedia of Industrial Chemistry. 1–38.
  production volume 8.0036e7 kg; name RP_PV; = 235.4*1000000*(1-0.66)
    The annual global production volume of lithium carbonate was 235.4 kt in 2017 (Research and Markets 2018).
    According to USGS (2020), 66% of the world's lithium compounds production is from mineral-sourced lithium. The rest is assumed to be produced from brine-based lithium.
    References:
    Research and Markets (2018). Global and China Lithium Carbonate Industry Report, 2017-2021. https://www.researchandmarkets.com/reports/4517471/global-and-china-lithium-carbonate-industry ( last accessed 2021-08-03).
    USGS (2020). 2017 Minerals Yearbook - Lithium. https://prd-wret.s3.us-west-2.amazonaws.com/assets/palladium/production/atoms/files/myb1-2017-lithi.pdf
  property price 6.75 EUR2005
    For lithium, there is no exchange trading, no terminal storage market and only an extremely limited spot market (Reuters, 2016). The lithium price is negotiated bilateral and based on customer specifications with price information rarely publicly documented (European Lithium, 2017). Roskill Information Services estimate the price for technical grade lithium carbonate in 2017 between 6900 and 7800 USD per tonne, with a price premium of 500 USD for battery grade lithium (European Lithium, 2017). USGS estimates the price for lithium carbonate, battery grade, to be 7400USD in 2016 (USGS, 2017). Here an average price of 7500 USD per tonne lithium carbonate is assumed, average exchange rate 1 USD = 0.9 EUR in 2017 (Oanda, 2017). Resulting in a price for lithium carbonate of 6.75EUR/kg.
    Reference(s):
    European Lithium. 2017. Lithium Market. Online source: http://europeanlithium.com/lithium/lithium-market/, accessed 10 October 2017.
    Reuters. 2016. What price lithium, the metal of the future? Andy Home. Online source: https://www.reuters.com/article/us-lithium-batteries-ahome/what-price-lithium-the-metal-of-the-future-andy-home-idUSKCN0YS19D, accessed 10 October 2017.
    Oanda. 2017. https://www.oanda.com/lang/de/currency/average, accessed 10 October 2017.
    USGS. 2017. Lithium. Commodity Overview. Online https://minerals.usgs.gov/minerals/pubs/commodity/lithium/mcs-2017-lithi.pdf, accessed 10 October, 2017.
  property heating value, net 4.93 MJ
    LHV is calculated based on the elemental composition of the substance. Based on the CAS number of the substance (000554-13-2), the chemical formula of the substance is found to be: CLi2O3, (PubChem 2020).
    Reference: Kim, S., Chen, J., Cheng, T., Gindulyte, A., He, J., He, S., Li, Q., Shoemaker, B. A., Thiessen, P. A., Yu, B., Zaslavsky, L., Zhang, J., & Bolton, E. E. (2019). PubChem 2019 update: improved access to chemical data. Nucleic acids research, 47(D1), D1102–D1109. https://doi.org/10.1093/nar/gky1033
  property carbon content 0.16255
    carbon content on a dry matter basis (reserved; not for manual entry)
  properties: water in wet mass 0 kg, water content 0, carbon content, non-fossil 0, wet mass 1 kg, carbon content, fossil 0.16255, dry mass 1 kg, carbon allocation 0.16255 kg

## Inputs from technosphere
- lithium brine, 6.7 % Li: 4.19 kg; lognormal variance with pedigree 0.0088, pedigree (2,2,4,3,1)
  Average value based on 3 reports (according to personal communication, SQM 2010):
  (Report 1) SQM, 2007: Informe consolidado de la evaluacion de Impacto Ambiental de la declaracion de Impacto Ambiental del Proyecto 'Ampliacion Planta Carbonato de litio a 48'000 ton/año' RCA 164/07
  (Report 2) SQM, 1996: Informe consolidado de la evaluacion de Impacto Ambiental de la declaracion de Impacto Ambiental del Proyecto 'Ampliacion Planta Carbonato de litio a 17'500 ton/año' RCA 381/96
  (Report 3) SQM, 2001: Informe consolidado de la evaluacion de Impacto Ambiental de la declaracion de Impacto Ambiental del Proyecto 'Ampliacion Planta Carbonato de litio a 32'000 ton/año' RCA 083/01
  properties: dry mass 1 kg, wet mass 1 kg
- decarbonising waste: 0 kg; name BP_decarbonising_waste; source SQM 2007; pedigree (1,1,1,1,1)
  Value based on SQM (2007).
  production volume 0 kg
    Calculated from the production volume of lithium carbonate in proportion to the respective output amounts.
  property price 0 EUR2005; name BP_decarbonising_waste_price_EUR2005
  properties: dry mass 0.7 kg, wet mass 1 kg, water content 0.428571
- hazardous waste, for underground deposit: 0 kg; name BP_hazardous_waste_for_underground; source SQM 2007; pedigree (1,1,1,1,1)
  Value based on SQM (2007).
  production volume 0 kg
    (same comment as for decarbonising waste)
  property price 0 EUR2005; name BP_hazardous_waste_for_und_price_EUR2005
  properties: wet mass 1 kg, carbon content, fossil 0.554667, dry mass 1 kg
  note on carbon content, fossil: Tab A.6, ecoinvent v2.2 report 13_I, average hazardous waste composition was used, and referred to 0% water mass. No waste-specific emission are currently inventoried for underground deposits. Accordingly, no waste composition must be specified. For generic, average waste to underground deposit deposition in a 200 liter steel drum without cement solidification is assumed (ecoinvent v2.2 report 13_I).
- diesel, burned in building machine: 1.88 MJ; lognormal variance with pedigree 0.0088, pedigree (2,2,4,3,1)
  According to personal communication, SQM 2010 (operational data 2009).
  properties: heating value, net 1 MJ
- 2-methyl-2-butanol: 0.000545 kg; lognormal variance with pedigree 0.0788, pedigree (2,2,4,3,4)
  (same comment as for lithium brine, 6.7 % Li)
  properties: carbon content, fossil 0.681818, heating value, net 37.14 MJ, wet mass 1 kg, dry mass 1 kg
- sulfuric acid: 0 kg; pedigree (1,1,1,1,1)
  (same comment as for lithium brine, 6.7 % Li)
  properties: dry mass 1 kg, wet mass 1 kg
- electricity, medium voltage: 0.58 kWh; lognormal variance with pedigree 0.0788, pedigree (2,2,4,3,4)
  According to personal communication, SQM 2010 (operational data 2009).
- chemical factory, organics: 4e-10 unit; source Althaus H.-J. 2007; lognormal variance with pedigree 0.3178, pedigree (2,3,4,4,3)
  Calculated based on literature data published by the industry. For this activity, no information was readily available concerning infrastructure and land-use. Therefore, the infrastructure is estimated based on data from two chemical factories, the BASF site of Ludwigshafen and the chemical factory in Gendorf (which are both located in Germany), which produce a wide range of chemical substances. Based on this data, the following assumptions are made: the built area amounts to about 4.2 ha, the plant has an average output of 50'000 t/a and a lifespan of fifty years. The estimated infrastructure amount is therefore 4.00 E-10 units per kg of produced chemical.
  References:
  Althaus H.-J., Chudacoff M., Hischier R., Jungbluth N., Osses M. and Primas A. (2007) Life Cycle Inventories of Chemicals. ecoinvent report No. 8, v2.0. EMPA Dübendorf, Swiss Centre for Life Cycle Inventories, Dübendorf, CH.
  Gendorf (2000) Umwelterklärung 2000, Werk Gendorf. Werk Gendorf, Burgkirchen.
- heat, district or industrial, natural gas: 2.96353 MJ; = 1.344808708+ 1.618723769; lognormal variance with pedigree 0.0088, pedigree (2,2,4,3,1)
  According to personal communication, SQM 2010 (operational data 2009). The heat from natural gas has two origins. 1.344 MJ are reported to be from natural gas, high pressure. 1.618 MJ are reported to be from natural gas, liquified. Here it is assumed that in the long term, the mix of natural gas related sources corresponds to the market mix.
  properties: heating value, net 1 MJ
- quicklime, milled, loose: 0 kg; pedigree (1,1,1,1,1)
  (same comment as for lithium brine, 6.7 % Li)
  properties: dry mass 0.99 kg, water content 0.010101, wet mass 1 kg
- soda ash, light, crystalline, heptahydrate: 2.12 kg; lognormal variance with pedigree 0.0088, pedigree (2,2,4,3,1)
  (same comment as for lithium brine, 6.7 % Li)
  properties: dry mass 1 kg, carbon content, fossil 0.0517241, wet mass 1 kg, heating value, net 3.43 MJ
- hydrochloric acid, without water, in 30% solution state: 0 kg; pedigree (1,1,1,1,1)
  (same comment as for lithium brine, 6.7 % Li)
  properties: heating value, net 3.32 MJ, dry mass 1 kg, wet mass 1 kg
- sodium hydroxide, without water, in 50% solution state: 0.0001875 kg; lognormal variance with pedigree 0.0088, pedigree (2,2,4,3,1)
  (same comment as for lithium brine, 6.7 % Li)
  properties: wet mass 1 kg, heating value, net 3.03 MJ, dry mass 1 kg
- solvent, organic: 2.08e-5 kg; lognormal variance with pedigree 0.0788, pedigree (2,2,4,3,4)
  (same comment as for lithium brine, 6.7 % Li)
  properties: carbon content, fossil 0.63072, heating value, net 19.11 MJ, wet mass 1 kg, dry mass 1 kg
  note on carbon content, fossil: Mixture of 15 of the most often used solvents (list in ecoinvent v2.2 report 11-III, pg 293). C content was calculated as an unweighted average of C content of the different solvents
- activated bentonite: 0.0144 kg; source SQM 2007; lognormal variance with pedigree 0.0788, pedigree (2,2,4,3,4)
  Value based on SQM (2007).
  properties: wet mass 1 kg, dry mass 1 kg
- decarbonising waste: -0.0539522, -6.35605 kg (2 entries); source SQM 2007; lognormal variance with pedigree 0.0088, pedigree (2,2,4,3,1)
  Value based on SQM (2007).
  production volume 5.13031e8 kg
- hazardous waste, for underground deposit: -1.24055e-5, -0.000192595 kg (2 entries); source SQM 2007; lognormal variance with pedigree 0.0088, pedigree (2,2,4,3,1)
  Value based on SQM (2007).
  production volume 16407.4 kg
- sulfuric acid: 0.0029153, 0.0222847 kg (2 entries); lognormal variance with pedigree 0.0088, pedigree (2,2,4,3,1)
  (same comment as for lithium brine, 6.7 % Li)
- quicklime, milled, loose: 0.000600871, 0.0718991 kg (2 entries); lognormal variance with pedigree 0.0088, pedigree (2,2,4,3,1)
  (same comment as for lithium brine, 6.7 % Li)
- hydrochloric acid, without water, in 30% solution state: 0.00730887, 0.0326911 kg (2 entries); lognormal variance with pedigree 0.0088, pedigree (2,2,4,3,1)
  (same comment as for lithium brine, 6.7 % Li)

## Sampling procedure
Data are based on an environmental survey from SEIA-CONAMA (2006).

## Extrapolations
This dataset has been extrapolated from year 2010 to the year of the calculation (2021). The uncertainty has been adjusted accordingly.

## Review by Gregor Wernet 2017-08-07
This dataset was additionally reviewed in a separate review process by Eric Johnson of Atlantic Consulting as well as Emilia Moreno Ruiz and Gregor Wernet of ecoinvent.
