# treatment of wastewater from maize starch production, capacity 1.1E10l/year

Dataset: EcoSpold 2, unit process
Geography: RoW
Time period: 1994-01-01 to 2021-12-31
Technology level: current
Classification: EcoSpold01Categories: waste management/wastewater treatment
Classification: ISIC rev.4 ecoinvent: 3700:Sewerage
Tags: Treatment; ConvertedDataset
Scenario: Business-as-Usual
System model: Allocation, cut-off by classification
Generated by: Gabor Doka (obsolete)
Published in: Doka G. 2008
Database: ecoinvent
isCopyrightProtected: true
accessRestrictedTo: 1

## General comment
Wastewater purified in a moderatly large municipal wastewater treatment plant (capacity class 2), with an average capacity size of 71100 per-captia-equivalents PCE.
Wastewater contains (in kg/m3): COD: 7.34 (GSD=217%); BOD: 6.13 (GSD=154%); Ntot.: 0.569 (GSD=113%); Ptot.: 0.105 (GSD=132%);
[This dataset was already contained in the ecoinvent database version 2. It was not individually updated during the transfer to ecoinvent version 3. Life Cycle Impact Assessment results may still have changed, as they are affected by changes in the supply chain, i.e. in other datasets. This dataset was generated following the ecoinvent quality guidelines for version 2. It may have been subject to central changes described in the ecoinvent version 3 change report (http://www.ecoinvent.org/database/ecoinvent-version-3/reports-of-changes/), and the results of the central updates were reviewed extensively. The changes added e.g. consistent water flows and other information throughout the database. The documentation of this dataset can be found in the ecoinvent reports of version 2, which are still available via the ecoinvent website. The change report linked above covers all central changes that were made during the conversion process.]

## Included activities end
Infrastructure materials for municipal wastewater treatment plant, transports, dismantling. Land use burdens.

## Geography
Specific to the technology mix encountered in Switzerland in 2000. Well applicable to modern treatment practices in Europe, North America or Japan.

## Technology
Three stage wastewater treatment (mechanical, biological, chemical) including sludge digestion (fermentation) according to the average technology in Switzerland

## Parameters
- fraction, process water, to air: 0.1 dimensionless; name fraction_PW_to_air; lognormal variance with pedigree 0.092025, pedigree (4,4,3,2,4)

## Reference product
- wastewater from maize starch production: -1 m3; CPC 39920: Sewage sludge; By-product classification Waste
  EcoSpold01Location=CH
  production volume 3.96633 m3
    This is a placeholder value that does not reflect real-world production volumes. This dataset does not currently require a real-world production volume to work in the database framework, and no actual data were collected yet. This has no negative effect on the results of the ecoinvent database.
  property price 0 EUR2005
    Waste products are assigned a price of zero as they are assumed to require further treatment.
  property carbon content, non-fossil 0.825003
    COD= 7.34 kg/m3 (Tab A.19, ecoinvent v2.2 report 13_I). COD was converted to TOC, using conversion factors in Tab 4.10 (ecoinvent v2.2 report 13_IV). TOC was considered as Total Carbon.
  property carbon content 0.825003
    carbon content on a dry matter basis (reserved; not for manual entry)
  properties: carbon content, fossil 0, water in wet mass 996.149 kg, dry mass 3.85149 kg, water content 258.64, wet mass 1000 kg, carbon allocation 3.17749 kg

## Inputs from technosphere
- ammonia, anhydrous, liquid: 0 kg; pedigree (1,1,1,1,1)
  burden from sludge incineration. Uncertainty calculated from wastewater composition and treatment model
  EcoSpold01Location=CH
  properties: dry mass 1 kg, wet mass 1 kg
- waste plastic, mixture: 0 kg; pedigree (1,1,1,1,1)
  direct wastewater treatment plant burden. Uncertainty calculated from wastewater composition and treatment model
  EcoSpold01Location=CH
  production volume 0 kg
    Calculated from the production volume of wastewater from maize starch production in proportion to the respective output amounts.
  properties: water content 0.180638, dry mass 0.847 kg, carbon content, fossil 0.747344, wet mass 1 kg, heating value, net 30.79 MJ
  note on carbon content, fossil: C content in 1 kg DM was calculated using data in Tab A.2, ecoinvent v2.2 report 13_I
  note on heating value, net: Value taken from the general comment of the treatment dataset.
- iron sulfate: 0.47623 kg; lognormal variance with pedigree 0.132, pedigree (1,1,5,5,1)
  direct wastewater treatment plant burden. Uncertainty calculated from wastewater composition and treatment model
  EcoSpold01Location=RER
  properties: dry mass 1 kg, wet mass 1 kg
- waste cement, hydrated: 0 kg; pedigree (1,1,1,1,1)
  EcoSpold01Location=CH
  burden from sludge incineration. Uncertainty calculated from wastewater composition and treatment model
  production volume 0 kg
    (same comment as for waste plastic, mixture)
  properties: wet mass 1 kg, dry mass 1 kg
- titanium dioxide: 4.0907e-5 kg; lognormal variance with pedigree 0.532, pedigree (1,1,5,5,1)
  burden from sludge incineration. Uncertainty calculated from wastewater composition and treatment model
  EcoSpold01Location=RER
  properties: dry mass 1 kg, wet mass 1 kg
- process-specific burdens, municipal waste incineration: 0 kg; pedigree (1,1,1,1,1)
  (same comment as for waste cement, hydrated)
- hydrochloric acid, without water, in 30% solution state: 3.358e-6 kg; lognormal variance with pedigree 0.142, pedigree (1,1,5,5,1)
  EcoSpold01Location=RER
  burden from sludge incineration. Uncertainty calculated from wastewater composition and treatment model
  properties: dry mass 1 kg, wet mass 1 kg, heating value, net 3.32 MJ
- waste graphical paper: -0.0155 kg; lognormal variance with pedigree 0.042, pedigree (1,1,5,5,1)
  (same comment as for waste plastic, mixture)
  production volume 0.062 kg
    (same comment as for waste plastic, mixture)
  properties: wet mass 1 kg, heating value, net 14.12 MJ, water content 0.126126, carbon content, non-fossil 0.454955, dry mass 0.888 kg
- sewer grid, 1.1E10l/year, 242 km: 1.6832e-7 km; lognormal variance with pedigree 0.042, pedigree (1,1,5,5,1)
  uncertainty heeded in exchanges of the module
  EcoSpold01Location=CH
- process-specific burdens, slag landfill: 0 kg; pedigree (1,1,1,1,1)
  (same comment as for ammonia, anhydrous, liquid)
- electricity, low voltage: 0 kWh; pedigree (1,1,1,1,1)
  EcoSpold01Location=CH
  direct wastewater treatment plant burden. Uncertainty calculated from wastewater composition and treatment model
- residual material landfill: 1.0631e-10 unit; lognormal variance with pedigree 0.072, pedigree (1,1,5,5,1)
  (same comment as for ammonia, anhydrous, liquid)
- slag landfill: 7.3313e-10 unit; lognormal variance with pedigree 0.072, pedigree (1,1,5,5,1)
  (same comment as for waste cement, hydrated)
- sodium hydroxide, without water, in 50% solution state: 0.00017367 kg; lognormal variance with pedigree 0.102, pedigree (1,1,5,5,1)
  (same comment as for hydrochloric acid, without water, in 30% solution state)
  properties: dry mass 1 kg, wet mass 1 kg, heating value, net 3.03 MJ
- electricity, high voltage: 0 kWh; pedigree (1,1,1,1,1)
  (same comment as for ammonia, anhydrous, liquid)
- chemical, inorganic: 5.5966e-6 kg; lognormal variance with pedigree 0.142, pedigree (1,1,5,5,1)
  EcoSpold01Location=GLO
  burden from sludge incineration. Uncertainty calculated from wastewater composition and treatment model
  properties: dry mass 1 kg, wet mass 1 kg, carbon content, fossil 0.003
  note on carbon content, fossil: This dataset is an unweighted average of 20 inorganic substances (listed in Tab 88.1, ecoinvent v2.2 report 8, part II), being part of the top100 chemicals included in this database. The C-content has also been calculated as an unweighted average of the C content of the substances composing this dataset.
- chromium oxide, flakes: 8.3483e-7 kg; lognormal variance with pedigree 0.532, pedigree (1,1,5,5,1)
  (same comment as for hydrochloric acid, without water, in 30% solution state)
  properties: dry mass 1 kg, wet mass 1 kg
- aluminium sulfate, powder: 0.12871 kg; lognormal variance with pedigree 0.132, pedigree (1,1,5,5,1)
  (same comment as for iron sulfate)
  properties: dry mass 1 kg, wet mass 1 kg
- municipal waste incineration facility: 1.0864e-9 unit; lognormal variance with pedigree 0.052, pedigree (1,1,5,5,1)
  (same comment as for ammonia, anhydrous, liquid)
- wastewater treatment facility, capacity 1.1E10l/year: 1.9883e-9 unit; lognormal variance with pedigree 0.042, pedigree (1,1,5,5,1)
  EcoSpold01Location=CH
  uncertainty heeded in exchanges of the module
- quicklime, milled, packed: 3.1487e-5 kg; lognormal variance with pedigree 0.102, pedigree (1,1,5,5,1)
  (same comment as for waste cement, hydrated)
  properties: water content 0.010101, wet mass 1 kg, dry mass 0.99 kg
- cement, unspecified: 0 kg; pedigree (1,1,1,1,1)
  (same comment as for ammonia, anhydrous, liquid)
  properties: dry mass 1 kg, wet mass 1 kg
- heat, district or industrial, natural gas: 0 MJ; pedigree (1,1,1,1,1)
  (same comment as for titanium dioxide)
  properties: heating value, net 1 MJ
- liquid manure spreading, by vacuum tanker: 0.013439 m3; lognormal variance with pedigree 0.042, pedigree (1,1,5,5,1)
  EcoSpold01Location=CH
  burden from sludge spreading. Uncertainty calculated from wastewater composition and treatment model
- heat, district or industrial, other than natural gas: 0 MJ; pedigree (1,1,1,1,1)
  (same comment as for ammonia, anhydrous, liquid)
  properties: heating value, net 1 MJ
- process-specific burdens, residual material landfill: 0 kg; pedigree (1,1,1,1,1)
  (same comment as for waste cement, hydrated)
- iron (III) chloride, without water, in 40% solution state: 0.65112 kg; lognormal variance with pedigree 0.132, pedigree (1,1,5,5,1)
  EcoSpold01Location=CH
  direct wastewater treatment plant burden plus burden from sludge incineration. Uncertainty calculated from wastewater composition and treatment model
  properties: dry mass 1 kg, wet mass 1 kg
- ammonia, anhydrous, liquid: 0.000299558, 2.57506e-5, 4.00613e-5, 7.93756e-5, 7.77672e-5, 8.15084e-6, 3.64372e-5, 0.000861999 kg (8 entries); lognormal variance with pedigree 0.202, pedigree (1,1,5,5,1)
  (same comment as for ammonia, anhydrous, liquid)
- waste plastic, mixture: -0.00172425, -0.000115208, -8.71297e-6, -4.75849e-5, -1.92238e-5, -4.51863e-5, -0.00146914, -0.0120707 kg (8 entries); lognormal variance with pedigree 0.042, pedigree (1,1,5,5,1)
  (same comment as for waste plastic, mixture)
  production volume 0.0614782 kg
- waste cement, hydrated: -0.0144348, -0.0365942 kg (2 entries); lognormal variance with pedigree 0.082, pedigree (1,1,5,5,1)
  (same comment as for waste cement, hydrated)
  production volume 0.202398 kg
- process-specific burdens, municipal waste incineration: 1.22926, 3.11634 kg (2 entries); lognormal variance with pedigree 0.052, pedigree (1,1,5,5,1)
  (same comment as for waste cement, hydrated)
- process-specific burdens, slag landfill: 0.116655, 0.295735 kg (2 entries); lognormal variance with pedigree 0.072, pedigree (1,1,5,5,1)
  (same comment as for ammonia, anhydrous, liquid)
- electricity, low voltage: 0.0480571, 0.00875028, 0.197527, 0.690114, 0.14089, 2.16312, 0.349954, 1.00489 kWh (8 entries); lognormal variance with pedigree 0.112, pedigree (1,1,5,5,1)
  (same comment as for electricity, low voltage)
- electricity, high voltage: 0.00631358, 0.00121037, 0.0278793, 0.0913652, 0.0205219, 0.295507, 0.0468648, 0.135098 kWh (8 entries); lognormal variance with pedigree 0.492, pedigree (1,1,5,5,1)
  (same comment as for ammonia, anhydrous, liquid)
- cement, unspecified: 0.00294741, 0.000613268, 4.49176e-5, 0.00012803, 0.00289544, 8.52212e-5, 0.000935982, 0.000113243, 0.0126485 kg (9 entries); lognormal variance with pedigree 0.082, pedigree (1,1,5,5,1)
  (same comment as for ammonia, anhydrous, liquid)
- heat, district or industrial, natural gas: 0.00139609, 0.033453, 0.0905839 MJ (3 entries); lognormal variance with pedigree 0.202, pedigree (1,1,5,5,1)
  (same comment as for titanium dioxide)
- heat, district or industrial, other than natural gas: 0.00144202, 0.0870763, 3.55608 MJ (3 entries); lognormal variance with pedigree 0.052, pedigree (1,1,5,5,1)
  (same comment as for ammonia, anhydrous, liquid)
- process-specific burdens, residual material landfill: 0.0144348, 0.0365942 kg (2 entries); lognormal variance with pedigree 0.072, pedigree (1,1,5,5,1)
  (same comment as for waste cement, hydrated)

## Emissions to nature
- Sulfate [water, surface water]: 0.40946 kg; lognormal variance with pedigree 0.132, pedigree (1,1,5,5,1)
  sewer overload discharge plus direct wastewater treatment plant emission plus emission from sludge incineration. Uncertainty calculated from wastewater composition and treatment model
- Phosphate [water, ground-]: 0.00047687 kg; lognormal variance with pedigree 0.172, pedigree (1,1,5,5,1)
  emission from sludge spreading. Uncertainty calculated from wastewater composition and treatment model
- Phosphate [water, ground-, long-term]: 0.0047959 kg; lognormal variance with pedigree 4.302, pedigree (1,1,5,5,1)
  emission from sludge incineration. Uncertainty calculated from wastewater composition and treatment model
- Iron [soil, agricultural]: 0.15974 kg; lognormal variance with pedigree 0.142, pedigree (1,1,5,5,1)
  (same comment as for Phosphate)
- Nitrate [water, surface water]: 0.97915 kg; lognormal variance with pedigree 0.052, pedigree (1,1,5,5,1)
  (same comment as for Sulfate)
- Iron, ion [water, ground-, long-term]: 0.11224 kg; lognormal variance with pedigree 0.972, pedigree (1,1,5,5,1)
  (same comment as for Phosphate)
- Aluminium [water, ground-, long-term]: 0.0090236 kg; lognormal variance with pedigree 0.142, pedigree (1,1,5,5,1)
  (same comment as for Phosphate)
- TOC, Total Organic Carbon [water, ground-, long-term]: 0.0062382 kg; lognormal variance with pedigree 0.262, pedigree (1,1,5,5,1)
  (same comment as for Phosphate)
- NMVOC, non-methane volatile organic compounds, unspecified origin [air, urban air close to ground]: 0.00014047 kg; lognormal variance with pedigree 0.402, pedigree (1,1,5,5,1)
  direct digester gas emission. Uncertainty calculated from wastewater composition and treatment model
- Dinitrogen monoxide [air, urban air close to ground]: 0.0021097 kg; lognormal variance with pedigree 0.072, pedigree (1,1,5,5,1)
  direct wastewater treatment plant emission plus direct digester gas emission plus emission from sludge incineration plus emission from sludge spreading. Uncertainty calculated from wastewater composition and treatment model
- BOD5, Biological Oxygen Demand [water, ground-, long-term]: 0.0051566 kg; lognormal variance with pedigree 0.262, pedigree (1,1,5,5,1)
  (same comment as for Phosphate)
- Ammonia [air, urban air close to ground]: 0.0074146 kg; lognormal variance with pedigree 0.272, pedigree (1,1,5,5,1)
  direct digester gas emission plus emission from sludge incineration plus emission from sludge spreading. Uncertainty calculated from wastewater composition and treatment model
- Phosphate [water, surface water]: 0.11002 kg; lognormal variance with pedigree 0.112, pedigree (1,1,5,5,1)
  sewer overload discharge plus direct wastewater treatment plant emission plus emission from sludge incineration plus emission from sludge spreading. Uncertainty calculated from wastewater composition and treatment model
- Iron [air, urban air close to ground]: 7.9994e-6 kg; lognormal variance with pedigree 0.182, pedigree (1,1,5,5,1)
  direct digester gas emission plus emission from sludge incineration. Uncertainty calculated from wastewater composition and treatment model
- Nitrogen oxides [air, urban air close to ground]: 0.014168 kg; lognormal variance with pedigree 0.072, pedigree (1,1,5,5,1)
  (same comment as for Iron)
- DOC, Dissolved Organic Carbon [water, ground-, long-term]: 0.0062382 kg; lognormal variance with pedigree 0.262, pedigree (1,1,5,5,1)
  (same comment as for Phosphate)
- Nitrogen [water, surface water]: 0.0099325 kg; lognormal variance with pedigree 0.062, pedigree (1,1,5,5,1)
  direct wastewater treatment plant emission. Uncertainty calculated from wastewater composition and treatment model
- COD, Chemical Oxygen Demand [water, ground-, long-term]: 0.015765 kg; lognormal variance with pedigree 0.262, pedigree (1,1,5,5,1)
  (same comment as for Phosphate)
- Methane, non-fossil [air, urban air close to ground]: 0.030921 kg; lognormal variance with pedigree 0.282, pedigree (1,1,5,5,1)
  (same comment as for Iron)
- Water [water, unspecified]: 0.9 m3; name water_to_water_unspecified; lognormal variance with pedigree 0.0827, pedigree (2,2,5,5,1)
  Calculated value based on water balance.
  property water in wet mass 1000 kg; name WWM
  property carbon content, fossil 0; name C_content_fossil
  property carbon content, non-fossil 0; name C_content_non_fossil
  property wet mass 1000 kg; name WM
  property fraction, origin: salt water 0; name fraction_origin_salt_water_Ww
  property fraction, origin: unspecified 0; name fraction_origin_unspecified_Ww
  property fraction, origin: fresh water 1; name fraction_origin_fresh_water_Ww
  property dry mass 0 kg; name DM
- Chloride [water, surface water]: 0.42692 kg; lognormal variance with pedigree 0.132, pedigree (1,1,5,5,1)
  (same comment as for Sulfate)
- Aluminium [air, urban air close to ground]: 1.9048e-5 kg; lognormal variance with pedigree 0.152, pedigree (1,1,5,5,1)
  (same comment as for Iron)
- Water [air, unspecified]: 0.1 m3; name water_to_air_unspecified; lognormal variance with pedigree 0.0827, pedigree (2,2,5,5,1)
  Calculated value based on water balance.
  property fraction, origin: fresh water 0; name fraction_origin_fresh_water
  property fraction, origin: salt water 0; name fraction_origin_salt_water
  property fraction, origin: unspecified 1; name fraction_origin_unspecified
- Nitrite [water, surface water]: 0.013054 kg; lognormal variance with pedigree 0.062, pedigree (1,1,5,5,1)
  (same comment as for Nitrogen)
- Iron, ion [water, surface water]: 8.1998e-5 kg; lognormal variance with pedigree 0.162, pedigree (1,1,5,5,1)
  (same comment as for Sulfate)
- Cyanide [air, urban air close to ground]: 2.5494e-5 kg; lognormal variance with pedigree 0.232, pedigree (1,1,5,5,1)
  (same comment as for Phosphate)
- Carbon [soil, agricultural]: 0.42589 kg; lognormal variance with pedigree 0.252, pedigree (1,1,5,5,1)
  (same comment as for Phosphate)
- Carbon monoxide, non-fossil [air, urban air close to ground]: 0.010019 kg; lognormal variance with pedigree 0.292, pedigree (1,1,5,5,1)
  (same comment as for Iron)
- BOD5, Biological Oxygen Demand [water, surface water]: 0.58122 kg; lognormal variance with pedigree 0.182, pedigree (1,1,5,5,1)
  (same comment as for Sulfate)
- TOC, Total Organic Carbon [water, surface water]: 0.47357 kg; lognormal variance with pedigree 0.172, pedigree (1,1,5,5,1)
  (same comment as for Sulfate)
- Aluminium [water, surface water]: 1.0146e-6 kg; lognormal variance with pedigree 0.742, pedigree (1,1,5,5,1)
  (same comment as for Sulfate)
- Nitrate [water, ground-, long-term]: 0.0010176 kg; lognormal variance with pedigree 0.072, pedigree (1,1,5,5,1)
  (same comment as for Phosphate)
- Aluminium [soil, agricultural]: 0.0081289 kg; lognormal variance with pedigree 0.142, pedigree (1,1,5,5,1)
  (same comment as for Phosphate)
- DOC, Dissolved Organic Carbon [water, surface water]: 0.44341 kg; lognormal variance with pedigree 0.532, pedigree (1,1,5,5,1)
  (same comment as for Sulfate)
- Ammonium, ion [water, surface water]: 0.22351 kg; lognormal variance with pedigree 0.052, pedigree (1,1,5,5,1)
  (same comment as for Nitrogen)
- Phosphorus [air, urban air close to ground]: 4.095e-5 kg; lognormal variance with pedigree 0.142, pedigree (1,1,5,5,1)
  (same comment as for Iron)
- Carbon dioxide, non-fossil [air, urban air close to ground]: 11.283 kg; lognormal variance with pedigree 0.122, pedigree (1,1,5,5,1)
  direct wastewater treatment plant emission plus direct digester gas emission plus emission from sludge incineration. Uncertainty calculated from wastewater composition and treatment model
- COD, Chemical Oxygen Demand [water, surface water]: 1.4224 kg; lognormal variance with pedigree 0.572, pedigree (1,1,5,5,1)
  (same comment as for Sulfate)

## Extrapolations
wastewater compositions from literature and/or estimates This dataset has been copied from an original dataset covering the geography CH. The uncertainty has been adjusted accordingly.

## Review by Niels Jungbluth 2009-01-22
passed.
