# polystyrene foam slab production, 45% recycled

Dataset: EcoSpold 2, unit process
Geography: CH
Time period: 2009-01-01 to 2021-12-31
Technology level: current
Classification: EcoSpold01Categories: insulation materials/production
Classification: ISIC rev.4 ecoinvent: 2220:Manufacture of plastics products
Synonyms: EPS
Tags: ConvertedDataset
Scenario: Business-as-Usual
System model: Allocation, cut-off by classification
Share of production covered: 0 %
Generated by: Annelore Kleijer
Published in: Hischier, R. 2010
Database: ecoinvent
isCopyrightProtected: true
accessRestrictedTo: 1

## General comment
Combination of material and processing module. EPS foam slab has a density of 28 kg/m3 and a thermal conductivity of 0.036 W/mK
[This dataset was already contained in the ecoinvent database version 2. It was not individually updated during the transfer to ecoinvent version 3. Life Cycle Impact Assessment results may still have changed, as they are affected by changes in the supply chain, i.e. in other datasets. This dataset was generated following the ecoinvent quality guidelines for version 2. It may have been subject to central changes described in the ecoinvent version 3 change report (http://www.ecoinvent.org/database/ecoinvent-version-3/reports-of-changes/), and the results of the central updates were reviewed extensively. The changes added e.g. consistent water flows and other information throughout the database. The documentation of this dataset can be found in the ecoinvent reports of version 2, which are still available via the ecoinvent website. The change report linked above covers all central changes that were made during the conversion process.]

## Included activities end
Includes grinding and thermoforming processes

## Geography
Data from swisspor Romandie SA in Châtel-st-Denis FR

## Technology
Swiss average EPS production; process from 1 factory in Switzerland

## Parameters
- fraction, cooling water, recirculating system, to air: 0.771 dimensionless; name fraction_CW_R_to_air; lognormal variance with pedigree 0.0413, pedigree (2,3,1,3,1)
  Calculated based on literature value (Scown, C.D., 2011, Water Footprint of U.S. Transportation Fuels and supplying information of the article) (Vionnet, S., Quantis Water Database - Technical Report, 2012).
- fraction, cooling water, once-through system, to air: 0.004 dimensionless; name fraction_CW_OT_to_air; lognormal variance with pedigree 0.0413, pedigree (2,3,1,3,1)
  (same comment as for fraction, cooling water, recirculating system, to air)
- fraction, cooling water, to air: 0.3875 dimensionless; name fraction_CW_to_air; = (0.5*fraction_CW_OT_to_air)+(0.5*fraction_CW_R_to_air); lognormal variance with pedigree 0.092025, pedigree (4,4,3,2,4)
  Calculated value based on literature value (see comments of the other parametres present in this dataset) and expert opinion. In the case when no industry/literature data are available about the type of cooling or directly fraction, cooling water, to air specific for the process a default assumption is applied. It is assumed that the once-through cooling system is used in 50% of all cases and recirculating system is used in another 50% of all cases.
- fraction, water, decarbonised, to air: 0.3875 dimensionless; name fraction_WDC_to_air; = fraction_CW_to_air; lognormal variance with pedigree 0.092025, pedigree (4,4,3,2,4)
  Calculated value. See comments in the other parametres present in this dataset. Decarbonised water is considered to be always used as cooling water, thus cooling water fractions to air are applied to all carbonised water input flows to calculate the amount of water consumed in the processes.
- fraction, cooling water, cooling pond system, to air: 0.032 dimensionless; name fraction_CW_CP_to_air; lognormal variance with pedigree 0.0413, pedigree (2,3,1,3,1)
  (same comment as for fraction, cooling water, recirculating system, to air)

## Reference product
- polystyrene foam slab: 1 kg; CPC 363: Semi-manufactures of plastics; By-product classification allocatable product
  EcoSpold01Location=CH
  production volume 4.08889e6 kg
    Unknown
    Market volume for EPS estimated from European volume using GDP: 23 million kg ; Recycling rate of EPS estimated to 16% (32% of packaging use), with half used in 45% recycled products
  property price 1.24 EUR2005
    Calculated value based on data from United Nations Commodity Trade Statistics Database (comtrade.un.org). UN comtrade category: 390311 Polystyrene, expansible in primary forms. Year 2005. Using exchange rate of 1EURO = 1.209 USD. Average of price of import into 5 main markets (EU, US, JP, IN and CN).
  property carbon content, fossil 0.859091
    XPS consists in 91% of polystyrene, 7% of blowing agent and the re-maining 2% are flame retardants (bromine compounds) and other additives (ecoinvent v2.2 report 7, part XIV, pg69). The chemical formula of polystyrene is (C8H8)n. Here, the blowing agent is CO2.
  property carbon content, non-fossil 0
    (same comment as for polystyrene foam slab)
  property carbon content 0.859091
    carbon content on a dry matter basis (reserved; not for manual entry)
  properties: water content 0, wet mass 1 kg, dry mass 1 kg, water in wet mass 0 kg, heating value, net 38.67 MJ, carbon allocation 0.859091 kg

## Inputs from technosphere
All rows: lognormal variance with pedigree 0.0106, pedigree (2,4,4,1,1)
- heat, district or industrial, natural gas: 8.22624 MJ
  EcoSpold01Location=RER
  Natural gaz for water vapor heating
  Uncertainty: natural gaz for water vapor heating
  properties: heating value, net 1 MJ
- electricity, low voltage: 0.1366 kWh
  EcoSpold01Location=CH
  Includ crusching, induction, foam salb making
  Uncertainty: Includ crusching, induction, foam salb making
- water, decarbonised: 0.000136 kg; name water_decarbonised_input
  For steam process
  EcoSpold01Location=RER
  Uncertainty: For steam process
  properties: wet mass 1 kg
- polystyrene, expandable: 0.57652 kg
  55% from 1 kg of polystyren foam slab + 4.6% pentane weight,no loss, average of 6 differents thickness
  EcoSpold01Location=RER
  Uncertainty: 55% from 1 kg of polystyren foam slab + 4.6% pentane weight,no loss, average of 6 differents thickness
  properties: dry mass 1 kg, wet mass 1 kg, carbon content, fossil 0.923077, heating value, net 38.67 MJ
  note on carbon content, fossil: Chemical formula of polystyrene is (C8H8)n (ecoinvent v2.2 report 11_II)
- polystyrene scrap, post-consumer: 0.45 kg
  45% from 1 kg of polystyren foam slab, no loss, average of 2 differents thickness
  EcoSpold01Location=CH
  Uncertainty: 45% from 1 kg of polystyren foam slab, no loss, average of 2 differents thickness
  properties: heating value, net 38.67 MJ, wet mass 1 kg, dry mass 1 kg, carbon content, fossil 0.922579
  note on carbon content, fossil: Tab & Fig 6.12, ecoinvent v2.2 report 7, part XXI. Chemical formula of polystyrene is (C8H8)n

## Emissions to nature
- Water [water, unspecified]: 8.33e-8 m3; name water_to_water_unspecified; = (water_decarbonised_input/1000)*(1-fraction_WDC_to_air); lognormal variance with pedigree 0.0487, pedigree (2,2,4,1,1)
  Calculated value based on literature values and expert opinion. See comments in the parametres' comment field.
  property fraction, origin: fresh water 1; name fraction_origin_fresh_water_Ww
  property fraction, origin: salt water 0; name fraction_origin_salt_water_Ww
  property fraction, origin: unspecified 0; name fraction_origin_unspecified_Ww
  property dry mass 0 kg; name DM
  property water in wet mass 1000 kg; name WWM
  property wet mass 1000 kg; name WM
  property carbon content, fossil 0; name C_content_fossil
  property carbon content, non-fossil 0; name C_content_non_fossil
- Water [air, unspecified]: 5.27e-8 m3; name water_to_air_unspecified; = (water_decarbonised_input/1000*fraction_WDC_to_air); lognormal variance with pedigree 0.0487, pedigree (2,2,4,1,1)
  (same comment as for Water)
  property fraction, origin: salt water 0; name fraction_origin_salt_water
  property fraction, origin: unspecified 0; name fraction_origin_unspecified
  property fraction, origin: fresh water 1; name fraction_origin_fresh_water
- Pentane [air, non-urban air or from high stacks]: 0.0074948 kg; lognormal variance with pedigree 0.0506, pedigree (2,4,4,1,1)
  1.3% pentane in air after foam slab fabrication, when disposed before using
  Uncertainty: 1.3% pentane in air after foam slab fabrication, when disposed before using

## Extrapolations
This dataset has been extrapolated from year 2009 to the year of the calculation (2021). The uncertainty has been adjusted accordingly.

## Review by Hans-Jörg Althaus 2010-02-07
passed
none
