# polylactide production, granulate

Dataset: EcoSpold 2, unit process
Geography: GLO
Time period: 2006-01-01 to 2021-12-31
Technology level: current
Classification: ISIC rev.4 ecoinvent: 2013:Manufacture of plastics and synthetic rubber in primary forms
Classification: EcoSpold01Categories: plastics/polymers
Tags: ConvertedDataset
Scenario: Business-as-Usual
System model: Allocation, cut-off by classification
Generated by: Cornelia Stettler
Published in: Althaus H.J. 2007
Database: ecoinvent
isCopyrightProtected: true
accessRestrictedTo: 1

## General comment
Inventory refers to the production of 1 kg PLA. It is based on data from the world largest PLA plant. The inventories include the LCI data from the report of the producer NatureWorks. In this publication only aggregated data are reported. To get more transparency and to be in accordance with other ecoi nvent processes and the guideline the data has been splitted up in maize production, enegy use, transport and waste water treatement. The infrastructure has been added.
In the published data from the plant in Nebraska the carbon dioxide emissions are offset by wind power certificates. This is not an intrinsic property of the PLA production, but specific to this plant. It is why in this process for the electricity production the UCTE Mix has been choosen. If the polymer is produced by NatreWorks in Nebraska the specific process should be used.
[This dataset was already contained in the ecoinvent database version 2. It was not individually updated during the transfer to ecoinvent version 3. Life Cycle Impact Assessment results may still have changed, as they are affected by changes in the supply chain, i.e. in other datasets. This dataset was generated following the ecoinvent quality guidelines for version 2. It may have been subject to central changes described in the ecoinvent version 3 change report (http://www.ecoinvent.org/database/ecoinvent-version-3/reports-of-changes/), and the results of the central updates were reviewed extensively. The changes added e.g. consistent water flows and other information throughout the database. The documentation of this dataset can be found in the ecoinvent reports of version 2, which are still available via the ecoinvent website. The change report linked above covers all central changes that were made during the conversion process.]

## Included activities end
The publication contains only cumulative results. So the emissions from energy consumption, waste water treatement and raw material inputs have been subtracted resulting in a difference in NMVOC emissions.shown in this process.

## Geography
Based on the data of the productio of 1 kg PLA in Nebraska by NatureWorks. The electricity mix was changed to UCTE Mix to get a more general process beeing a better approach for other geographical locations, than this specific site.

## Technology
Evaluation of plant site in Nebraska

## Parameters
- fraction, process water, to air: 0.15 dimensionless; name fraction_PW_to_air; lognormal variance with pedigree 0.092025, pedigree (4,4,3,2,4)
  Literature value. In case when no industry/process specific data are available, default evaporation fraction value is used. This value is 15% and is based on literature (Statistics Canada, 2007 & Shaffer, K.H., 2008, Consumptive water use in the Great Lakes Basin, USGS & Shiklomanov, 2003, World Water Resources at the Beginning of the 21st Century) and has been approved by an expert.

## Reference product
- polylactide, granulate: 1 kg; CPC 347: Plastics in primary forms; By-product classification allocatable product; CAS 26100-51-6
  EcoSpold01Location=GLO
  production volume 1 kg
    Dummy value to be replaced by measured, estimated or calculated value
  property carbon content, non-fossil 0.5
    Polylactide acid is a polymer of the monomer C3H4O2 (ecoinvent v2.2 report 11_II). MW=72 g/mol
  property heating value, net 15.15 MJ
    LHV is calculated based on the Carbon content of the product. More details can be found on the respective documentation.
  property carbon content 0.5
    carbon content on a dry matter basis (reserved; not for manual entry)
  properties: price 1.29 EUR2005, water content 0, carbon content, fossil 0, wet mass 1 kg, dry mass 1 kg, water in wet mass 0 kg, carbon allocation 0.5 kg

## Inputs from technosphere
- chemical factory, organics: 4e-10 unit; lognormal variance with pedigree 0.4221, pedigree (5,2,5,5,1)
  EcoSpold01Location=RER
  Uncertainty: 0
- natural gas, high pressure: 0.0036 m3; lognormal variance with pedigree 0.0527, pedigree (2,2,5,5,1)
  Uncertainty: 0
  property water in wet mass 0 kg; name WWM
  property wet mass 0.84 kg; name WM
  property carbon content, non-fossil 0; name C_content_non_fossil
  property carbon content, fossil 0.602381; name C_content_fossil
  property water content 0; name water_content
  property dry mass 0.84 kg; name DM
  property heating value, gross 0 MJ; name Gross_Heat_Value
  properties: heating value, net 39 MJ
  note on heating value, net: Literature value, Source: United Nations Statistics Division (2018) International Recommendations for Energy Statistics (IRES). Available at: http://unstats.un.org/unsd/statcom/doc11/BG-IRES.pdf.
- hazardous waste, for incineration: 0 kg; pedigree (1,1,1,1,1)
  EcoSpold01Location=CH
  production volume 0 kg
    Calculated from the production volume of polylactide, granulate in proportion to the respective output amounts.
  properties: carbon content, fossil 0.554667, dry mass 0.75 kg, water content 0.333333, wet mass 1 kg, heating value, net 17 MJ
  note on carbon content, fossil: Tab A.6, ecoinvent v2.2 report 13_I. C content has been calculated after data in the tables, and then referred to 1 kg DM
  note on heating value, net: Value taken from the general comment of the treatment dataset.
- heat, district or industrial, natural gas: 17.537 MJ; lognormal variance with pedigree 0.0527, pedigree (2,2,5,5,1)
  EcoSpold01Location=RER
  Uncertainty: 0
  properties: heating value, net 1 MJ
- heat, district or industrial, other than natural gas: 0.15105 MJ; lognormal variance with pedigree 0.0527, pedigree (2,2,5,5,1)
  EcoSpold01Location=RER
  Uncertainty: 0
  properties: heating value, net 1 MJ
- maize grain: 0 kg; pedigree (1,1,1,1,1)
  EcoSpold01Location=US
  Uncertainty: 0
  properties: dry mass 0.86 kg, water content 0.162791, wet mass 1 kg, carbon content, non-fossil 0.46957
  note on carbon content, non-fossil: Composition data obtained from Corn Grain Whole, in (http://beefmagazine.com/images/2009%20feed%20table.pdf). First, composition data were refered to 1 kg dry mass. Then, C-contents were calculated considering a C-content/dry mass of 46% in carbohydrates (including fibres), 53% in proteins and 75% in fats. All data from "Evolutionary and Biochemical Aspects", A.D. Kay and T. Vrede (in Global Ecology, 2010, Elsevier B.V., S.E. Jørgensen Ed.). Finally, C-content in kg was multiplied by kg dry mass in the exchange.
- wastewater from maize starch production: -0.0032 m3; name wastewater_output; lognormal variance with pedigree 0.0527, pedigree (2,2,5,5,1)
  EcoSpold01Location=CH
  Uncertainty: 0
  production volume 0.0032 m3
    (same comment as for hazardous waste, for incineration)
  property price 0 EUR2005; name wastewater_output_price_EUR2005
  properties: wet mass 1000 kg, water content 258.64, dry mass 3.85149 kg, carbon content, non-fossil 0.825003
  note on carbon content, non-fossil: COD= 7.34 kg/m3 (Tab A.19, ecoinvent v2.2 report 13_I). COD was converted to TOC, using conversion factors in Tab 4.10 (ecoinvent v2.2 report 13_IV). TOC was considered as Total Carbon.
- waste plastic, mixture: 0 kg; pedigree (1,1,1,1,1)
  EcoSpold01Location=CH
  production volume 0 kg
    (same comment as for hazardous waste, for incineration)
  properties: carbon content, fossil 0.747344, heating value, net 30.79 MJ, water content 0.180638, dry mass 0.847 kg, wet mass 1 kg
  note on carbon content, fossil: C content in 1 kg DM was calculated using data in Tab A.2, ecoinvent v2.2 report 13_I
- electricity, low voltage: 1.828 kWh; lognormal variance with pedigree 0.0527, pedigree (2,2,5,5,1)
  EcoSpold01Location=UCTE
  Uncertainty: 0
- naphtha: 0 kg; pedigree (1,1,1,1,1)
  EcoSpold01Location=RER
  Uncertainty: 0
  properties: heating value, net 45 MJ, wet mass 1 kg, carbon content, fossil 0.919743, dry mass 1 kg
  note on carbon content, fossil: C-content was calculated using data from Tab 3.20, ecoinvent v2.2 report 6_IV CO2 emmissions and High heating value.
- hazardous waste, for incineration: -0.0020608, -5.38681e-5, -0.00428533 kg (3 entries); lognormal variance with pedigree 0.0407, pedigree (2,2,5,1,1)
  EcoSpold01Location=CH
  production volume 0.0064 kg
- maize grain: 0.00302552, 0.0633465, 1.44063 kg (3 entries); lognormal variance with pedigree 0.0521, pedigree (1,2,5,5,1)
  EcoSpold01Location=US
  Uncertainty: 0
- waste plastic, mixture: -9.62547e-5, -7.42067e-6, -3.065e-6, -2.91051e-6, -0.000111061, -1.23823e-6, -5.61213e-7, -0.000777489 kg (8 entries); lognormal variance with pedigree 0.0407, pedigree (2,2,5,1,1)
  EcoSpold01Location=CH
  production volume 0.001 kg
- naphtha: 0.00107086, 3.35276e-5, 0.000777978, 8.1241e-6, 0.000101751, 0.000211016, 0.00479674 kg (7 entries); lognormal variance with pedigree 0.0527, pedigree (2,2,5,5,1)
  EcoSpold01Location=RER
  Uncertainty: 0

## Inputs from nature
- Water, unspecified natural origin [natural resource, in water]: 0.0032 m3; name water_UNO_input; lognormal variance with pedigree 1.21, pedigree (5,5,5,5,5)
  Calculated value. The amount of water in this flow (input) to the process as provided by the data provider for eiv2 was 0m3. This amount is adjusted, so the water balance is achieved.

## Emissions to nature
- NMVOC, non-methane volatile organic compounds, unspecified origin [air, non-urban air or from high stacks]: 0.00252 kg; lognormal variance with pedigree 0.0921, pedigree (1,2,5,5,1)
  Uncertainty: 0

## Sampling procedure
Data were compiled from LCI report of producer

## Extrapolations
This dataset has been extrapolated from year 2007 to the year of the calculation (2021). The uncertainty has been adjusted accordingly.

## Review by Bo Weidema 2012-07-19
Input of natural gas production mix replaced by "natural gas, high pressure"

## Review by Hans-Jörg Althaus 2007-08-31
passed
none
