# treatment of waste polyethylene, municipal incineration

Dataset: EcoSpold 2, unit process
Geography: RoW
Time period: 2006-01-01 to 2021-12-31
Technology level: current
Classification: ISIC rev.4 ecoinvent: 3821:Treatment and disposal of non-hazardous waste
Synonyms: Kehrichtverbrennung; municipal waste incineration; Siedlungsabfallverbrennung
Scenario: Business-as-Usual
System model: Allocation, cut-off by classification
Share of production covered: 1.8 %
Generated by: Gabor Doka
Published in: Doka G. 2013
Database: ecoinvent
isCopyrightProtected: true
accessRestrictedTo: 1

## General comment
This dataset represents the activity of waste disposal of waste polyethylene in a municipal solid waste incinerator (MSWI) // Recommended use of this dataset: For PE, which goes to disposal as part of communal waste mixture. // // Waste composition (wet, in ppm): upper heating value 42.82 MJ/kg; lower heating value 42.47 MJ/kg; H2O 4000; O 38435; H 122490; C 822050; S 426.9; N 1297.2; P n.a.; B n.a.; Cl 1461.5; Br 9.5896; F 14.384; I n.a.; Ag n.a.; As 1.822; Ba 239.74; Cd 33.946; Co 1.6782; Cr 12.466; Cu 41.367; Hg 0.047948; Mn 30.047; Mo n.a.; Ni 0.95896; Pb 22.596; Sb 10.069; Se 2.0138; Sn 3.814; V 2205.6; Zn 342.01; Be 0.47948; Sc n.a.; Sr 84.868; Ti 958.96; Tl 0.38358; W n.a.; Si n.a.; Fe 1534.3; Ca 2589.2; Al 191.79; K n.a.; Mg 95.896; Na 1405.4; // Share of carbon in waste that is biogenic 0%. // Share of metals in waste not oxidised and bulk-recyclable (exclude very small or thin parts) Iron: 0%; Alu: 0%; Copper: 0%. // One kg of this waste produces 0.02398 kg of slag and 0.01002 kg of residues, which are landfilled. Additional solidification with 0.004009 kg of cement. // Net energy production: 5.55MJ/kg electric energy and 10.69MJ/kg thermal energy. // Recovery of metal scrap to recycling: 0g iron scrap, 0g aluminium scrap, 0g copper scrap.

## Included activities start
waste incineration from waste reception gate and delivery into waste bunker at incinerator plant site (without transports to the incinerator)

## Included activities end
Waste-specific short-term emissions to water from leachate. Long-term emissions from landfill to ground water.

## Geography
Specific to the technology mix encountered in Switzerland in 2010. Well applicable to modern incineration practices in Europe, North America or Japan.

## Technology
average Swiss MSWI plants in 2010 (grate incinerators) with electrostatic precipitator for fly ash (ESP), wet flue gas scrubber and 25% SNCR , 42.77% SCR-high dust , 32.68% SCR-low dust -DeNOx facilities and 0% without Denox (weighted according to mass of burnt waste, representing Swiss average). Efficiency of iron scrap separation from slag : 58%. Efficiency of non-ferrous scrap separation from slag : 31%. Gross electric efficiency technology mix 15.84% and Gross thermal efficiency technology mix 28.51%

## Time period
Waste composition as given in literature reference, theoretical data or other source. Transfer coefficients for modern MSWI.

## Reference product
- waste polyethylene: -1 kg; By-product classification Waste; CPC 39270: Waste, parings and scrap of plastics; CAS 9002-88-4
  Main reference product of this activity (supply of disposal service).
  production volume 9.0864e9 kg
    based on estimate on MSW in WTE globally, share of total plastic in MSW in top WTE countries and share of PE plastic types in US MSW (Fatarella 2012)
  property heating value, net 42.47 MJ
    Value taken from the general comment of the treatment dataset.
  property price 0 EUR2005
    Waste products are assigned a price of zero as they are assumed to require further treatment.
  property carbon content 0.825301
    carbon content on a dry matter basis (reserved; not for manual entry)
  properties: carbon content, non-fossil 0, water in wet mass 0.004 kg, dry mass 0.996 kg, wet mass 1 kg, water content 0.00401606, carbon content, fossil 0.825301, carbon allocation 0.822 kg

## By-products
- heat, for reuse in municipal waste incineration only: 0 MJ; name E_th_prod_MSWI; By-product classification allocatable product; CPC 17300: Steam and hot water; pedigree (1,1,1,1,1)
  Net electricity generated from this waste and used in internal MSWI plant energy redistribution.
  Uncertainty: uncertainty is calculated from uncertainties in waste composition and uncertainties in energy efficiency and the uncertainty in internal energy demand
  production volume 9.7166e10 MJ
    calculated in proportion to reference product waste input to incinerator
  property price 0.0106 EUR2005; name E_th_prod_MSWI_price_EUR2005
    Average European district heat price from Ecoheatcool and Euroheat 2005-2006, Ecoheat Work package 1: The European heat market. Final report. 10.6 EUR/GJ i s the price of district heat. http://www.solarthermalworld.org/files/Ecoheatcool%20WP1%20Web.pdf?download
  property exergy 0.1842 MJ; name E_th_prod_MSWI_exergy
    This exergy property is based on the exergy content of the product.
  property true value relation 0.1842; name E_th_prod_MSWI_true_value_relation
    property to calculate "true value" from
- electricity, for reuse in municipal waste incineration only: 0 kWh; name E_el_prod_MSWI; CPC 17100: Electrical energy; By-product classification allocatable product; pedigree (1,1,1,1,1)
  (same comment as for heat, for reuse in municipal waste incineration only)
  production volume 1.4007e10 kWh
    calculated in proportion to reference product waste input to incinerator
  property exergy 3.6 MJ; name E_el_prod_MSWI_exergy
    This exergy property is based on the exergy content of the product.
  property true value relation 3.6; name E_el_prod_MSWI_true_value_relation
    property to calculate "true value" from
  property price 0.1 EUR2005; name E_el_prod_MSWI_price_EUR2005
    Estimated to be the same price as in case of electricity, medium voltage.

## Inputs from technosphere
- chromium oxide, flakes: 1.4847e-6 kg; lognormal variance with pedigree 0.50043, pedigree (1,1,4,1,1)
  Input to DeNOx stage.
  Uncertainty: uncertainty calculated from uncertainty in average DeNOx input, uncertainty in the share of thermal NOx, uncertainty of nitrogen content in average municipal waste and the uncertainty in nitrogen content in *this* waste.
  properties: dry mass 1 kg, wet mass 1 kg
- municipal waste incineration facility: 2.5e-10 unit
  Demands per kilogram waste.
- slag landfill: 3.9707e-11 unit; lognormal variance with pedigree 0.070869, pedigree (1,1,4,1,1)
  Landfill infrastructure required for landfilling of bottom ash.
  Uncertainty: uncertainty is calculated from uncertainties in waste composition and transfer coefficients in incinerator
- waste cement, hydrated: 0 kg; pedigree (1,1,1,1,1)
  Hydrated cement output for solidification of landfilled residual material.
  Uncertainty: Uncertainty calculated from uncertainty of the waste composition of this waste and transfer coefficients in the incinerator and of the solidification recipe.
  production volume 0 kg
    calculated in proportion to reference product waste input to incinerator
  properties: wet mass 1 kg, dry mass 1 kg
- iron (III) chloride, without water, in 40% solution state: 0.00032035 kg; lognormal variance with pedigree 0.43659, pedigree (1,1,4,1,1)
  Auxilliary inputs for the wastewater treatment stage of the incinerator plant.
  Uncertainty: uncertainty calculated from uncertainty in average FeCl3 input, of transfer coefficients in the incinerator, and the uncertainty of the waste composition of this waste
  properties: wet mass 1 kg, dry mass 1 kg
- process-specific burdens, residual material landfill: 0 kg; pedigree (1,1,1,1,1)
  Mass-specific expenditures required for landfilling of incineration residues.
  Uncertainty: uncertainty is calculated from uncertainties in waste composition and transfer coefficients in incinerator
- hydrochloric acid, without water, in 30% solution state: 2.4179e-5 kg; lognormal variance with pedigree 0.21109, pedigree (1,1,4,1,1)
  Auxilliary inputs for the wastewater treatment stage of the incinerator plant.
  Uncertainty: uncertainty calculated from uncertainty in average HCl input, of transfer coefficients in the incinerator, and the uncertainty of the waste composition of this waste
  properties: heating value, net 3.32 MJ, wet mass 1 kg, dry mass 1 kg
- water, decarbonised: 0 kg; pedigree (1,1,1,1,1)
  Incinerator process water used in flue gas scrubber stage.
  Uncertainty: uncertainty calculated from uncertainty in average water input, and the uncertainty of the waste composition of this waste
  properties: wet mass 1 kg
- chemical, inorganic: 9.199e-5 kg; lognormal variance with pedigree 0.21109, pedigree (1,1,4,1,1)
  Auxilliary inputs for the wastewater treatment stage of the incinerator plant. Proxy for Polyelectrolyte.
  Uncertainty: uncertainty calculated from uncertainty in average Polyelectrolyte input, of transfer coefficients in the incinerator, and the uncertainty of the waste composition of this waste
  properties: wet mass 1 kg, dry mass 1 kg, carbon content, fossil 0.003
- residual material landfill: 2.088e-11 unit; lognormal variance with pedigree 0.056273, pedigree (1,1,4,1,1)
  Landfill infrastructure required for landfilling of incineration residues.
  Uncertainty: uncertainty is calculated from uncertainties in waste composition and transfer coefficients in incinerator
- sodium hydroxide, without water, in 50% solution state: 0.00029729 kg; lognormal variance with pedigree 0.31631, pedigree (1,1,4,1,1)
  Auxilliary inputs for the flue gas treatment stage of the incinerator plant.
  Uncertainty: uncertainty calculated from uncertainty in average NaOH input, of transfer coefficients in the incinerator, and the uncertainty of the waste composition of this waste
  properties: dry mass 1 kg, wet mass 1 kg, heating value, net 3.03 MJ
- chemical, organic: 9.7286e-6 kg; lognormal variance with pedigree 0.98397, pedigree (1,1,4,1,1)
  Auxilliary inputs for the wastewater treatment stage of the incinerator plant. Proxy for (pure) Trisodium-trimercapto-s-triazine (CAS 17766-26-6), used as 15% diluted solution, aka TMT15.
  Uncertainty: uncertainty calculated from uncertainty in average TMT15 input, of transfer coefficients in the incinerator, and the uncertainty of the waste composition of this waste
  properties: dry mass 1 kg, carbon content, fossil 0.628, wet mass 1 kg, heating value, net 19.03 MJ
- ammonia, anhydrous, liquid: 0 kg; pedigree (1,1,1,1,1)
  Input to DeNOx stage (100% NH3).
  Uncertainty: uncertainty calculated from uncertainty in average DeNOx input, uncertainty in the share of thermal NOx, uncertainty of nitrogen content in average municipal waste and the uncertainty in nitrogen content in *this* waste.
  properties: wet mass 1 kg, dry mass 1 kg
- heat, district or industrial, natural gas: 0 MJ; pedigree (1,1,1,1,1)
  Input to DeNOx stage, to heat up flue gas in low-dust SCR.
  Uncertainty: uncertainty calculated from uncertainty in average DeNOx input, uncertainty in the share of thermal NOx, uncertainty of nitrogen content in average municipal waste and the uncertainty in nitrogen content in *this* waste.
  properties: heating value, net 1 MJ
- cement, unspecified: 0 kg; pedigree (1,1,1,1,1)
  Cement required for solidification of landfilled residual material.
  Uncertainty: Uncertainty calculated from uncertainty of the waste composition of this waste, of transfer coefficients in the incinerator and of the solidification recipe.
  properties: dry mass 1 kg, wet mass 1 kg
- quicklime, milled, packed: 0.00078339 kg; lognormal variance with pedigree 0.6092, pedigree (1,1,4,1,1)
  Auxilliary inputs for the flue gas treatment stage of the incinerator plant.
  Uncertainty: uncertainty calculated from uncertainty in average CaO input, of transfer coefficients in the incinerator, and the uncertainty of the waste composition of this waste
  properties: water content 0.010101, dry mass 0.99 kg, wet mass 1 kg
- titanium dioxide: 7.2751e-5 kg; lognormal variance with pedigree 0.50043, pedigree (1,1,4,1,1)
  Input to DeNOx stage (TiO2 catalyst carrier)
  Uncertainty: uncertainty calculated from uncertainty in average DeNOx input, uncertainty in the share of thermal NOx, uncertainty of nitrogen content in average municipal waste and the uncertainty in nitrogen content in *this* waste.
  properties: wet mass 1 kg, dry mass 1 kg
- transport, freight, lorry, unspecified: 0 metric ton*km; pedigree (1,1,1,1,1)
  Transport services to transport incineration residues to landfills.
  Uncertainty: uncertainty calculated from uncertainty of the waste composition of this waste, uncertainty of transfer coefficients and the uncertainty in generic transportation distances
- process-specific burdens, slag landfill: 0 kg; pedigree (1,1,1,1,1)
  Mass-specific expenditures required for landfilling of bottom ash.
  Uncertainty: uncertainty is calculated from uncertainties in waste composition and transfer coefficients in incinerator
- waste cement, hydrated: -0.00283497, -0.00718703 kg (2 entries); lognormal variance with pedigree 0.065357, pedigree (1,1,4,1,1)
  (same comment as for waste cement, hydrated)
  production volume 9.1068e7 kg
- process-specific burdens, residual material landfill: 0.00283497, 0.00718703 kg (2 entries); lognormal variance with pedigree 0.056273, pedigree (1,1,4,1,1)
  (same comment as for process-specific burdens, residual material landfill)
- water, decarbonised: 0.00983339, 0.0255865, 0.103196, 0.0252, 0.00508019, 0.0167046, 0.000922195, 0.0131411, 0.030611, 0.192014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 kg (12 entries); lognormal variance with pedigree 0.43659, pedigree (1,1,4,1,1)
  (same comment as for water, decarbonised)
- ammonia, anhydrous, liquid: 0.000243403, 2.09234e-5, 3.25514e-5, 6.44958e-5, 6.31889e-5, 6.62288e-6, 2.96067e-5, 0.000700408 kg (8 entries); lognormal variance with pedigree 0.20985, pedigree (1,1,4,1,1)
  (same comment as for ammonia, anhydrous, liquid)
- heat, district or industrial, natural gas: 0.0024168, 0.0579113, 0.156812 MJ (3 entries); lognormal variance with pedigree 0.20985, pedigree (1,1,4,1,1)
  (same comment as for heat, district or industrial, natural gas)
- cement, unspecified: 0.000578883, 0.000120448, 8.82201e-6, 2.51456e-5, 0.000568676, 1.67378e-5, 0.000183831, 2.22414e-5, 0.00248422 kg (9 entries); lognormal variance with pedigree 0.065357, pedigree (1,1,4,1,1)
  (same comment as for cement, unspecified)
- transport, freight, lorry, unspecified: 0.000148121, 2.31902e-5, 0.00112299 metric ton*km (3 entries); lognormal variance with pedigree 0.043129, pedigree (1,1,4,1,1)
  (same comment as for transport, freight, lorry, unspecified)
- process-specific burdens, slag landfill: 0.006318, 0.016017 kg (2 entries); lognormal variance with pedigree 0.070869, pedigree (1,1,4,1,1)
  (same comment as for process-specific burdens, slag landfill)

## Inputs from nature
- Oxygen [natural resource, in air]: 3.1767 kg; lognormal variance with pedigree 0.019627, pedigree (1,1,4,1,1)
  Oxygen from ambient air needed to combust and oxidise this waste. Net demand, i.e. without O2 leaving the plant in flue gas uncombusted.
  Uncertainty: uncertainty is calculated from uncertainties in waste composition and transfer coefficients to flue gas and soild residues in incinerator

## Emissions to nature
- Zinc [air, urban air close to ground]: 2.2923e-7 kg; lognormal variance with pedigree 0.82561, pedigree (1,1,4,1,1)
  Emission to air from waste composition and transfer coefficients.
  Uncertainty: uncertainty is calculated from uncertainties in waste composition and transfer coefficients in incinerator
- Manganese [air, urban air close to ground]: 5.7384e-9 kg; lognormal variance with pedigree 1.1563, pedigree (1,1,4,1,1)
  (same comment as for Zinc)
- Antimony [water, surface water]: 3.4705e-6 kg; lognormal variance with pedigree 1.2734, pedigree (1,1,4,1,1)
  Emissions to water from waste composition and transfer coefficients in incinerator and landfills.
  Uncertainty: uncertainty is calculated from uncertainties in waste composition and transfer coefficients in incinerator and landfills
- Sulfate [water, surface water]: 0.00021656 kg; lognormal variance with pedigree 0.37689, pedigree (1,1,4,1,1)
  (same comment as for Antimony)
- Chromium VI [water, ground-, long-term]: 1.1436e-6 kg; lognormal variance with pedigree 1.7068, pedigree (1,1,4,1,1)
  Long-term emissions from landfilling of incineration residues.
  Uncertainty: uncertainty is calculated from uncertainties in waste composition and transfer coefficients in incinerator and landfills.
- Mercury [air, urban air close to ground]: 1.3595e-9 kg; lognormal variance with pedigree 1.9367, pedigree (1,1,4,1,1)
  (same comment as for Zinc)
- Bromine [water, surface water]: 8.6605e-6 kg; lognormal variance with pedigree 0.65679, pedigree (1,1,4,1,1)
  (same comment as for Antimony)
- Chromium VI [water, surface water]: 3.4841e-7 kg; lognormal variance with pedigree 1.3191, pedigree (1,1,4,1,1)
  (same comment as for Antimony)
- Copper [air, urban air close to ground]: 3.7888e-9 kg; lognormal variance with pedigree 1.1196, pedigree (1,1,4,1,1)
  (same comment as for Zinc)
- Selenium [water, ground-, long-term]: 1.308e-6 kg; lognormal variance with pedigree 1.0896, pedigree (1,1,4,1,1)
  (same comment as for Chromium VI)
- NMVOC, non-methane volatile organic compounds, unspecified origin [air, urban air close to ground]: 2.9221e-7 kg; lognormal variance with pedigree 0.074629, pedigree (1,1,4,1,1)
  Incomplete combustion product emitted to air.
  Uncertainty: uncertainty calculated from uncertainty in average operation emissions, and the uncertainty of the flue gas volume from this waste.
- Water [water, surface water]: 0.00047519 m3; lognormal variance with pedigree 1.8197, pedigree (1,1,4,1,1)
  Process water released to surface water.
  Uncertainty: uncertainty calculated from uncertainty in process water input and the uncertainty of fraction to surface water.
- Water [air, urban air close to ground]: 0.0018947 m3; lognormal variance with pedigree 1.2472, pedigree (1,1,4,1,1)
  Water vapour from waste humidity, hydrogen oxidation and part of the process water.
  Uncertainty: Uncertainty calculated from uncertainty in waste composition, process water input and the uncertainty of fraction to air.
- Nitrate [water, ground-, long-term]: 4.6656e-5 kg; lognormal variance with pedigree 0.63742, pedigree (1,1,4,1,1)
  (same comment as for Chromium VI)
- Titanium [air, urban air close to ground]: 7.956e-7 kg; lognormal variance with pedigree 0.6945, pedigree (1,1,4,1,1)
  (same comment as for Zinc)
- Magnesium [air, urban air close to ground]: 1.0115e-7 kg; lognormal variance with pedigree 0.99455, pedigree (1,1,4,1,1)
  (same comment as for Zinc)
- COD, Chemical Oxygen Demand [water, ground-, long-term]: 0.0061733 kg; lognormal variance with pedigree 0.021173, pedigree (1,1,4,1,1)
  (same comment as for Chromium VI)
- Magnesium [water, surface water]: 4.4745e-7 kg; lognormal variance with pedigree 1.0943, pedigree (1,1,4,1,1)
  (same comment as for Antimony)
- Arsenic, ion [water, ground-, long-term]: 5.4562e-7 kg; lognormal variance with pedigree 1.5001, pedigree (1,1,4,1,1)
  (same comment as for Chromium VI)
- DOC, Dissolved Organic Carbon [water, ground-, long-term]: 0.0024428 kg; lognormal variance with pedigree 0.021173, pedigree (1,1,4,1,1)
  (same comment as for Chromium VI)
- Titanium, ion [water, surface water]: 3.5754e-7 kg; lognormal variance with pedigree 0.52117, pedigree (1,1,4,1,1)
  (same comment as for Antimony)
- Sodium, ion [water, ground-, long-term]: 0.001012 kg; lognormal variance with pedigree 0.31202, pedigree (1,1,4,1,1)
  (same comment as for Chromium VI)
- Carbon dioxide, fossil [air, urban air close to ground]: 2.996 kg; lognormal variance with pedigree 0.0092141, pedigree (1,1,4,1,1)
  (same comment as for Zinc)
- Cobalt [water, surface water]: 3.0405e-10 kg; lognormal variance with pedigree 1.7909, pedigree (1,1,4,1,1)
  (same comment as for Antimony)
- Titanium, ion [water, ground-, long-term]: 0.00028668 kg; lognormal variance with pedigree 0.79994, pedigree (1,1,4,1,1)
  (same comment as for Chromium VI)
- Cadmium, ion [water, surface water]: 3.2535e-9 kg; lognormal variance with pedigree 0.93936, pedigree (1,1,4,1,1)
  (same comment as for Antimony)
- Toluene [air, urban air close to ground]: 1.2842e-8 kg; lognormal variance with pedigree 0.074629, pedigree (1,1,4,1,1)
  (same comment as for NMVOC, non-methane volatile organic compounds, unspecified origin)
- Heat, waste [water, surface water]: 7.1723 MJ; lognormal variance with pedigree 0.02652, pedigree (1,1,4,1,1)
  Waste heat generated from heating value of this waste plus any electricity required to process it.
  Uncertainty: uncertainty is calculated from uncertainties in waste composition and uncertainties in energy efficiency and the uncertainty in internal energy demand
- Lead [water, surface water]: 2.1614e-9 kg; lognormal variance with pedigree 0.98242, pedigree (1,1,4,1,1)
  (same comment as for Antimony)
- Vanadium [air, urban air close to ground]: 4.6778e-5 kg; lognormal variance with pedigree 0.57263, pedigree (1,1,4,1,1)
  (same comment as for Zinc)
- DOC, Dissolved Organic Carbon [water, surface water]: 0.00041994 kg; lognormal variance with pedigree 0.032232, pedigree (1,1,4,1,1)
  (same comment as for Antimony)
- Thallium [air, urban air close to ground]: 3.8358e-10 kg; lognormal variance with pedigree 1.7197, pedigree (1,1,4,1,1)
  (same comment as for Zinc)
- Calcium, ion [water, surface water]: 2.8664e-5 kg; lognormal variance with pedigree 0.41929, pedigree (1,1,4,1,1)
  (same comment as for Antimony)
- Cadmium [air, urban air close to ground]: 1.7302e-8 kg; lognormal variance with pedigree 1.1343, pedigree (1,1,4,1,1)
  (same comment as for Zinc)
- Hydrogen fluoride [air, urban air close to ground]: 9.7047e-8 kg; lognormal variance with pedigree 1.2389, pedigree (1,1,4,1,1)
  (same comment as for Zinc)
- Phenol, pentachloro- [air, urban air close to ground]: 2.7962e-12 kg; lognormal variance with pedigree 0.074629, pedigree (1,1,4,1,1)
  (same comment as for NMVOC, non-methane volatile organic compounds, unspecified origin)
- Lead [water, ground-, long-term]: 1.0925e-5 kg; lognormal variance with pedigree 4.3071, pedigree (1,1,4,1,1)
  (same comment as for Chromium VI)
- Particulates, < 2.5 um [air, urban air close to ground]: 7.666e-7 kg; lognormal variance with pedigree 0.37366, pedigree (1,1,4,1,1)
  (same comment as for NMVOC, non-methane volatile organic compounds, unspecified origin)
- Cobalt [air, urban air close to ground]: 3.0521e-9 kg; lognormal variance with pedigree 1.5272, pedigree (1,1,4,1,1)
  (same comment as for Zinc)
- Mercury [water, ground-, long-term]: 3.0538e-9 kg; lognormal variance with pedigree 3.4337, pedigree (1,1,4,1,1)
  (same comment as for Chromium VI)
- Selenium [air, urban air close to ground]: 2.4025e-8 kg; lognormal variance with pedigree 1.4984, pedigree (1,1,4,1,1)
  (same comment as for Zinc)
- Manganese [water, ground-, long-term]: 1.8537e-5 kg; lognormal variance with pedigree 2.1037, pedigree (1,1,4,1,1)
  (same comment as for Chromium VI)
- Tin [air, urban air close to ground]: 2.4914e-12 kg; lognormal variance with pedigree 1.4768, pedigree (1,1,4,1,1)
  (same comment as for Zinc)
- Benzene, pentachloro- [air, urban air close to ground]: 3.3924e-11 kg; lognormal variance with pedigree 0.074629, pedigree (1,1,4,1,1)
  (same comment as for NMVOC, non-methane volatile organic compounds, unspecified origin)
- Selenium [water, surface water]: 6.803e-7 kg; lognormal variance with pedigree 1.183, pedigree (1,1,4,1,1)
  (same comment as for Antimony)
- Fluoride [water, ground-, long-term]: 1.2897e-5 kg; lognormal variance with pedigree 0.73729, pedigree (1,1,4,1,1)
  (same comment as for Chromium VI)
- Aluminium [water, surface water]: 2.0756e-8 kg; lognormal variance with pedigree 1.1193, pedigree (1,1,4,1,1)
  (same comment as for Antimony)
- Nickel, ion [water, ground-, long-term]: 9.2049e-7 kg; lognormal variance with pedigree 1.5503, pedigree (1,1,4,1,1)
  (same comment as for Chromium VI)
- Barium [water, ground-, long-term]: 0.00012074 kg; lognormal variance with pedigree 2.2291, pedigree (1,1,4,1,1)
  (same comment as for Chromium VI)
- Iron, ion [water, ground-, long-term]: 0.00077405 kg; lognormal variance with pedigree 0.78647, pedigree (1,1,4,1,1)
  (same comment as for Chromium VI)
- Calcium [air, urban air close to ground]: 2.0377e-5 kg; lognormal variance with pedigree 0.55141, pedigree (1,1,4,1,1)
  (same comment as for Zinc)
- Benzo(a)pyrene [air, urban air close to ground]: 1.4288e-13 kg; lognormal variance with pedigree 0.37366, pedigree (1,1,4,1,1)
  (same comment as for NMVOC, non-methane volatile organic compounds, unspecified origin)
- Nitrate [water, surface water]: 1.6536e-5 kg; lognormal variance with pedigree 0.44289, pedigree (1,1,4,1,1)
  (same comment as for Antimony)
- Benzene [air, urban air close to ground]: 6.4209e-9 kg; lognormal variance with pedigree 0.074629, pedigree (1,1,4,1,1)
  (same comment as for NMVOC, non-methane volatile organic compounds, unspecified origin)
- Tin, ion [water, surface water]: 1.009e-10 kg; lognormal variance with pedigree 2.0244, pedigree (1,1,4,1,1)
  (same comment as for Antimony)
- Arsenic [air, urban air close to ground]: 1.4272e-8 kg; lognormal variance with pedigree 1.5128, pedigree (1,1,4,1,1)
  (same comment as for Zinc)
- Heat, waste [air, urban air close to ground]: 31.28 MJ; lognormal variance with pedigree 0.02652, pedigree (1,1,4,1,1)
  (same comment as for Heat, waste)
- Chromium [air, urban air close to ground]: 1.0886e-8 kg; lognormal variance with pedigree 1.2662, pedigree (1,1,4,1,1)
  (same comment as for Zinc)
- Dioxins, measured as 2,3,7,8-tetrachlorodibenzo-p-dioxin [air, urban air close to ground]: 1.2841e-14 kg; lognormal variance with pedigree 0.37366, pedigree (1,1,4,1,1)
  (same comment as for NMVOC, non-methane volatile organic compounds, unspecified origin)
- Sodium [air, urban air close to ground]: 1.1538e-5 kg; lognormal variance with pedigree 0.62967, pedigree (1,1,4,1,1)
  (same comment as for Zinc)
- Cadmium, ion [water, ground-, long-term]: 2.477e-6 kg; lognormal variance with pedigree 6.5692, pedigree (1,1,4,1,1)
  (same comment as for Chromium VI)
- Mercury [water, surface water]: 5.2073e-11 kg; lognormal variance with pedigree 1.4077, pedigree (1,1,4,1,1)
  (same comment as for Antimony)
- Cobalt [water, ground-, long-term]: 1.367e-6 kg; lognormal variance with pedigree 1.425, pedigree (1,1,4,1,1)
  (same comment as for Chromium VI)
- Chloride [water, ground-, long-term]: 0.00033868 kg; lognormal variance with pedigree 0.6133, pedigree (1,1,4,1,1)
  (same comment as for Chromium VI)
- Bromine [water, ground-, long-term]: 9.2428e-7 kg; lognormal variance with pedigree 1.2815, pedigree (1,1,4,1,1)
  (same comment as for Chromium VI)
- TOC, Total Organic Carbon [water, surface water]: 0.00041994 kg; lognormal variance with pedigree 0.032232, pedigree (1,1,4,1,1)
  (same comment as for Antimony)
- Particulates, > 2.5 um, and < 10um [air, urban air close to ground]: 3.8523e-9 kg; lognormal variance with pedigree 0.16958, pedigree (1,1,4,1,1)
  (same comment as for NMVOC, non-methane volatile organic compounds, unspecified origin)
- Calcium, ion [water, ground-, long-term]: 0.0019286 kg; lognormal variance with pedigree 0.50564, pedigree (1,1,4,1,1)
  (same comment as for Chromium VI)
- Iron, ion [water, surface water]: 4.0336e-8 kg; lognormal variance with pedigree 0.8818, pedigree (1,1,4,1,1)
  (same comment as for Antimony)
- Nickel [air, urban air close to ground]: 1.2047e-9 kg; lognormal variance with pedigree 1.5989, pedigree (1,1,4,1,1)
  (same comment as for Zinc)
- Arsenic, ion [water, surface water]: 1.2621e-6 kg; lognormal variance with pedigree 1.3857, pedigree (1,1,4,1,1)
  (same comment as for Antimony)
- Tin, ion [water, ground-, long-term]: 1.4597e-6 kg; lognormal variance with pedigree 2.2454, pedigree (1,1,4,1,1)
  (same comment as for Chromium VI)
- TOC, Total Organic Carbon [water, ground-, long-term]: 0.0024428 kg; lognormal variance with pedigree 0.021173, pedigree (1,1,4,1,1)
  (same comment as for Chromium VI)
- Beryllium [water, surface water]: 3.0031e-10 kg; lognormal variance with pedigree 2.1862, pedigree (1,1,4,1,1)
  (same comment as for Antimony)
- BOD5, Biological Oxygen Demand [water, ground-, long-term]: 0.0020193 kg; lognormal variance with pedigree 0.021173, pedigree (1,1,4,1,1)
  (same comment as for Chromium VI)
- Aluminium [water, ground-, long-term]: 0.0001387 kg; lognormal variance with pedigree 0.80629, pedigree (1,1,4,1,1)
  (same comment as for Chromium VI)
- COD, Chemical Oxygen Demand [water, surface water]: 0.00096163 kg; lognormal variance with pedigree 0.032169, pedigree (1,1,4,1,1)
  (same comment as for Antimony)
- Thallium [water, surface water]: 2.3499e-10 kg; lognormal variance with pedigree 1.8749, pedigree (1,1,4,1,1)
  (same comment as for Antimony)
- Ammonia [air, urban air close to ground]: 1.3652e-6 kg; lognormal variance with pedigree 0.2493, pedigree (1,1,4,1,1)
  Nitrogen species emitted to air after DeNOx stage.
  Uncertainty: uncertainty calculated from uncertainty in average N-emissions and uncertainty in the share of thermal NOx and the uncertainty in nitrogen content in *this* waste.
- Magnesium [water, ground-, long-term]: 8.4924e-5 kg; lognormal variance with pedigree 0.94634, pedigree (1,1,4,1,1)
  (same comment as for Chromium VI)
- Iron [air, urban air close to ground]: 2.7498e-9 kg; lognormal variance with pedigree 0.67282, pedigree (1,1,4,1,1)
  (same comment as for Zinc)
- Dinitrogen monoxide [air, urban air close to ground]: 1.9347e-5 kg; lognormal variance with pedigree 1.4058, pedigree (1,1,4,1,1)
  (same comment as for Ammonia)
- Chromium, ion [water, surface water]: 9.6799e-10 kg; lognormal variance with pedigree 1.2825, pedigree (1,1,4,1,1)
  (same comment as for Antimony)
- Hydrogen chloride [air, urban air close to ground]: 8.3403e-7 kg; lognormal variance with pedigree 0.6396, pedigree (1,1,4,1,1)
  (same comment as for Zinc)
- Vanadium, ion [water, surface water]: 3.5215e-6 kg; lognormal variance with pedigree 0.76955, pedigree (1,1,4,1,1)
  (same comment as for Antimony)
- Sodium, ion [water, surface water]: 0.00038184 kg; lognormal variance with pedigree 0.32022, pedigree (1,1,4,1,1)
  (same comment as for Antimony)
- Fluoride [water, surface water]: 1.0999e-6 kg; lognormal variance with pedigree 0.79415, pedigree (1,1,4,1,1)
  (same comment as for Antimony)
- Lead [air, urban air close to ground]: 1.8616e-9 kg; lognormal variance with pedigree 1.2003, pedigree (1,1,4,1,1)
  (same comment as for Zinc)
- Barium [air, urban air close to ground]: 9.4099e-7 kg; lognormal variance with pedigree 0.86959, pedigree (1,1,4,1,1)
  (same comment as for Zinc)
- Thallium [water, ground-, long-term]: 2.2383e-7 kg; lognormal variance with pedigree 1.2765, pedigree (1,1,4,1,1)
  (same comment as for Chromium VI)
- Antimony [water, ground-, long-term]: 6.4032e-6 kg; lognormal variance with pedigree 1.2376, pedigree (1,1,4,1,1)
  (same comment as for Chromium VI)
- Copper, ion [water, surface water]: 5.3603e-9 kg; lognormal variance with pedigree 0.9768, pedigree (1,1,4,1,1)
  (same comment as for Antimony)
- Nickel, ion [water, surface water]: 6.4432e-10 kg; lognormal variance with pedigree 2.1244, pedigree (1,1,4,1,1)
  (same comment as for Antimony)
- BOD5, Biological Oxygen Demand [water, surface water]: 0.00094927 kg; lognormal variance with pedigree 0.032727, pedigree (1,1,4,1,1)
  (same comment as for Antimony)
- Bromine [air, urban air close to ground]: 4.79e-9 kg; lognormal variance with pedigree 1.3027, pedigree (1,1,4,1,1)
  (same comment as for Zinc)
- Strontium [water, surface water]: 5.3435e-8 kg; lognormal variance with pedigree 1.7035, pedigree (1,1,4,1,1)
  (same comment as for Antimony)
- Manganese [water, surface water]: 4.6772e-9 kg; lognormal variance with pedigree 0.96951, pedigree (1,1,4,1,1)
  (same comment as for Antimony)
- Barium [water, surface water]: 3.2267e-8 kg; lognormal variance with pedigree 1.1592, pedigree (1,1,4,1,1)
  (same comment as for Antimony)
- Strontium [water, ground-, long-term]: 8.4757e-5 kg; lognormal variance with pedigree 0.9914, pedigree (1,1,4,1,1)
  (same comment as for Chromium VI)
- Copper, ion [water, ground-, long-term]: 3.695e-5 kg; lognormal variance with pedigree 1.0685, pedigree (1,1,4,1,1)
  (same comment as for Chromium VI)
- Carbon monoxide, fossil [air, urban air close to ground]: 1.0915e-5 kg; lognormal variance with pedigree 0.74779, pedigree (1,1,4,1,1)
  (same comment as for NMVOC, non-methane volatile organic compounds, unspecified origin)
- Zinc, ion [water, ground-, long-term]: 0.000104 kg; lognormal variance with pedigree 2.9311, pedigree (1,1,4,1,1)
  (same comment as for Chromium VI)
- Aluminium [air, urban air close to ground]: 1.5637e-10 kg; lognormal variance with pedigree 0.95777, pedigree (1,1,4,1,1)
  (same comment as for Zinc)
- Zinc, ion [water, surface water]: 3.0857e-8 kg; lognormal variance with pedigree 0.67975, pedigree (1,1,4,1,1)
  (same comment as for Antimony)
- Sulfate [water, ground-, long-term]: 0.0010573 kg; lognormal variance with pedigree 0.45912, pedigree (1,1,4,1,1)
  (same comment as for Chromium VI)
- Methane, fossil [air, urban air close to ground]: 9.6313e-8 kg; lognormal variance with pedigree 0.074629, pedigree (1,1,4,1,1)
  (same comment as for NMVOC, non-methane volatile organic compounds, unspecified origin)
- Antimony [air, urban air close to ground]: 8.0659e-12 kg; lognormal variance with pedigree 1.3464, pedigree (1,1,4,1,1)
  (same comment as for Zinc)
- Cyanide [air, urban air close to ground]: 4.1566e-6 kg; lognormal variance with pedigree 1.4058, pedigree (1,1,4,1,1)
  (same comment as for Ammonia)
- Strontium [air, urban air close to ground]: 8.4868e-9 kg; lognormal variance with pedigree 1.024, pedigree (1,1,4,1,1)
  (same comment as for Zinc)
- Nitrogen oxides [air, urban air close to ground]: 0.00043233 kg; lognormal variance with pedigree 0.2493, pedigree (1,1,4,1,1)
  Sum of fuel-Nox and thermal-NOx emitted to air after DeNOx stage.
  Uncertainty: uncertainty calculated from uncertainty in average N-emissions and uncertainty in the share of thermal NOx and the uncertainty in nitrogen content in *this* waste.
- Beryllium [water, ground-, long-term]: 4.3821e-7 kg; lognormal variance with pedigree 1.5918, pedigree (1,1,4,1,1)
  (same comment as for Chromium VI)
- Chloride [water, surface water]: 0.001122 kg; lognormal variance with pedigree 0.50323, pedigree (1,1,4,1,1)
  (same comment as for Antimony)
- Vanadium, ion [water, ground-, long-term]: 0.0010282 kg; lognormal variance with pedigree 0.43263, pedigree (1,1,4,1,1)
  (same comment as for Chromium VI)
- Sulfur dioxide [air, urban air close to ground]: 4.5398e-6 kg; lognormal variance with pedigree 0.78928, pedigree (1,1,4,1,1)
  (same comment as for Zinc)
- Benzene, hexachloro- [air, urban air close to ground]: 1.3426e-11 kg; lognormal variance with pedigree 0.074629, pedigree (1,1,4,1,1)
  (same comment as for NMVOC, non-methane volatile organic compounds, unspecified origin)
