# treatment of zinc in car shredder residue, municipal incineration with fly ash extraction

Dataset: EcoSpold 2, unit process
Geography: CH
Time period: 2006-01-01 to 2021-12-31
Technology level: current
Classification: ISIC rev.4 ecoinvent: 3821:Treatment and disposal of non-hazardous waste
Synonyms: municipal waste incineration; Kehrichtverbrennung; Siedlungsabfallverbrennung
Scenario: Business-as-Usual
System model: Allocation, cut-off by classification
Share of production covered: 100 %
Generated by: Gabor Doka
Published in: Doka G. 2015
Database: ecoinvent
isCopyrightProtected: true
accessRestrictedTo: 1

## General comment
This dataset represents the activity of waste disposal of zinc in car shredder residue in a municipal solid waste incinerator (MSWI) // Recommended use of this dataset: For disposal of rather fine or dusty zinc, which goes to incineration as part of Automotive Shredder Residue (ASR). Due to fine grain size of the particles, 50% burnability is assumed, therefore not suited for less fine zinc parts in waste. Pure, isolated zinc fractions will not be disposed in incinerators, but rather go to recycling. // Inventoried waste contains 50% Zn in ASR burnable; 50% Zn in ASR inert; . // Waste composition (wet, in ppm): H2O n.a.; O n.a.; H n.a.; C n.a.; S n.a.; N n.a.; P n.a.; B n.a.; Cl n.a.; Br n.a.; F n.a.; I n.a.; Ag n.a.; As n.a.; Ba n.a.; Cd n.a.; Co n.a.; Cr n.a.; Cu n.a.; Hg n.a.; Mn n.a.; Mo n.a.; Ni n.a.; Pb n.a.; Sb n.a.; Se n.a.; Sn n.a.; V n.a.; Zn 1000000; Be n.a.; Sc n.a.; Sr n.a.; Ti n.a.; Tl n.a.; W n.a.; Si n.a.; Fe n.a.; Ca n.a.; Al n.a.; K n.a.; Mg n.a.; Na n.a.; // Share of carbon in waste that is biogenic 60.4%. // Share of metals in waste not oxidised and bulk-recyclable (exclude very small or thin parts) Iron: 0%; Alu: 0%; Copper: 0%. // Recovery of metal scrap from bottom ash to recycling: 0g iron scrap, 0g aluminium scrap, 0g copper scrap. From this waste, the FLUWA process in the technology mix recovers 0.11kg (DM) of a hydroxide sludge to be recycled in zinc furnaces. // Ultimately one kg of this waste produces 1.11 kg of bottom ash (can include some washed ash) and 0.2356 kg of residues, which are landfilled (technology mix). Additional solidification of residues with 0.09424 kg of cement.Net energy production: 0MJ/kg electric energy and 0MJ/kg thermal energy. //

## Included activities start
waste incineration from waste reception gate and delivery into waste bunker at incinerator plant site (without transports to the incinerator)

## Included activities end
Waste-specific short-term emissions to water from leachate. Long-term emissions from landfill to ground water.

## Geography
Specific to the technology mix encountered in Switzerland in 2012.

## Technology
average Swiss MSWI plants in 2010 (grate incinerators) with electrostatic precipitator for fly ash (ESP), wet flue gas scrubber and 25% SNCR , 42.77% SCR-high dust , 32.68% SCR-low dust -DeNOx facilities and 0% without Denox (weighted according to mass of burnt waste, representing Swiss average). Efficiency of iron scrap separation from slag : 58%. Efficiency of non-ferrous scrap separation from slag : 31%. The technology mix for this dataset includes a filter ash treatment (FLUWA) of a share of 46.22%. Gross electric efficiency technology mix 15.84% and Gross thermal efficiency technology mix 28.51%

## Time period
Waste composition as given in literature reference, theoretical data or other source. Transfer coefficients for modern MSWI.

## Reference product
- zinc in car shredder residue: -1 kg; CPC 39365: Waste and scrap of zinc; By-product classification Waste; CAS 7440-66-6
  Main reference product of this activity (supply of disposal service).
  production volume 1.073e6 kg
    based on corresponding global production volume of MSW fraction in conventional MSWI (wo fly ash extraction) and scaled down to annual Swiss incinerated MSW mass of 3.02 mio. tonnes.
  property price 0 EUR2005
    Waste products are assigned a price of zero as they are assumed to require further treatment.
  properties: zinc content 1, dry mass 1 kg, wet mass 1 kg

## By-products
- metalliferous hydroxide sludge: 0 kg; By-product classification Recyclable; CPC 1429: Other non-ferrous metal ores and concentrates (other than uranium or thorium ores and concentrates); pedigree (1,1,1,1,1)
  Metalliferous hydroxide sludge from filter ash leaching (FLUWA).
  Uncertainty: uncertainty is calculated from uncertainties in waste composition and transfer coefficients to filter ash in incinerator and the uncertainty of the transfer coefficients of the FLUWA process.
  production volume 0 kg
    calculated in proportion to reference product waste input to incinerator
  property heating value, net 0 MJ
    Non combustible products are assumed to have an LHV equal to zero (0).
  property price 0.0042 EUR2005
    World market value of manure, deflated with barley world market price and consumer price index, based on [http://www.gov.pe.ca/photos/original/af_NM_manconv.pdf].
  properties: water in wet mass 0.75 kg, zinc content 0.80337, dry mass 0.25 kg, wet mass 1 kg, oxygen content 0.19663, water content 3

## Inputs from technosphere
- iron (III) chloride, without water, in 40% solution state: 0.0040187 kg; lognormal variance with pedigree 0.022821, pedigree (1,1,4,1,1)
  Auxilliary inputs for the wastewater treatment stage of the incinerator plant.
  Uncertainty: uncertainty calculated from uncertainty in average FeCl3 input, of transfer coefficients in the incinerator, and the uncertainty of the waste composition of this waste
  properties: wet mass 1 kg, dry mass 1 kg
- process-specific burdens, residual material landfill: 0.4697 kg; lognormal variance with pedigree 0.00833357, pedigree (1,1,4,1,1)
  Mass-specific expenditures required for landfilling of incineration residues.;activityLink introduced to establish a direct link to the corresponding regional supply of this product
  Uncertainty: uncertainty is calculated from uncertainties in waste composition and transfer coefficients in incinerator
- titanium dioxide: 4.9828e-6 kg; lognormal variance with pedigree 0.48632, pedigree (1,1,4,1,1)
  Input to DeNOx stage (TiO2 catalyst carrier)
  Uncertainty: uncertainty calculated from uncertainty in average DeNOx input, uncertainty in the share of thermal NOx, uncertainty of nitrogen content in average municipal waste and the uncertainty in nitrogen content in *this* waste.
  properties: wet mass 1 kg, dry mass 1 kg
- process-specific burdens, slag landfill: 1.1105 kg; lognormal variance with pedigree 0.0127868, pedigree (1,1,4,1,1)
  Mass-specific expenditures required for landfilling of bottom ash.;activityLink introduced to establish a direct link to the corresponding regional supply of this product
  Uncertainty: uncertainty is calculated from uncertainties in waste composition and transfer coefficients in incinerator
- hydrochloric acid, without water, in 30% solution state: 0.0066779 kg; lognormal variance with pedigree 0.00852228, pedigree (1,1,4,1,1)
  Auxilliary inputs for the wastewater treatment stage of the incinerator plant.
  Uncertainty: uncertainty calculated from uncertainty in average HCl input, of transfer coefficients in the incinerator, and the uncertainty of the waste composition of this waste
  properties: heating value, net 3.32 MJ, wet mass 1 kg, dry mass 1 kg
- heat, district or industrial, natural gas: 0.014872 MJ; lognormal variance with pedigree 0.14559, pedigree (1,1,4,1,1)
  Input to DeNOx stage, to heat up flue gas in low-dust SCR.
  Uncertainty: uncertainty calculated from uncertainty in average DeNOx input, uncertainty in the share of thermal NOx, uncertainty of nitrogen content in average municipal waste and the uncertainty in nitrogen content in *this* waste.
  properties: heating value, net 1 MJ
- slag landfill: 1.9742e-9 unit; lognormal variance with pedigree 0.0127868, pedigree (1,1,4,1,1)
  Landfill infrastructure required for landfilling of bottom ash.
  Uncertainty: uncertainty is calculated from uncertainties in waste composition and transfer coefficients in incinerator
- sodium hydroxide, without water, in 50% solution state: 0.0048321 kg; lognormal variance with pedigree 0.00852548, pedigree (1,1,4,1,1)
  Auxilliary inputs for the flue gas treatment stage of the incinerator plant, and partially in the filter ash treatment (FLUWA).
  Uncertainty: uncertainty calculated from uncertainty in average NaOH input, of transfer coefficients in the incinerator, and the uncertainty of the waste composition of this waste
  properties: heating value, net 3.03 MJ, wet mass 1 kg, dry mass 1 kg
- ammonia, anhydrous, liquid: 7.9531e-5 kg; lognormal variance with pedigree 0.14559, pedigree (1,1,4,1,1)
  Input to DeNOx stage (100% NH3).
  Uncertainty: uncertainty calculated from uncertainty in average DeNOx input, uncertainty in the share of thermal NOx, uncertainty of nitrogen content in average municipal waste and the uncertainty in nitrogen content in *this* waste.
  properties: dry mass 1 kg, wet mass 1 kg
- water, decarbonised: 0.95613 kg; lognormal variance with pedigree 0.022821, pedigree (1,1,4,1,1)
  Incinerator process water used in flue gas scrubber stage.
  Uncertainty: uncertainty calculated from uncertainty in average water input, and the uncertainty of the waste composition of this waste
  properties: wet mass 1 kg
- transport, freight, lorry, unspecified: 0.059196 metric ton*km; lognormal variance with pedigree 0.0107137, pedigree (1,1,4,1,1)
  Transport services to transport incineration residues to landfills and filter ash to external treatments (FLUWA).
  Uncertainty: uncertainty calculated from uncertainty of the waste composition of this waste, uncertainty of transfer coefficients and the uncertainty in generic transportation distances
- electricity, for reuse in municipal waste incineration only: 0.040198 kWh; name E_el_prod_MSWI; lognormal variance with pedigree 0.00859512, pedigree (1,1,4,1,1)
  Net electricity required to incinerate this waste (subsidiesed from high-calorific waste fractions).
  Uncertainty: uncertainty is calculated from uncertainties in waste composition and uncertainties in energy efficiency and the uncertainty in internal energy demand
- residual material landfill: 9.7855e-10 unit; lognormal variance with pedigree 0.00833357, pedigree (1,1,4,1,1)
  Landfill infrastructure required for landfilling of incineration residues.
  Uncertainty: uncertainty is calculated from uncertainties in waste composition and transfer coefficients in incinerator
- waste cement, hydrated: -0.23559 kg; lognormal variance with pedigree 0.0174176, pedigree (1,1,4,1,1)
  Hydrated cement output for solidification of landfilled residual material.
  Uncertainty: Uncertainty calculated from uncertainty of the waste composition of this waste and transfer coefficients in the incinerator and of the solidification recipe.
  production volume 252790 kg
    calculated in proportion to reference product waste input to incinerator
  properties: wet mass 1 kg, dry mass 1 kg
- heat, for reuse in municipal waste incineration only: 0.11042 MJ; name E_th_prod_MSWI; lognormal variance with pedigree 0.00859512, pedigree (1,1,4,1,1)
  Net heat required to incinerate this waste (subsidiesed from high-calorific waste fractions).
  Uncertainty: uncertainty is calculated from uncertainties in waste composition and uncertainties in energy efficiency and the uncertainty in internal energy demand
- cement, unspecified: 0.094235 kg; lognormal variance with pedigree 0.0174176, pedigree (1,1,4,1,1)
  Cement required for solidification of landfilled residual material.
  Uncertainty: Uncertainty calculated from uncertainty of the waste composition of this waste, of transfer coefficients in the incinerator and of the solidification recipe.
  properties: wet mass 1 kg, dry mass 1 kg
- hydrogen peroxide, without water, in 50% solution state: 0.016942 kg; lognormal variance with pedigree 0.00852548, pedigree (1,1,4,1,1)
  Auxilliary oxidising agent for filter ash treatment (FLUWA).
  Uncertainty: uncertainty calculated from uncertainty in of transfer coefficients in the incinerator, and the uncertainty of the waste composition of this waste
  properties: wet mass 1 kg, dry mass 1 kg, heating value, net 7.13 MJ
- chemical, inorganic: 8.0653e-5 kg; lognormal variance with pedigree 0.022821, pedigree (1,1,4,1,1)
  Auxilliary inputs for the wastewater treatment stage of the incinerator plant. Proxy for Polyelectrolyte.
  Uncertainty: uncertainty calculated from uncertainty in average Polyelectrolyte input, of transfer coefficients in the incinerator, and the uncertainty of the waste composition of this waste
  properties: carbon content, fossil 0.003, dry mass 1 kg, wet mass 1 kg
- municipal waste incineration facility: 2.5e-10 unit
  Demands per kilogram waste.
- chromium oxide, flakes: 1.0169e-7 kg; lognormal variance with pedigree 0.48632, pedigree (1,1,4,1,1)
  Input to DeNOx stage. Active component in SCR catalyst (vanadium pentoxide, V2O5), here approximated with the available chromium trioxide.
  Uncertainty: uncertainty calculated from uncertainty in average DeNOx input, uncertainty in the share of thermal NOx, uncertainty of nitrogen content in average municipal waste and the uncertainty in nitrogen content in *this* waste.
  properties: dry mass 1 kg, wet mass 1 kg
- metalliferous hydroxide sludge: -0.43907 kg; lognormal variance with pedigree 0.00853451, pedigree (1,1,4,1,1)
  (same comment as for metalliferous hydroxide sludge)
  production volume 471120 kg
  properties: zinc content 0.80337, dry mass 0.25 kg, price 0.0042 EUR2005, wet mass 1 kg, oxygen content 0.19663, water content 3

## Inputs from nature
- Oxygen [natural resource, in air]: 0.24475 kg; lognormal variance with pedigree 0.00800428, pedigree (1,1,4,1,1)
  Oxygen from ambient air needed to combust and oxidise this waste. Net demand, i.e. without O2 leaving the plant in flue gas uncombusted.
  Uncertainty: uncertainty is calculated from uncertainties in waste composition and transfer coefficients to flue gas and soild residues in incinerator

## Emissions to nature
- Arsenic, ion [water, ground-, long-term]: 0 kg; pedigree (1,1,1,1,1)
  Long-term emissions from landfilling of incineration residues.
  Uncertainty: uncertainty is calculated from uncertainties in waste composition and transfer coefficients in incinerator and landfills.
- Arsenic, ion [water, surface water]: 8.8383e-7 kg
  Emissions to water from waste composition and transfer coefficients in incinerator and landfills.
- Zinc [air, urban air close to ground]: 0.00033513 kg; lognormal variance with pedigree 0.035395, pedigree (1,1,4,1,1)
  Emission to air from waste composition and transfer coefficients.
  Uncertainty: uncertainty is calculated from uncertainties in waste composition and transfer coefficients in incinerator
- Aluminium [water, ground-, long-term]: 0.00086719 kg; lognormal variance with pedigree 0.37671, pedigree (1,1,4,1,1)
  (same comment as for Arsenic, ion)
- Aluminium [water, surface water]: 1.4477e-6 kg; lognormal variance with pedigree 0.7524, pedigree (1,1,4,1,1)
  Emissions to water from waste composition and transfer coefficients in incinerator and landfills.
  Uncertainty: uncertainty is calculated from uncertainties in waste composition and transfer coefficients in incinerator and landfills
- Ammonia [air, urban air close to ground]: 9.3509e-8 kg; lognormal variance with pedigree 0.19048, pedigree (1,1,4,1,1)
  Nitrogen species emitted to air after DeNOx stage.
  Uncertainty: uncertainty calculated from uncertainty in average N-emissions and uncertainty in the share of thermal NOx and the uncertainty in nitrogen content in *this* waste.
- Calcium, ion [water, ground-, long-term]: 0.004019 kg; lognormal variance with pedigree 1.4527, pedigree (1,1,4,1,1)
  (same comment as for Arsenic, ion)
- Calcium, ion [water, surface water]: 6.7096e-6 kg; lognormal variance with pedigree 0.90914, pedigree (1,1,4,1,1)
  (same comment as for Aluminium)
- Nitrogen oxides [air, urban air close to ground]: 2.9611e-5 kg; lognormal variance with pedigree 0.19048, pedigree (1,1,4,1,1)
  Sum of fuel-Nox and thermal-NOx emitted to air after DeNOx stage.
  Uncertainty: uncertainty calculated from uncertainty in average N-emissions and uncertainty in the share of thermal NOx and the uncertainty in nitrogen content in *this* waste.
- Iron, ion [water, ground-, long-term]: 1.0863e-5 kg; lognormal variance with pedigree 7.0197, pedigree (1,1,4,1,1)
  (same comment as for Arsenic, ion)
- Iron, ion [water, surface water]: 1.8135e-8 kg; lognormal variance with pedigree 1.2913, pedigree (1,1,4,1,1)
  (same comment as for Aluminium)
- Methane, fossil [air, urban air close to ground]: 2.7935e-7 kg; lognormal variance with pedigree 0.104199, pedigree (1,1,4,1,1)
  Incomplete combustion product emitted to air.
  Uncertainty: uncertainty calculated from uncertainty in average operation emissions, and the uncertainty of the flue gas volume from this waste.
- Silicon [water, ground-, long-term]: 0.0096844 kg; lognormal variance with pedigree 0.00800076, pedigree (1,1,4,1,1)
  (same comment as for Arsenic, ion)
- Silicon [water, surface water]: 2.1829e-5 kg; lognormal variance with pedigree 0.55671, pedigree (1,1,4,1,1)
  (same comment as for Aluminium)
- Methane, non-fossil [air, urban air close to ground]: 4.2626e-7 kg; lognormal variance with pedigree 0.104199, pedigree (1,1,4,1,1)
  (same comment as for Methane, fossil)
- Thallium [water, ground-, long-term]: 1.7609e-8 kg; lognormal variance with pedigree 0.26601, pedigree (1,1,4,1,1)
  (same comment as for Arsenic, ion)
- Thallium [water, surface water]: 2.9398e-11 kg; lognormal variance with pedigree 0.72642, pedigree (1,1,4,1,1)
  (same comment as for Aluminium)
- Carbon monoxide, fossil [air, urban air close to ground]: 3.1658e-5 kg; lognormal variance with pedigree 0.84001, pedigree (1,1,4,1,1)
  (same comment as for Methane, fossil)
- Zinc, ion [water, ground-, long-term]: 0.7245 kg; lognormal variance with pedigree 0.15113, pedigree (1,1,4,1,1)
  (same comment as for Arsenic, ion)
- Zinc, ion [water, surface water]: 4.5426e-5 kg; lognormal variance with pedigree 0.54816, pedigree (1,1,4,1,1)
  (same comment as for Aluminium)
- Heat, waste [air, urban air close to ground]: 0.11778 MJ; lognormal variance with pedigree 0.00898726, pedigree (1,1,4,1,1)
  Waste heat generated from heating value of this waste plus any electricity required to process it.
  Uncertainty: uncertainty is calculated from uncertainties in waste composition and uncertainties in energy efficiency and the uncertainty in internal energy demand
- Carbon monoxide, non-fossil [air, urban air close to ground]: 4.8306e-5 kg; lognormal variance with pedigree 0.84001, pedigree (1,1,4,1,1)
  (same comment as for Methane, fossil)
- Vanadium, ion [water, ground-, long-term]: 4.491e-6 kg; lognormal variance with pedigree 0.02524, pedigree (1,1,4,1,1)
  (same comment as for Arsenic, ion)
- Vanadium, ion [water, surface water]: 1.434e-8 kg; lognormal variance with pedigree 0.54562, pedigree (1,1,4,1,1)
  (same comment as for Aluminium)
- Heat, waste [water, surface water]: 0.02693 MJ; lognormal variance with pedigree 0.00898726, pedigree (1,1,4,1,1)
  (same comment as for Heat, waste)
- Tin, ion [water, ground-, long-term]: 6.3624e-9 kg; lognormal variance with pedigree 3.9403, pedigree (1,1,4,1,1)
  (same comment as for Arsenic, ion)
- Tin, ion [water, surface water]: 1.0622e-11 kg; lognormal variance with pedigree 1.1159, pedigree (1,1,4,1,1)
  (same comment as for Aluminium)
- Benzo(a)pyrene [air, urban air close to ground]: 1.0468e-12 kg; lognormal variance with pedigree 0.4393, pedigree (1,1,4,1,1)
  (same comment as for Methane, fossil)
- Antimony [water, ground-, long-term]: 1.4405e-8 kg; lognormal variance with pedigree 0.013413, pedigree (1,1,4,1,1)
  (same comment as for Arsenic, ion)
- Antimony [water, surface water]: 7.8478e-9 kg; lognormal variance with pedigree 0.037563, pedigree (1,1,4,1,1)
  (same comment as for Aluminium)
- Phenol, pentachloro- [air, urban air close to ground]: 2.0486e-11 kg; lognormal variance with pedigree 0.104199, pedigree (1,1,4,1,1)
  (same comment as for Methane, fossil)
- Lead [water, ground-, long-term]: 7.1383e-9 kg; lognormal variance with pedigree 6.9291, pedigree (1,1,4,1,1)
  (same comment as for Arsenic, ion)
- Lead [water, surface water]: 1.1917e-11 kg; lognormal variance with pedigree 1.2868, pedigree (1,1,4,1,1)
  (same comment as for Aluminium)
- Benzene, hexachloro- [air, urban air close to ground]: 9.836e-11 kg; lognormal variance with pedigree 0.104199, pedigree (1,1,4,1,1)
  (same comment as for Methane, fossil)
- Nickel, ion [water, ground-, long-term]: 8.6598e-7 kg; lognormal variance with pedigree 0.26601, pedigree (1,1,4,1,1)
  (same comment as for Arsenic, ion)
- Nickel, ion [water, surface water]: 1.4457e-9 kg; lognormal variance with pedigree 0.72642, pedigree (1,1,4,1,1)
  (same comment as for Aluminium)
- Water [air, urban air close to ground]: 0.000542103 m3; lognormal variance with pedigree 0.17584, pedigree (1,1,4,1,1)
  Water vapour from waste humidity, hydrogen oxidation and part of the process water.
  Uncertainty: Uncertainty calculated from uncertainty in waste composition, process water input and the uncertainty of fraction to air.
- Benzene, pentachloro- [air, urban air close to ground]: 2.4853e-10 kg; lognormal variance with pedigree 0.104199, pedigree (1,1,4,1,1)
  (same comment as for Methane, fossil)
- Manganese [water, ground-, long-term]: 1.2669e-7 kg; lognormal variance with pedigree 5.7591, pedigree (1,1,4,1,1)
  (same comment as for Arsenic, ion)
- Manganese [water, surface water]: 2.115e-10 kg; lognormal variance with pedigree 1.2256, pedigree (1,1,4,1,1)
  (same comment as for Aluminium)
- Toluene [air, urban air close to ground]: 9.4081e-8 kg; lognormal variance with pedigree 0.104199, pedigree (1,1,4,1,1)
  (same comment as for Methane, fossil)
- Mercury [water, ground-, long-term]: 1.1373e-10 kg; lognormal variance with pedigree 2.3387, pedigree (1,1,4,1,1)
  (same comment as for Arsenic, ion)
- Mercury [water, surface water]: 1.8986e-13 kg; lognormal variance with pedigree 0.9951, pedigree (1,1,4,1,1)
  (same comment as for Aluminium)
- Benzene [air, urban air close to ground]: 4.7041e-8 kg; lognormal variance with pedigree 0.104199, pedigree (1,1,4,1,1)
  (same comment as for Methane, fossil)
- Copper, ion [water, ground-, long-term]: 3.7546e-8 kg; lognormal variance with pedigree 2.6604, pedigree (1,1,4,1,1)
  (same comment as for Arsenic, ion)
- Copper, ion [water, surface water]: 6.268e-11 kg; lognormal variance with pedigree 1.0221, pedigree (1,1,4,1,1)
  (same comment as for Aluminium)
- Water [water, surface water]: 0.000282836 m3; lognormal variance with pedigree 0.16468, pedigree (1,1,4,1,1)
  Process water released to surface water.
  Uncertainty: uncertainty calculated from uncertainty in process water input and the uncertainty of fraction to surface water.
- Dioxins, measured as 2,3,7,8-tetrachlorodibenzo-p-dioxin [air, urban air close to ground]: 9.4075e-14 kg; lognormal variance with pedigree 0.4393, pedigree (1,1,4,1,1)
  (same comment as for Methane, fossil)
- Chromium VI [water, ground-, long-term]: 5.8096e-7 kg; lognormal variance with pedigree 0.0146401, pedigree (1,1,4,1,1)
  (same comment as for Arsenic, ion)
- Chromium VI [water, surface water]: 1.8392e-7 kg; lognormal variance with pedigree 0.1757, pedigree (1,1,4,1,1)
  (same comment as for Aluminium)
- Particulates, > 2.5 um, and < 10um [air, urban air close to ground]: 2.8222e-8 kg; lognormal variance with pedigree 0.21412, pedigree (1,1,4,1,1)
  (same comment as for Methane, fossil)
- Cobalt [water, ground-, long-term]: 7.5809e-8 kg; lognormal variance with pedigree 0.78792, pedigree (1,1,4,1,1)
  (same comment as for Arsenic, ion)
- Cobalt [water, surface water]: 1.2656e-10 kg; lognormal variance with pedigree 0.82494, pedigree (1,1,4,1,1)
  (same comment as for Aluminium)
- Particulates, < 2.5 um [air, urban air close to ground]: 5.6163e-6 kg; lognormal variance with pedigree 0.4393, pedigree (1,1,4,1,1)
  (same comment as for Methane, fossil)
- Cadmium, ion [water, ground-, long-term]: 1.3007e-10 kg; lognormal variance with pedigree 6.2392, pedigree (1,1,4,1,1)
  (same comment as for Arsenic, ion)
- Cadmium, ion [water, surface water]: 2.1714e-13 kg; lognormal variance with pedigree 1.2514, pedigree (1,1,4,1,1)
  (same comment as for Aluminium)
- NMVOC, non-methane volatile organic compounds, unspecified origin [air, urban air close to ground]: 2.1408e-6 kg; lognormal variance with pedigree 0.104199, pedigree (1,1,4,1,1)
  (same comment as for Methane, fossil)

## Extrapolations
This dataset has been extrapolated from year 2012 to the year of the calculation (2021). The uncertainty has been adjusted accordingly.
