# treatment of waste plastic, consumer electronics, manual dismantling, sorting and cleaning, informal sector

Dataset: EcoSpold 2, unit process
Geography: IN
Time period: 2017-01-01 to 2021-12-31
Technology level: old
Classification: ISIC rev.4 ecoinvent: 3830:Materials recovery
Scenario: Business-as-Usual
System model: Allocation, cut-off by classification
Share of production covered: 1 %
Generated by: Prasad Gangane
Published in: Gangane, P. 2017
Database: ecoinvent
isCopyrightProtected: true
accessRestrictedTo: 1

## General comment
New Delhi informal plastic recycling market is South Asia's largest recycling hub. The raw material is collected from all parts of the country. The informal sector works on its large collection network of ragpickers and kabbadiwalas present throughout the country. It is known to be one of the most efficient collection channels due to its reach to every household in the country and efficient sorting techniques. When the plastic is collected by informal recyclers, dismantling, sorting and clean-up of plastics from e-waste is carried out manually, with minimal or no safe working conditions to the workers and with no proper disposal and treatment techniques. Recyclers adopt different techniques of identification and segregation of different plastics e.g. by noise of breaking plastics, smell of burning and salt water bath. Mixed plastic undergoes salt water bath method for cleaning and segregation of different plastics.

## Included activities start
This dataset include activities that occur once the material is received by the informal sector for further processing.

## Included activities end
This dataset includes activities until the received waste plastics is segregated, dismantled and sorted manually.

## Geography
The geography included for the informal sector mainly includes the recycling hub at New Delhi. However, since country's majority of the recycling happens in this hub, the data set can be considered complete.

## Technology
The informal sector uses equipment that it has been utilizing for several years. The equipment are generally assembled ones and do not refer to any particular supplier. Hence it can be considered as an old technology.

## Time period
The recycling sector has been following this method for several years. There is no anticipated change in the next few years in their method of working. However, with the new e-waste rules in the country, certain changes are expected to occur over a period of time, however, may not be earlier than 2022.

## Reference product
- waste plastic, consumer electronics, sorted: 1 kg; name Sorted_amount; CPC 39270: Waste, parings and scrap of plastics; By-product classification Recyclable
  This exchange represents the cleaned and sorted material used by formal and informal plastic recycling sectors in India. These recyclers are engaged into recycling of different plastic types from e-waste/WEEE, mainly Polycarbonate (PC), High Impact Polystyrene (HIPS), Acrylonitrile Butadiene Styrene (ABS), Poly Propylene (PP) etc.
  production volume 6.81302e8 kg; name RP_PV; = abs(684375000 * (Sorted_amount / unsorted_amount))
    Calculated from the total annual plastic waste received for segregation and treatment (684375000 kg). Annual production volume is approximated based on the report Plastic Scrap Trading in India, 2016 by Daniel Kross, an intern at EMPA
  property price 0.5 EUR2005; name Sorted_amount_price_EUR2005
    Temporary https://www.ecoprog.com/fileadmin/user_upload/leseproben/ext_market_report_plastic_recycling_Europe_ecoprog.pdf
  property carbon content 0.83022
    carbon content on a dry matter basis (reserved; not for manual entry)
  properties: heating value, net 34.78 MJ, cadmium content 1.05e-7, dry mass 1 kg, wet mass 1 kg, water content 0, zinc content 6.517e-5, copper content 6.2e-7, chromium content 9.1e-7, lead content 5.66e-7, total polycyclic aromatic hydrocarbon content 0.0010858, carbon content, non-fossil 0, water in wet mass 0 kg, carbon content, fossil 0.83022, nickel content 1.225e-6, carbon allocation 0.83022 kg

## Inputs from technosphere
- waste polyurethane foam: -1.00907e-5 kg; name waste_PUfoam_amount; lognormal variance with pedigree 0.131225, pedigree (2,5,3,2,2)
  waste foam separated from plastics and sold in the market
  production volume 6874.83 kg; = abs(waste_PUfoam_amount/sorted_amount*rp_PV)
    Calculated from production volume of reference product using the relative outputs.
  property price 0 EUR2005; name waste_PUfoam_amount_price_EUR2005
  properties: heating value, net 30.67 MJ, wet mass 1 kg, carbon content, fossil 0.641283, water content 0.00200401, dry mass 0.998 kg
- formic acid: 7.56804e-5 kg; lognormal variance with pedigree 0.051225, pedigree (2,5,3,2,2)
  Hydrozine is used for cleaning plastics
  properties: heating value, net 13.17 MJ, carbon content, fossil 0.261, dry mass 1 kg, wet mass 1 kg
- waste plastic, consumer electronics, unsorted: 1.00451 kg; name unsorted_amount
  This exchange represents the material input of the formal and informal plastic recycling sectors in India. These recyclers are engaged into recycling of different plastic types from e-waste/WEEE, mainly Polycarbonate (PC), High Impact Polystyrene (HIPS), Acrylonitrile Butadiene Styrene (ABS), Poly Propylene (PP) etc.
  properties: cadmium content 1.05e-7, carbon content, fossil 0.83022, total polycyclic aromatic hydrocarbon content 0.0010858, chromium content 9.1e-7, zinc content 6.517e-5, lead content 5.66e-7, nickel content 1.225e-6, wet mass 1 kg, dry mass 1 kg, copper content 6.2e-7, heating value, net 34.78 MJ
- liquefied petroleum gas: 0.00317611 kg; name LPG; lognormal variance with pedigree 0.011825, pedigree (2,5,3,2,2)
  LPG is used for hot water bath in some of the recyclers
  properties: wet mass 1 kg, dry mass 1 kg, heating value, net 45.5 MJ, carbon content, fossil 0.821863
  note on heating value, net: Indicative value. Reference: Fuels - Higher and Lower Calorific Values, available at: https://www.engineeringtoolbox.com/fuels-higher-calorific-values-d_169.html
- waste plastic, consumer electronics: -0.00450663 kg; name reject_amount; lognormal variance with pedigree 0.131225, pedigree (2,5,3,2,2)
  Waste plastic which is sent for secondary recycling or burning in the brick kiln as a fuel
  production volume 3.07038e6 kg; = abs(Reject_amount/sorted_amount*RP_PV)
    Calculated from production volume of reference product using the relative outputs.
  property price 0 EUR2005; name reject_amount_price_EUR2005
  property concentration, nickel 1.225e-6 kg/kg; name reject_amount_Ni_concentration
  property concentration, copper 6.2e-7 kg/kg; name reject_amount_concentration_Cu
  property concentration, zinc 6.517e-5 kg/kg; name reject_amount_concentration_Zn
  property concentration, lead 6.2e-7 kg/kg; name reject_amount_concentration_Pb
  property concentration, cadmium 1.05e-7 kg/kg; name reject_amount_concentration_Cd
  properties: concentration, chromium 9.1e-7 kg/kg, carbon content, fossil 0.830215, total polycyclic aromatic hydrocarbon content 0.0010858, wet mass 1 kg, heating value, net 34.78 MJ, water content 0.180638, dry mass 0.847 kg
  note on heating value, net: Assumed equal to "waste plastic, consumer electronics, sorted".
- sodium hydroxide, without water, in 50% solution state: 0.00164479 kg; lognormal variance with pedigree 0.051225, pedigree (2,5,3,2,2)
  Caustic soda is used for cleaning purpose and is dissolved in water
  properties: dry mass 1 kg, heating value, net 3.03 MJ, wet mass 1 kg
- electricity, low voltage: 0.000632841 kWh; lognormal variance with pedigree 0.011825, pedigree (2,5,3,2,2)
  Power consumed for pumps and auxilaries
- scrap steel: -2.01814e-5 kg; name ScrapMet_amount; lognormal variance with pedigree 0.131225, pedigree (2,5,3,2,2)
  Metal rejects from the segregation process
  production volume 13749.7 kg; = abs(ScrapMet_amount/sorted_amount*RP_PV)
    Calculated from production volume of reference product using the relative outputs.
  property price 0 EUR2005; name ScrapMet_amount_price_EUR2005
  properties: dry mass 1 kg, wet mass 1 kg
- sodium chloride, powder: 0.0779508 kg; lognormal variance with pedigree 0.051225, pedigree (2,5,3,2,2)
  Common salt used for salt water bath
  properties: wet mass 1 kg, dry mass 1 kg

## Inputs from nature
- Water, well, in ground [natural resource, in water]: 0.00144222 m3; name Inlet_water; lognormal variance with pedigree 0.131225, pedigree (2,5,3,2,2)
  Water from borewell is used for salt water bath method and cleaning of plastics
  property suspended soilds, mass per volume 1.203 kg/m3; name SS_inlet
  property COD, mass per volume 0.06 kg/m3; name COD_inlet
  property BOD5, mass per volume 0.014 kg/m3; name BOD_inlet
  property mass concentration, nitrogen 0.00056 kg/m3; name N_inlet
  property mass concentration, dissolved phosphate PO4 as P 0.002 kg/m3; name P_inlet

## Emissions to nature
- Phosphorus [water, surface water]: 2.85961e-6 kg; = (P_outlet- P_inlet)* waste_water; lognormal variance with pedigree 0.050625, pedigree (1,5,3,2,2)
  Addition of Phosphorus due to treatment of dirty plastic
- Water [water, surface water]: 0.0014298 m3; name waste_water; lognormal variance with pedigree 0.051225, pedigree (2,5,3,2,2)
  Water used for cleaning and segregation through salt bath method is discharge to common sewers
  property COD, mass per volume 0.283 kg/m3; name COD_outlet
  property suspended soilds, mass per volume 1.462 kg/m3; name SS_outlet
  property mass concentration, lithium 0.014 kg/m3; name Oil_outlet
  property BOD5, mass per volume 0.073 kg/m3; name BOD_outlet
  property mass concentration, nitrogen 0.0392 kg/m3; name N_outlet
  property mass concentration, dissolved phosphate PO4 as P 0.004 kg/m3; name P_outlet
- DOC, Dissolved Organic Carbon [water, unspecified]: 0.000106282 kg; = COD/3; lognormal variance with pedigree 0.050625, pedigree (1,5,3,2,2)
  Except for Municipal Waste water TOC and DOC are mostly same. Ref https://dowac.custhelp.com/app/answers/detail/a_id/4219/~/dow-water-and-process-solutions---correlation-between-kmno4%2C-cod%2C-bod%2C-doc-and
- Particulates, > 2.5 um, and < 10um [air, urban air close to ground]: 1.05109e-6 kg; = 0.000330937* LPG; lognormal variance with pedigree 0.311225, pedigree (2,5,3,2,2)
  Emissions from burning of LPG
- Sulfur dioxide [air, urban air close to ground]: 1.54573e-7 kg; = 4.86672E-05* LPG; lognormal variance with pedigree 0.011825, pedigree (2,5,3,2,2)
  Emissions from burning of LPG
- Carbon dioxide, fossil [air, urban air close to ground]: 0.00877972 kg; = 2.764295618* LPG; lognormal variance with pedigree 0.011825, pedigree (2,5,3,2,2)
  Emissions from burning of LPG
- Oils, non-fossil [water, surface water]: 2.00172e-5 kg; = Oil_outlet* waste_water; lognormal variance with pedigree 0.050625, pedigree (1,5,3,2,2)
- Water [air, unspecified]: 1.24204e-5 m3; = Inlet_water- waste_water; lognormal variance with pedigree 0.051225, pedigree (2,5,3,2,2)
  Evaporation losses
- COD, Chemical Oxygen Demand [water, surface water]: 0.000318846 kg; name COD; = (COD_outlet- COD_inlet)* waste_water; lognormal variance with pedigree 0.050625, pedigree (1,5,3,2,2)
  Addition of COD due to treatment of dirty plastic
- Nitrogen [water, surface water]: 5.52476e-5 kg; = (N_outlet- N_inlet)* waste_water; lognormal variance with pedigree 0.050625, pedigree (1,5,3,2,2)
  Addition of Nitrogen due to treatment of dirty plastic
- Sodium, ion [water, unspecified]: 3.21261e-5 kg; lognormal variance with pedigree 0.050625, pedigree (1,5,3,2,2)
  Amount derived from Stochiometric Balance with input of NaCl & NaOH
- Carbon monoxide, fossil [air, unspecified]: 4.94632e-6 kg; = 0.00155735* LPG; lognormal variance with pedigree 0.661225, pedigree (2,5,3,2,2)
  Emissions from burning of LPG
- Chloride, ion [water, unspecified]: 4.81261e-5 kg; lognormal variance with pedigree 0.050625, pedigree (1,5,3,2,2)
  Amount derived from Stochiometric Balance with input of NaCl
- Nitrogen oxides [air, urban air close to ground]: 2.00944e-5 kg; = 0.006326733* LPG; lognormal variance with pedigree 0.051225, pedigree (2,5,3,2,2)
  Emissions from burning of LPG
- TOC, Total Organic Carbon [water, unspecified]: 0.000106282 kg; = COD/3; lognormal variance with pedigree 0.050625, pedigree (1,5,3,2,2)
  Addition of TOC due to treatment of plastic with water. TOC is calculated based on the formula available at https://dowac.custhelp.com/app/answers/detail/a_id/4219/~/dow-water-and-process-solutions---correlation-between-kmno4%2C-cod%2C-bod%2C-doc-and
- Particulates, > 10 um [air, unspecified]: 2.47317e-5 kg; lognormal variance with pedigree 0.051225, pedigree (2,5,3,2,2)
  Dust and dirt separated from the plastics
- BOD5, Biological Oxygen Demand [water, surface water]: 8.43584e-5 kg; name BOD; = ( BOD_outlet- BOD_inlet)* waste_water; lognormal variance with pedigree 0.050625, pedigree (1,5,3,2,2)
  Addition of BOD due to cleaning of dirty plastic
- Particulates, > 10 um [air, urban air close to ground]: 2.62773e-7 kg; = 8.27342E-05* LPG; lognormal variance with pedigree 0.051225, pedigree (2,5,3,2,2)
  Emissions from burning of LPG
- Dissolved solids [water, surface water]: 0.000370319 kg; lognormal variance with pedigree 0.050625, pedigree (1,5,3,2,2)

## Sampling procedure
An initial data collection questionnaire was circulated amongst the recyclers. On-site visits were carried out and data were collected from 15 different recyclers in the informal recycling sector. These recyclers were engaged into recycling of plastics mainly Polycarbonate (PC), High Impact Polystyrene (HIPS), Acrylonitrile Butadiene Styrene (ABS), Polypropylene (PP) etc. Information provided was verified. Data collected from different recyclers were compiled in the excel sheets and analysed All the data were aggregated to per 1000 kgs of treatment of plastics.

## Extrapolations
This dataset has been extrapolated from year 2017 to the year of the calculation (2021). The uncertainty has been adjusted accordingly.
