# triple superphosphate production

Dataset: EcoSpold 2, unit process
Geography: RoW
Time period: 2011-01-01 to 2021-12-31
Technology level: current
Classification: ISIC rev.4 ecoinvent: 2012:Manufacture of fertilizers and nitrogen compounds
Synonyms: TSP, Monocalcium phosphate
Scenario: Business-as-Usual
System model: Allocation, cut-off by classification
Generated by: Anna Kounina
Database: ecoinvent
isCopyrightProtected: true
accessRestrictedTo: 1

## General comment
This dataset is a weighted average from the respective regional datasets.
This dataset represents the production of 1 kg of triple superphosphate (TSP), with 46% P2O5. Triple superphospate is a phosphorous fertiliser.
Triple superphosphate production involves the acidulation of rock phosphate with phosphoric acid. Two main methods exist: the two-step process and the slurry process. The former accounts for more than 75% of triple superphosphate production. The two-step process runs as follows: first a powder is made, where rock grinding uses the most energy, then this powder is granulated with steam. The slurry process uses phosphoric acid with a concentration of 42% P2O5 and has an energy requirement 20% lower than in the two-step process. This dataset represents triple superphosphate production with the slurry process.
The main data sources for this dataset are Fertilizers Europe (2014, 2016). Additional data sources are listed as follows.
References:
Kongshaug G. (1998): Energy Consumption and Greenhouse Gas Emissions in Fertilizer Production. IFA 20th July 1998
Davies J., Haglund C. (1999): Life Cycle Inventory of Fertiliser Production. SIK-Report No 654 1999. Chalmers University of Technology, Sweden.
Fertilizers Europe (2014): Average Emissions Year 2011. Fertilizers Europe Environmental report (internal).
Fertilizers Europe (2016): Carbon Footprint Calculator for Fertilizer Production. Specification. Version 2.1
Fertilizers Europe (2016): Average Emissions Year 2014. Fertilizers Europe Environmental report (internal). Used for updated energy and GHG emission in Carbon Footprint Calculator
Althaus H.-J., Chudacoff M., Hischier R., Jungbluth N., Osses M. and Primas A. (2007) Life Cycle Inventories of Chemicals. ecoinvent report No. 8, v2.0. EMPA Dübendorf, Swiss Centre for Life Cycle Inventories, Dübendorf, CH.

## Included activities start
The activity includes all the raw and processed materials necessary to produce this product. Phosphate rock, phosphoric acid, electricity and steam are included. Direct emissions of fluorine and particulate matter to air and phosphorous to water are included.

## Included activities end
The activity ends with the final product being ready for transportation at the production site.

## Technology
Average techlogy from the regional counterparts as given in the geography comment.

## Time period
Primary data were collected on fertiliser production for the year 2011. These data were based on annual average data for the year 2011.

## Reference product
- triple superphosphate: 1 kg; By-product classification allocatable product; CPC 34621: Superphosphate; CAS 65996-95-4
  production volume 5.814e9 kg
    Value in kg/y. International Fertilizers Association (2014).
  property price 0.182928 EUR2005
    Calculated based on inputs: The price of the product has been calculated as a sum of the values of the material and energy inputs for this product. This value is therefore a rough estimation. It may underestimate the real price since there are additional expenses when producing any product. These expences can include for example labour costs, treatment of waste materials and profit for the producer. Please consider carefully whether this level of data quality is acceptable for your application.
  property phosphorus content 0.200754
    Phosphorus content (on a dry matter basis) of triple superphosphate is calculated from the molecular formula of the nutrient present in the substance.
  property carbon content, fossil 0
    Carbon content, fossil is calculated based on the chemical formula of the substance.
  property carbon content 0
    carbon content on a dry matter basis (reserved; not for manual entry)
  properties: water in wet mass 0 kg, carbon content, non-fossil 0, wet mass 1 kg, water content 0, dry mass 1 kg, carbon allocation 0 kg

## Inputs from technosphere
- phosphate rock, beneficiated: 0 kg; pedigree (1,1,1,1,1)
  This flow is weighted averages using the exchanges in the corresponding regional data.
  properties: phosphorus content 0.139655, dry mass 1 kg, wet mass 1 kg, oxygen content 0.180345
  note on phosphorus content: Phosphorus content (on a dry matter basis) of phosphate rock, beneficiated is calculated from the molecular formula of the substance ().
  note on oxygen content: Oxygen content (on a dry matter basis) of phosphate rock, beneficiated is calculated from the molecular formula of the substance ().
- phosphoric acid, fertiliser grade, without water, in 70% solution state: 0.639 kg; lognormal variance with pedigree 0.0433, pedigree (2,2,5,5,1)
  This flow is weighted averages using the exchanges in the corresponding regional data.
  properties: dry mass 1 kg, phosphorus content 0.235667, wet mass 1 kg, oxygen content 0.304333
  note on phosphorus content: Phosphorus content (on a dry matter basis) of phosphoric acid, fertiliser grade, without water, in 70% solution state is calculated from the molecular formula of the substance (H3PO4).
  note on oxygen content: Oxygen content (on a dry matter basis) of phosphoric acid, fertiliser grade, without water, in 70% solution state is calculated from the molecular formula of the substance (H3PO4).
- steam, in chemical industry: 0.181818 kg; lognormal variance with pedigree 0.0433, pedigree (2,2,5,5,1)
  This flow is weighted averages using the exchanges in the corresponding regional data.
  properties: dry mass 1 kg, wet mass 1 kg
- electricity, low voltage: 0 kWh; pedigree (1,1,1,1,1)
  This flow is weighted averages using the exchanges in the corresponding regional data.
- heat, central or small-scale, natural gas: 0.5 MJ; lognormal variance with pedigree 0.0433, pedigree (2,2,5,5,1)
  This flow is weighted averages using the exchanges in the corresponding regional data.
  properties: heating value, net 1 MJ
- phosphate rock, beneficiated: 0.00464275, 0.00464275, 0.349714 kg (3 entries); lognormal variance with pedigree 0.0433, pedigree (2,2,5,5,1)
  This flow is weighted averages using the exchanges in the corresponding regional data.
- electricity, low voltage: 0.000359269, 6.54159e-5, 0.00105328, 0.0161712, 0.00261621, 0.00751242 kWh (6 entries); lognormal variance with pedigree 0.0433, pedigree (2,2,5,5,1)
  This flow is weighted averages using the exchanges in the corresponding regional data.

## Emissions to nature
- Phosphorus [water, surface water]: 0.000692 kg; lognormal variance with pedigree 0.0827, pedigree (2,2,5,5,1)
  This flow is weighted averages using the exchanges in the corresponding regional data.
- Water [air, unspecified]: 0.000158 m3; lognormal variance with pedigree 0.0827, pedigree (2,2,5,5,1)
  This flow is weighted averages using the exchanges in the corresponding regional data.
- Particulates, > 2.5 um, and < 10um [air, urban air close to ground]: 0.00065 kg; lognormal variance with pedigree 0.1627, pedigree (2,2,5,5,1)
  This flow is weighted averages using the exchanges in the corresponding regional data.
- Fluorine [air, urban air close to ground]: 4.8e-5 kg; lognormal variance with pedigree 0.0827, pedigree (2,2,5,5,1)
  This flow is weighted averages using the exchanges in the corresponding regional data.

## Extrapolations
Deleted extrapolations from Europe.
