# pumice quarry operation

Dataset: EcoSpold 2, unit process
Geography: DE
Time period: 2000-01-01 to 2021-12-31
Technology level: current
Classification: EcoSpold01Categories: construction materials/additives
Classification: ISIC rev.4 ecoinvent: 0810:Quarrying of stone, sand and clay
Tags: ConvertedDataset
Scenario: Business-as-Usual
System model: Allocation, cut-off by classification
Generated by: Daniel Kellenberger (obsolete)
Published in: Kellenberger D. 2004
Database: ecoinvent
isCopyrightProtected: true
accessRestrictedTo: 1

## General comment
For a lack of data the dust emissions for bauxite mining are used as proxy. Further following proxys have been used: The amount of water has been copied from the water consumption in "sand, at mine"-wasing and for heating the "light fuel oil"-heating module has been used.
[This dataset was already contained in the ecoinvent database version 2. It was not individually updated during the transfer to ecoinvent version 3. Life Cycle Impact Assessment results may still have changed, as they are affected by changes in the supply chain, i.e. in other datasets. This dataset was generated following the ecoinvent quality guidelines for version 2. It may have been subject to central changes described in the ecoinvent version 3 change report (http://www.ecoinvent.org/database/ecoinvent-version-3/reports-of-changes/), and the results of the central updates were reviewed extensively. The changes added e.g. consistent water flows and other information throughout the database. The documentation of this dataset can be found in the ecoinvent reports of version 2, which are still available via the ecoinvent website. The change report linked above covers all central changes that were made during the conversion process.]

## Included activities end
includes excavation by digger, transportation within mine, washing, the land-use of the mine, the recultivation and dust emissions

## Geography
For the exchanges, RER, GLO and CH modules have been used as proxy.

## Technology
technology unknown

## Parameters
- fraction, process water, to air: 0.2 dimensionless; name fraction_PW_to_air; lognormal variance with pedigree 0.092025, pedigree (4,4,3,2,4)
  Literature value (Statistics Canada, 2007 & Shaffer, K.H., 2008, Consumptive water use in the Great Lakes Basin, USGS) (Vionnet, S., Quantis Water Database - Technical Report, 2012).

## Reference product
- pumice: 1 kg; CPC 16320: Industrial diamonds, unworked or simply sawn, cleaved or bruted; pumice stone; emery; natural corundum, natura[…]; By-product classification allocatable product; CAS 1332-09-8
  EcoSpold01Location=DE
  production volume 0.242058 kg
    This is a placeholder value that does not reflect real-world production volumes. This dataset does not currently require a real-world production volume to work in the database framework, and no actual data were collected yet. This has no negative effect on the results of the ecoinvent database. The placeholder value of this activity was scaled according to the nominal GDP of 2005 (source: United Nations, http://data.un.org/Glossary.aspx?q=GDP+%28current+US%24%29, accessed 20130726) to reflect an appropriate share of the global production volume, which is also a placeholder value.
  property price 0.06 EUR2005
    Calculated value based on data from United Nations Commodity Trade Statistics Database (comtrade.un.org). UN comtrade category: 251311 Pumice stones, crude or in irregular pieces. Year 2005. Using exchange rate of 1EURO = 1.209 USD. Average of price of import into 5 main markets (EU, US, JP, IN and CN).
  property carbon content 0
    carbon content on a dry matter basis (reserved; not for manual entry)
  properties: carbon content, fossil 0, dry mass 1 kg, water content 0, water in wet mass 0 kg, carbon content, non-fossil 0, wet mass 1 kg, carbon allocation 0 kg

## Inputs from technosphere
- industrial machine, heavy, unspecified: 1.67e-5 kg; lognormal variance with pedigree 0.69, pedigree (1,1,5,1,1)
  EcoSpold01Location=RER
  activityLink introduced to establish a direct link to the corresponding regional supply of this product
- lubricating oil: 8.06e-5 kg; lognormal variance with pedigree 0.69, pedigree (1,1,5,1,1)
  EcoSpold01Location=RER
  properties: carbon content, fossil 0.75, wet mass 1 kg, dry mass 1 kg, heating value, net 40.2 MJ
  note on carbon content, fossil: Lubricating oil is produced from diesel. C-content/dry mass of fats and oils considered 75%, from: ecoinvent v2.2 report, n 15a, pg 40
  note on heating value, net: Literature value, Source: IPCC 2006, 2006 IPCC Guidelines for National Greenhouse Gas Inventories, Prepared by the National Greenhouse Gas Inventories Programme, Eggleston H.S., Buendia L., Miwa K., Ngara T. and Tanabe K. (eds). Published: IGES, Japan
- diesel, burned in building machine: 0.00151 MJ; lognormal variance with pedigree 0.2201, pedigree (3,5,5,3,1)
  EcoSpold01Location=GLO
  Uncertainty: ;
  properties: heating value, net 1 MJ
- electricity, medium voltage: 0.00072 kWh; lognormal variance with pedigree 0.69, pedigree (1,1,5,1,1)
  EcoSpold01Location=DE

## Inputs from nature
- Occupation, mineral extraction site [natural resource, land]: 0.0125 m2*year; lognormal variance with pedigree 0.1401, pedigree (3,5,5,3,1)
  Uncertainty: ;
- Water, well, in ground [natural resource, in water]: 0.00299 m3; name water_well_in_ground_input; lognormal variance with pedigree 0.69, pedigree (1,1,5,1,1)
- Transformation, from unspecified [natural resource, land]: 0.00025 m2; lognormal variance with pedigree 0.69, pedigree (1,1,5,1,1)
- Pumice, in ground [natural resource, in ground]: 2.17 kg; lognormal variance with pedigree 0.1001, pedigree (3,5,5,3,1)
  Uncertainty: ;
- Transformation, to mineral extraction site [natural resource, land]: 0.00025 m2; lognormal variance with pedigree 0.178, pedigree (4,1,5,1,1)
  Uncertainty: ;

## Emissions to nature
- Particulates, > 10 um [air, non-urban air or from high stacks]: 0.000112 kg; lognormal variance with pedigree 0.69, pedigree (1,1,5,1,1)
- Water [water, unspecified]: 0.002392 m3; name water_to_water_unspecified; = water_well_in_ground_input*(1-fraction_PW_to_air); lognormal variance with pedigree 0.0807, pedigree (2,2,5,1,1)
  Calculated value based on literature values and expert opinion. See comments in the parametres' comment field.
  property water in wet mass 1000 kg; name WWM
  property carbon content, non-fossil 0; name C_content_non_fossil
  property fraction, origin: fresh water 1; name fraction_origin_fresh_water_Ww
  property fraction, origin: salt water 0; name fraction_origin_salt_water_Ww
  property fraction, origin: unspecified 0; name fraction_origin_unspecified_Ww
  property dry mass 0 kg; name DM
  property wet mass 1000 kg; name WM
  property carbon content, fossil 0; name C_content_fossil
- Particulates, < 2.5 um [air, non-urban air or from high stacks]: 8e-6 kg; lognormal variance with pedigree 0.69, pedigree (1,1,5,1,1)
- Water [air, unspecified]: 0.000598 m3; name water_to_air_unspecified; = (water_well_in_ground_input*fraction_PW_to_air); lognormal variance with pedigree 0.0807, pedigree (2,2,5,1,1)
  (same comment as for Water)
  property fraction, origin: salt water 0; name fraction_origin_salt_water
  property fraction, origin: fresh water 1; name fraction_origin_fresh_water
  property fraction, origin: unspecified 0; name fraction_origin_unspecified
- Particulates, > 2.5 um, and < 10um [air, non-urban air or from high stacks]: 4e-5 kg; lognormal variance with pedigree 0.69, pedigree (1,1,5,1,1)

## Sampling procedure
sampled from different other modules (some data copied from "limestone crushing", some from "bentonite mining", some from "recultivation, limestone mine", etc.).

## Extrapolations
This dataset has been extrapolated from year 2000 to the year of the calculation (2021). The uncertainty has been adjusted accordingly.

## Review by Roberto Dones 2005-07-19
passed
