# acrylic filler production

Dataset: EcoSpold 2, unit process
Geography: RoW
Time period: 2000-01-01 to 2021-12-31
Technology level: current
Classification: ISIC rev.4 ecoinvent: 2022:Manufacture of paints, varnishes and similar coatings, printing ink and mas
Scenario: Business-as-Usual
System model: Allocation, cut-off by classification
Generated by: Hans-Jörg Althaus
Published in: Kellenberger D. 2004
Database: ecoinvent
isCopyrightProtected: true
accessRestrictedTo: 1

## General comment
This dataset represents the production of 1 kg of acrylic filler. Acrylic fillers are the most commonly used plasters or mortars based on organic binders. An aqueous solution of acrylic resin is used as binder and the fillers are for example chalk, lime meal, talcum or quartz. Small amounts of pigments, anti foaming agents, softeners, etc. are usually added. Commonly the share of binder is between 7 and 13%. Acrylic fillers are mixed at plant and delivered either ready to use or as powders that only need addi-tional water before application.
This dataset is based on Starzner & Wurmer-Weiss (2000). It stands for a 'typical' acrylic filler ready to apply (including water) and should not be used for other acrylic fillers if their contribution to the overall result of an assessment might be relevant. The data quality is not sufficient to allow for e.g. a comparative assessment of different fillers.
References:
Kellenberger D., Althaus H.-J., Jungbluth N., Künniger T., Lehmann M. and Thalmann P. (2007) Life Cycle Inventories of Building Products. Final report ecoinvent Data v2.0 No. 7. EMPA Dübendorf, Swiss Centre for Life Cycle Inventories, Dübendorf, CH.
Starzner S. and Wurmer-Weiss P. (2000) ECOBIS 2000, ökologisches Baustoffinformationssystem.

## Included activities start
The activity starts when the raw materials enter the process.

## Included activities end
The requirements of raw materials, the electricity and the infrastructure are inventoried. Packaging is neglected.

## Geography
The data was collected for Switzerland and is assumed to be valid for this geography.

## Technology
The dataset models a mixing process with its electricity consumption.

## Parameters
- fraction, tap water, to air: 0.15 dimensionless; name fraction_TW_to_air; = fraction_PW_to_air; lognormal variance with pedigree 0.092025, pedigree (4,4,3,2,4)
  Calculated value. See comment in the other parametres present in this dataset. Tap water is considered to be always used as process water, thus process water fractions to air are applied to all tap water input flows to calculate the amount of water consumed in the processes.
- fraction, process water, to air: 0.15 dimensionless; name fraction_PW_to_air; lognormal variance with pedigree 0.092025, pedigree (4,4,3,2,4)
  Literature value. In case when no industry/process specific data are available, default evaporation fraction value is used. This value is 15% and is based on literature (Statistics Canada, 2007 & Shaffer, K.H., 2008, Consumptive water use in the Great Lakes Basin, USGS & Shiklomanov, 2003, World Water Resources at the Beginning of the 21st Century) and has been approved by an expert.

## Reference product
- acrylic filler: 1 kg; name RP; CPC 35110: Paints and varnishes and related products; By-product classification allocatable product
  Acrylic fillers are the most commonly used plasters or mortars based on organic binders. Acrylic fillers are mixed at plant and delivered either ready to use or as powders that only need additional water before application.
  production volume 3.304 kg; name RP_PV
    This is a placeholder value that does not reflect real-world production volumes. This dataset does not currently require a real-world production volume to work in the database framework, and no actual data were collected yet. This has no negative effect on the results of the ecoinvent database.
  property heating value, net 3.2 MJ
    LHV is calculated based on the Carbon content of the product. More details can be found on the respective documentation.
  property carbon content, fossil 0.127885
    Raw materials are listed in Tab 5.2, ecoinvent v2.2 report 7, part XVII. C content is calculated after C content of raw materials (15% acrylic binder, and 4% chemicals organic. Pigment is TiO2), then referred to 1 kg DM
  property price 2.13 EUR2005
    Calculated value based on data from United Nations Commodity Trade Statistics Database (comtrade.un.org). UN comtrade category: 3214 Putty, mastics, painters fillers etc (non-refractory). Year 2005. Using exchange rate of 1EURO = 1.209 USD. Average of price of import into 5 main markets (EU, US, JP, IN and CN).
  property carbon content, non-fossil 0
    Raw materials are listed in Tab 5.2, ecoinvent v2.2 report 7, part XVII. C content is calculated after C content of raw materials
  property carbon content 0.127885
    carbon content on a dry matter basis (reserved; not for manual entry)
  properties: water content 0.119695, wet mass 1 kg, dry mass 0.8931 kg, water in wet mass 0.1069 kg, carbon allocation 0.114215 kg

## Inputs from technosphere
- electricity, medium voltage: 0 kWh; pedigree (1,1,1,1,1)
  Estimated value. Electricity is required for mixing.
- concrete mixing factory: 1.92e-10 unit; lognormal variance with pedigree 0.68, pedigree (5,5,5,5,5)
  Estimated value. Data from concrete production is used as proxy.
- titanium dioxide: 0.02 kg; lognormal variance with pedigree 0.108, pedigree (4,5,5,5,1)
  Literature value (Starzner and Wurmer-Weiss 2000). Titanium dioxide is used as a pigment.
  properties: wet mass 1 kg, dry mass 1 kg
- chemical, organic: 0.04 kg; lognormal variance with pedigree 0.108, pedigree (4,5,5,5,1)
  Literature value (Starzner and Wurmer-Weiss 2000). Represents the input of ancillary materials.
  properties: heating value, net 19.03 MJ, wet mass 1 kg, carbon content, fossil 0.628, dry mass 1 kg
  note on carbon content, fossil: This dataset is an unweighted average of 20 organic substances (listed in Tab 88.1, ecoinvent v2.2 report 8, part II), being part of the top100 chemicals included in this database. The C-content has also been calculated as an unweighted average of the C content of the substances composing this dataset.
- tap water: 0 kg; name tap_water_input; pedigree (1,1,1,1,1)
  Literature value (Starzner and Wurmer-Weiss 2000). Water is needed for mixing. The 0.1 kg of water is included as water in wet mass of the reference product ensuring water balance
  properties: dry mass 0.000337476 kg, wet mass 1 kg, carbon content, fossil 0.00178991, water content 2962.17
  note on carbon content, fossil: Bicarbonate content is 2.93 mol/m3. CO2 content is 0.1 mol/m3 (ecoinvent v2.2 report 8, Tab 93.1).
- silica sand: 0.69 kg; lognormal variance with pedigree 0.108, pedigree (4,5,5,5,1)
  Literature value (Starzner and Wurmer-Weiss 2000). Silica sand is used as the filler material.
  properties: wet mass 1 kg, dry mass 0.99 kg, water content 0.010101
- acrylic binder, without water, in 34% solution state: 0.15 kg; lognormal variance with pedigree 0.108, pedigree (4,5,5,5,1)
  Literature value (Starzner and Wurmer-Weiss 2000).
  properties: heating value, net 18.18 MJ, dry mass 1 kg, wet mass 1 kg, carbon content, fossil 0.599846
  note on carbon content, fossil: The acrylic acid ethyl ester (ethyl acrylate) is used for both solvent- and water-based paints, and in textiles as a binder in nonwoven fabrics and flocking (Acrylic acid and derivatives: uses, Ullmann). It was used as a representative example of acrylic binders. Its formula is C5H8O2
- electricity, medium voltage: 2.30675e-5, 4.42335e-6, 7.42589e-5, 0.00108003, 0.000152231, 0.00049599 kWh (6 entries); lognormal variance with pedigree 0.38, pedigree (5,5,5,5,5)
  Estimated value. Electricity is required for mixing.
- tap water: 0.0015566, 0.000187373, 0.000309665, 0.00780852, 0.000203137, 0.000577819, 0.0893569 kg (7 entries); lognormal variance with pedigree 0.108, pedigree (4,5,5,5,1)
  (same comment as for tap water)

## Sampling procedure
Literature data.

## Extrapolations
This dataset has been copied from an original dataset covering the geography RER. The uncertainty has been adjusted accordingly.

## Review by Emilia Moreno Ruiz 2017-08-09
This dataset was additionally reviewed in a separate review process by Eric Johnson of Atlantic Consulting as well as Emilia Moreno Ruiz and Gregor Wernet of ecoinvent.
