# polystyrene foam slab for perimeter insulation

Dataset: EcoSpold 2, unit process
Geography: RoW
Time period: 2009-01-01 to 2021-12-31
Technology level: current
Classification: ISIC rev.4 ecoinvent: 2220:Manufacture of plastics products
Classification: EcoSpold01Categories: insulation materials/production
Synonyms: EPS Perimeter
Tags: single enterprise data; ConvertedDataset
Scenario: Business-as-Usual
System model: Allocation, cut-off by classification
Share of production covered: 0 %
Generated by: Matthias Klingler
Database: ecoinvent
isCopyrightProtected: true
accessRestrictedTo: 1

## General comment
This dataset represents the production of polystyrene foam insulation for perimeter insulation. The density of the insulation is 33 kg/m3 and the thermal conductivity is 0.033 W/m*K. The production includes the raw materials, the transport of raw materials, the expanding of the polystyrene granulate and the forming of insulation slabs. For the inventory it was assumed that the energy used for the foaming and the forming of the slabs is independent of the densitiy of the final product. Hence per kilogram of material input it was considered that the consumption of energy is the same for all polystyrene foam slabs produced at the company that was inventoried.

## Included activities start
From the reception of polystyrene granulate, graphite and polystyrene waste at the factory gate.

## Included activities end
This activity ends with the finished product at the production plant. The dataset includes the raw materials as well as transports and the energy required for the transformation into the final product. The dataset does not include the packaging of the final product.

## Geography
Data from swisspor AG

## Technology
Swiss average EPS production; process from 2 factories in Switzerland. The polystyrene granulate which contains pentane is expanded with steam. In a thermoforming process the expanded granulate is formed into slabs and finally cut to the desired dimensions.

## Reference product
- polystyrene foam slab for perimeter insulation: 1 kg; CPC 363: Semi-manufactures of plastics; By-product classification allocatable product
  production volume 2.00802e7 kg
    This is a rough estimation. According to Plastics Europe the global demand for EPS was 3.06 million tons in 2001. In Europe about 70% of all EPS produced is used for insulation materials. The authors estimate that less than 1% of the global production of EPS insulation materials is for perimeter insulation.
  property price 0.91 EUR2005
    Calculated value based on data from United Nations Commodity Trade Statistics Database (comtrade.un.org). UN comtrade category: 390319 Polystyrene, except expansible in primary forms. Year 2005. Using exchange rate of 1EURO = 1.209 USD. Average of price of import into 5 main markets (EU, US, JP, IN and CN).
  property carbon content, fossil 0.859091
    XPS consists in 91% of polystyrene, 7% of blowing agent and the re-maining 2% are flame retardants (bromine compounds) and other additives (ecoinvent v2.2 report 7, part XIV, pg69). The chemical formula of polystyrene is (C8H8)n. Here, the blowing agent is CO2.
  property carbon content, non-fossil 0
    (same comment as for polystyrene foam slab for perimeter insulation)
  property carbon content 0.859091
    carbon content on a dry matter basis (reserved; not for manual entry)
  properties: water content 0, dry mass 1 kg, water in wet mass 0 kg, wet mass 1 kg, heating value, net 38.67 MJ, carbon allocation 0.859091 kg

## Inputs from technosphere
- electricity, medium voltage: 0 kWh; pedigree (1,1,1,1,1)
  Calculated value: For the calculation of the electricity used for the foaming of the granulate and the forming of the insulation slabs it was assumed that this input depends of the mass of the material input since the energy required for foaming and forming depends mainly on the mass of the raw material that needs to be heated. The calculation of the value is based on the yearly energy consumption of the producer where electricity represents a share of 27% . The energy required for the forming of the slabs had to be put into relation to the total mass of the inputs of granulate and recycled material for all products whereas the energy consumption of the foaming process applies only to the total input of granulate. According to an estimation of Swisspor the energy required for the forming of the slabs is about double the one required for the foaming process. The calculated inputs of electricity per kilogram of granulate are: 0.187 kWh/kg for foaming and 0.373 kWh/kg for forming.
- heat, district or industrial, natural gas: 0 MJ; pedigree (1,1,1,1,1)
  Calculated value: For the calculation of the natural gas used for the foaming of the granulate and the forming of the insulation slabs it was assumed that this input depends of the mass of the material input since the energy required for foaming and forming depends mainly on the mass of the raw material that needs to be heated. The calculation of the value is based on the yearly energy consumption of the producer where natural gas represents a share of 36% . The energy required for the forming of the slabs had to be put into relation to the total mass of the inputs of granulate and recycled material for all products whereas the energy consumption of the foaming process applies only to the total input of granulate. According to an estimation of Swisspor the energy required for the forming of the slabs is about double the one required for the foaming process. The calculated inputs of natural gas per kilogram of granulate are: 0.873 MJ/kg for foaming and 1.746 MJ/kg for forming.
  EcoSpold01Location=RER
  Uncertainty: natural gaz for water vapor heating
  properties: heating value, net 1 MJ
- industrial machine, heavy, unspecified: 0.00352 kg; lognormal variance with pedigree 0.0172, pedigree (2,5,4,1,1)
  Calculated value: The estimated weight of all machinery is 428.05 t. The average life-time of machines was estimated to be 20 years. The production volume of all products is 6'073 t.
- packaging film, low density polyethylene: 0.02 kg; lognormal variance with pedigree 0.0112, pedigree (2,4,4,1,1)
  Calculated value: On average 0.64 kg packaging film is needed per m3 of product. The average densitiy of the product is 32 kg/m3.
  property water in wet mass 0 kg; name WWM
  property dry mass 1 kg; name DM
  property carbon content, fossil 0.857143; name C_content_fossil
  property wet mass 1 kg; name WM
  property water content 0; name water_content
  property carbon content, non-fossil 0; name C_content_non_fossil
  properties: heating value, net 42.47 MJ
- building, hall: 3.987e-5 m2; lognormal variance with pedigree 0.0172, pedigree (2,5,4,1,1)
  Calculate value: The area occupied by one storey buildings is 14'530 m2. The amortisation of the buildings is assumed to be 60 years. The yearly production volume of all products is 6'073 tons.
- heat, district or industrial, other than natural gas: 0 MJ; pedigree (1,1,1,1,1)
  Calculated value: For the calculation of the oil used for the foaming of the granulate and the forming of the insulation slabs it was assumed that this input depends of the mass of the material input since the energy required for foaming and forming depends mainly on the mass of the raw material that needs to be heated. The calculation of the value is based on the yearly energy consumption of the producer where oil represents a share of 37% . The energy required for the forming of the slabs had to be put into relation to the total mass of the inputs of granulate and recycled material for all products whereas the energy consumption of the foaming process applies only to the total input of granulate. According to an estimation of Swisspor the energy required for the forming of the slabs is about double the one required for the foaming process. The calculated inputs of oil per kilogram of granulate are: 0.901 MJ/kg for foaming and 1.802 MJ/kg for forming.
  properties: heating value, net 1 MJ
- polystyrene, expandable: 1 kg; name Polystyrene; lognormal variance with pedigree 0.0093, pedigree (2,2,4,1,1)
  EcoSpold01Location=RER
  Measured value: Based on the material composition of the product as declared by the producer.
  properties: carbon content, fossil 0.923077, wet mass 1 kg, dry mass 1 kg, heating value, net 38.67 MJ
  note on carbon content, fossil: Chemical formula of polystyrene is (C8H8)n (ecoinvent v2.2 report 11_II)
- building, multi-storey: 2.883e-5 m3; lognormal variance with pedigree 0.0172, pedigree (2,5,4,1,1)
  Calculated value: The volume occupied by multi-storey buildings is 10'506 m3. The amortisation of the buildings is assumed to be 60 years. The yearly production volume of all products is 6'073 tons.
- electricity, medium voltage: 0.00569608, 0.00109226, 0.0250801, 0.0830358, 0.0183368, 0.266693, 0.0375905, 0.122475 kWh (8 entries); lognormal variance with pedigree 0.0093, pedigree (2,2,4,1,1)
  (same comment as for electricity, medium voltage)
- heat, district or industrial, natural gas: 0.0291499, 0.698488, 1.89136 MJ (3 entries); lognormal variance with pedigree 0.0093, pedigree (2,2,4,1,1)
  (same comment as for heat, district or industrial, natural gas)
- heat, district or industrial, other than natural gas: 0.00106947, 0.0645797, 2.63735 MJ (3 entries); lognormal variance with pedigree 0.0093, pedigree (2,2,4,1,1)
  (same comment as for heat, district or industrial, other than natural gas)

## Inputs from nature
- Occupation, industrial area [natural resource, land]: 0.00385 m2*year; lognormal variance with pedigree 0.0172, pedigree (2,5,4,1,1)
  Calculated value: The whole aea occupied by the factory is 23'400 m2. The time of occupation was estimated to be 100 years. The yearly production volume is 6'073 t.

## Emissions to nature
- Pentane [air, non-urban air or from high stacks]: 0.00106667 kg; = Polystyrene*0.04*2/3*0.04; lognormal variance with pedigree 0.1287, pedigree (2,2,4,1,1)
  Calculated value: One kilogram of polystyrene granulate contains approximately 40 g of pentane. During the foaming process about 67% (27 g) are emitted and treated in the factory. Only about 4% of the pentane emitted during the foaming process are emitted into the atmosphere (approx. 1 g of pentane per kilogram of granulate). The remaining 13 g of pentane are still in the product at the end of the production.
- Carbon dioxide, fossil [air, unspecified]: 0.0780774 kg; = Polystyrene*0.04*2/3*0.96*3.0499; lognormal variance with pedigree 0.0093, pedigree (2,2,4,1,1)
  Calculated value: Per mole of pentane 5 moles of CO2 are emitted (molar mass pentane 72.15 g/mole, molar mass CO2 44.01 g/mole). Therefore 3.0499 kg CO2 are emitted per kg of pentane.

## Sampling procedure
Data from 2 factories from Swisspor on the consumption of raw materials, energy carriers (electricity, gas, oil), recycled wastes and transports.
