# electricity production, hard coal

Dataset: EcoSpold 2, unit process
Geography: US-SERC
Time period: 1980-01-01 to 2021-12-31
Technology level: modern
Classification: ISIC rev.4 ecoinvent: 3510:Electric power generation, transmission and distribution
Classification: EcoSpold01Categories: hard coal/power plants
Synonyms: other bituminous coal; anthracite; coking coal
Tags: hard coal power; United States; fossil fuels; coal power
Scenario: Business-as-Usual
System model: Allocation, cut-off by classification
Generated by: Karin Treyer
Published in: Röder, A. 2007
Database: ecoinvent
isCopyrightProtected: true
accessRestrictedTo: 1

## General comment
This dataset represents the production of high voltage electricity in an average hard coal power plant in US - SERC Reliability Corporation in 2012. "Hard coal" includes anthracite, coking coal and other bituminous coal according to the definition of the IEA electricity information 2014. (IEA. 2014. Electricity Information 2014. ISBN 978-92-64-21692-1. International Energy Agency (IEA), Paris Cedex (FR).)
All exchanges in this dataset except for emissions of SO2, NOx and particles are production-weighted averages of the figures in the datasets in ecoinvent version two, which are valid for the following 14 countries: AT, BE, ES, FR, IT, NL, PT, DE, CZ, HR, PL, SK, CN, US. The exception values are production-weighted averages of version 2 countries and the new countries in version 3 (AU, CA, CL, ID, IN, KR, MX, MY, PE, RU, TH, TR, TW, TZ, UA, ZA)
Comments on the inventory data of emissions:
- For the assessment of main characteristics (sulphur and ash content of coal, efficiency of the plant) and CO2 a bottom-up approach has been used. It consists in the collection of information about single plants.
- The size distribution of particle emissions has been derived from German data.
- Halogene emissions have been estimated on the basis of the content of the species in the country-specific coal input mix, assuming average retention rates.
- For CO and particle emissions average values for the former UCTE are included (Union for the Coordination of the Transmission of Electricity, since 2009 replaced by ENTSO-E European Network of Transmission System Operators for Electricity).
- The country specific emission depend on the share of DeNOx.
- Emissions of trace elements were calculated by means of a formula (CORINAIR) using the ash content in the country-specific coal input mix and average transfer coefficients for coal power plants, taking into account the share of DeSOx installed.
- Emission of uranium and thorium radioactive isotopes were assumed proportional to the corresponding element emitted with particles; the other non-gaseous radioactive isotopes of the uranium and thorium decay chain were assumed proportional to the emitted U-238 or Th-232.
- The emission of gaseous radon and K-40 are taken from the literature.
Itten R., Frischknecht R., Stucki, M. (2012) Life Cycle Inventories of Electricity Mixes and Grid. ESU-services Ltd., Uster, Switzerland.
European Environment Agency (1991) CORINAIR Inventory; VOC"s Default Emission Factors
[This dataset is meant to replace the following datasets:]

## Included activities start
From the constructed hard coal power plant ready to produce electricity.
From reception of hard coal and operating materials at power plant gate.

## Included activities end
This activity ends with 1kWh of high voltage electricity produced at the power plant and arrived at the busbar.

This dataset includes:
- all operation and maintenance activities and materials of the power plants.
- Use of fuel oil for startup
- Particle removal (dedusting of the flue gas)

- Desulfurisation and denitrification. These processes are described in separate modules; it can be decided by changing the values of NOx and SOx retained whether and how much DeNOx and DeSOx are installed.
- Cooling: It is assumed that all plants use wet cooling with a cooling tower. No cooling tower is included in this dataset (will be implemented in future versions)
- Loss of feed water

This dataset doesn"t include
- raw materials extraction, decommissioning and waste treatment as these activities are already included in the infrastructure datasets
- transformation of the electricity produced
- The disposal of non-recycled ashes is modelled separately.

## Technology
POWER PLANT:
Hard coal power plant input is a market mix of 100MWe power plants (representing all power plants with a capacity <250MWe and 7% of installed capacity) and 500MWe power plants (representing all power plants with a capacity >250MWe and 93% of installed capacity). Please note that in contrast to ecoinvent v2, the two power plant types do not exist anymore as single datasets. Along with (Röder et al. 2004), lifetime of these power plants is assumed to be 150’000 full load hours. Whereas European hard coal power plants are assumed to be operated in mid-load mode with 4000 full load hours per year (corresponding to a lifetime of 37.5 years) (Röder et al. 2004), a capacity factor (average US) of 66% is documented (eGRID 2006), corresponding to about 5800 full load hours per year, or a lifetime of about 26 years.
0
- Share of installed capacity with desulfurisation 2% (rough estimation based on sulfur mass balance
- Average efficiency of desulfurisation installations: 92% (rough estimation based on Dones et al. 27
- Share of installed capacity with denitrification (primary and/or secondary installations): 73% (figure based on IEA 212 )
- Average efficiency of denitrification installations: 8% (estimation based on Dones et al. 27, p.128. Valid for selective catalytic reaction systems)
- Share of installed capacity with particle filters: 98% (figure based on IEA 212 )
- Average efficiency of particle filters: 98% (figure based on IEA 212 )
- IEA 2012. Coal Power Database. International Energy Agency Clean Coal Centre, London
- IEA/OECD. 2010. Electricity Information 2010. International Energy Agency (IEA), Paris Cedex (FR). Part IV. Detailed OECD Electricity And Heat Data.
- Dones, R., Bauer, C., Röder, A. (2007) Kohle. In: Dones, R. (Ed.) et al., Sachbilanzen von Energiesystemen: Grundlagen für den ökologischen Vergleich von Energiesystemen und den Einbezug von Energiesystemen in Ökobilanzen für die Schweiz. Final report ecoinvent No.

## Time period
The Annual Production Volume is valid for the year 2012.

## Parameters
- water consumption, electricity production from hard coal, once-through and cooli: 0.0014 m3/kWh; name WConsumption_EP_HC_once_through_andCP_CS; lognormal variance with pedigree 0.092025, pedigree (4,4,3,2,4)
  Estimated based on literature (Scown, 2011, Water Footprint of U.S. Transportation Fuels, SI). The amount of water consumed while burning lignite and peat is assumed to be the same as in case of coal.
  nan
- once-through and cooling pond cooling systems as a fraction of all cooling syste: 0.52 dimensionless; name once_through_andCP_CS_fractio_from_allCS; lognormal variance with pedigree 0.092025, pedigree (4,4,3,2,4)
  Calculated as an average of data available for Europe (Floerke, 2008, Future changes of freshwater needs in the electricity production sector) and USA (NERL, 2011, Estimating freshwater needs to meet future thermoelectric generation requirements).
  nan
- water withdrawal, electricity production from hard coal, once-through and coolin: 0.0815 m3/kWh; name WWithdrawal_EP_HC_once_through_andCP_CS; lognormal variance with pedigree 0.092025, pedigree (4,4,3,2,4)
  Estimated based on literature (Scown, 2011, Water Footprint of U.S. Transportation Fuels, SI). The amount of water withdrawn while burning lignite and peat is assumed to be the same as in case of coal.
  nan
- fraction, process water, to air: 0.15 dimensionless; name fraction_PW_to_air; lognormal variance with pedigree 0.092025, pedigree (4,4,3,2,4)
  Literature value. In case when no industry/process specific data are available, default evaporation fraction value is used. This value is 15% and is based on literature (Statistics Canada, 2007 & Shaffer, K.H., 2008, Consumptive water use in the Great Lakes Basin, USGS & Shiklomanov, 2003, World Water Resources at the Beginning of the 21st Century) and has been approved by an expert.
  nan
- water withdrawal, electricity production from hard coal, recirculating CS: 0.0021 m3/kWh; name WWithdrawal_EP_HC_recirculating_CS; lognormal variance with pedigree 0.092025, pedigree (4,4,3,2,4)
  (same comment as for water withdrawal, electricity production from hard coal, once-through )
- efficiency: 0.311 dimensionless; lognormal variance with pedigree 0.016725, pedigree (4,2,1,2,3)
  Literature value/calculated value. Data from the US Energy Information Administration for net electricity production and fuel consumption for electricity generation. Note that only data for electricity production with "coal" in general were available, so that the same efficiency is being implemented for both hard coal and lignite plants. Further, this value is calculated from data for 2013.
  EIA. 2013. Statistics on electricity - Electricity data browser. Generation and thermal output. Net generation for electric power, annual // Consumption for electricity generation (Btu) for electric power. U.S. Energy Information Administration; Independent Statistics&Analysis.
  output relative to input (requires additional specification)
- water consumption, electricity production from hard coal, recirculating CS: 0.0018 m3/kWh; name WConsumption_EP_HC_recirculatingCS; lognormal variance with pedigree 0.092025, pedigree (4,4,3,2,4)
  (same comment as for water consumption, electricity production from hard coal, once-through)
- recirculating cooling system as a fraction of all cooling systems: 0.48 dimensionless; name recirculating_CS_fraction_from_allCS; lognormal variance with pedigree 0.092025, pedigree (4,4,3,2,4)
  (same comment as for once-through and cooling pond cooling systems as a fraction of all coo)
- fraction, water, decarbonised, to air: 0.0366922 dimensionless; name fraction_WDC_to_air; = fraction_CW_to_air; lognormal variance with pedigree 0.092025, pedigree (4,4,3,2,4)
  Calculated value. See comments in the other parametres present in this dataset. Decarbonised water is considered to be always used as cooling water, thus cooling water fractions to air are applied to all carbonised water input flows to calculate the amount of water consumed in the processes.
  nan
- factor: input of MJ for the production of 1 kWh: 11.5756 MJ/kWh; name factor_MJ_kWh; = 1*3.6/efficiency; lognormal variance with pedigree 0.0532, pedigree (4,4,3,4,4)
  Calculated value. 3.6 MJ = 1kWh.
  nan
- losses from gross electricity production: 0.06 dimensionless; name gross_net_electricity; undefined min 0.06, max 0.06, standardDeviation95 0, pedigree (1,1,1,1,1)
  Calculated value. Own use of electricity plants in this country in 2012. For the OECD countries, the OECD iLibrary provides gross and net electricity values for the specific sector "Total Fuel Combustion", from which the loss value is being calculated. This value is then applied to all fossil fuel datasets, as no data on a more detailed level were available.
  OECD. 2014. IEA Electricity Information Statistics: OECD - Electricity and heat generation. OECD iLibrary. Online database. DOI : 10.1787/elect-data-en
  nan
  Uncertainty: G
- gross electricity production: 0 kWh; name gross_electricity
  Parameter not needed in this dataset, but present due to parent child relationship
  nan
- fraction, cooling water, to air: 0.0366922 dimensionless; name fraction_CW_to_air; = (WConsumption_EP_HC_recirculatingCS*recirculating_CS_fraction_from_allCS+WConsumption_EP_HC_once_through_andCP_CS*once_through_andCP_CS_fractio_from_allCS)/(WWithdrawal_EP_HC_recirculating_CS*recirculating_CS_fraction_from_allCS+WWithdrawal_EP_HC_once_through_andCP_CS*once_through_andCP_CS_fractio_from_allCS); lognormal variance with pedigree 0.092025, pedigree (4,4,3,2,4)
  Calculated
  nan
- fraction, water, completely softened, to air: 0.15 dimensionless; name fraction_WCS_to_air; = fraction_PW_to_air; lognormal variance with pedigree 0.092025, pedigree (4,4,3,2,4)
  Calculated value. See comment in the other parametres present in this dataset. Water, completely softened is considered to be always used as process water, thus process water fractions to air are applied to all water, completely softened input flows to calculate the amount of water consumed in the processes.
  nan

## Reference product
- electricity, high voltage: 1 kWh; name electricity; By-product classification allocatable product; CPC 17100: Electrical energy
  production volume 2.02431e11 kWh; name electricity_apv
    Literature value. Data from the US Energy Information Administration for 2012, which provides data on net electricity production in each US State with various energy sources. Data from the States were aggregated on the level of US NERC regions. Data were given for the electricity production with total coal This total production was split to production in hard coal plants and lignite plants according to data from the OECD iLibrary 2014 with values valid for total US (not specific for this NERC region).
    EIA. 2013. Statistics on electricity - Electricity data browser. Generation and thermal output. Net generation for electric power, annual. U.S. Energy Information Administration; Independent Statistics&Analysis.
    OECD. 2014. IEA Electricity Information Statistics: OECD - Electricity and heat generation. OECD iLibrary. Online database. DOI : 10.1787/elect-data-en
  property price 0.0977 EUR2005
    Temporary price data. Calculated as 90% of purchasers price based on: 94% of the average price (to account for a 6% loss in transformation and transmission) for electricity for industrial consumersin 2005 (excluded taxes). From IEA.

## Inputs from technosphere
- NOx retained, by selective catalytic reduction: 0.00135 kg; name nox_retained; source Röder, A. 2007, p. p. 298ff; lognormal variance with pedigree 0.0606, pedigree (3,3,5,1,3)
  Literature value. Amounts of retained NOx and SO2 had to be modeled as US averages, since no region-specific data on NOx and SOx retention were available. According to (NREL 2006), 33% of US coal power plant capacity is equipped with Flue Gas Desulphurization (FGD) units and these FGD units show an average removal efficiency of 85%. Emissions of SO2 and NOx from US average coal power plants without employment of FGD are documented in (NREL 2006 after AP-42 1998). The difference between these uncontrolled US averages and the region-specific actual emissions has served as an approximation for region-specific amounts of retained NOx and SO2.
  properties: dry mass 1 kg, wet mass 1 kg
- hard coal: 0, 0.482701, 0, 0, 0, 0 kg (6 entries)
  exchange present because of parent/child relationship
  properties: heating value, net 27.91 MJ
  note on heating value, net: Based on the Characterization factor of Hard coal in the CED method
- water, decarbonised: 1.73633 kg; name water_decarbonised_user; = factor_MJ_kWh*0.15; lognormal variance with pedigree 0.086, pedigree (4,5,5,5,3)
  Literature value/calculated value. Cooling water, decarbonised, for the cooling water circuit lost when producing 1kWh of electricity from hard coal, based on the value for burning 1MJ of hard coal. Röder et al. 2007, Tab. 9.65 and Tab. 9.66, p. 160f. These tables give an amount of 0.15 kg/MJ burned, which is valid for the assumption of 75% wet cooling and 25% run-through cooling. However, this revised dataset assumes 100% wet cooling.
  properties: wet mass 1 kg
- hard coal: 0 kg; name hard_coal; pedigree (1,1,1,1,1)
  Literature value/calculated value. Hard coal use when producing 1kWh of electricity from hard coal, based on the value for burning 1MJ of hard coal. Weighted average with electricity production data (Itten&Frischknecht 2012) and hard coal use values of 14 countries
  (AT, BE, ES, FR, IT, NL, PT, DE, CZ, HR, PL, SK, CN, US) (Röder et al. 2007)
  Source:
  Itten R. and Frischknecht R. (2012) Life Cycle Inventories of Electricity Mixes and Grid. ESU-services Ltd., Uster, Switzerland.
  properties: dry mass 0.94 kg, water content 0.0638298, heating value, net 27.91 MJ, carbon content, fossil 0.845, wet mass 1 kg
  note on carbon content, fossil: C content 75-94% (specified in Tab 1.1, report 6, part VI). A mean content of 0.845 kg C/ kg dry hard coal was considered
- chlorine, liquid: 0 kg
  Exchange present due to parent child relationship
- transport, freight, sea, bulk carrier for dry goods: 0 metric ton*km
  Exchange present due to parent child relationship
- hard coal power plant: 4.28296e-11 unit; name hard_coal_power_plant; = 0.0000000000037* factor_MJ_kWh; source Röder, A. 2007; lognormal variance with pedigree 0.4006, pedigree (5,3,5,5,3)
  Calculated value. At the moment, the hard coal power plant input consists of a market mix of a 100MWe power plant and a 500MWe power plant
  .
  For this calculation, 4000 load hours per year are assumed. It is assumed that a total of 150"000h is reached during the lifetime. A capacity of 500MW is taken for the calculation.
- light fuel oil: 0.000196785 kg; name light_fuel_oil; = factor_MJ_kWh*0.000017; lognormal variance with pedigree 0.056, pedigree (3,4,5,5,1)
  Literature value/calculated value. Light fuel oil use per 1MJ of hard coal burned, use for start-up of the power plant after shut down. Weighted average with electricity production data (Itten&Frischknecht 2012) and ight fuel oil use values of 14 countries
  (AT, BE, ES, FR, IT, NL, PT, DE, CZ, HR, PL, SK, CN, US) (Röder et al. 2007)
  Country values are typical values for hard coal plants.
  Source:
  Itten R. and Frischknecht R. (2012) Life Cycle Inventories of Electricity Mixes and Grid. ESU-services Ltd., Uster, Switzerland.
  properties: carbon content, fossil 0.862, wet mass 1 kg, heating value, net 42.6 MJ, dry mass 1 kg
- SOx retained, in hard coal flue gas desulfurisation: 0.00359 kg; name sox_retained; source Röder, A. 2007, p. p. 298ff; lognormal variance with pedigree 0.0606, pedigree (3,3,5,1,3)
  (same comment as for NOx retained, by selective catalytic reduction)
  properties: wet mass 1 kg, dry mass 1 kg
- hard coal ash: -0.0310225 kg; name amount_ash; = (factor_MJ_kWh*0.00268)*-1; lognormal variance with pedigree 0.1306, pedigree (5,3,5,5,3)
  Literature value/calculated value. Hard coal ash produced when producing 1kWh of electricity from hard coal, based on the value for burning 1MJ of hard coal. Weighted average with electricity production data (Itten&Frischknecht 2012) and values of 12 countries
  (AT, BE, ES, FR, IT, NL, PT, DE, CZ, HR, PL, SK). These values were valid for the ash being disposed off. Now, total amount of ash has been calculated (disposed+recycled) with the data in Tab. 9.69 p. 165 in Röder et al. 2007. Globally, 74% of the lignite ash are recycled, 26% go to disposal.
  Source:
  Itten R. and Frischknecht R. (2012) Life Cycle Inventories of Electricity Mixes and Grid. ESU-services Ltd., Uster, Switzerland.
  production volume 6.27992e9 kg; = amount_ash/electricity*electricity_apv
    Calculated from the production volume of hard coal, burned in power plant in proportion to the respective output amounts.
  property price 0 EUR2005; name amount_ash_price_EUR2005
  properties: wet mass 1 kg, dry mass 1 kg
- water, completely softened: 0.0694534 kg; name water_completely_softened; = factor_MJ_kWh*0.006; lognormal variance with pedigree 0.086, pedigree (4,5,5,5,3)
  Literature value/calculated value. Feed water for the steam circuit lost when producing 1kWh of electricity from hard coal, based on the value for burning 1MJ of hard coal. Röder et al. 2007, Tab. 9.65 and Tab. 9.66, p. 160f.
  properties: wet mass 1 kg
- residue from cooling tower: -6.36656e-5 kg; name amount_residue; = (factor_MJ_kWh*0.000005*1.1)*-1; lognormal variance with pedigree 0.1132, pedigree (5,3,5,5,2)
  Literature value/calculated value. Amount of cooling tower needed for producing 1kWh of electricity from hard coal, based on the value for burning 1MJ of hard coal. Weighted average with electricity production data (Itten&Frischknecht 2012) and values of 14 countries
  (AT, BE, ES, FR, IT, NL, PT, DE, CZ, HR, PL, SK, CN, US) (Röder et al. 2007) .
  Country values calculated from mass balance.
  Source:
  Itten R. and Frischknecht R. (2012) Life Cycle Inventories of Electricity Mixes and Grid. ESU-services Ltd., Uster, Switzerland.
  production volume 0 kg
    (same comment as for hard coal ash)
  property price 0 EUR2005; name amount_residue_price_EUR2005
  properties: wet mass 1 kg, carbon content, fossil 0.0544233, water content 0.428571, dry mass 0.7 kg

## Inputs from nature
- Water, cooling, unspecified natural origin [natural resource, in water]: 0.0444068 m3; name water_cooling_UNO_input; = ((recirculating_CS_fraction_from_allCS*WWithdrawal_EP_HC_recirculating_CS)+(once_through_andCP_CS_fractio_from_allCS*WWithdrawal_EP_HC_once_through_andCP_CS))/11.31*factor_MJ_kWh; lognormal variance with pedigree 0.130025, pedigree (4,4,5,2,4)
  Calculated based on literature data.

## Emissions to nature
- NMVOC, non-methane volatile organic compounds, unspecified origin [air, non-urban air or from high stacks]: 2.63923e-5 kg; name nmvoc; = factor_MJ_kWh*0.00000228; lognormal variance with pedigree 0.1766, pedigree (4,3,5,1,3)
  Literature value/calculated value. Emissions when producing 1kWh of electricity from hard coal, based on the value for burning 1MJ of hard coal. Weighted average with electricity production data (Itten&Frischknecht 2012) and emission values of 14 countries
  (AT, BE, ES, FR, IT, NL, PT, DE, CZ, HR, PL, SK, CN, US) (Röder et al. 2007)
  Country emissions values based on literature.
  Source:
  Itten R. and Frischknecht R. (2012) Life Cycle Inventories of Electricity Mixes and Grid. ESU-services Ltd., Uster, Switzerland.
- Carbon dioxide, fossil [air, non-urban air or from high stacks]: 1.11936 kg; name carbon_dioxide_fossil; = factor_MJ_kWh*0.0967; source Röder, A. 2007, p. Tab. 16.12 p. 302; lognormal variance with pedigree 0.0586, pedigree (4,3,5,1,3)
  (same comment as for NMVOC, non-methane volatile organic compounds, unspecified origin)
- Particulates, > 10 um [air, non-urban air or from high stacks]: 5.71e-5 kg; name particulates_gt10; source Röder, A. 2007; lognormal variance with pedigree 0.2606, pedigree (3,3,5,1,3)
  Literature value. Size distribution of particle emissions as well as an additional generic emissions factor of 5 kg/TJin of PM >10µm due to coal handling at the power plant site are considered along (Röder et al. 2004).
- Hydrogen fluoride [air, non-urban air or from high stacks]: 3.5074e-5 kg; name hydrogen_fluoride; = factor_MJ_kWh*0.00000303; lognormal variance with pedigree 0.1766, pedigree (4,3,5,1,3)
  Literature value/calculated value. Emissions when producing 1kWh of electricity from hard coal, based on the value for burning 1MJ of hard coal. Weighted average with electricity production data (Itten&Frischknecht 2012) and emission values of 14 countries
  (AT, BE, ES, FR, IT, NL, PT, DE, CZ, HR, PL, SK, CN, US) (Röder et al. 2007)
  Country emissions values calculated from trace element balance, input uncertain
  Source:
  Itten R. and Frischknecht R. (2012) Life Cycle Inventories of Electricity Mixes and Grid. ESU-services Ltd., Uster, Switzerland.
- Particulates, > 2.5 um, and < 10um [air, non-urban air or from high stacks]: 4.61e-6 kg; name particulates_2_5_to_10; source Röder, A. 2007; lognormal variance with pedigree 0.2606, pedigree (3,3,5,1,3)
  (same comment as for Particulates, > 10 um)
- Arsenic [air, non-urban air or from high stacks]: 9.58457e-8 kg; name arsenic; = factor_MJ_kWh*0.00000000828; lognormal variance with pedigree 0.7066, pedigree (4,3,5,1,3)
  (same comment as for Hydrogen fluoride)
- Radon-222 [air, non-urban air or from high stacks]: 0.00761672 kBq; name radon_222; = factor_MJ_kWh*0.000658; lognormal variance with pedigree 0.3566, pedigree (4,3,5,1,3)
  (same comment as for Hydrogen fluoride)
- Sulfate [air, non-urban air or from high stacks]: 1.1182e-8 kg; name sulfate; = factor_MJ_kWh*0.000000000966; lognormal variance with pedigree 0.1766, pedigree (4,3,5,1,3)
  (same comment as for NMVOC, non-methane volatile organic compounds, unspecified origin)
- Acrolein [air, non-urban air or from high stacks]: 6.78328e-8 kg; name acrolein; = factor_MJ_kWh*0.00000000586; lognormal variance with pedigree 0.3566, pedigree (4,3,5,1,3)
  (same comment as for NMVOC, non-methane volatile organic compounds, unspecified origin)
- Benzene [air, non-urban air or from high stacks]: 3.0328e-7 kg; name benzene; = factor_MJ_kWh*0.0000000262; lognormal variance with pedigree 0.1766, pedigree (4,3,5,1,3)
  (same comment as for NMVOC, non-methane volatile organic compounds, unspecified origin)
- Cumene [air, non-urban air or from high stacks]: 1.27331e-9 kg; name cumene; = factor_MJ_kWh*0.00000000011; lognormal variance with pedigree 0.1766, pedigree (4,3,5,1,3)
  Literature value/calculated value. Emissions when producing 1kWh of electricity from hard coal, based on the value for burning 1MJ of hard coal. Weighted average with electricity production data (Itten&Frischknecht 2012) and emission values of 14 countries
  (AT, BE, ES, FR, IT, NL, PT, DE, CZ, HR, PL, SK, CN, US) (Röder et al. 2007)
  Source:
  Itten R. and Frischknecht R. (2012) Life Cycle Inventories of Electricity Mixes and Grid. ESU-services Ltd., Uster, Switzerland.
- Methane, fossil [air, non-urban air or from high stacks]: 8.79743e-6 kg; name methane_fossil; = factor_MJ_kWh*0.00000076; lognormal variance with pedigree 0.1766, pedigree (4,3,5,1,3)
  (same comment as for NMVOC, non-methane volatile organic compounds, unspecified origin)
- Formaldehyde [air, non-urban air or from high stacks]: 5.61415e-8 kg; name formaldehyde; = factor_MJ_kWh*0.00000000485; lognormal variance with pedigree 0.1766, pedigree (4,3,5,1,3)
  (same comment as for NMVOC, non-methane volatile organic compounds, unspecified origin)
- Lead [air, non-urban air or from high stacks]: 9.81608e-8 kg; name lead; = factor_MJ_kWh*0.00000000848; lognormal variance with pedigree 0.7066, pedigree (4,3,5,1,3)
  (same comment as for Hydrogen fluoride)
- Particulates, < 2.5 um [air, non-urban air or from high stacks]: 3.73e-5 kg; name particulates_lt2_5; source Röder, A. 2007; lognormal variance with pedigree 0.2606, pedigree (3,3,5,1,3)
  (same comment as for Particulates, > 10 um)
- Toluene [air, non-urban air or from high stacks]: 5.60257e-8 kg; name toluene; = factor_MJ_kWh*0.00000000484; lognormal variance with pedigree 0.1766, pedigree (4,3,5,1,3)
  (same comment as for NMVOC, non-methane volatile organic compounds, unspecified origin)
- Radon-220 [air, non-urban air or from high stacks]: 0.00419035 kBq; name radon_220; = factor_MJ_kWh*0.000362; lognormal variance with pedigree 0.3566, pedigree (4,3,5,1,3)
  (same comment as for Hydrogen fluoride)
- Hydrocarbons, chlorinated [air, non-urban air or from high stacks]: 4.74598e-8 kg; name hydrocarbons_chlorinated; = factor_MJ_kWh*0.0000000041; lognormal variance with pedigree 0.1766, pedigree (4,3,5,1,3)
  (same comment as for NMVOC, non-methane volatile organic compounds, unspecified origin)
- Protactinium-234 [air, non-urban air or from high stacks]: 2.92862e-5 kBq; name protactinium_234; = factor_MJ_kWh*0.00000253; lognormal variance with pedigree 0.1766, pedigree (4,3,5,1,3)
  (same comment as for NMVOC, non-methane volatile organic compounds, unspecified origin)
- Thorium-232 [air, non-urban air or from high stacks]: 1.79421e-5 kBq; name thorium_232; = factor_MJ_kWh*0.00000155; lognormal variance with pedigree 0.3566, pedigree (4,3,5,1,3)
  (same comment as for Hydrogen fluoride)
- Radium-226 [air, non-urban air or from high stacks]: 4.57235e-5 kBq; name radium_226; = factor_MJ_kWh*0.00000395; lognormal variance with pedigree 0.3566, pedigree (4,3,5,1,3)
  (same comment as for Hydrogen fluoride)
- Hexane [air, non-urban air or from high stacks]: 1.57428e-8 kg; name hexane; = factor_MJ_kWh*0.00000000136; lognormal variance with pedigree 0.1766, pedigree (4,3,5,1,3)
  (same comment as for NMVOC, non-methane volatile organic compounds, unspecified origin)
- Strontium [air, non-urban air or from high stacks]: 6.85273e-7 kg; name strontium; = factor_MJ_kWh*0.0000000592; lognormal variance with pedigree 0.7806, pedigree (5,3,5,5,3)
  (same comment as for Hydrogen fluoride)
- Manganese [air, non-urban air or from high stacks]: 1.14482e-7 kg; name manganese; = factor_MJ_kWh*0.00000000989; lognormal variance with pedigree 0.7066, pedigree (4,3,5,1,3)
  (same comment as for Hydrogen fluoride)
- Chromium VI [air, non-urban air or from high stacks]: 1.85209e-8 kg; name chromium_vi; = factor_MJ_kWh*0.0000000016; lognormal variance with pedigree 0.7066, pedigree (4,3,5,1,3)
  Literature value/calculated value. Emissions when producing 1kWh of electricity from hard coal, based on the value for burning 1MJ of hard coal. Weighted average with electricity production data (Itten&Frischknecht 2012) and emission values of 14 countries
  (AT, BE, ES, FR, IT, NL, PT, DE, CZ, HR, PL, SK, CN, US) (Röder et al. 2007)
  Country emissions values based on range of data.
  Source:
  Itten R. and Frischknecht R. (2012) Life Cycle Inventories of Electricity Mixes and Grid. ESU-services Ltd., Uster, Switzerland.
- Methane, dichloro-, HCC-30 [air, non-urban air or from high stacks]: 6.78328e-8 kg; name methane_dichloro; = factor_MJ_kWh*0.00000000586; lognormal variance with pedigree 0.1766, pedigree (4,3,5,1,3)
  (same comment as for NMVOC, non-methane volatile organic compounds, unspecified origin)
- Nickel [air, non-urban air or from high stacks]: 6.54019e-8 kg; name nickel; = factor_MJ_kWh*0.00000000565; lognormal variance with pedigree 0.7066, pedigree (4,3,5,1,3)
  (same comment as for Hydrogen fluoride)
- Lead-210 [air, non-urban air or from high stacks]: 0.000144695 kBq; name lead_210; = factor_MJ_kWh*0.0000125; lognormal variance with pedigree 0.3566, pedigree (4,3,5,1,3)
  (same comment as for Hydrogen fluoride)
- Water [air, unspecified]: 0.00170351 m3; name water_to_air_unspecified; = (water_completely_softened/1000)*fraction_WCS_to_air+(water_decarbonised_user/1000)*fraction_WDC_to_air+water_cooling_UNO_input*fraction_CW_to_air; lognormal variance with pedigree 0.130025, pedigree (4,4,5,2,4)
  Calculated value based on literature values and expert opinion. See comments in the parametres" comment field.
  property fraction, origin: fresh water 0.0435081; name fraction_origin_fresh_water
  property fraction, origin: salt water 0; name fraction_origin_salt_water
  property fraction, origin: unspecified 0.956492; name fraction_origin_unspecified
- Benzo(a)pyrene [air, non-urban air or from high stacks]: 8.87846e-12 kg; name benzo_a_pyrene; = factor_MJ_kWh*0.000000000000767; lognormal variance with pedigree 0.1766, pedigree (4,3,5,1,3)
  (same comment as for NMVOC, non-methane volatile organic compounds, unspecified origin)
- Styrene [air, non-urban air or from high stacks]: 5.79936e-9 kg; name styrene; = factor_MJ_kWh*0.000000000501; lognormal variance with pedigree 0.1766, pedigree (4,3,5,1,3)
  (same comment as for NMVOC, non-methane volatile organic compounds, unspecified origin)
- Boron [air, non-urban air or from high stacks]: 0 kg; name boron; = factor_MJ_kWh*0
  (same comment as for Hydrogen fluoride)
- Thorium-228 [air, non-urban air or from high stacks]: 1.79421e-5 kBq; name throium_228; = factor_MJ_kWh*0.00000155; lognormal variance with pedigree 0.3566, pedigree (4,3,5,1,3)
  (same comment as for Hydrogen fluoride)
- Thorium-230 [air, non-urban air or from high stacks]: 2.92862e-5 kBq; name thorium_230; = factor_MJ_kWh*0.00000253; lognormal variance with pedigree 0.3566, pedigree (4,3,5,1,3)
  (same comment as for NMVOC, non-methane volatile organic compounds, unspecified origin)
- Thorium-234 [air, non-urban air or from high stacks]: 2.92862e-5 kBq; name thorium_234; = factor_MJ_kWh*0.00000253; lognormal variance with pedigree 0.3566, pedigree (4,3,5,1,3)
  (same comment as for NMVOC, non-methane volatile organic compounds, unspecified origin)
- Vanadium [air, non-urban air or from high stacks]: 0 kg; name vanadium; = factor_MJ_kWh*0
  (same comment as for Hydrogen fluoride)
- Pentane [air, non-urban air or from high stacks]: 0 kg; name pentane; = factor_MJ_kWh*0
  (same comment as for NMVOC, non-methane volatile organic compounds, unspecified origin)
- Hydrocarbons, aliphatic, unsaturated [air, non-urban air or from high stacks]: 0 kg; name hydrocarbons_aliphatic_unsaturated; = factor_MJ_kWh*0
  (same comment as for NMVOC, non-methane volatile organic compounds, unspecified origin)
- Butane [air, non-urban air or from high stacks]: 0 kg; name butane; = factor_MJ_kWh*0
  (same comment as for NMVOC, non-methane volatile organic compounds, unspecified origin)
- Propene [air, non-urban air or from high stacks]: 0 kg; name propene; = factor_MJ_kWh*0
  (same comment as for NMVOC, non-methane volatile organic compounds, unspecified origin)
- Hydrogen chloride [air, non-urban air or from high stacks]: 0.000280129 kg; name hydrogen_chloride; = factor_MJ_kWh*0.0000242; lognormal variance with pedigree 0.1766, pedigree (4,3,5,1,3)
  (same comment as for Hydrogen fluoride)
- Uranium-238 [air, non-urban air or from high stacks]: 5.71833e-5 kBq; name uranium_238; = factor_MJ_kWh*0.00000494; lognormal variance with pedigree 0.3566, pedigree (4,3,5,1,3)
  (same comment as for Hydrogen fluoride)
- Sulfur dioxide [air, non-urban air or from high stacks]: 0.0024 kg; name sulfur_dioxide; source Röder, A. 2007, p. Tab. 16.12 p. 302; lognormal variance with pedigree 0.0527, pedigree (2,2,3,1,4)
  Literature value. Data from eGrid 2010. This value is given for "coal output emissions" in general in the year 2010 and is applied to both hard coal and lignite datasets.
  eGrid. The Emissions & Generation Resource Integrated Database. Year 2010 eGRID 9th edition Version 1.0 . United States Environmental Protection Agency.
- Acenaphthene [air, non-urban air or from high stacks]: 1.19228e-10 kg; name acenaphthene; = factor_MJ_kWh*0.0000000000103; lognormal variance with pedigree 0.1766, pedigree (4,3,5,1,3)
  (same comment as for NMVOC, non-methane volatile organic compounds, unspecified origin)
- Polonium-210 [air, non-urban air or from high stacks]: 0.000144695 kBq; name polonium_210; = factor_MJ_kWh*0.0000125; lognormal variance with pedigree 0.3566, pedigree (4,3,5,1,3)
  (same comment as for Hydrogen fluoride)
- Dinitrogen monoxide [air, non-urban air or from high stacks]: 2.5582e-5 kg; name dinitrogen_monoxide; = factor_MJ_kWh*0.00000221; lognormal variance with pedigree 0.1766, pedigree (4,3,5,1,3)
  (same comment as for NMVOC, non-methane volatile organic compounds, unspecified origin)
- Molybdenum [air, non-urban air or from high stacks]: 0 kg; name molybdenum; = factor_MJ_kWh*0
  (same comment as for Hydrogen fluoride)
- Methane, monochloro-, R-40 [air, non-urban air or from high stacks]: 1.23859e-7 kg; name methane_monochloro; = factor_MJ_kWh*0.0000000107; lognormal variance with pedigree 0.1766, pedigree (4,3,5,1,3)
  (same comment as for NMVOC, non-methane volatile organic compounds, unspecified origin)
- Xylene [air, non-urban air or from high stacks]: 8.63537e-9 kg; name xylene; = factor_MJ_kWh*0.000000000746; lognormal variance with pedigree 0.1766, pedigree (4,3,5,1,3)
  (same comment as for NMVOC, non-methane volatile organic compounds, unspecified origin)
- Magnesium [air, non-urban air or from high stacks]: 2.56977e-6 kg; name magnesium; = factor_MJ_kWh*0.000000222; lognormal variance with pedigree 0.7066, pedigree (4,3,5,1,3)
  (same comment as for NMVOC, non-methane volatile organic compounds, unspecified origin)
- Ethene, tetrachloro- [air, non-urban air or from high stacks]: 1.00476e-8 kg; name ethene_tetrachloro; = factor_MJ_kWh*0.000000000868; lognormal variance with pedigree 0.1766, pedigree (4,3,5,1,3)
  (same comment as for NMVOC, non-methane volatile organic compounds, unspecified origin)
- Beryllium [air, non-urban air or from high stacks]: 4.90804e-9 kg; name beryllium; = factor_MJ_kWh*0.000000000424; lognormal variance with pedigree 0.7066, pedigree (4,3,5,1,3)
  (same comment as for Cumene)
- Cyanide [air, non-urban air or from high stacks]: 5.84566e-7 kg; name cyanide; = factor_MJ_kWh*0.0000000505; lognormal variance with pedigree 0.1766, pedigree (4,3,5,1,3)
  (same comment as for Cumene)
- Chloroform [air, non-urban air or from high stacks]: 2.29196e-8 kg; name chloroform; = factor_MJ_kWh*0.00000000198; lognormal variance with pedigree 0.1766, pedigree (4,3,5,1,3)
  (same comment as for Cumene)
- PAH, polycyclic aromatic hydrocarbons [air, non-urban air or from high stacks]: 1.95627e-7 kg; name pah; = factor_MJ_kWh*0.0000000169; lognormal variance with pedigree 0.1766, pedigree (4,3,5,1,3)
  (same comment as for NMVOC, non-methane volatile organic compounds, unspecified origin)
- Iodine [air, non-urban air or from high stacks]: 0 kg; name iodine; = factor_MJ_kWh*0
  (same comment as for Hydrogen fluoride)
- Hydrocarbons, aliphatic, alkanes, unspecified [air, non-urban air or from high stacks]: 1.45852e-7 kg; name hydrocarbons_al_al_unspec; = factor_MJ_kWh*0.0000000126; lognormal variance with pedigree 0.1766, pedigree (4,3,5,1,3)
  (same comment as for NMVOC, non-methane volatile organic compounds, unspecified origin)
- Cadmium [air, non-urban air or from high stacks]: 1.19228e-8 kg; name cadmium; = factor_MJ_kWh*0.00000000103; lognormal variance with pedigree 0.7066, pedigree (4,3,5,1,3)
  (same comment as for Hydrogen fluoride)
- Nitrogen oxides [air, non-urban air or from high stacks]: 0.0008 kg; name nitrogen_oxides; source Röder, A. 2007, p. Tab. 16.12 p. 302; lognormal variance with pedigree 0.0507, pedigree (2,2,3,1,4)
  (same comment as for Sulfur dioxide)
- Carbon disulfide [air, non-urban air or from high stacks]: 3.04437e-8 kg; name carbon_disulfide; = factor_MJ_kWh*0.00000000263; lognormal variance with pedigree 0.3566, pedigree (4,3,5,1,3)
  (same comment as for Cumene)
- Ethane, 1,1,1-trichloro-, HCFC-140 [air, non-urban air or from high stacks]: 4.67653e-9 kg; name ethane_trichloro; = factor_MJ_kWh*0.000000000404; lognormal variance with pedigree 0.1766, pedigree (4,3,5,1,3)
  (same comment as for NMVOC, non-methane volatile organic compounds, unspecified origin)
- Barium [air, non-urban air or from high stacks]: 0 kg; name barium; = factor_MJ_kWh*0
  (same comment as for Hydrogen fluoride)
- Ethane, 1,2-dichloro- [air, non-urban air or from high stacks]: 9.34148e-9 kg; name ethane_dichloro; = factor_MJ_kWh*0.000000000807; lognormal variance with pedigree 0.1766, pedigree (4,3,5,1,3)
  (same comment as for NMVOC, non-methane volatile organic compounds, unspecified origin)
- Propane [air, non-urban air or from high stacks]: 0 kg; name propane; = factor_MJ_kWh*0
  (same comment as for NMVOC, non-methane volatile organic compounds, unspecified origin)
- Hydrocarbons, aliphatic, alkanes, cyclic [air, non-urban air or from high stacks]: 1.35434e-7 kg; name hydrocarbons_al_al_cyclic; = factor_MJ_kWh*0.0000000117; lognormal variance with pedigree 0.1766, pedigree (4,3,5,1,3)
  (same comment as for NMVOC, non-methane volatile organic compounds, unspecified origin)
- Bromine [air, non-urban air or from high stacks]: 0 kg; name bromine; = factor_MJ_kWh*0
  (same comment as for Hydrogen fluoride)
- Furan [air, non-urban air or from high stacks]: 1.16913e-12 kg; name furan; = factor_MJ_kWh*0.000000000000101; lognormal variance with pedigree 0.1766, pedigree (4,3,5,1,3)
  (same comment as for NMVOC, non-methane volatile organic compounds, unspecified origin)
- Cobalt [air, non-urban air or from high stacks]: 2.33826e-8 kg; name cobalt; = factor_MJ_kWh*0.00000000202; lognormal variance with pedigree 0.7066, pedigree (4,3,5,1,3)
  (same comment as for Hydrogen fluoride)
- Radium-228 [air, non-urban air or from high stacks]: 2.70868e-5 kBq; name radium_228; = factor_MJ_kWh*0.00000234; lognormal variance with pedigree 0.3566, pedigree (4,3,5,1,3)
  (same comment as for Hydrogen fluoride)
- Copper [air, non-urban air or from high stacks]: 0 kg; name copper; = factor_MJ_kWh*0
  (same comment as for Hydrogen fluoride)
- Dioxins, measured as 2,3,7,8-tetrachlorodibenzo-p-dioxin [air, non-urban air or from high stacks]: 1.84051e-13 kg; name dioxins; = factor_MJ_kWh*1.59E-14; lognormal variance with pedigree 0.3566, pedigree (4,3,5,1,3)
  (same comment as for NMVOC, non-methane volatile organic compounds, unspecified origin)
- Potassium-40 [air, non-urban air or from high stacks]: 0.000201415 kBq; name potassium_40; = factor_MJ_kWh*0.0000174; lognormal variance with pedigree 0.3566, pedigree (4,3,5,1,3)
  (same comment as for Hydrogen fluoride)
- Antimony [air, non-urban air or from high stacks]: 4.20193e-9 kg; name antimony; = factor_MJ_kWh*0.000000000363; lognormal variance with pedigree 0.7066, pedigree (4,3,5,1,3)
  (same comment as for Hydrogen fluoride)
- Mercury [air, non-urban air or from high stacks]: 2.39614e-8 kg; name mercury; = factor_MJ_kWh*0.00000000207; source Röder, A. 2007, p. Tab. 16.8 p.296; lognormal variance with pedigree 0.1766, pedigree (4,3,5,1,3)
  (same comment as for Hydrogen fluoride)
- Phenol [air, non-urban air or from high stacks]: 3.73891e-9 kg; name phenol; = factor_MJ_kWh*0.000000000323; lognormal variance with pedigree 0.1766, pedigree (4,3,5,1,3)
  (same comment as for NMVOC, non-methane volatile organic compounds, unspecified origin)
- Ethane [air, non-urban air or from high stacks]: 0 kg; name ethane; = factor_MJ_kWh*0
  (same comment as for NMVOC, non-methane volatile organic compounds, unspecified origin)
- Uranium-234 [air, non-urban air or from high stacks]: 5.71833e-5 kBq; name uranium_234; = factor_MJ_kWh*0.00000494; lognormal variance with pedigree 0.3566, pedigree (4,3,5,1,3)
  (same comment as for NMVOC, non-methane volatile organic compounds, unspecified origin)
- Selenium [air, non-urban air or from high stacks]: 3.0328e-7 kg; name selenium; = factor_MJ_kWh*0.0000000262; lognormal variance with pedigree 0.7066, pedigree (4,3,5,1,3)
  (same comment as for Hydrogen fluoride)
- Chromium [air, non-urban air or from high stacks]: 6.07717e-8 kg; name chromium; = factor_MJ_kWh*0.00000000525; lognormal variance with pedigree 0.7066, pedigree (4,3,5,1,3)
  (same comment as for Hydrogen fluoride)
- Carbon monoxide, fossil [air, non-urban air or from high stacks]: 0.000115756 kg; name carbon_monoxide_fossil; = factor_MJ_kWh*0.00001; lognormal variance with pedigree 0.7066, pedigree (4,3,5,1,3)
  (same comment as for NMVOC, non-methane volatile organic compounds, unspecified origin)
- Zinc [air, non-urban air or from high stacks]: 0 kg; name zinc; = factor_MJ_kWh*0
  (same comment as for Hydrogen fluoride)
- Aldehydes, unspecified [air, non-urban air or from high stacks]: 2.22251e-7 kg; name aldehydes_unspecified; = factor_MJ_kWh*0.0000000192; lognormal variance with pedigree 0.1766, pedigree (4,3,5,1,3)
  (same comment as for NMVOC, non-methane volatile organic compounds, unspecified origin)
- Water [water, unspecified]: 0.044509 m3; name water_to_water_unspecified; = (water_completely_softened/1000)*(1-fraction_WCS_to_air)+(water_decarbonised_user/1000)*(1-fraction_WDC_to_air)+water_cooling_UNO_input*(1-fraction_CW_to_air); lognormal variance with pedigree 0.130025, pedigree (4,4,5,2,4)
  (same comment as for Water)
  property fraction, origin: salt water 0; name fraction_origin_salt_water_Ww
  property fraction, origin: unspecified 0.9611; name fraction_origin_unspecified_Ww
  property fraction, origin: fresh water 0.0388998; name fraction_origin_fresh_water_Ww
- Actinides, radioactive, unspecified [air, non-urban air or from high stacks]: 0.000483859 kBq; name actinides_radioactive_unspecified; = factor_MJ_kWh*0.0000418; lognormal variance with pedigree 0.3566, pedigree (4,3,5,1,3)
  (same comment as for NMVOC, non-methane volatile organic compounds, unspecified origin)
- Benzene, ethyl- [air, non-urban air or from high stacks]: 2.19936e-8 kg; name benzene_ethyl; = factor_MJ_kWh*0.0000000019; lognormal variance with pedigree 0.1766, pedigree (4,3,5,1,3)
  (same comment as for Cumene)

## Sampling procedure
literature and statistics

## Extrapolations
This dataset has been extrapolated from year 2015 to the year of the calculation (2021). The uncertainty has been adjusted accordingly.

## Review by Carl Vadenbo 2015-07-23
The update of the whole electricity sector for the ecoinvent v3.2 database consist of hundreds of datasets. All these datasets have passed through a streamlined review processes where the underlying modelling of production volumes, technology shares and efficiencies was reviewed in detail prior to the datasets being submitted to the database.
