# nutrient supply from vinasse, from fermentation of sugar beet molasses

Dataset: EcoSpold 2, unit process
Geography: GLO
Time period: 2016-01-01 to 2021-12-31
Technology level: current
Classification: ISIC rev.4 ecoinvent: 0161:Support activities for crop production
Scenario: Business-as-Usual
System model: Allocation, cut-off by classification
Generated by: Avraam Symeonidis
Database: ecoinvent
isCopyrightProtected: true
accessRestrictedTo: 1

## General comment
This inventory describes the supply of nutrients from ''vinasse, from fermentation of sugar beet molasses'' for fertiliser use.
No machinery expenditures or emissions to the environment are considered related to the actual application of this substance on soil during its agricultural use. The purpose of this activity is to connect the chemical production of ''vinasse, from fermentation of sugar beet molasses'' with its generic uses as fertilizer. The product ''vinasse, from fermentation of sugar beet molasses'' is connected to the generic market for 'organic nitrogen fertiliser, as N' and 'organic phosphorus fertiliser, as P2O5' and 'organic potassium fertiliser, as K2O' through this supplying activity. In the agricultural context, ''vinasse, from fermentation of sugar beet molasses'' can be used directly as a fertilizer input to crop production, eventually with other chemicals; alternatively, a generic input of 'organic nitrogen fertiliser, as N' and 'organic phosphorus fertiliser, as P2O5' and 'organic potassium fertiliser, as K2O' can be used instead, and this will represent the regional consumption mix for his type of nutrient. A way in between is allowed by using the generic input 'organic nitrogen fertiliser, as N' and 'organic phosphorus fertiliser, as P2O5' and 'organic potassium fertiliser, as K2O' and link to the activity providing it from a specific chemical.
In all cases, emissions associated to the application of the fertilizer have to be calculated in the crop production activity.

## Technology
Inventory based on composition of ''vinasse, from fermentation of sugar beet molasses''.

## Reference product
- organic phosphorus fertiliser, as P2O5: 1 kg; name phosphate_fertiliser_output; By-product classification allocatable product; CPC 34659: Fertilizers n.e.c.
  Assumed same composition as ethanol from sugar beet vinasse http://www.kws.de/aw/archivierte_Reste/zuckerruebe/bioethanol/Themen_Bioethanol/~ckdc/Vinasse_8211_ein_interessantes_Nebenprodukt original values given in % based on fresh mass. Dry mass = 68%
  production volume 8.38113e7 kg; = 1156018214 * phosphate_fertiliser_output
    Calculated from the production volume of vinasse, from fermentation of sugar beet molasses in the database and using the relative outputs of the nutrient.
  property oxygen content 0.563579
    Oxygen content (on a dry matter basis) of organic phosphorus fertiliser, as P2O5 is calculated from the molecular formula of the substance (Phosphorus).
  property price 0.241 EUR2005; name phosphate_fertiliser_outpu_price_EUR2005
    Set equal to the price of the corresponding inorganic fertiliser
  property carbon content, fossil 0
    Carbon content, fossil is calculated based on the chemical formula of the substance.
  property phosphorus content 0.436421
    Phosphorus content (on a dry matter basis) of organic phosphorus fertiliser, as P2O5 is calculated from the molecular formula of the substance (Phosphorus).
  property carbon content 0
    carbon content on a dry matter basis (reserved; not for manual entry)
  property true value 0.0174725; name phosphate_fertiliser_output_true_value
    allocation property applied in "true value" allocation // value calculated from revenue
  properties: water in wet mass 0 kg, dry mass 1 kg, wet mass 1 kg, carbon content, non-fossil 0, water content 0, carbon allocation 0 kg

## By-products
- organic potassium fertiliser, as K2O: 0 kg; name potassium_fertiliser_output; By-product classification allocatable product; CPC 34659: Fertilizers n.e.c.
  (same comment as for organic phosphorus fertiliser, as P2O5)
  production volume 3.20494e7 kg; = 1156018214 * potassium_fertiliser_output
    (same comment as for organic phosphorus fertiliser, as P2O5)
  property carbon content, fossil 0
    Carbon content, fossil is calculated based on the chemical formula of the substance.
  property oxygen content 0.169852
    Oxygen content (on a dry matter basis) of organic potassium fertiliser, as K2O is calculated from the molecular formula of the substance (Potassium).
  property potassium content 0.830148
    Potassium content (on a dry matter basis) of organic potassium fertiliser, as K2O is calculated from the molecular formula of the substance (Potassium).
  property price 0.188 EUR2005; name potassium_fertiliser_outpu_price_EUR2005
    Set equal to the price of the corresponding inorganic fertiliser
  property carbon content 0
    carbon content on a dry matter basis (reserved; not for manual entry)
  property true value 0.00521211; name potassium_fertiliser_output_true_value
    allocation property applied in "true value" allocation // value calculated from revenue
  properties: water content 0, water in wet mass 0 kg, wet mass 1 kg, carbon content, non-fossil 0, dry mass 1 kg, carbon allocation 0 kg
- organic nitrogen fertiliser, as N: 0 kg; name nitrogen_fertiliser_output; CPC 34659: Fertilizers n.e.c.; By-product classification allocatable product
  (same comment as for organic phosphorus fertiliser, as P2O5)
  production volume 2.46741e7 kg; = 1156018214 * nitrogen_fertiliser_output
    (same comment as for organic phosphorus fertiliser, as P2O5)
  property nitrogen content 1
    Nitrogen content (on a dry matter basis) of organic nitrogen fertiliser, as N is calculated from the molecular formula of the substance (Nitrogen).
  property price 0.473 EUR2005; name nitrogen_fertiliser_output_price_EUR2005
    Set equal to the price of the corresponding inorganic fertiliser
  property carbon content, fossil 0
    Carbon content, fossil is calculated based on the chemical formula of the substance.
  property carbon content 0
    carbon content on a dry matter basis (reserved; not for manual entry)
  property true value 0.0100957; name nitrogen_fertiliser_output_true_value
    allocation property applied in "true value" allocation // value calculated from revenue
  properties: dry mass 1 kg, water content 0, water in wet mass 0 kg, carbon content, non-fossil 0, wet mass 1 kg, carbon allocation 0 kg

## Inputs from technosphere
- vinasse, from fermentation of sugar beet molasses: 7.35197 kg; name nutrient_input; lognormal variance with pedigree 0.0088, pedigree (4,1,2,1,1)
  Total production volume of 'vinasse, from fermentation of sugar beet molasses' (1156018215 kg), produced in the database is used as nutrient supplement in agriculture.
  properties: dry mass 0.58 kg, water content 0.724138, carbon content, non-fossil 0.12867, wet mass 1 kg
