# chemi-thermomechanical pulp production

Dataset: EcoSpold 2, unit process
Geography: RoW
Time period: 2000-01-01 to 2021-12-31
Technology level: current
Classification: ISIC rev.4 ecoinvent: 1701:Manufacture of pulp, paper and paperboard
Classification: EcoSpold01Categories: paper & cardboard/pulps
Synonyms: wood-containing pulp
Tags: ConvertedDataset
Scenario: Business-as-Usual
System model: Allocation, cut-off by classification
Generated by: Roland Hischier
Published in: Hischier R. 2007
Database: ecoinvent
isCopyrightProtected: true
accessRestrictedTo: 1

## General comment
This dataset is a copy of the European dataset “chemi-thermomechanical pulp production, RER, 2000”.
This dataset characterises the average production of pulp following a chemi-thermomechanical process (CTMP) in Europe.

In the CTMP wood chips are impregnated with chemicals before they are mechanically defibrated in the refiner under high pressure (~about 3 bar) or at atmospheric pressure, mainly in two stages.

Bleaching has not been included because chemi-mechanical pulps cannot be brightened effectively by oxidative and reductive bleaching. During mechanical defibration, lignin is plasticised and remains in the pulp.
PULP MARKET: Of the total pulp production in Europe the largest part is sulfate /kraft-pulp, making up about 70% of total pulp production. Thermo-mechanical pulp is a type of mechanical pulp, which makes up around 25-28% of total pulp production, of which in turn the largest part, about 85%, is thermo-mechanical pulp and the rest chemi-thermomechanical pulp. Only a part of pulp production is sold on the market, the majority is produced at integrated pulp mills which directly process it further into (paper-) products. For mechanical pulp the share of market pulp is small, much in 2016 was 9%, the other 92% is integrated pulp.
The SOURCES of information are (1) a report of the Swedish EPA about the Swedish pulp and paper industry (Naturvardsverket, 2001), (2) an environmental report of a Norwegian CTMP mill (Södra, 2002), (3) the European IPPC documentation for the paper and pulp industry, which also contains information on Best Available Techniques (BAT) and the description and quantification of the present situation of the pulp and paper industry (European Commission, 2000), (4) information on the present situation of a Finnish CTMP mill and (5) the theoretical description of Patt et al. (1993).
Reference(s):
Naturvardsverket, 2001. Naturvardsverket (2001) Skogsindustrins utsläpp - avfallsmängder och energiförbrukning 2000. Report 5154. Naturvardsverket (Swedish EPA), Stockholm.
Södra (2002) Meeting Södra. Environmental Report 2001. Södra, Växjö (Sweden) as pdf-File under: www.sodra.com.
European Commission, 2000. European Commission (2000) Integrated Pollution Prevention and Control (IPPC) - Reference Document on Best Available Techniques in the Pulp and Pa-per Industry. Institute for Prospective Technological Studies, Sevilla.
Patt R., Kordsachia O., Süttinger R., Ohtani Y., Hoesch J. F., Ehrler P., Eich-inger R., Holik H., Hamm U., Rohmann M. E., Mummenhoff P., Petermann E., Miller R. F., Frank D., Wilken R., Baumgarten H. L. and Rentrop G.-H. (1993) Paper and Pulp. In: Ullmann's Encyclopedia of Industrial Chemistry, Vol. A.18. VCH Publisher Inc.

## Included activities start
The activity starts with the reception of residual softwood at the mill.

## Included activities end
The process includes raw material handling, pulping, drying, recovery cycles of chemicals and internal wastewater treatment. The activity ends when the chemi-thermomechanical pulp is ready to be sold.

## Geography
The dataset represents the average chemi-thermomechanical pulp production in Europe. Data are sourced from various European producers, for exaple, in Switzerland and Germany.

## Technology
Modern average technology.

## Time period
Data gathered between 2000-2002.

## Parameters
- fraction, process water, to air: 0.15 dimensionless; name fraction_PW_to_air; lognormal variance with pedigree 0.092025, pedigree (4,4,3,2,4)

## Reference product
- chemi-thermomechanical pulp: 1 kg; By-product classification allocatable product; CPC 321: Pulp, paper and paperboard
  EcoSpold01Location=RER
  production volume 6.51551e8 kg; name apv; = 8749460000*0.09
    Caluclated value. The total amount of global chemi-thermomechanical pulp production in 2016, according to FAOSTAT, was 8750000 tonnes. No data was available on how much of the total global production is produced at integrated paper mills versus how much is traded on the market (market sulfate pulp). This dataset represents marekt chemi-thermomechanical pulp only. Therefore, it was assumed that the share of market mechanical pulp in total mechanical pulp production in Europe, 9% (CEPI, 2018), applies globally. 9% of 8750000 tonnes results in an annual production volume for thermo-mechanical market pulp of 781000 tonnes.
    Reference(s):
    Confederation of European Paper Industries (CEPI), 2018, personal correspondence 4.7.2018
    FAO, 2018, FAOSTAT, Forestry Production and Trade, data retrieved from http://www.fao.org/faostat/en/#data/FO, 4.7.2018
  property price 0.37 EUR2005
    Export prices for the World+ according to: http://faostat.fao.org/site/626/DesktopDefault.aspx?PageID=626#ancor downloaded 6 May 2009; calculated as export value divided by export volume.
  property carbon content, non-fossil 0.494
    C content of dry mass is 0.494 kgC/kg dry wood (ecoinvent v2.2 report 6_IX & ecoinvent v2.2 report 9). No other C containing products in the formulation of the pulp.
  property heating value, net 13.23 MJ
    LHV is calculated based on the Carbon content of the product. More details can be found on the respective documentation.
  property carbon content 0.494
    carbon content on a dry matter basis (reserved; not for manual entry)
  properties: wet mass 1 kg, water in wet mass 0.1 kg, water content 0.111111, carbon content, fossil 0, dry mass 0.9 kg, carbon allocation 0.4446 kg

## Inputs from technosphere
- sodium silicate, spray powder, 80%: 0.019 kg; lognormal variance with pedigree 0.044, pedigree (1,4,5,5,1)
  Data from 1 scandinavian mill
  EcoSpold01Location=RER
  Uncertainty: data from 1 scandinavian mill
  properties: dry mass 1 kg, wet mass 1 kg
- municipal solid waste: 0 kg; name a_msw; pedigree (1,1,1,1,1)
  Average swedish data from SE-EPA
  EcoSpold01Location=CH
  Uncertainty: average swedish data from SE-EPA
  production volume 0 kg
    Calculated from the production volume of chemi-thermomechanical pulp in proportion to the respective output amounts.
  properties: carbon content, fossil 0.171549, carbon content, non-fossil 0.261655, water content 0.297017, wet mass 1 kg, dry mass 0.771 kg, heating value, net 11.74 MJ
  note on carbon content, fossil: MSW composition in tab 4.1, ecoinvent v2.2 report 13_I. C content referred to 1 kg DM
  note on heating value, net: Value taken from the general comment of the treatment dataset.
- waste plastic, mixture: 0 kg; name a_wpm; pedigree (1,1,1,1,1)
  EcoSpold01Location=CH
  Average swedish data from SE-EPA
  Uncertainty: average swedish data from SE-EPA
  production volume 0 kg
    (same comment as for municipal solid waste)
  property price 0 EUR2005; name a_wpm_price_EUR2005
  properties: dry mass 0.847 kg, carbon content, fossil 0.747344, wet mass 1 kg, water content 0.180638, heating value, net 30.79 MJ
  note on carbon content, fossil: C content in 1 kg DM was calculated using data in Tab A.2, ecoinvent v2.2 report 13_I
- residual softwood, wet: 0.003087 m3; lognormal variance with pedigree 0.0426, pedigree (1,3,5,5,1)
  EcoSpold01Location=RER
  Average from CER of 2 scandinavian mills
  Uncertainty: average from CER of 2 scandinavian mills
  properties: wet mass 765 kg, water content 0.7, dry mass 450 kg, carbon content, non-fossil 0.494, heating value, net 5962.7 MJ
  note on carbon content, non-fossil: C content of dry mass is 0.494 kgC/kg dry wood (ecoinvent v2.2 report 9)
- pulp factory: 5e-11 unit; lognormal variance with pedigree 0.448, pedigree (4,5,5,5,5)
  EcoSpold01Location=RER
  Own assumption
  Uncertainty: own assumption
- heat, district or industrial, other than natural gas: 0 MJ; pedigree (1,1,1,1,1)
  Average from SE-EPA and CER of 2 mills
  EcoSpold01Location=RER
  Uncertainty: average from SE-EPA and CER of 2 mills
  properties: heating value, net 1 MJ
- heat, district or industrial, natural gas: 0 MJ; pedigree (1,1,1,1,1)
  (same comment as for heat, district or industrial, other than natural gas)
  properties: heating value, net 1 MJ
- waste graphical paper: 0 kg; name a_wgp; pedigree (1,1,1,1,1)
  (same comment as for waste plastic, mixture)
  production volume 0 kg
    (same comment as for municipal solid waste)
  property price 0 EUR2005; name a_wgp_price_EUR2005
  properties: water content 0.126126, wet mass 1 kg, carbon content, non-fossil 0.454955, dry mass 0.888 kg, heating value, net 14.12 MJ
- waste wood, untreated: 0 kg; name a_ww; pedigree (1,1,1,1,1)
  EcoSpold01Location=CH
  Average swedish data from SE-EPA (0.00252) + 0.45 to balance the wood input.
  Uncertainty: average swedish data from SE-EPA
  production volume 0 kg
    (same comment as for municipal solid waste)
  property price 0 EUR2005; name a_ww_price_EUR2005
  properties: carbon content, non-fossil 0.48632, wet mass 1 kg, water content 0.25, heating value, net 13.99 MJ, dry mass 0.8 kg
  note on carbon content, non-fossil: Tab A.4, ecoinvent v2.2 report 13_I. C content has been referred to 1 kg DM,
- waste textile, soiled: -0.00468 kg; name a_wtex; lognormal variance with pedigree 0.0432, pedigree (2,3,5,5,1)
  (same comment as for waste plastic, mixture)
  production volume 3.04926e6 kg; = a_wtex*apv
    (same comment as for municipal solid waste)
  property price 0 EUR2005; name a_wtex_price_EUR2005
  properties: heating value, net 14.45 MJ, water content 0.333333, wet mass 1 kg, dry mass 0.75 kg, carbon content, non-fossil 0.570519
  note on carbon content, non-fossil: C content of 1 kg DM was calculated after data in Tab A.4, ecoinvent v2.2 report 13_I,
- sulfite: 0.025 kg; lognormal variance with pedigree 0.044, pedigree (1,4,5,5,1)
  (same comment as for sodium silicate, spray powder, 80%)
  properties: wet mass 1 kg, dry mass 1 kg
- scrap steel: -0.00504 kg; name a_ssteel; lognormal variance with pedigree 0.0432, pedigree (2,3,5,5,1)
  (same comment as for municipal solid waste)
  production volume 3.28382e6 kg; = a_ssteel*apv
    (same comment as for municipal solid waste)
  property price 0 EUR2005; name a_ssteel_price_EUR2005
  properties: wet mass 1 kg, dry mass 1 kg
- wood ash mixture, pure: -0.00403 kg; name a_woodash; lognormal variance with pedigree 0.0432, pedigree (2,3,5,5,1)
  (same comment as for waste plastic, mixture)
  production volume 2.62575e6 kg; = a_woodash*apv
    (same comment as for municipal solid waste)
  property price 0 EUR2005; name a_woodash_price_EUR2005
  properties: carbon content, non-fossil 0.012, dry mass 1 kg, wet mass 1 kg
- electricity, medium voltage: 0 kWh; pedigree (1,1,1,1,1)
  EcoSpold01Location=NORDEL
  Average from SE-EPA and CER of 2 mills
  Uncertainty: average from SE-EPA and CER of 2 mills
- chemical, inorganic: 0.001 kg; lognormal variance with pedigree 0.044, pedigree (1,4,5,5,1)
  EcoSpold01Location=GLO
  Data from 1 scandinavian mill
  Uncertainty: data from 1 scandinavian mill
  properties: dry mass 1 kg, wet mass 1 kg, carbon content, fossil 0.003
  note on carbon content, fossil: This dataset is an unweighted average of 20 inorganic substances (listed in Tab 88.1, ecoinvent v2.2 report 8, part II), being part of the top100 chemicals included in this database. The C-content has also been calculated as an unweighted average of the C content of the substances composing this dataset.
- EDTA, ethylenediaminetetraacetic acid: 0.002 kg; lognormal variance with pedigree 0.044, pedigree (1,4,5,5,1)
  (same comment as for sodium silicate, spray powder, 80%)
  properties: wet mass 1 kg, dry mass 1 kg, carbon content, fossil 0.410959, heating value, net 19.09 MJ
- hydrogen peroxide, without water, in 50% solution state: 0.025 kg; lognormal variance with pedigree 0.044, pedigree (1,4,5,5,1)
  EcoSpold01Location=RER
  Data from 1 scandinavian mill
  Uncertainty: data from 1 scandinavian mill
  properties: wet mass 1 kg, heating value, net 7.13 MJ, dry mass 1 kg
- municipal solid waste: -9.87513e-7, -2.48828e-7, -3.55591e-7, -0.000698408 kg (4 entries); lognormal variance with pedigree 0.0432, pedigree (2,3,5,5,1)
  (same comment as for municipal solid waste)
  production volume 456086 kg
- waste plastic, mixture: -0.00557919, -0.00037278, -2.81928e-5, -0.000153972, -6.22028e-5, -0.00014621, -0.0390574 kg (7 entries); lognormal variance with pedigree 0.0432, pedigree (2,3,5,5,1)
  (same comment as for waste plastic, mixture)
  production volume 2.95804e7 kg
- heat, district or industrial, other than natural gas: 0.00050024, 1.23361 MJ (2 entries); lognormal variance with pedigree 0.0426, pedigree (1,3,5,5,1)
  (same comment as for heat, district or industrial, other than natural gas)
- heat, district or industrial, natural gas: 0.00324434, 0.210506 MJ (2 entries); lognormal variance with pedigree 0.0426, pedigree (1,3,5,5,1)
  (same comment as for heat, district or industrial, other than natural gas)
- waste graphical paper: -0.00070423, -0.000107539, -9.40332e-6, -0.000388584, -3.78902e-5, -7.01386e-5, -0.0130822 kg (7 entries); lognormal variance with pedigree 0.0432, pedigree (2,3,5,5,1)
  (same comment as for waste plastic, mixture)
  production volume 9.38234e6 kg
- waste wood, untreated: -0.0304012, -0.00377477, -0.000275978, -0.0106022, -0.00160174, -0.00253221, -0.403332 kg (7 entries); lognormal variance with pedigree 0.0432, pedigree (2,3,5,5,1)
  (same comment as for waste wood, untreated)
  production volume 2.9484e8 kg
- electricity, medium voltage: 0.0243784, 0.00467473, 0.0784791, 1.14141, 0.160882, 0.524178 kWh (6 entries); lognormal variance with pedigree 0.0426, pedigree (1,3,5,5,1)
  (same comment as for electricity, medium voltage)

## Inputs from nature
- Water, unspecified natural origin [natural resource, in water]: 0.02 m3; name water_UNO_input; lognormal variance with pedigree 0.0426, pedigree (1,3,5,5,1)
  Average from SE-EPA and CER of 2 mills
  Uncertainty: average from SE-EPA and CER of 2 mills

## Emissions to nature
- Water [water, unspecified]: 0.017 m3; name water_to_water_unspecified; lognormal variance with pedigree 0.0827, pedigree (2,2,5,5,1)
  Calculated value based on literature values and expert opinion. See comments in the parametres' comment field.
  property fraction, origin: fresh water 0; name fraction_origin_fresh_water_Ww
  property fraction, origin: unspecified 1; name fraction_origin_unspecified_Ww
  property carbon content, non-fossil 0; name C_content_non_fossil
  property water in wet mass 1000 kg; name WWM
  property dry mass 0 kg; name DM
  property wet mass 1000 kg; name WM
  property carbon content, fossil 0; name C_content_fossil
  property fraction, origin: salt water 0; name fraction_origin_salt_water_Ww
- Nitrogen [water, surface water]: 0.0004 kg; lognormal variance with pedigree 0.0826, pedigree (1,3,5,5,1)
  Average from SE-EPA and CER of 1 mill
  Uncertainty: average from SE-EPA and CER of 1 mill
- Phosphorus [water, surface water]: 1e-5 kg; lognormal variance with pedigree 0.0826, pedigree (1,3,5,5,1)
  Average from SE-EPA and CER of 1 mill
  Uncertainty: average from SE-EPA and CER of 1 mill
- TOC, Total Organic Carbon [water, surface water]: 0.00607407 kg; lognormal variance with pedigree 0.0826, pedigree (1,3,5,5,1)
  Calculated by default as TOC (gC) = COD/2.7 (COD measured in g O2). Should more correctly be calculated from the carbon content of the specified emissions to water.
  Uncertainty: average from SE-EPA and CER of 1 mill
- DOC, Dissolved Organic Carbon [water, surface water]: 0.00607407 kg; lognormal variance with pedigree 0.0826, pedigree (1,3,5,5,1)
  Calculated as equal to TOC.
  Uncertainty: average from SE-EPA and CER of 1 mill
- Nitrogen oxides [air, urban air close to ground]: 0.0002 kg; lognormal variance with pedigree 0.0832, pedigree (2,3,5,5,1)
  Average swedish data from SE-EPA
  Uncertainty: average swedish data from SE-EPA
- Suspended solids, unspecified [water, surface water]: 0.00096 kg; lognormal variance with pedigree 0.0826, pedigree (1,3,5,5,1)
  Average from SE-EPA and CER of 1 mill
  Uncertainty: average from SE-EPA and CER of 1 mill
- BOD5, Biological Oxygen Demand [water, surface water]: 0.00249 kg; lognormal variance with pedigree 0.0826, pedigree (1,3,5,5,1)
  Average from SE-EPA and CER of 1 mill
  Uncertainty: average from SE-EPA and CER of 1 mill
- Sulfur dioxide [air, urban air close to ground]: 1e-5 kg; lognormal variance with pedigree 0.0432, pedigree (2,3,5,5,1)
  Average swedish data from SE-EPA
  Uncertainty: average swedish data from SE-EPA
- COD, Chemical Oxygen Demand [water, surface water]: 0.0164 kg; lognormal variance with pedigree 0.0826, pedigree (1,3,5,5,1)
  Average from SE-EPA and CER of 1 mill
  Uncertainty: average from SE-EPA and CER of 1 mill
- Water [air, unspecified]: 0.003 m3; name water_to_air_unspecified; lognormal variance with pedigree 0.0827, pedigree (2,2,5,5,1)
  (same comment as for Water)
  property fraction, origin: fresh water 0; name fraction_origin_fresh_water
  property fraction, origin: salt water 0; name fraction_origin_salt_water
  property fraction, origin: unspecified 1; name fraction_origin_unspecified

## Sampling procedure
Data were collected from literature and industry data.

## Extrapolations
This dataset is a copy of the European dataset “chemi-thermomechanical pulp production, RER, 2000”. The uncertainty has been adjusted accordingly.

## Review by Hans-Jörg Althaus 2003-08-06
Passed
