# sorting facility construction, for construction waste

Dataset: EcoSpold 2, unit process
Geography: CH
Time period: 1996-01-01 to 2021-12-31
Technology level: current
Classification: EcoSpold01Categories: waste management/others
Classification: ISIC rev.4 ecoinvent: 4290:Construction of other civil engineering projects
Tags: ConvertedDataset
Scenario: Business-as-Usual
System model: Allocation, cut-off by classification
Generated by: Gabor Doka (obsolete)
Published in: Doka G. 2007
Database: ecoinvent
isCopyrightProtected: true
accessRestrictedTo: 1

## General comment
Sorting plant with a construction waste throughput of 200'000 tons per year. Operation time 50 years.
[This dataset was already contained in the ecoinvent database version 2. It was not individually updated during the transfer to ecoinvent version 3. Life Cycle Impact Assessment results may still have changed, as they are affected by changes in the supply chain, i.e. in other datasets. This dataset was generated following the ecoinvent quality guidelines for version 2. It may have been subject to central changes described in the ecoinvent version 3 change report (http://www.ecoinvent.org/database/ecoinvent-version-3/reports-of-changes/), and the results of the central updates were reviewed extensively. The changes added e.g. consistent water flows and other information throughout the database. The documentation of this dataset can be found in the ecoinvent reports of version 2, which are still available via the ecoinvent website. The change report linked above covers all central changes that were made during the conversion process.]

## Included activities end
infrastructure materials including replacement parts during operation, transport and disposal of infastructure. Land use. Fuel oil demand from small administrative building. Operation time 50 years.

## Geography
Technology used in Switzerland and Germany. Compatibility with other regions unknown.

## Technology
Construction waste sorting plants usually feature a jaw or impact crusher. Here materials from a cone crusher are inventoried. Infrastructure materials are adapted from LCI for a rock crusher for gravel production. Reduced wear and tear from lower annual throughput in construction waste sorting plant (200kt/a) is heeded.

## Reference product
- sorting facility, for construction waste: 1 unit; CPC 53290: Other civil engineering works; By-product classification allocatable product
  EcoSpold01Location=CH
  production volume 0.0336675 unit
    This is a placeholder value that does not reflect real-world production volumes. This dataset does not currently require a real-world production volume to work in the database framework, and no actual data were collected yet. This has no negative effect on the results of the ecoinvent database. The placeholder value of this activity was scaled according to the nominal GDP of 2005 (source: United Nations, http://data.un.org/Glossary.aspx?q=GDP+%28current+US%24%29, accessed 20130726) to reflect an appropriate share of the global production volume, which is also a placeholder value.
  property price 85705.2 EUR2005
    Calculated based on inputs: The price of the product has been calculated as a sum of the values of the material and energy inputs for this product. This value is therefore a rough estimation. It may underestimate the real price since there are additional expenses when producing any product. These expences can include for example labour costs, treatment of waste materials and profit for the producer. Please consider carefully whether this level of data quality is acceptable for your application.

## Inputs from technosphere
- heat, central or small-scale, other than natural gas: 151340 MJ; lognormal variance with pedigree 0.07, pedigree (1,1,5,1,1)
  EcoSpold01Location=CH
  Fuel oil demand for administrative heating. Uncertainty estimated from climate variation
  properties: heating value, net 1 MJ
- cast iron: 3470 kg; lognormal variance with pedigree 0.432, pedigree (1,4,5,1,4)
  EcoSpold01Location=RER
  Data from one inventory study for rock crusher (Landfield & Karra 2000)
  Uncertainty: & basic uncertainty of 3; Data from one inventory study for rock crusher (Landfield & Karra 2000)
  properties: carbon content, fossil 0.04, wet mass 1 kg, dry mass 1 kg
  note on carbon content, fossil: Cast iron is made by remelting pig iron in small furnaces (e.g. cupola furnaces or electric arc furnaces) and poured into moulds to make castings. It usually contains 2% to 6% carbon (ecoinvent v2.2 report 10_partII). An average content of 4% was considered
- aluminium, cast alloy: 34 kg; lognormal variance with pedigree 0.432, pedigree (1,4,5,1,4)
  Data from one inventory study for rock crusher (Landfield & Karra 2000)
  EcoSpold01Location=RER
  Uncertainty: & basic uncertainty of 3; Data from one inventory study for rock crusher (Landfield & Karra 2000)
  properties: wet mass 1 kg, dry mass 1 kg
- bronze: 676 kg; lognormal variance with pedigree 0.432, pedigree (1,4,5,1,4)
  EcoSpold01Location=CH
  Data from one inventory study for rock crusher (Landfield & Karra 2000)
  Uncertainty: & basic uncertainty of 3; Data from one inventory study for rock crusher (Landfield & Karra 2000)
  properties: dry mass 1 kg, wet mass 1 kg
- brass: 1.28 kg; lognormal variance with pedigree 0.432, pedigree (1,4,5,1,4)
  (same comment as for bronze)
  properties: dry mass 1 kg, wet mass 1 kg
- waste plastic, mixture: -160 kg; lognormal variance with pedigree 0.432, pedigree (1,4,5,1,4)
  Data from one inventory study for rock crusher (Landfield & Karra 2000)
  EcoSpold01Location=CH
  Uncertainty: & basic uncertainty of 3; Data from one inventory study for rock crusher (Landfield & Karra 2000)
  production volume 160 kg
    Calculated from the production volume of sorting facility, for construction waste in proportion to the respective output amounts.
  properties: water content 0.180638, carbon content, fossil 0.747344, dry mass 0.847 kg, heating value, net 30.79 MJ, wet mass 1 kg
  note on carbon content, fossil: C content in 1 kg DM was calculated using data in Tab A.2, ecoinvent v2.2 report 13_I
  note on heating value, net: Value taken from the general comment of the treatment dataset.
- lubricating oil: 5000 kg; lognormal variance with pedigree 0.432, pedigree (1,4,5,1,4)
  (same comment as for aluminium, cast alloy)
  properties: heating value, net 40.2 MJ, carbon content, fossil 0.75, dry mass 1 kg, wet mass 1 kg
  note on heating value, net: Literature value, Source: IPCC 2006, 2006 IPCC Guidelines for National Greenhouse Gas Inventories, Prepared by the National Greenhouse Gas Inventories Programme, Eggleston H.S., Buendia L., Miwa K., Ngara T. and Tanabe K. (eds). Published: IGES, Japan
  note on carbon content, fossil: Lubricating oil is produced from diesel. C-content/dry mass of fats and oils considered 75%, from: ecoinvent v2.2 report, n 15a, pg 40
- waste mineral oil: -5000 kg; lognormal variance with pedigree 0.432, pedigree (1,4,5,1,4)
  (same comment as for bronze)
  production volume 5000 kg
    (same comment as for waste plastic, mixture)
  properties: heating value, net 34.7 MJ, water content 0.111111, dry mass 0.9 kg, wet mass 1 kg, carbon content, fossil 0.864444
  note on carbon content, fossil: Tab A.6, ecoinvent v2.2 report 13_I. C content has been calculated after data in the tables, and then referred to 1 kg DM
- ferromanganese, high-coal, 74.5% Mn: 12600 kg; lognormal variance with pedigree 0.432, pedigree (1,4,5,1,4)
  (same comment as for cast iron)
  properties: carbon content, fossil 0.075, dry mass 1 kg, wet mass 1 kg, heating value, net 2.27 MJ
  note on carbon content, fossil: Typical composition of ferromanganese, high-carbon is given in Tab. 3.4 ecoinvent v2.2 report 20_part VII
- steel, unalloyed: 103000 kg; lognormal variance with pedigree 0.432, pedigree (1,4,5,1,4)
  (same comment as for aluminium, cast alloy)
  properties: carbon content, fossil 0.0025, dry mass 1 kg, wet mass 1 kg
  note on carbon content, fossil: Unalloyed steels or carbon steels are those in which the level of an individual element in no case reaches or exceeds the limiting concentration given in Tab. 3.1 ecoinvent v2.2 report 10_partII. Assumed to have a C content of 0.25%
- epoxy resin, liquid: 160 kg; lognormal variance with pedigree 0.432, pedigree (1,4,5,1,4)
  (same comment as for aluminium, cast alloy)
  properties: heating value, net 12.82 MJ, dry mass 1 kg, carbon content, fossil 0.42325, wet mass 1 kg

## Inputs from nature
- Transformation, to industrial area [natural resource, land]: 15000 m2; lognormal variance with pedigree 0.1861, pedigree (4,5,5,3,1)
  Typical size given for planning data in one source for Germany.
  Uncertainty: & basic uncertainty of 2; typical size given for planning data in one source for Germany.
- Occupation, industrial area [natural resource, land]: 750000 m2*year; lognormal variance with pedigree 0.1261, pedigree (4,5,5,3,1)
  Typical size given for planning data in one source for Germany. Estimate on operation time
  Uncertainty: & basic uncertainty of 1.5; typical size given for planning data in one source for Germany. Estimate on operation time
- Transformation, from unspecified [natural resource, land]: 15000 m2; lognormal variance with pedigree 0.1861, pedigree (4,5,5,3,1)
  (same comment as for Transformation, to industrial area)

## Sampling procedure
Literature data

## Extrapolations
This dataset has been extrapolated from year 2000 to the year of the calculation (2021). The uncertainty has been adjusted accordingly.

## Review by Niels Jungbluth 2003-06-03
Passed.
