# sheet rolling, steel

Dataset: EcoSpold 2, unit process
Geography: RoW
Time period: 1997-01-01 to 2021-12-31
Technology level: current
Classification: ISIC rev.4 ecoinvent: 2410:Manufacture of basic iron and steel
Classification: EcoSpold01Categories: metals/processing
Synonyms: cold rolling
Tags: ConvertedDataset
Scenario: Business-as-Usual
System model: Allocation, cut-off by classification
Share of production covered: 0 %
Generated by: Silvio Blaser
Published in: Werner F. 2007
Database: ecoinvent
isCopyrightProtected: true
accessRestrictedTo: 1

## General comment
This process is to be used only for un- and low-alloyed steel. For many applications, the products of hot rolling are unsatisfactory, e.g., with respect to cross section, surface quality, dimensional accuracy, and general finish, so that cold rolling is necessary. Cold rolled products are mainly strips and sheets with high quality surface finish and precise metallurgical properties for use in high specification products.
[This dataset was already contained in the ecoinvent database version 2. It was not individually updated during the transfer to ecoinvent version 3. Life Cycle Impact Assessment results may still have changed, as they are affected by changes in the supply chain, i.e. in other datasets. This dataset was generated following the ecoinvent quality guidelines for version 2. It may have been subject to central changes described in the ecoinvent version 3 change report (http://www.ecoinvent.org/database/ecoinvent-version-3/reports-of-changes/), and the results of the central updates were reviewed extensively. The changes added e.g. consistent water flows and other information throughout the database. The documentation of this dataset can be found in the ecoinvent reports of version 2, which are still available via the ecoinvent website. The change report linked above covers all central changes that were made during the conversion process.]

## Included activities end
Includes the process steps continuous pickling line, cold rolling, annealing, tempering, inspecting and finishing, packing coils or sheets, roll maintenance. Does not include the material being rolled

## Geography
Data-set is representative for European Union

## Technology
Average technique for EU, for un- and low-alloyed steel. A 50-50 mix is inventoried where different technologies are apllied for the same process step (e.g. pickling)

## Parameters
- fraction, process water, to air: 0.2 dimensionless; name fraction_PW_to_air; lognormal variance with pedigree 0.092025, pedigree (4,4,3,2,4)
  Literature value (Statistics Canada, 2007 & Shaffer, K.H., 2008, Consumptive water use in the Great Lakes Basin, USGS) (Vionnet, S., Quantis Water Database - Technical Report, 2012).
- fraction, cooling water, recirculating system, to air: 0.771 dimensionless; name fraction_CW_R_to_air; lognormal variance with pedigree 0.0413, pedigree (2,3,1,3,1)
  Calculated based on literature value (Scown, C.D., 2011, Water Footprint of U.S. Transportation Fuels and supplying information of the article) (Vionnet, S., Quantis Water Database - Technical Report, 2012).
- fraction, cooling water, cooling pond system, to air: 0.032 dimensionless; name fraction_CW_CP_to_air; lognormal variance with pedigree 0.0413, pedigree (2,3,1,3,1)
  (same comment as for fraction, cooling water, recirculating system, to air)
- fraction, cooling water, to air: 0.3875 dimensionless; name fraction_CW_to_air; = (0.5*fraction_CW_OT_to_air)+(0.5*fraction_CW_R_to_air); lognormal variance with pedigree 0.092025, pedigree (4,4,3,2,4)
  Calculated value based on literature value (see comments of the other parametres present in this dataset) and expert opinion. In the case when no industry/literature data are available about the type of cooling or directly fraction, cooling water, to air specific for the process a default assumption is applied. It is assumed that the once-through cooling system is used in 50% of all cases and recirculating system is used in another 50% of all cases.
- fraction, cooling water, once-through system, to air: 0.004 dimensionless; name fraction_CW_OT_to_air; lognormal variance with pedigree 0.0413, pedigree (2,3,1,3,1)
  (same comment as for fraction, cooling water, recirculating system, to air)
- fraction, water, deionised, to air: 0.2 dimensionless; name fraction_WDI_to_air; = fraction_PW_to_air; lognormal variance with pedigree 0.092025, pedigree (4,4,3,2,4)
  Calculated value. See comment in the other parametres present in this dataset. Deionised water is considered to be always used as process water, thus process water fractions to air are applied to all deionised water input flows to calculate the amount of water consumed in the processes.

## Reference product
- sheet rolling, steel: 1 kg; By-product classification allocatable product; CPC 88601: Basic iron and steel manufacturing services
  EcoSpold01Location=RER
  production volume 3.94e11 kg
    2005 data for 'Hot rolled flat products' (IISI: Steel Statistical Yearbook 2007)
  property price 0.0910077 EUR2005
    Calculated based on inputs: The price of the product has been calculated as a sum of the values of the material and energy inputs for this product. This value is therefore a rough estimation. It may underestimate the real price since there are additional expenses when producing any product. These expences can include for example labour costs, treatment of waste materials and profit for the producer. Please consider carefully whether this level of data quality is acceptable for your application.

## Inputs from technosphere
- electricity, medium voltage: 0 kWh; pedigree (1,1,1,1,1)
  calculated from max value assuming lognormal distribution
  EcoSpold01Location=UCTE
- rolling mill: 1.62e-9 unit; lognormal variance with pedigree 0.356, pedigree (3,4,5,5,1)
  EcoSpold01Location=RER
- heat, district or industrial, other than natural gas: 0 MJ; pedigree (1,1,1,1,1)
  properties: heating value, net 1 MJ
- lime, hydrated, loose weight: 5.42e-5 kg; lognormal variance with pedigree 0.052, pedigree (1,1,5,5,1)
  EcoSpold01Location=CH
  calculated from max value assuming lognormal distribution
  properties: wet mass 1 kg, water content 0.00300903, dry mass 0.997 kg
- sodium dichromate: 0.00015 kg; lognormal variance with pedigree 0.042, pedigree (1,1,5,5,1)
  calculated from max value assuming lognormal distribution
  EcoSpold01Location=RER
  properties: wet mass 1 kg, dry mass 1 kg
- silicon carbide: 4.47e-5 kg; lognormal variance with pedigree 0.042, pedigree (1,1,5,5,1)
  EcoSpold01Location=RER
  calculated from max value assuming lognormal distribution
  properties: dry mass 1 kg, carbon content, fossil 0.3, wet mass 1 kg, heating value, net 9.08 MJ
- basic oxygen furnace waste: -0.000193 kg; lognormal variance with pedigree 0.062, pedigree (1,1,5,5,1)
  EcoSpold01Location=CH
  calculated from max value assuming lognormal distribution
  production volume 7.6042e7 kg
    Calculated from the production volume of sheet rolling, steel in proportion to the respective output amounts.
  properties: wet mass 1 kg, dry mass 1 kg
- sulfuric acid: 0.00418 kg; lognormal variance with pedigree 0.052, pedigree (1,1,5,5,1)
  calculated from max value assuming lognormal distribution
  EcoSpold01Location=RER
  properties: dry mass 1 kg, wet mass 1 kg
- steel, unalloyed: 0.0855 kg; lognormal variance with pedigree 0.068, pedigree (4,5,5,5,1)
  EcoSpold01Location=RER
  properties: dry mass 1 kg, wet mass 1 kg, carbon content, fossil 0.0025
  note on carbon content, fossil: Unalloyed steels or carbon steels are those in which the level of an individual element in no case reaches or exceeds the limiting concentration given in Tab. 3.1 ecoinvent v2.2 report 10_partII. Assumed to have a C content of 0.25%
- chemical, inorganic: 1.58e-8 kg; lognormal variance with pedigree 0.162, pedigree (1,1,5,5,1)
  EcoSpold01Location=GLO
  calculated from max value assuming lognormal distribution
  properties: carbon content, fossil 0.003, dry mass 1 kg, wet mass 1 kg
  note on carbon content, fossil: This dataset is an unweighted average of 20 inorganic substances (listed in Tab 88.1, ecoinvent v2.2 report 8, part II), being part of the top100 chemicals included in this database. The C-content has also been calculated as an unweighted average of the C content of the substances composing this dataset.
- sawnwood, softwood, raw, dried (u=20%): 1.85e-6 m3; lognormal variance with pedigree 0.042, pedigree (1,1,5,5,1)
  EcoSpold01Location=RER
  calculated from max value assuming lognormal distribution
  properties: heating value, net 6514.84 MJ, carbon content, non-fossil 0.494, water content 0.2, dry mass 450 kg, wet mass 540 kg
  note on carbon content, non-fossil: C content of dry mass is 0.494 kgC/kg dry wood (ecoinvent v2.2 report 9)
- sludge from steel rolling: -0.0201 kg; lognormal variance with pedigree 0.1006, pedigree (2,5,5,5,1)
  EcoSpold01Location=CH
  production volume 7.9194e9 kg
    (same comment as for basic oxygen furnace waste)
  properties: water content 0.25, dry mass 0.8 kg, wet mass 1 kg, carbon content, fossil 0.0123943
- water, deionised: 0.135 kg; name water_deionised_input; lognormal variance with pedigree 0.262, pedigree (1,1,5,5,1)
  EcoSpold01Location=CH
  calculated from max value assuming lognormal distribution
  properties: wet mass 1 kg
- waste mineral oil: -0.000888 kg; lognormal variance with pedigree 0.06, pedigree (1,5,5,5,1)
  EcoSpold01Location=CH
  production volume 3.49872e8 kg
    (same comment as for basic oxygen furnace waste)
  properties: carbon content, fossil 0.864444, water content 0.111111, dry mass 0.9 kg, wet mass 1 kg, heating value, net 34.7 MJ
  note on carbon content, fossil: Tab A.6, ecoinvent v2.2 report 13_I. C content has been calculated after data in the tables, and then referred to 1 kg DM
  note on heating value, net: Value taken from the general comment of the treatment dataset.
- steel, low-alloyed: 0.000236 kg; lognormal variance with pedigree 0.042, pedigree (1,1,5,5,1)
  calculated from max value assuming lognormal distribution
  EcoSpold01Location=RER
  properties: carbon content, fossil 0.005, dry mass 1 kg, wet mass 1 kg
  note on carbon content, fossil: Low alloyed steel composition given in Tab. 3.2 ecoinvent v2.2 report 10_partII. Steel assumed to have a C content of 0.5%
- steel in car shredder residue: -0.0079 kg; lognormal variance with pedigree 0.162, pedigree (1,1,5,5,1)
  EcoSpold01Location=CH
  calculated from max value assuming lognormal distribution
  production volume 3.1126e9 kg
    (same comment as for basic oxygen furnace waste)
  properties: wet mass 1 kg, dry mass 1 kg
- kraft paper: 2.84e-5 kg; lognormal variance with pedigree 0.342, pedigree (1,1,5,5,1)
  EcoSpold01Location=RER
  properties: dry mass 0.945 kg, carbon content, non-fossil 0.41662, wet mass 1 kg, heating value, net 14.11 MJ, water content 0.0582011, carbon content, fossil 0.0020219
  note on carbon content, non-fossil: Biogenic C content was calculated after biogenic C contents of chemicals used in the production of the paper (in Tab 9.4 ecoinvent v2.2 report 11_III, part 9). The cellulose content in 1 kg of paper (on a wet mas basis) was estimated as (1-chemical content), C content of cellulose was considered 0.44 kgC/kg dry mass (ecoinvent v2.2 report, n 15a, pg 40)
  note on carbon content, fossil: Fossil C content was calculated after fossil C contents of chemicals used in the production of the paper (in Tab 9.4 ecoinvent v2.2 report 11_III, part 9).
- hydrochloric acid, without water, in 30% solution state: 0.000397 kg; lognormal variance with pedigree 0.042, pedigree (1,1,5,5,1)
  EcoSpold01Location=RER
  calculated from max value assuming lognormal distribution
  properties: wet mass 1 kg, dry mass 1 kg, heating value, net 3.32 MJ
- packaging film, low density polyethylene: 8.49e-5 kg; lognormal variance with pedigree 0.042, pedigree (1,1,5,5,1)
  calculated from max value assuming lognormal distribution
  EcoSpold01Location=RER
  properties: dry mass 1 kg, wet mass 1 kg, carbon content, fossil 0.857143, heating value, net 42.47 MJ
  note on carbon content, fossil: Polyethylene is formed out of a huge amount of ethylene monomers (C2H4) (ecoinvent v2.2 report 11_II). MW=28 g/mol
- heat, district or industrial, natural gas: 0 MJ; pedigree (1,1,1,1,1)
  calculated from max value assuming lognormal distribution
  EcoSpold01Location=RER
  properties: heating value, net 1 MJ
- lubricating oil: 0.00459 kg; lognormal variance with pedigree 0.722, pedigree (1,1,5,5,1)
  calculated from max value assuming lognormal distribution
  EcoSpold01Location=RER
  properties: carbon content, fossil 0.75, wet mass 1 kg, dry mass 1 kg, heating value, net 40.2 MJ
  note on carbon content, fossil: Lubricating oil is produced from diesel. C-content/dry mass of fats and oils considered 75%, from: ecoinvent v2.2 report, n 15a, pg 40
  note on heating value, net: Literature value, Source: IPCC 2006, 2006 IPCC Guidelines for National Greenhouse Gas Inventories, Prepared by the National Greenhouse Gas Inventories Programme, Eggleston H.S., Buendia L., Miwa K., Ngara T. and Tanabe K. (eds). Published: IGES, Japan
- municipal solid waste: 0 kg; pedigree (1,1,1,1,1)
  EcoSpold01Location=CH
  production volume 0 kg
    (same comment as for basic oxygen furnace waste)
  properties: wet mass 1 kg, heating value, net 11.74 MJ, dry mass 0.771 kg, carbon content, non-fossil 0.261655, carbon content, fossil 0.171549, water content 0.297017
  note on carbon content, non-fossil: MSW composition in tab 4.1, ecoinvent v2.2 report 13_I. C content referred to 1 kg DM
- electricity, medium voltage: 0.00282837, 0.00054236, 0.0091051, 0.132426, 0.0186654, 0.0608148 kWh (6 entries); lognormal variance with pedigree 0.082, pedigree (1,1,5,5,1)
  calculated from max value assuming lognormal distribution
  EcoSpold01Location=UCTE
- heat, district or industrial, other than natural gas: 2.9403e-5, 0.0725088 MJ (2 entries); lognormal variance with pedigree 0.092, pedigree (1,1,5,5,1)
- heat, district or industrial, natural gas: 0.0151229, 0.981237 MJ (2 entries); lognormal variance with pedigree 0.072, pedigree (1,1,5,5,1)
  calculated from max value assuming lognormal distribution
  EcoSpold01Location=RER
- municipal solid waste: -5.05042e-7, -1.27258e-7, -1.81859e-7, -0.000357186 kg (4 entries); lognormal variance with pedigree 0.0606, pedigree (2,5,5,5,1)
  EcoSpold01Location=CH
  production volume 1.41052e8 kg

## Inputs from nature
- Water, cooling, unspecified natural origin [natural resource, in water]: 0.0135834 m3; name water_cooling_UNO_input; source Byers, W. 2003; lognormal variance with pedigree 0.0612, pedigree (2,3,5,5,3)
  Calculated based on literature, (Vionnet, S., Quantis Water Database - Technical Report, 2012). Water is used for steel conditioning, which basically means it is directly sprayed on the hot metal to cool it down. In this case the water comes into contact with the product, i.e. It is treated as process water, not cooling water. It includes the processes: hot rolling, acid pockling, cold rolling and finishing. The process ends when finished, rolled metal sheets leaves the plant.

## Emissions to nature
- Aluminium [water, unspecified]: 1.42e-6 kg; lognormal variance with pedigree 0.1406, pedigree (2,5,5,5,1)
- Nitrogen oxides [air, unspecified]: 0.000101 kg; lognormal variance with pedigree 1.372, pedigree (1,1,5,5,1)
  calculated from max value assuming lognormal distribution
- Suspended solids, unspecified [water, unspecified]: 0.000159 kg; lognormal variance with pedigree 0.1006, pedigree (2,5,5,5,1)
- TOC, Total Organic Carbon [water, unspecified]: 1.33e-5 kg; lognormal variance with pedigree 0.42, pedigree (5,5,5,5,5)
- Sulfur dioxide [air, unspecified]: 2.18e-5 kg; lognormal variance with pedigree 0.162, pedigree (1,1,5,5,1)
  calculated from max value assuming lognormal distribution
- Chromium [air, unspecified]: 4.18e-9 kg; lognormal variance with pedigree 0.7, pedigree (1,5,5,5,1)
- Copper, ion [water, unspecified]: 2.9e-7 kg; lognormal variance with pedigree 0.1406, pedigree (2,5,5,5,1)
- DOC, Dissolved Organic Carbon [water, unspecified]: 1.33e-5 kg; lognormal variance with pedigree 0.42, pedigree (5,5,5,5,5)
- Particulates, > 10 um [air, unspecified]: 4.64e-5 kg; lognormal variance with pedigree 0.1, pedigree (1,5,5,5,1)
- Hydrogen chloride [air, unspecified]: 1.29e-7 kg; lognormal variance with pedigree 0.18, pedigree (1,5,5,5,1)
- Iron [soil, unspecified]: 4.52e-5 kg; lognormal variance with pedigree 0.732, pedigree (1,1,5,5,1)
  calculated from max value assuming lognormal distribution
- Hydrogen [air, unspecified]: 7.27e-10 kg; lognormal variance with pedigree 0.072, pedigree (1,1,5,5,1)
  calculated from max value assuming lognormal distribution
- Sulfate [air, unspecified]: 3.46e-8 kg; lognormal variance with pedigree 0.072, pedigree (1,1,5,5,1)
  calculated from max value assuming lognormal distribution
- NMVOC, non-methane volatile organic compounds, unspecified origin [air, unspecified]: 2.34e-5 kg; lognormal variance with pedigree 0.18, pedigree (1,5,5,5,1)
- Oils, unspecified [soil, unspecified]: 3.85e-5 kg; lognormal variance with pedigree 0.042, pedigree (1,1,5,5,1)
  calculated from max value assuming lognormal distribution
- Iron, ion [water, unspecified]: 4.65e-6 kg; lognormal variance with pedigree 0.1406, pedigree (2,5,5,5,1)
- Hydrocarbons, unspecified [water, unspecified]: 1.89e-6 kg; lognormal variance with pedigree 0.3606, pedigree (2,5,5,5,1)
- Water [air, unspecified]: 0.00529058 m3; name water_to_air_unspecified; = (water_deionised_input/1000)*fraction_WDI_to_air+water_cooling_UNO_input*fraction_CW_to_air; lognormal variance with pedigree 0.130025, pedigree (4,4,5,2,4)
  Calculated value based on literature values and expert opinion. See comments in the parametres' comment field.
  property fraction, origin: unspecified 0.994897; name fraction_origin_unspecified
  property fraction, origin: fresh water 0.00510341; name fraction_origin_fresh_water
  property fraction, origin: salt water 0; name fraction_origin_salt_water
- Zinc, ion [water, unspecified]: 2.24e-7 kg; lognormal variance with pedigree 0.1406, pedigree (2,5,5,5,1)
- Water [water, unspecified]: 0.00842785 m3; name water_to_water_unspecified; = (water_deionised_input/1000)*(1-fraction_WDI_to_air)+water_cooling_UNO_input*(1-fraction_CW_to_air); lognormal variance with pedigree 0.130025, pedigree (4,4,5,2,4)
  (same comment as for Water)
  property carbon content, non-fossil 0; name C_content_non_fossil
  property fraction, origin: unspecified 0.987185; name fraction_origin_unspecified_Ww
  property fraction, origin: salt water 0; name fraction_origin_salt_water_Ww
  property fraction, origin: fresh water 0.0128147; name fraction_origin_fresh_water_Ww
  property carbon content, fossil 0; name C_content_fossil
  property wet mass 1000 kg; name WM
  property dry mass 0 kg; name DM
  property water in wet mass 1000 kg; name WWM
- Chromium, ion [water, unspecified]: 5.4e-7 kg; lognormal variance with pedigree 0.1406, pedigree (2,5,5,5,1)
- Manganese [water, unspecified]: 6.12e-7 kg; lognormal variance with pedigree 0.1406, pedigree (2,5,5,5,1)
- Nickel, ion [water, unspecified]: 8.49e-7 kg; lognormal variance with pedigree 0.1406, pedigree (2,5,5,5,1)
- COD, Chemical Oxygen Demand [water, unspecified]: 4.13e-5 kg; lognormal variance with pedigree 0.1006, pedigree (2,5,5,5,1)
- Mercury [water, unspecified]: 3e-8 kg; lognormal variance with pedigree 0.1406, pedigree (2,5,5,5,1)
- Cadmium, ion [water, unspecified]: 1.5e-7 kg; lognormal variance with pedigree 0.1406, pedigree (2,5,5,5,1)
- Chloride [water, unspecified]: 1.34e-6 kg; lognormal variance with pedigree 0.1006, pedigree (2,5,5,5,1)
- BOD5, Biological Oxygen Demand [water, unspecified]: 4.13e-5 kg; lognormal variance with pedigree 0.42, pedigree (5,5,5,5,5)
- Particulates, > 2.5 um, and < 10um [air, unspecified]: 4.69e-5 kg; lognormal variance with pedigree 0.18, pedigree (1,5,5,5,1)
- Lead [water, unspecified]: 3e-7 kg; lognormal variance with pedigree 0.1406, pedigree (2,5,5,5,1)
- Chromium VI [water, unspecified]: 3e-8 kg; lognormal variance with pedigree 0.1406, pedigree (2,5,5,5,1)

## Sampling procedure
Literature

## Extrapolations
none This dataset has been copied from an original dataset covering the geography RER. The uncertainty has been adjusted accordingly.

## Review by Roland Hischier 2003-07-14
Passed.
