# ethylene glycol production

Dataset: EcoSpold 2, unit process
Geography: RoW
Time period: 1997-01-01 to 2021-12-31
Technology level: current
Classification: ISIC rev.4 ecoinvent: 2011:Manufacture of basic chemicals
Classification: EcoSpold01Categories: chemicals/organics
Synonyms: monoethylene glycol; 2-hydroxyethanol; ethylene alcohol
Tags: combined production
Scenario: Business-as-Usual
System model: Allocation, cut-off by classification
Generated by: Mike Chudacoff
Published in: Althaus H.-J. 2007
Database: ecoinvent
isCopyrightProtected: true
accessRestrictedTo: 1

## General comment
This Multi-Output inventory is based on literature sources that are based on actual plant throughputs and measurements. The oxidation of ethylene oxide leads to three coproducts: ethylene glycol, diethylene glycol (DEG) and triethylene glycol (TEG).

## Included activities end
includes precursors, transports and infrastructure

## Geography
RER

## Technology
represents a current cross-section of actual plants in Europe

## Parameters
- efficiency: 1 dimensionless; name yield; lognormal variance with pedigree 0.0167, pedigree (4,2,4,1,1)
  Calculated value based on literature (IPPC, 2002). Output relative to input (requires additional specification).
- sum_of_the_reference_products: 1.16969 dimensionless; lognormal variance with pedigree 0.0006, pedigree (1,1,1,1,1)
  Calculated value; sum of the reference products.
- ethylene_oxide_input: 0.85297 kg; name ethylene_oxide_input_P; lognormal variance with pedigree 0.0006, pedigree (1,1,1,1,1)
  Calculated value. The amount of ethylene oxide on the input needed for production of 1 kg ethylene glycol, 0.1212 kg diethylene glycol and 0.04848 kg triethylene glycol produced in the multi-output activity.

## Reference product
- ethylene glycol: 0 kg; name ethylene_glycol_RP; CPC 34170: Ethers, alcohol peroxides, ether peroxides, epoxides, acetals and hemiacetals, and their halogenated, sulphona[…]; By-product classification allocatable product; CAS 107-21-1
  EcoSpold01Location=RER
  Monoethylene glycol (MEG, C2H6O2) is a hydrocarbon compound with two hydroxy (alcohol) groups. It is a clear colourless liquid with a freezing point of - 12.6 °C and a boiling point of 197.3 °C. It is a stable, non-corrosive liquid. This chemical is very hygroscopic (will take up water) and reacts strongly with ethers and oxidizing agents. Ethylene glycol is classified as harmful by the EC Hazardous Substances directive. It is soluble in water, ethyl alcohol and ethers.
  There is a broad range of applications for ethylene glycol. Over half of the glycol is used for the production of polyester fibres, while PET production accounts for another fifth. When combined with corrosion inhibitors, it is used as antifreeze in automobiles, pumps and industrial heating and cooling equipment. Films and resins consume another 10% of ethylene glycol production. Other applications are as a humectant (moisture absorbing agent), as a plasticizer and as a softening agent.
  DEG is used in the fibre industry and as a tobacco humectant while TEG is used in the manufacture of celllophane for food packaging.
  Additional sources:
  Wells 1999. G. Margaret Wells, "Handbook of Petrochemicals and Processes", 2nd edition, Ashgate, 1999
  production volume 0 kg; name ethylene_glycol_RP_PW
    Al-AhmedRiyah A. (2001). Ethylene glycol - A global perspective. http://www.sabic.com/asia/en/newsandmediarelations/speeches/20010327.aspx. Forecasted capacity calculated at 90% capacity utilisation.
  property heating value, net 23.44 MJ
    LHV is calculated based on the elemental composition of the substance. Based on the CAS number of the substance (000107-21-1), the chemical formula of the substance is found to be: C2H6O2, (PubChem 2020).
    Reference: Kim, S., Chen, J., Cheng, T., Gindulyte, A., He, J., He, S., Li, Q., Shoemaker, B. A., Thiessen, P. A., Yu, B., Zaslavsky, L., Zhang, J., & Bolton, E. E. (2019). PubChem 2019 update: improved access to chemical data. Nucleic acids research, 47(D1), D1102–D1109. https://doi.org/10.1093/nar/gky1033
  property price 0.642 EUR2005; name ethylene_glycol_RP_price_EUR2005
    Temporary price data. Calculated as 90% of purchasers price based on: 2004 prices for Import/Export data for world-leading producing country (US$ and tonnes) from UN Commodity Trade Statistics Database (http://data.un.org/Explorer.aspxDatabase [Accessed 2 July 2010]). Commodity: Ethylene glycol (ethanediol)
  property carbon content 0.387097
    carbon content on a dry matter basis (reserved; not for manual entry)
  properties: carbon content, non-fossil 0, water content 0, dry mass 1 kg, wet mass 1 kg, carbon content, fossil 0.387097, water in wet mass 0 kg, carbon allocation 0.387097 kg
- diethylene glycol: 1 kg; name diethylene_glycol_RP; CPC 34170: Ethers, alcohol peroxides, ether peroxides, epoxides, acetals and hemiacetals, and their halogenated, sulphona[…]; By-product classification allocatable product; CAS 111-46-6
  Literature value.
  production volume 2.11437e9 kg
    Calculated value based on ethylene/diethylene relationship.
  property heating value, net 25.14 MJ
    LHV is calculated based on the elemental composition of the substance. Based on the CAS number of the substance (000111-46-6), the chemical formula of the substance is found to be: C4H10O3, (PubChem 2020).
    Reference: Kim, S., Chen, J., Cheng, T., Gindulyte, A., He, J., He, S., Li, Q., Shoemaker, B. A., Thiessen, P. A., Yu, B., Zaslavsky, L., Zhang, J., & Bolton, E. E. (2019). PubChem 2019 update: improved access to chemical data. Nucleic acids research, 47(D1), D1102–D1109. https://doi.org/10.1093/nar/gky1033
  property price 0.601 EUR2005; name diethylene_glycol_RP_price_EUR2005
    Temporary price data. Calculated as 90% of purchasers price based on: 2004 prices for Import/Export data for world-leading producing country (US$ and tonnes) from UN Commodity Trade Statistics Database (http://data.un.org/Explorer.aspxDatabase [Accessed 2 July 2010]). Commodity: 2,2'-oxydiethanol(diethylene glycol)
  property calculation property, kg 1 kg; name diethylene_glycol_RP_calc_prop_kg
    A generic property to be defined individually in each dataset. For use in mathematical relations.
  property carbon content 0.45283
    carbon content on a dry matter basis (reserved; not for manual entry)
  properties: carbon content, fossil 0.45283, water content 0, carbon content, non-fossil 0, dry mass 1 kg, wet mass 1 kg, water in wet mass 0 kg, carbon allocation 0.45283 kg
- triethylene glycol: 0 kg; name triethylene_glycol_RP; By-product classification allocatable product; CPC 34170: Ethers, alcohol peroxides, ether peroxides, epoxides, acetals and hemiacetals, and their halogenated, sulphona[…]; CAS 112-27-6
  Literature value.
  production volume 0 kg
    Calculated value based on ethylene/triethylene relationship.
  property price 0.601 EUR2005; name triethylene_glycol_RP_price_EUR2005
    Temporary price data. Calculated as 90% of purchasers price based on: Price for diethylene glycol applied, as price ranges do not differ significantly (http://www.icis.com/Articles/2005/12/22/629649/chemical-profile-triethylene-glycol-teg.html and http://www.icis.com/Articles/2007/11/19/9079180/Chemical-profile-Diethylene-Glycol.html accessed 2011.01.24)
  property carbon content, non-fossil 0; name C_content_non_fossil
  property water content 0; name water_content
  property wet mass 1 kg; name WM
  property carbon content, fossil 0.479881; name C_content_fossil
  property water in wet mass 0 kg; name WWM
  property dry mass 1 kg; name DM
  property heating value, net 25.84 MJ
    LHV is calculated based on the elemental composition of the substance. Based on the CAS number of the substance (000112-27-6), the chemical formula of the substance is found to be: C6H14O4, (PubChem 2020).
    Reference: Kim, S., Chen, J., Cheng, T., Gindulyte, A., He, J., He, S., Li, Q., Shoemaker, B. A., Thiessen, P. A., Yu, B., Zaslavsky, L., Zhang, J., & Bolton, E. E. (2019). PubChem 2019 update: improved access to chemical data. Nucleic acids research, 47(D1), D1102–D1109. https://doi.org/10.1093/nar/gky1033
  property carbon content 0.479881
    carbon content on a dry matter basis (reserved; not for manual entry)
  properties: carbon allocation 0.479881 kg

## Inputs from technosphere
- chemical factory, organics: 4.1451e-10 unit; = ((4.8485E-10*ethylene_glycol_RP)/sum_of_the_reference_products)+((4.8485E-10* triethylene_glycol_RP)/sum_of_the_reference_products)+((4.8485E-10* diethylene_glycol_RP)/sum_of_the_reference_products); lognormal variance with pedigree 0.0527, pedigree (2,2,5,5,1)
  Estimation. Data was estimated based on the dataset "chemical plant, organics". This module assumes a built area of about 4.2 ha, an average output of 50'000 t/a, and plant life of fifty years.
  EcoSpold01Location=RER
  Uncertainty: infrastructure
- electricity, medium voltage: 0 kWh; pedigree (1,1,1,1,1)
  EcoSpold01Location=UCTE
  Estimation. The EO/EG process is both a consumer and a producer of energy. The EO section is typically a steam producer, the glycols section uses heat for dewatering. Catalyst selectivity and the relative size of the EO and EG parts determine if a plant is a net energy producer or importer.
  It must be assumed that some steam is utilized for glycol distillation.
  Uncertainty: power usage
- ethylene oxide: 0.830189 kg; name ethylene_oxide_input; = ((3*44*1/yield)/150*triethylene_glycol_RP)+((2*44*1/yield)/106*diethylene_glycol_RP)+((44*1/yield)/62*ethylene_glycol_RP); lognormal variance with pedigree 0.0527, pedigree (2,2,5,5,1)
  Literature value.
  44 g/mol is a molecular weight of ethylene oxide (C2H4O).
  62 g/mol is a molecular weight of ethylen glycol (C2H6O2).
  106 g/mol is a molecular weight of diethylene glycol (C4H10O3).
  150 g/mol is a molecular weight of triethylene glycol (C6H14O4).
  EcoSpold01Location=RER
  Uncertainty: precursor
  properties: wet mass 1 kg, carbon content, fossil 0.545455, heating value, net 27.53 MJ, dry mass 1 kg
- electricity, medium voltage: 0.00492453, 0.000944312, 0.015853, 0.230568, 0.0324987, 0.105886 kWh (6 entries); lognormal variance with pedigree 0.0527, pedigree (2,2,5,5,1)
  (same comment as for electricity, medium voltage)

## Inputs from nature
- Water, unspecified natural origin [natural resource, in water]: 0.0062176 m3; = ((0.0072727*ethylene_glycol_RP)/sum_of_the_reference_products)+((0.0072727* triethylene_glycol_RP)/sum_of_the_reference_products)+((0.0072727* diethylene_glycol_RP)/sum_of_the_reference_products); lognormal variance with pedigree 0.21, pedigree (5,5,5,5,4)
  Estimation.
  Uncertainty: estimated with data from a large chem. plant

## Emissions to nature
All rows: lognormal variance with pedigree 0.0527, pedigree (2,2,5,5,1)
- Acetaldehyde [air, urban air close to ground]: 1.65168e-6 kg; = (((0.000001697/ethylene_oxide_input_P)*3*44*1/yield)/150*triethylene_glycol_RP)+(((0.000001697/ethylene_oxide_input_P)*2*44*1/yield)/106*diethylene_glycol_RP)+(((0.000001697/ethylene_oxide_input_P)*44*1/yield)/62*ethylene_glycol_RP)
  Literature value.
  44 g/mol is a molecular weight of ethylene oxide (C2H4O).
  62 g/mol is a molecular weight of ethylen glycol (C2H6O2).
  106 g/mol is a molecular weight of diethylene glycol (C4H10O3).
  150 g/mol is a molecular weight of triethylene glycol (C6H14O4).
  1.697E-06 kg is the amount of emissions of acetaldehyde based on literature.
  Uncertainty: emission
- DOC, Dissolved Organic Carbon [water, surface water]: 8.84459e-5 kg; = (((0.000090873/ethylene_oxide_input_P)*3*44*1/yield)/150*triethylene_glycol_RP)+(((0.000090873/ethylene_oxide_input_P)*2*44*1/yield)/106*diethylene_glycol_RP)+(((0.000090873/ethylene_oxide_input_P)*44*1/yield)/62*ethylene_glycol_RP)
  Literature value.
  44 g/mol is a molecular weight of ethylene oxide (C2H4O).
  62 g/mol is a molecular weight of ethylen glycol (C2H6O2).
  106 g/mol is a molecular weight of diethylene glycol (C4H10O3).
  150 g/mol is a molecular weight of triethylene glycol (C6H14O4).
  9.087E-05 kg is the amount of emissions of DOC based on literature.
  Uncertainty: emission
- TOC, Total Organic Carbon [water, surface water]: 8.84459e-5 kg; = (((0.000090873/ethylene_oxide_input_P)*3*44*1/yield)/150*triethylene_glycol_RP)+(((0.000090873/ethylene_oxide_input_P)*2*44*1/yield)/106*diethylene_glycol_RP)+(((0.000090873/ethylene_oxide_input_P)*44*1/yield)/62*ethylene_glycol_RP)
  Literature value. The reduction efficiency for TOC of the wastewater treatment plant is 60-70%,
  44 g/mol is a molecular weight of ethylene oxide (C2H4O).
  62 g/mol is a molecular weight of ethylen glycol (C2H6O2).
  106 g/mol is a molecular weight of diethylene glycol (C4H10O3).
  150 g/mol is a molecular weight of triethylene glycol (C6H14O4).
  9.0873E-05 kg is the amount of emissions of TOC based on literature.
  Uncertainty: emission
- BOD5, Biological Oxygen Demand [water, surface water]: 0.000339299 kg; = (((0.00034861/ethylene_oxide_input_P)*3*44*1/yield)/150*triethylene_glycol_RP)+(((0.00034861/ethylene_oxide_input_P)*2*44*1/yield)/106*diethylene_glycol_RP)+(((0.00034861/ethylene_oxide_input_P)*44*1/yield)/62*ethylene_glycol_RP)
  Literature value.
  44 g/mol is a molecular weight of ethylene oxide (C2H4O).
  62 g/mol is a molecular weight of ethylen glycol (C2H6O2).
  106 g/mol is a molecular weight of diethylene glycol (C4H10O3).
  150 g/mol is a molecular weight of triethylene glycol (C6H14O4).
  0.00034861 kg is the amount of emissions of BOD based on literature.
  Uncertainty: emission
- Ethene [air, urban air close to ground]: 7.07846e-6 kg; = (((0.0000072727/ethylene_oxide_input_P)*3*44*1/yield)/150*triethylene_glycol_RP)+(((0.0000072727/ethylene_oxide_input_P)*2*44*1/yield)/106*diethylene_glycol_RP)+(((0.0000072727/ethylene_oxide_input_P)*44*1/yield)/62*ethylene_glycol_RP)
  Literature value.
  44 g/mol is a molecular weight of ethylene oxide (C2H4O).
  62 g/mol is a molecular weight of ethylen glycol (C2H6O2).
  106 g/mol is a molecular weight of diethylene glycol (C4H10O3).
  150 g/mol is a molecular weight of triethylene glycol (C6H14O4).
  7.27E-06 kg is the amount of emissions of ethene based on literature.
  Uncertainty: emission
- COD, Chemical Oxygen Demand [water, surface water]: 0.000339299 kg; = (((0.00034861/ethylene_oxide_input_P)*3*44*1/yield)/150*triethylene_glycol_RP)+(((0.00034861/ethylene_oxide_input_P)*2*44*1/yield)/106*diethylene_glycol_RP)+(((0.00034861/ethylene_oxide_input_P)*44*1/yield)/62*ethylene_glycol_RP)
  (same comment as for BOD5, Biological Oxygen Demand)

## Sampling procedure
see technology

## Extrapolations
see technology This dataset has been copied from an original dataset covering the geography RER. The uncertainty has been adjusted accordingly.

## Review by Heiko Kunst 2010-02-24
passed.
